Simulations Management toolbox: Version=159
  Folder Weather
    Manager ClimateController
      AllowControl = True
      EnableDate = 01/01/1972 00:00:00
      WithinYearControl = False
      ControlStart =
      ControlEnd =
      RainfallMultiplier = 0.9
      RainfallAddition = 0
      RadiationMultiplier = 1
      RadiationAddition = 0
      MinTMultiplier = 1
      MinTAddition = 0
      MaxTMultiplier = 1
      MaxTAddition = 0
      WindMultiplier = 1
      WindAddition = 0
      VPMultiplier = 1
      VPAddition = 0
```csharp
using Newtonsoft.Json;
using APSIM.Shared.Utilities;
using Models.Interfaces;
using Models.Soils;
using Models.PMF;
using Models.Core;
using System.Xml.Serialization;
using System;
using System.Linq;
using Models.Soils.Nutrients;
using Models.Climate;

namespace Models
{
    [Serializable]
    public class Script : Model
    {
        // - Links to APSIM models
        [Link] Zone zone;
        [Link] Clock clock;
        [Link] Weather weather;
        [Link] ISummary summary = null;

        // - Paramters for this manager
        [Description("Enable? Set to 'No' to completely disable this manager")] public bool AllowControl { get; set; }

        [Separator("General settings")]
        [Description("Start the climate controls beginning on date (dd/mmm/yyyy): ")] public DateTime EnableDate { get; set; }
        [Description("Implement climate control only during part of the year?")] public bool WithinYearControl { get; set; }
        [Description("Within each year, the first day to start the climate controls is (dd-mmm)")] public string ControlStart { get; set; }
        [Description("Within each year, end last day of climate control is (dd-mmm)")] public string ControlEnd { get; set; }

        [Separator("Rainfall")]
        [Description("Rainfall multiplier (-): ")] public double RainfallMultiplier { get; set; }
        [Description("Rainfall addition (mm): ")] public double RainfallAddition { get; set; }

        [Separator("Radiation")]
        [Description("Radiation multiplier (-): ")] public double RadiationMultiplier { get; set; }
        [Description("Radiation addition (MJ/m2): ")] public double RadiationAddition { get; set; }

        [Separator("Minimum temperature")]
        [Description("Minimum temperature multiplier (-): ")] public double MinTMultiplier { get; set; }
        [Description("Minimum temperature addition (C): ")] public double MinTAddition { get; set; }

        [Separator("Maximum temperature")]
        [Description("Maximum temperature multiplier (-): ")] public double MaxTMultiplier { get; set; }
        [Description("Maximum temperature addition (C): ")] public double MaxTAddition { get; set; }

        [Separator("Wind speed")]
        [Description("Wind speed multiplier (-): ")] public double WindMultiplier { get; set; }
        [Description("Wind speed addition (m/s): ")] public double WindAddition { get; set; }

        [Separator("Vapour pressure")]
        [Description("Vapour pressure multiplier (-): ")] public double VPMultiplier { get; set; }
        [Description("Vapour pressure addition (hPa): ")] public double VPAddition { get; set; }

        [JsonIgnore] public bool DoControl { get; set; }
        [JsonIgnore] public int DoControlInt { get; set; }

        [EventSubscribe("PreparingNewWeatherData")] private void OnDoManagement(object sender, EventArgs e)
        {
            // Check if this manager is enabled
            if ((AllowControl) && (clock.Today >= EnableDate))
            {
                DoControl = true;
                if (WithinYearControl)
                    DoControl = DateUtilities.WithinDates(ControlStart, clock.Today, ControlEnd); 
            }

            if (DoControl)
                DoControlInt = 1;
            else
                DoControlInt = 0;

            if (DoControl)
            {
                // do the weather alterations 
                weather.Rain = RainfallMultiplier * weather.Rain + RainfallAddition;
                weather.Radn = RadiationMultiplier * weather.Radn + RadiationAddition;
                weather.MinT = MinTMultiplier * weather.MinT + MinTAddition;
                weather.MaxT = MaxTMultiplier * weather.MaxT + MaxTAddition;
                weather.Wind = WindMultiplier * weather.Wind + WindAddition;
                weather.VP = VPMultiplier * weather.VP + VPAddition;
            }
        }
    }
}
```
    Manager PatchWeather
      patchFileName =
      date1 =
      date2 =
      PatchRain = False
      PatchMinT = False
      PatchMaxT = False
      PatchRadn = False
      PatchCO2 = False
      PatchVP = False
```csharp
using Models.Soils;
using System.Diagnostics;
using System.Collections.Generic;
using System.IO;
using System.Data;
using System.Linq;
using System;
using Models.Interfaces;
using Models.Core;
using Models.PMF;
using APSIM.Shared.Utilities;
namespace Models
{
    [Serializable]
    [System.Xml.Serialization.XmlInclude(typeof(Model))]
    public class Script : Model
    {
        [Link] Clock clock;
        [Link] IWeather weather;
        [Link] Simulation simulation;
        
        private DataTable data;
        private List<DateTime> dates = new List<DateTime>();
        private DateTime startDate;
        private DateTime endDate;

        [Description("Name of file containing weather data to patch:")]
        public string patchFileName { get; set; }

        [Description("Date to start patching weather data (can be blank):")]
        public string date1 { get; set; }

        [Description("Date to stop patching weather data: (can be blank)")]
        public string date2 { get; set; }

        [Separator("Which data items should be patched")]

        [Description("Patch 'Rain'?")] public bool PatchRain { get; set; }
        
        [Description("Patch 'MinT'?")] public bool PatchMinT { get; set; }

        [Description("Patch 'MaxT'?")] public bool PatchMaxT { get; set; }

        [Description("Patch 'Radn'?")] public bool PatchRadn { get; set; }

        [Description("Patch 'CO2'?")] public bool PatchCO2 { get; set; }

        [Description("Patch 'VP'?")] public bool PatchVP { get; set; }
        
        [EventSubscribe("StartOfSimulation")]
        private void OnStartOfSimulation(object sender, EventArgs e)
        {
            // Ensure filename is relative to the directory where the .apsimx file is located.
            string fullFileName = PathUtilities.GetAbsolutePath(patchFileName, simulation.FileName);
        
            // Read in data.
            data = ApsimTextFile.ToTable(fullFileName);
            foreach (DataRow row in data.Rows)
                dates.Add(DataTableUtilities.GetDateFromRow(row));
            
            // Ensure startDate and endDate always have a value.
            if (string.IsNullOrEmpty(date1))
                startDate = clock.StartDate;
            else
                startDate = DateTime.Parse(date1);

             if (string.IsNullOrEmpty(date2))
                endDate = clock.EndDate;
            else
                endDate = DateTime.Parse(date2);

        }

        [EventSubscribe("PreparingNewWeatherData")]
        private void OnPreparingNewWeatherData(object sender, EventArgs e)
        {
            if (clock.Today >= startDate && clock.Today <= endDate)
            {
                // check to see if we have a row of data for today.
                int rowIndex = dates.IndexOf(clock.Today);
                if (rowIndex != -1)
                {
                    // Yes we do have data for today so patch the data.
                    foreach (DataColumn column in data.Columns)
                    {
                        if (PatchRain && (column.ColumnName.Equals("Rain", StringComparison.InvariantCultureIgnoreCase)))
                            weather.Rain = Convert.ToDouble(data.Rows[rowIndex][column.ColumnName]);
                        else if (PatchMinT && (column.ColumnName.Equals("MaxT", StringComparison.InvariantCultureIgnoreCase)))
                            weather.MaxT = Convert.ToDouble(data.Rows[rowIndex][column.ColumnName]);
                        else if (PatchMaxT && (column.ColumnName.Equals("MinT", StringComparison.InvariantCultureIgnoreCase)))
                            weather.MinT = Convert.ToDouble(data.Rows[rowIndex][column.ColumnName]);
                        else if ((PatchRadn && column.ColumnName.Equals("Radn", StringComparison.InvariantCultureIgnoreCase)))
                            weather.Radn = Convert.ToDouble(data.Rows[rowIndex][column.ColumnName]);
                        else if (PatchCO2 && (column.ColumnName.Equals("CO2", StringComparison.InvariantCultureIgnoreCase)))
                            weather.CO2 = Convert.ToDouble(data.Rows[rowIndex][column.ColumnName]);
                        else if (PatchVP && (column.ColumnName.Equals("VP", StringComparison.InvariantCultureIgnoreCase)))
                            weather.VP = Convert.ToDouble(data.Rows[rowIndex][column.ColumnName]);
                    }
                }
            }
        }
    }
}
```
  Folder Plant
    Manager Sow on a fixed date
      Crop =
      SowDate = 24-Jul
      CultivarName = Amethyst
      SowingDepth = 50
      RowSpacing = 750
      Population = 6
```csharp
using APSIM.Shared.Utilities;
using Models.Utilities;
using Models.Soils;
using Models.PMF;
using Models.Core;
using System;
using System.Linq;

namespace Models
{
    [Serializable]
    public class Script : Model
    {
        [Link] Clock Clock;
        [Link] Fertiliser Fertiliser;
        [Link] Summary Summary;
        [Link] Soil Soil;
        
        [Description("Crop")]
        public IPlant Crop { get; set; }

        [Description("Sowing date (d-mmm)")]
        public string SowDate { get; set; }

        [Display(Type = DisplayType.CultivarName)]
        [Description("Cultivar to be sown")]
        public string CultivarName { get; set; }

        [Description("Sowing depth (mm)")]
        public double SowingDepth { get; set; }

        [Description("Row spacing (mm)")]
        public double RowSpacing { get; set; }

        [Description("Plant population (/m2)")]
        public double Population { get; set; }

        [EventSubscribe("DoManagement")]
        private void OnDoManagement(object sender, EventArgs e)
        {
            if (DateUtilities.WithinDates(SowDate, Clock.Today, SowDate))
            {
                Crop.Sow(population: Population, cultivar: CultivarName, depth: SowingDepth, rowSpacing: RowSpacing);    
            }
        }
    }
}
```
    Manager Sow using a variable rule
      Crop =
      StartDate = 1-nov
      EndDate = 10-jan
      MinESW = 100
      MinRain = 25
      RainDays = 7
      CultivarName = Dekalb_XL82
      SowingDepth = 30
      RowSpacing = 750
      Population = 6
```csharp
using Models.Interfaces;
using APSIM.Shared.Utilities;
using Models.Utilities;
using Models.Soils;
using Models.PMF;
using Models.Core;
using System;
using System.Linq;
using Models.Climate;

namespace Models
{
    [Serializable]
    public class Script : Model
    {
        [Link] private Clock Clock;
        [Link] private Fertiliser Fertiliser;
        [Link] private Summary Summary;
        [Link] private Soil Soil;
        private Accumulator accumulatedRain;
        [Link]
        private ISoilWater waterBalance;
        
        [Description("Crop")]
        public IPlant Crop { get; set; }

        [Description("Start of sowing window (d-mmm)")]
        public string StartDate { get; set; }

        [Description("End of sowing window (d-mmm)")]
        public string EndDate { get; set; }

        [Description("Minimum extractable soil water for sowing (mm)")]
        public double MinESW { get; set; }

        [Description("Accumulated rainfall required for sowing (mm)")]
        public double MinRain { get; set; }

        [Description("Duration of rainfall accumulation (d)")]
        public int RainDays { get; set; }

        [Display(Type = DisplayType.CultivarName)]
        [Description("Cultivar to be sown")]
        public string CultivarName { get; set; }

        [Description("Sowing depth (mm)")]
        public double SowingDepth { get; set; }

        [Description("Row spacing (mm)")]
        public double RowSpacing { get; set; }

        [Description("Plant population (/m2)")]
        public double Population { get; set; }
        
        
        [EventSubscribe("StartOfSimulation")]
        private void OnSimulationCommencing(object sender, EventArgs e)
        {
            accumulatedRain = new Accumulator(this, "[Weather].Rain", RainDays);
        }

        [EventSubscribe("DoManagement")]
        private void OnDoManagement(object sender, EventArgs e)
        {
            accumulatedRain.Update();
            
            if (DateUtilities.WithinDates(StartDate, Clock.Today, EndDate) &&
                !Crop.IsAlive &&
                MathUtilities.Sum(waterBalance.ESW) > MinESW &&
                accumulatedRain.Sum > MinRain)
            {
                Crop.Sow(population: Population, cultivar: CultivarName, depth: SowingDepth, rowSpacing: RowSpacing);    
            }
        }
    }
}
```
    Manager Harvesting
      Crop =
```csharp
using APSIM.Shared.Utilities;
using Models.Utilities;
using Models.Soils;
using Models.PMF;
using Models.Core;
using System;
using System.Linq;

namespace Models
{
    [Serializable] 
    public class Script : Model
    {
        [Description("Crop")]
        public IPlant Crop { get; set; }
        
        [EventSubscribe("DoManagement")]
        private void OnDoManagement(object sender, EventArgs e)
        {
            if (Crop.IsReadyForHarvesting)
            {
                Crop.Harvest();
                Crop.EndCrop();
            }
        }
    }
}
```
    Manager Tillage on a fixed date
      TillageDate = 1-jul
      Fraction = 0.5
      Depth = 0
```csharp
using Models.Soils;
using System;
using System.Linq;
using Models.Core;
using Models.PMF;
using APSIM.Shared.Utilities;
using Models.Surface;

namespace Models
{
    [Serializable]
    public class Script : Model
    {
        [Link] Clock Clock;
        [Link] SurfaceOrganicMatter SOM;
        
        [Description("Tillage Date")]
        public string TillageDate { get; set; }
        
        [Description("Fraction of Residues To Incorporate (0-1)")]
        public double Fraction { get; set; }

        [Description("Depth of Tillage (mm)")]
        public double Depth { get; set; }

        [EventSubscribe("DoManagement")]
        private void OnDoManagement(object sender, EventArgs e)
        {
            if (DateUtilities.WithinDates(TillageDate, Clock.Today, TillageDate))
                SOM.Incorporate(Fraction, Depth);
        }
    }
}
```
    Manager TreeManagement
      Plant =
      RowSpace = 3
      RowWidth = 3
      CultivarName = grandisCoffsHarbour
      PlantingDate = 1-aug
      HarvestAge = 7
      FertAmount = 100
```csharp
using Models.Soils;
using System;
using System.Linq;
using Models.Core;
using Models.PMF;
using APSIM.Shared.Utilities;

namespace Models
{
    [Serializable] 
    [System.Xml.Serialization.XmlInclude(typeof(Model))]
    public class Script : Model
    {
        [Link] Clock Clock;
        [Link] Fertiliser Fertiliser;

        public double TimeSincePlanting {get; set;}

        [Description("The tree to manage")]
        public Plant Plant { get; set; }

        [Description("Spacing (m) between plants within rows")]
        public double RowSpace { get; set; }

        [Description("Spacing (m) between rows")]
        public double RowWidth { get; set; }

        [Description("Cultivar")]
        [Display(Type=DisplayType.CultivarName)]
        public string CultivarName { get; set; }

        [Description("Planting Date (dd-mmm)")]
        public String PlantingDate { get; set; }

        [Description("Harvest Age (years)")]
        public double HarvestAge { get; set; }

        [Description("Amount of fertiliser N to be applied at planting (kg N/ha)")]
        public double FertAmount { get; set; }

        [EventSubscribe("DoManagement")]
        private void OnDoManagement(object sender, EventArgs e)
        {
            double PlantPopulation = 1 / (RowWidth * RowSpace);
            double RowWidthmm = RowWidth * 1000;

            if (DateUtilities.WithinDates(PlantingDate, Clock.Today, PlantingDate) && !Plant.IsAlive)
            {
                Plant.Sow(population: PlantPopulation, 
                    cultivar: CultivarName, 
                    depth: 100, 
                    rowSpacing: RowWidthmm);
                TimeSincePlanting = 0;
                Fertiliser.Apply(Amount: FertAmount, Type: Fertiliser.Types.NO3N);
            }

            if (TimeSincePlanting > HarvestAge && Plant.IsAlive)
            {
               Plant.Harvest();
               Plant.EndCrop();         
               TimeSincePlanting = 0;  
            }

            TimeSincePlanting += 1.0/365.0;
        }
    }
}
```
  Folder Fertilise
    Manager Fertilise on fixed dates
      FertiliserType = NO3N
      FertiliserDates = 24-apr
      Amount = 160
      AmountType = False
```csharp
using Models.Soils;
using System;
using System.Linq;
using Models.Core;
using Models.PMF;
using APSIM.Shared.Utilities;
namespace Models
{
    [Serializable]
    public class Script : Model
    {
        [Link] Clock Clock;
        [Link] Fertiliser Fertiliser;
        
        [Separator("A component to apply fertiliser on one or more dates on every year of the simulation")]

        [Description("Type of fertiliser to apply? ")] 
        public Fertiliser.Types FertiliserType { get; set; }

        [Description("Enter the fertilisation dates as dd-mmm with comma separation (any year information entered will be ignored): ")] 
        public string[] FertiliserDates { get; set; } 

        [Description("Amount of fertiliser to be applied (kg /ha)")] 
        public double Amount { get; set; }

        [Description("Is the above amount to be applied each time? (yes/ticked)? Or is it the total annual amount across all dates (no/unticked)")] 
        public bool AmountType { get; set; }
        
        [EventSubscribe("DoManagement")]
        private void OnDoManagement(object sender, EventArgs e)
        {
            foreach (string ddMMM in FertiliserDates)
            {
                if (DateUtilities.DatesEqual(ddMMM, Clock.Today))
                {
                    if (AmountType)
                        Fertiliser.Apply(Amount: Amount, Type: FertiliserType);
                    else
                        Fertiliser.Apply(Amount: Amount / FertiliserDates.Length, Type: FertiliserType);
                }
            }
        }
    }
}
```
    Manager Fertilise on fixed dates (advanced version)
      EachYear = True
      Dates = 30-nov, 15-apr
      UseCritNThreshold = False
      CritNThreshold = 50
      CritNDepth = 75
      Depth = 50
      Amount = 25
      FertiliserType = UreaN
```csharp
using Models.Interfaces;
using System.Linq;
using APSIM.Shared.Utilities;
using Models.PMF;
using Models.Soils;
using Models.Core;
using System;
using Models.Soils.Nutrients;

namespace Models
{
    [Serializable]
    public class Script : Model
    {
        [Link] private Clock clock;
        [Link] private Fertiliser fertiliser;
        [Link] private ISummary summary;
        [Link] private Soil soil;
        private Nutrient nutrient;
        private SoilNitrogen soilN;
        [Link]
        private IPhysical soilPhysical;


        [Separator("Fertiliser will be applied on the date(s) below")]
        [Description("Apply fertiliser on the same day(s) each year? If no, then must include the year of appliaction below")]
        public bool EachYear { get; set; }

        [Description("Dates for one or more fertiliser applications (dd-mmm or dd-mmm-yyyy) as a list with a comma between dates")]
        public string[] Dates { get; set; }

        [Separator("Test for the mineral N in the soil and don't apply the fertiliser if greater than X kgN/ha is stored in the soil above a depth of Y mm")]
        [Description("Use a critical soil mineral N to prevent application above a threshold?")]
        public bool UseCritNThreshold { get; set; }

        [Description("Don't add fertiliser if N in the soil to the depth below exceeds (kg/ha)")]
        public double CritNThreshold { get; set; }

        [Description("Depth to which the amount of N in the soil should be calculated (mm)")]
        public double CritNDepth { get; set; }

        [Separator("Fertiliser application details")]
        [Description("Depth at which to apply the fertiliser (mm)")]
        public double Depth { get; set; }

        [Description("Amount of fertiliser to apply (kg N /ha) per application")]
        public double Amount { get; set; }

        [Description("Fertiliser type - select from the list")]
        public Fertiliser.Types FertiliserType { get; set; }


        [EventSubscribe("StartOfSimulation")]
        private void FindSoilNOrNutrient(object sender, EventArgs e)
        {
            nutrient = this.FindInScope<Nutrient>() as Nutrient;
            soilN = this.FindInScope<SoilNitrogen>() as SoilNitrogen;

            if (nutrient == null && soilN == null)
                throw new Exception(string.Format("Error in script {0}: Unable to find nutrient or soilN.", Name));
        }

        [EventSubscribe("DoManagement")]
        private void OnDoManagement(object sender, EventArgs e)
        {
            if (OnApplicationDate())
            {
                if (NContentBelowThreshold())
                    fertiliser.Apply(Amount, FertiliserType, Depth);
                else
                    summary.WriteMessage(this, "Skipping fertiliser application due to soil mineral N content being above critical threshold.", MessageType.Diagnostic);
            }
        }

        /// <summary>Checks if today's date is one of the specified fertiliser application dates.</summary>
        private bool OnApplicationDate()
        {
            if (EachYear)
                return Dates.Any(d => DateUtilities.DatesEqual(d, clock.Today));
            
            DateTime[] dates = Dates.Select(d => DateTime.ParseExact(d, "d-MMM-yyyy", null)).ToArray();
            return dates.Any(d => SameDate(d, clock.Today));
        }

        /// <summary>Checks if N content in soil is below critical threshold.</summary>
        private bool NContentBelowThreshold()
        {
            if (!UseCritNThreshold)
                return true;
            
            double[] weights = GetLayerWeights();
            double cumSoilN = 0;

            for (int i = 0; i < soilPhysical.Thickness.Length; i++)
            {
                if (nutrient != null)
                    cumSoilN += weights[i] * nutrient.MineralN[i];
                else if (soilN != null)
                    cumSoilN += weights[i] * soilN.mineral_n[i];
            }

            return cumSoilN <= CritNThreshold;
        }

        private double[] GetLayerWeights()
        {
            double[] weights = new double[soilPhysical.Thickness.Length];
            double cumDepth = 0;

            for (int i = 0; i < soilPhysical.Thickness.Length; i++)
            {
                cumDepth += soilPhysical.Thickness[i];
                if (cumDepth < CritNDepth)
                    weights[i] = 1;
                else if (cumDepth - soilPhysical.Thickness[i] <= CritNDepth)
                    weights[i] = (CritNDepth - (cumDepth - soilPhysical.Thickness[i])) / soilPhysical.Thickness[i];
                else
                    weights[i] = 0;
            }

            return weights;
        }

        private bool SameDate(DateTime d1, DateTime d2)
        {
            return d1.Year == d2.Year && d1.DayOfYear == d2.DayOfYear;
        }
    }
}
```
    Manager Fertilise at sowing
      Crop =
      FertiliserType = UreaN
      Amount = 160
```csharp
using Models.Soils;
using System;
using System.Linq;
using Models.Core;
using Models.PMF;
namespace Models
{
    [Serializable]
    public class Script : Model
    {
        [Link] Clock Clock;
        [Link] Fertiliser Fertiliser;
        
        [Description("Crop to be fertilised")]
        public IPlant Crop { get; set; }

        [Description("Type of fertiliser to apply? ")] 
        public Fertiliser.Types FertiliserType { get; set; }
    
        [Description("Amount of fertiliser to be applied (kg/ha)")]
        public double Amount { get; set; }
        
        [EventSubscribe("Sowing")]
        private void OnSowing(object sender, EventArgs e)
        {
            Model crop = sender as Model;
            if (Crop != null && crop.Name.ToLower() == (Crop as IModel).Name.ToLower())
                Fertiliser.Apply(Amount: Amount, Type: FertiliserType);
        }
    }
}
```
    Manager Fertilise on Zadok stage
      Stage = 30
      FertiliserType = UreaN
      Amount = 40
```csharp
using Models.Soils;
using System;
using System.Linq;
using Models.Core;
using Models.PMF;
namespace Models
{
    [Serializable] 
    public class Script : Model
    {
        [Link] Clock Clock;
        [Link] Fertiliser Fertiliser;
        [Link] Summary Summary;
        [Link] Plant Wheat;
 
        private bool hasFertilised = false;

        [Description("Fertilise once crop reaches stage:")]
        public double Stage { get; set; }

        [Description("Type of fertiliser to apply? ")] 
        public Fertiliser.Types FertiliserType { get; set; }

        [Description("Amount of fertiliser to be applied (kg/ha)")] 
        public double Amount { get; set; }
     
        [EventSubscribe("DoManagement")] 
        private void OnDoManagement(object sender, EventArgs e)
        { 
            double zadok = (double)Wheat.FindByPath("Phenology.Zadok.Stage").Value; 
 
            if (zadok >= Stage && !hasFertilised)
            { 
                Summary.WriteMessage(this, "Fertilising!!", MessageType.Diagnostic); 
                Fertiliser.Apply(Amount: Amount, Type: FertiliserType);
                hasFertilised = true; 
            } 
        }

        [EventSubscribe("Sowing")]
        private void OnSowing(object sender, EventArgs e)
        {
            hasFertilised = false;
        }
    }
}
```
    Manager Fertilise topup
      FertiliserType = NO3N
      Threshold = 200
```csharp
using Models.Soils;
using APSIM.Shared.Utilities;
using Models.Soils.Nutrients;
using Models.PMF;
using Models.Core;
using System;
using System.Linq;
using Models.Soils.Nutrients;
namespace Models
{
    [Serializable]
    public class Script : Model
    {
        [Link] Clock Clock;
        [Link] Fertiliser Fertiliser;
        [Link(ByName=true)] Solute NO3;

        [Description("Type of fertiliser to apply? ")] 
        public Fertiliser.Types FertiliserType { get; set; }
    
        [Description("Threshold amount of NO3 to topup to (kg/ha)")]
        public double Threshold { get; set;}
        
        [EventSubscribe("DoManagement")]
        private void OnDoManagement(object sender, EventArgs e)
        {
            double Amount = Threshold - MathUtilities.Sum(NO3.kgha);
            Fertiliser.Apply(Amount: Amount, Type: FertiliserType);
        }
    }
}
```
  Folder Irrigate
    Manager Irrigate on fixed dates
      IrrigateDates = 24-jan
      Amount = 30
      Depth = 0
      Efficiency = 1
      WillRunoff = False
```csharp
using Models.Soils;
using System;
using System.Linq;
using Models.Core;
using Models.PMF;
using APSIM.Shared.Utilities;
namespace Models
{
    [Serializable]
    public class Script : Model
    {
        [Link] Clock Clock;
        [Link] Irrigation Irrigation;
        
        [Separator("A component to apply irrigation on one or more dates on every year of the simulation")]

        [Description("Enter the irrigation dates as dd-mmm with comma separation (any year information entered will be ignored)")] 
        public string[] IrrigateDates { get; set; }
        
        [Description("Amount of irrigation to be applied (mm)")] 
        public double Amount { get; set; }
        
        [Description("Depth in the soil to apply the  irrigation (mm)")] 
        public double Depth { get; set; }
        
        [Description("Efficiency of irrigation (0-1)")] 
        public double Efficiency { get; set; }
        
        [Description("Will the irrigation runoff?")] 
        public bool WillRunoff { get; set; }
        
        [EventSubscribe("DoManagement")]
        private void OnDoManagement(object sender, EventArgs e)
        {
            foreach (string ddMMM in IrrigateDates)
            {
                if (DateUtilities.DatesEqual(ddMMM, Clock.Today))
                    Irrigation.Apply(amount: Amount, depth: Depth, efficiency: Efficiency, willRunoff: WillRunoff);
            }
        }
    }
}
```
    Manager AutomaticIrrigation
      allowIrrigation = True
      seasonStart = 1-sep
      seasonEnd = 30-mar
      seasonsAllocation = 10000
      triggerDeficit = 50
      targetDeficit = 95
      returndays = 3
      maximumAmount = 30
      depthPAWC = 650
```csharp
using Newtonsoft.Json;
using APSIM.Shared.Utilities;
using System.Xml.Serialization;
using Models.Soils;
using Models.PMF;
using Models.Core;
using System;
using System.Linq;
using Models.Interfaces;



        
namespace Models
{
    [Serializable] 
    [System.Xml.Serialization.XmlInclude(typeof(Model))]
    public class Script : Model
    {
        [Link] private ISummary summary;
        [Link] private Irrigation Irrigation;
        [Link] private Clock Clock;
        [Link] private Soil Soil;
        [Link(IsOptional = true)] private IPlant existingCrop;
        private DateTime StartDate;
        private DateTime EndDate;
        private double TopDUL;
        private double TopLL;
        private int nLayers;
        [Link]
        private IPhysical soilPhysical;
        [Link]
        private ISoilWater waterBalance;
        //Communication to other modules
       
        //User inputs from properties tab
        [Description("Turn irrigation on?")]
        public bool allowIrrigation { get; set; }
        [Description("Start of irrigation season (dd-MMM)")]
        public string seasonStart { get; set; }
        [Description("End of irrigation season (dd-MMM)")]
        public string seasonEnd { get; set; }
        [Description("Season allocation (mm)")]
        public double seasonsAllocation { get; set; }
        [Description("Deficit to trigger irrigation (% PAWC)")]
        public double triggerDeficit { get; set; }
        [Description("Deficit to stop irrigaton (% PAWC)")]
        public double targetDeficit { get; set; }
        [Description("Minimum days for irrigation to return")]
        public double returndays { get; set; }
        [Description("Maximum irrigation application (mm/day)")]
        public double maximumAmount { get; set; }
        [Description("Depth to calculate PAWC (mm)")]
        public double depthPAWC { get; set; }

        //Class members
        [JsonIgnore] public double TopSWdeficit { get; set; }
        [JsonIgnore] public double TopSWC { get; set; }
        [JsonIgnore] public double DaysSinceIrrigation { get; set; }
        [JsonIgnore] public double AmountToApply { get; set; }
        [JsonIgnore] public double SeasonAppliedAmount { get; set; }
        
        private bool IrrigationIsAllowed { get; set; }
        private bool SeasonIsOpen { get; set; }
        private bool CropIsActive { get; set; }
        private bool IrrigatorIsAvailable { get; set; }
        private bool SoilIsDry { get; set; }

    
        //Calculate static soil variables
        [EventSubscribe("StartOfSimulation")]
        private void OnStartOfSimulation(object sender, EventArgs e)
        {   
            //Set the season dates
            StartDate = DateTime.Parse(seasonStart + "-" + Clock.Today.Year.ToString());
            EndDate = DateTime.Parse(seasonEnd + "-" + Clock.Today.Year.ToString());
            
            //Can we irrigate at all?
            IrrigationIsAllowed = false; 
            if (allowIrrigation)
                IrrigationIsAllowed = true; 

            //Calculate soil water variables
            double depthFromSurface = 0.0;
            double fracLayer = 0.0;
            nLayers = soilPhysical.Thickness.Length;
            for (int layer = 0; layer < nLayers; layer++)
            {
                fracLayer = Math.Min(1.0, (depthPAWC - depthFromSurface) / soilPhysical.Thickness[layer]);
                TopLL += soilPhysical.LL15mm[layer] * fracLayer;
                TopDUL += soilPhysical.DULmm[layer] * fracLayer;
                depthFromSurface += soilPhysical.Thickness[layer];
                if (depthFromSurface >= depthPAWC)
                    layer = nLayers;
            }
        }
             
        //Determine daily requirement for irrigation
        [EventSubscribe("StartOfDay")]
        private void OnStartOfDay(object sender, EventArgs e)
        {
            //Can we irrigate today?          
            SeasonIsOpen = isBetween(Clock.Today, StartDate, EndDate);
            if (!SeasonIsOpen)
                SeasonAppliedAmount = 0;

            //Is there a crop in the ground that needs irrigation?
            CropIsActive = false;
            if ((existingCrop != null) && (existingCrop.IsAlive))
                CropIsActive = true;
            //if ((existingCrop.Phenology.Stage >= 3.0) && (existingCrop.Phenology.Stage < 6.0))
          
            //Is the irrigator available?
            IrrigatorIsAvailable = false;
            DaysSinceIrrigation += 1;
            if (DaysSinceIrrigation >= returndays)
                IrrigatorIsAvailable = true;
          
            //Is the soil dry enough to require irrigation?
            SoilIsDry = false;
            double depthFromSurface = 0.0;
            double fracLayer = 0.0;
            TopSWC = 0.0;
            for (int layer = 0; layer < nLayers; layer++)
            //for (int layer = 0; depthFromSurface < depthPAWC + soilPhysical.Thickness[layer]; layer++)
            {
                fracLayer = Math.Min(1.0, (depthPAWC - depthFromSurface) / soilPhysical.Thickness[layer]);
                TopSWC += waterBalance.SWmm[layer] * fracLayer;
                depthFromSurface += soilPhysical.Thickness[layer];
                if (depthFromSurface >= depthPAWC)
                    layer = nLayers;
            }
            
            TopSWdeficit = TopSWC - TopDUL;
            if (Math.Max(0.0, -TopSWdeficit) >= (TopDUL - TopLL) * (100 - triggerDeficit) / 100)
                SoilIsDry = true;
                
            //Are all the conditions ratifying irrigation
            if (IrrigationIsAllowed && SeasonIsOpen && CropIsActive && IrrigatorIsAvailable && SoilIsDry)
            {
                //Lets bloody well irrigate then!!!!
                AmountToApply = TopDUL * targetDeficit / 100 - TopSWC;
                AmountToApply = Math.Max(0.0, Math.Min(AmountToApply, seasonsAllocation - SeasonAppliedAmount));
                AmountToApply = Math.Min(AmountToApply,maximumAmount);
                Irrigation.Apply(AmountToApply);
                DaysSinceIrrigation = 0;
                SeasonAppliedAmount += AmountToApply;
            }
        }
        
        ///Checks whether theDate is between iniDate and endDate (non-year specific)
        private bool isBetween(DateTime theDay, DateTime iniDate, DateTime endDate)
        {
            bool result = false;
            if (iniDate.DayOfYear < endDate.DayOfYear)
            {
                // period is within one year, ex: summer in the northern hemisphere
                if ((theDay.DayOfYear >= iniDate.DayOfYear) && (theDay.DayOfYear <= endDate.DayOfYear))
                    result = true;
            }
            else
            {
                // period goes over the end of the year, ex: summer in the southern hemisphere
                if ((theDay.DayOfYear >= iniDate.DayOfYear) || (theDay.DayOfYear <= endDate.DayOfYear))
                    result = true;
            }
            
            return result;
        }
    }
}
```
    Manager Automatic irrigation based on water deficit
      Crop =
      AutoIrrigationOn = True
      FASWThreshold = 0.9
      FASWDepth = 600
      weeks = 3
      afterSowing = 2
```csharp
using Models.Interfaces;
using System;
using System.Linq;
using Models.Core;
using System.Collections.Generic;
using System.Text;
using Models.Soils;
using Models.PMF;
using Models;
using System.Xml.Serialization;
using APSIM.Shared.Utilities;
using Models.Interfaces;
namespace Models
{
    [Serializable] 
    public class Script : Model
    {
        [Link] private Zone zone;
        [Link] private Irrigation irrigation;
        [Link] private ISoilWater waterBalance;
        [Link] private IPhysical soilPhysical;
        public double FASW { get; set; }
        public double WaterDeficit  { get; set; }
    


        [Description("Crop to irrigate")]
        public IPlant Crop { get; set; }
        
        [Description("Auto irrigation on?")]
        public bool AutoIrrigationOn { get; set; }

        [Description("Threshold fraction available water (0-1)")]
        public double FASWThreshold { get; set; }

        [Description("Soil depth (mm) to which fraction available water is calculated")]
        public double FASWDepth { get; set; }

        [Description("Minimum weeks between irrigations")]
        public double weeks { get; set; }

        [Description("Minimum days after sowing for first irrigation")]
        public int afterSowing { get; set; }

        private double irrigationGap = 0;    // gap between irrigations

        /// <summary>Called at start of simulation. Performs some basic error checking. </summary>
        [EventSubscribe("StartOfSimulation")]
        private void ErrorChecking(object sender, EventArgs args)
        {
            if (Crop == null)
                throw new Exception("No crop was specified in script " + Parent.Name);
        }

        [EventSubscribe("DoManagement")]
        private void OnDoManagement(object sender, EventArgs e)
        {
            if (AutoIrrigationOn && Crop.IsAlive)
            {
                   irrigationGap += 1;                // increment gap between irrigations
                CalculateFASW();                // calc FASW and WaterDeficit
                if ((FASW < FASWThreshold) && (irrigationGap >= weeks * 7))
                {
                    irrigation.Apply(WaterDeficit, depth: 0);
                    irrigationGap = 0;            // reset
                }
            }
            else
            {
                irrigationGap = weeks * 7 - afterSowing - 1;    // allow irrigation a number of days after it becomes alive/sown
            }
        }

        // Calculate the fraction of the potential available sw
        // Calculate the deficit amount from DUL
        private void CalculateFASW()
        {
            double[] LL15 = MathUtilities.Multiply(soilPhysical.LL15, soilPhysical.Thickness);
            double[] DUL = MathUtilities.Multiply(soilPhysical.DUL, soilPhysical.Thickness);
        
            int nlayr = GetLayerIndex(FASWDepth);
            double cumdep = MathUtilities.Sum(soilPhysical.Thickness, 0, nlayr, 0.0);    // tricky function that sums up to before nlayr

            double part_layer = MathUtilities.Divide((FASWDepth - cumdep), soilPhysical.Thickness[nlayr], 0.0);

            // note that results may be strange if swdep < ll15
            double avail_sw = (MathUtilities.Sum(waterBalance.SWmm, 0, nlayr, 0.0) + part_layer * waterBalance.SWmm[nlayr])
                            - (MathUtilities.Sum(LL15, 0, nlayr, 0.0) + part_layer * LL15[nlayr]);

            double pot_avail_sw = (MathUtilities.Sum(DUL, 0, nlayr, 0.0) + part_layer * DUL[nlayr])
                                - (MathUtilities.Sum(LL15, 0, nlayr, 0.0) + part_layer * LL15[nlayr]);
            
            FASW = MathUtilities.Divide(avail_sw, pot_avail_sw, 0.0);
            WaterDeficit = MathUtilities.Constrain(pot_avail_sw - avail_sw, 0.0, 100000);
        }

        // Get index of the layer that has this depth in it 
        private int GetLayerIndex(double pointDepth)
        {
            double[] cumThickness = soilPhysical.ThicknessCumulative;
            int layerIdx = 0;
            while ((layerIdx < cumThickness.Length) && (pointDepth > cumThickness[layerIdx]))
            {
                layerIdx += 1;
            }

            return layerIdx;
        }
    }
}
```
    Manager Irrigate to crop PAW at sowing
      CropSoil =
      SowPAW = 180
```csharp
using Models.Soils;
using System;
using System.Linq;
using Models.Core;
using Models.PMF;
using APSIM.Shared.Utilities;
namespace Models
{
	[Serializable]
	public class Script : Model
	{
		[Link] Clock Clock;
		[Link] Irrigation Irrigation;
		[Link] Water Water;

		[Description("SoilCrop module")] 
    	public SoilCrop CropSoil { get; set;}

  		[Description("Plant available water to reset at sowing (mm)")] 
    	public double SowPAW { get; set; }
    	
		///<summary>The deficit (amount of water applied) at sowing.</summary>
		[Units("mm")]
    	public double WaterDeficit{ get; set; }
   
    	[EventSubscribe("Sowing")]
    	private void OnSowing(object sender, EventArgs e)
    	{
    		if (CropSoil == null)
    			throw new Exception("No CropSoil was specified in " + Name);
	    	WaterDeficit = SowPAW - CropSoil.PAWmm.Sum();
	    	if (WaterDeficit > 0)
            	Irrigation.Apply(amount: WaterDeficit, depth: 0, efficiency: 1);
        }
    }
}
```
    Manager Centre Pivot
      IrrigStart = 1-sep
      IrrigEnd = 30-apr
      SoilDepth = 500
      CritPAWForShallow = 60
      CritRainToPause = 30
      DaysToPauseOnCritRain = 3
      IrrigReturnShallow = 2
      IrrigAmtShallow = 10
      IrrigEffShallow = 100
      IrrigReturnDeep = 4
      IrrigAmtDeep = 20
      IrrigDeficitDeep = 25
      IrrigEffDeep = 100
      PercPAWIrrigDeficitShallow = 0
```csharp
using Models.Soils;
using System;
using System.Linq;
using System.Diagnostics;
using Models.Core;
using Models.Interfaces;
using APSIM.Shared.Utilities;

namespace Models
{
    [Serializable]
    public class Script : Model
    {
        [Link] Clock clock;
        [Link] IWeather weather;
        [Link] Irrigation irrigation;
        [Link] ISummary summary;
        [Link] Physical physical;
        [Link] Water water;
    
        [Separator("All soils")]

        [Description("Start of irrigation season (dd-mmm)")] 
        public string IrrigStart { get; set; }

        [Description("End of irrigation season (dd-mmm)")] 
        public string IrrigEnd { get; set; }

        [Description("Enter the depth to which water deficit is computed (mm)")] 
        public double SoilDepth { get; set; }
        
        [Description("PAW below which soil is considered 'shallow' (mm)")] 
        public double CritPAWForShallow { get; set; }

        [Description("Amount of rainfall over the last 3 days to cause pause to irrigator (mm)")] 
        public double CritRainToPause { get; set; }

        [Description("Number of days to pause irrigator after critical delay (days)")] 
        public double DaysToPauseOnCritRain { get; set; }
        
        [Separator("Shallow soils")]
        
        [Description("Irrigation return period for shallow soils (days)")] 
        public double IrrigReturnShallow { get; set; }

        [Description("Effective irrigation amount for shallow soils (mm)")] 
        public double IrrigAmtShallow { get; set; }

        [Description("Percentage of PAW at which to irrigate shallow soils (%)")] 
        public double PercPAWIrrigDeficitShallow { get; set; }

        [Description("Irrigation efficiency for shallow soils (%)")] 
        public double IrrigEffShallow { get; set; }

        [Separator("Deep soils")]
        
        [Description("Irrigation return period for deep soils (days)")] 
        public double IrrigReturnDeep { get; set; }

        [Description("Effective irrigation amount for deep soils (mm)")] 
        public double IrrigAmtDeep { get; set; }

        [Description("Percentage of PAW at which to irrigate deep soils (%)")] 
        public double IrrigDeficitDeep { get; set; }

        [Description("Irrigation efficiency for deep soils (%)")] 
        public double IrrigEffDeep { get; set; }


	    // Output variables
		[Units("mm")]
		public double TodayDeficit {get; set; }
		 
		[Units("mm")]
		public double TodayDeficit_nve {get; set; }
		 
		[Units("")]
		public double IrrigDay {get; set; }
		 
		[Units("")]
		public double SoilPAW {get; set; }
		 
		[Units("")]
		public double IrrigDeficit {get; set; }
		
		[Units("")]
		public double IrrigReturn {get; set; }
		
		[Units("")]
		public double IrrigAmt {get; set; }
		
		[Units("")]
		public double IrrigEff {get; set; }
		
		[Units("mm")]
		public double Rain3 {get; set; }
		
		[Units("mm")]
		public double[] Rain_3 {get; set; } = new double[3];
		
		[Units("")]
		public double Days2Pause {get; set; }

 		// private variables
		private double irrigDeficitShallow {get; set; }

        
        [EventSubscribe("StartOfSimulation")]
        private void OnStartOfSimulation(object sender, EventArgs e)
        {
		    IrrigDay = 5000;  // so will reset to 1 on first day

		    Rain3 = 0.0;
		    Rain_3[0] = 0.0; Rain_3[1] = 0.0; Rain_3[2] = 0.0;

		    SoilPAW = 0.0;
		    double mySoilDepth = 0;
		    for (int z = 0; z <= physical.Thickness.Length - 1; z++)
		    {
		        mySoilDepth = mySoilDepth + physical.Thickness[z];
		        if (mySoilDepth <= SoilDepth)
		            SoilPAW = SoilPAW + physical.DULmm[z] - physical.LL15mm[z];
		    }
		    if (SoilPAW <= CritPAWForShallow)
		    {
		        IrrigDeficit = PercPAWIrrigDeficitShallow / (double)100 * SoilPAW;
		        IrrigReturn = IrrigReturnShallow;
		        IrrigAmt = IrrigAmtShallow;
		        IrrigEff = IrrigEffShallow;
		        summary.WriteMessage(this, "Soil is considered to be shallow " + CritPAWForShallow + " " + SoilPAW, MessageType.Information);
		    }
		    else
		    {
		        IrrigDeficit = IrrigDeficitDeep;
		        IrrigReturn = IrrigReturnDeep;
		        IrrigAmt = IrrigAmtDeep;
		        IrrigEff = IrrigEffDeep;
		        summary.WriteMessage(this, "Soil is considered to be deep", MessageType.Information);
		    }

		    summary.WriteMessage(this, $"Irrigation critical deficit (mm): {IrrigDeficit}", MessageType.Information);
		    summary.WriteMessage(this, $"        Irrigation return (days): {IrrigReturn}", MessageType.Information);
		    summary.WriteMessage(this, $"   Irrigation pumped amount (mm): {IrrigAmt}", MessageType.Information);
		    summary.WriteMessage(this, $"       Irrigation efficiency (%): {IrrigEff}", MessageType.Information);
        }
        
        
        [EventSubscribe("DoManagement")]
        private void OnDoManagement(object sender, EventArgs e)
        {
		    Rain_3[2] = Rain_3[1];
		    Rain_3[1] = Rain_3[0];
		    Rain_3[0] = weather.Rain;
		    Rain3 = Rain_3[0] + Rain_3[1] + Rain_3[2];
		    if (Rain3 >= CritRainToPause)
		        Days2Pause = DaysToPauseOnCritRain;
		    else
		        Days2Pause = Days2Pause - 1;

		    TodayDeficit = 0.0;
		    SoilPAW = 0.0;
		    double mySoilDepth = 0;

		    for (int z = 0; z <= physical.Thickness.Length - 1; z++)
		    {
		        mySoilDepth = mySoilDepth + physical.Thickness[z];
		        if (mySoilDepth <= SoilDepth)
		        {
		            SoilPAW = SoilPAW + physical.DULmm[z] - physical.LL15mm[z];
		            TodayDeficit = TodayDeficit + physical.DULmm[z] - Math.Min(physical.DULmm[z], water.MM[z]);
		        }
		    }
		    TodayDeficit_nve = -1 * TodayDeficit;

		    if (DateUtilities.WithinDates(IrrigStart, clock.Today, IrrigEnd))
		    {
		        if (SoilPAW <= CritPAWForShallow)
		        {
		            IrrigDeficit = PercPAWIrrigDeficitShallow / 100 * SoilPAW;
		            IrrigReturn = IrrigReturnShallow;
		            IrrigAmt = IrrigAmtShallow;
		            IrrigEff = IrrigEffShallow;
		        }
		        else
		        {
		            IrrigDeficit = IrrigDeficitDeep;
		            IrrigReturn = IrrigReturnDeep;
		            IrrigAmt = IrrigAmtDeep;
		            IrrigEff = IrrigEffDeep;
		        }

		        if (Days2Pause < 0.5)
		        {
		            IrrigDay = IrrigDay + 1;
		            if (IrrigDay > IrrigReturn)
		                IrrigDay = 1;// and day = 1 is when the irrigation happens

		            if (TodayDeficit >= IrrigDeficit)
		            {
		                if (IrrigDay == 1)
                            irrigation.Apply(amount: IrrigAmt / (IrrigEff / 100.0));
		            }
		        }
		    }
	    }	
    }
}
```
  Folder Soil
    Manager SWIMSetLowerBC
      LowerBCType = watertable
      LowerBCValue = 500
```csharp
using Models.Climate;
using APSIM.Shared.Utilities;
using Models.Soils.Nutrients;
using Models.Soils;
using Models.PMF;
using Models.Core;
using System.Xml.Serialization;
using System;
using System.Linq;
using Models.AgPasture;
using Models.Interfaces;

namespace Models
{
    [Serializable] 
    [System.Xml.Serialization.XmlInclude(typeof(Model))]
    public class Script : Model
    {
        [Link] Clock clock;
        [Link] ISummary summary;
        [Link] private Swim3 swim;
        //[Link] private PastureSpecies ryegrass;
        //[Link] private SimpleGrazing grazing;
        
        public enum LowerBCTypeOptions {gradient,seepage,potential,watertable};

        [Separator("Sets the lower boundary condition type (and value if set to 'potential' for SWIM3. The change is applied at the beginning of the first day of the simulation.")]
        
        [Description("What lower boundary condition is wanted?")] public LowerBCTypeOptions LowerBCType { get; set; }


        [Display(VisibleCallback = "IsBCPotentialOrWater")]
        [Description("What should the lower BC potential be set to (should be positive for a watertable) (mm)?")] public double LowerBCValue { get; set; }
        
        public bool IsBCPotentialOrWater => LowerBCType == LowerBCTypeOptions.potential || LowerBCType == LowerBCTypeOptions.watertable;





        public double SoilWaterStart  { get; set; }
        public double SoilWaterEnd  { get; set; }

        [EventSubscribe("DoDailyInitialisation")]
        private void DoDailyInitialisation(object sender, EventArgs e)
        {
        }

        [EventSubscribe("DoReportCalculations")]
        private void DoReportCalculations(object sender, EventArgs e)
        {
        }

        [EventSubscribe("DoManagement")]
        private void DoDailyCalculations(object sender, EventArgs e)
        {
            if (clock.Today == clock.StartDate)
            {
                summary.WriteMessage(this, "Script is setting lower boundary condition to " + LowerBCType, MessageType.Diagnostic);
                if (LowerBCType == LowerBCTypeOptions.gradient)
                    swim.SetLowerBCForGradient(bbcGradient: 0.0);   // in cm/cm (ibbc=0) Note that this is the default setting
                else if (LowerBCType == LowerBCTypeOptions.potential)
                    swim.SetLowerBCForGivenPotential(bbcPotential: LowerBCValue /10.0 );    //  convert to cm (ibbc=1), DUL is -100 cm so values more positive will often result in inflow to the bottom of the soil profile. Input in mm so divide here.
                else if (LowerBCType == LowerBCTypeOptions.seepage)
                    swim.SetLowerBCForSeepage(bbcPotentialSeepage: 0.0);  // in cm (ibbc=3). This is for zero-tension lysimeters
                else if (LowerBCType == LowerBCTypeOptions.watertable)
                    swim.SetLowerBCForSeepage(LowerBCValue / 10.0);  // in cm (ibbc=4). This is for water tables
                else
                    throw new Exception("Wrong lower boundary condition type");
            }
        }
    }
}
```
    Manager SWIMSetSurfaceBC
      SurfaceBCType = CurveNumber
      MinimumSurfaceStorage = 10
      MaximumSurfaceStorage = 20
      InitialSurfaceStorage = 15
      PrecipitationConstant = 50
      RunoffRateFactor = 0.2
      RunoffRatePower = 2
```csharp
using Models.Climate;
using APSIM.Shared.Utilities;
using Models.Soils.Nutrients;
using Models.Soils;
using Models.PMF;
using Models.Core;
using System.Xml.Serialization;
using System;
using System.Linq;
using Models.AgPasture;
using Models.Interfaces;

namespace Models
{
    [Serializable] 
    [System.Xml.Serialization.XmlInclude(typeof(Model))]
    public class Script : Model
    {
        [Link] ISummary summary;
        [Link] private Swim3 swim;
        
        public enum SurfaceBCOptions { CurveNumber, PowerFunction };

		[Separator("Sets SWIMs surface boundary condition to either a curve number approach or a power function.")]
        

        [Description("What surface boundary condition?")] 
        public SurfaceBCOptions SurfaceBCType { get; set; }

        [Description("Minimum surface storage (mm):")] 
        [Display(EnabledCallback = "IsPowerFunction")] 
        public double MinimumSurfaceStorage { get; set; }

        [Description("Maximum surface storage (mm):")] 
        [Display(EnabledCallback = "IsPowerFunction")] 
        public double MaximumSurfaceStorage { get; set; }

        [Description("Initial surface storage (mm):")] 
        [Display(EnabledCallback = "IsPowerFunction")] 
        public double InitialSurfaceStorage { get; set; }

        [Description("Precipitation constant:")] 
        [Display(EnabledCallback = "IsPowerFunction")] 
        public double PrecipitationConstant { get; set; }

        [Description("Runoff rate factor:")] 
        [Display(EnabledCallback = "IsPowerFunction")] 
        public double RunoffRateFactor { get; set; }

        [Description("Runoff rate power:")] 
        [Display(EnabledCallback = "IsPowerFunction")] 
        public double RunoffRatePower { get; set; }

        /// <summary></summary>
        public bool IsPowerFunction => SurfaceBCType == SurfaceBCOptions.PowerFunction;


        [EventSubscribe("StartOfSimulation")]
        private void DoDailyInitialisation(object sender, EventArgs e)
        {
            summary.WriteMessage(this, "Script is setting surface boundary condition to " + SurfaceBCType, MessageType.Diagnostic);
            if (SurfaceBCType == SurfaceBCOptions.CurveNumber)
            	swim.SetSurfaceBCForCurveNumber();
            else if (SurfaceBCType == SurfaceBCOptions.PowerFunction)
                swim.SetSurfaceBCForPowerFunction(minimumSurfaceStorage: 10, 
                  							      maximumSurfaceStorage: 20, 
                   							      initialSurfaceStorage: 15, 
                   							      precipitationConstant: 50, 
                   							      runoffRateFactor: 0.2, 
                   							      runoffRatePower: 2);
        }
    }
}
```
    Manager SoluteInitialise
      DateCsvString = 1/01/2000
      ValueCsvString = 100,0,0,0,0,0,0,0
      SoluteName = Br
      SetAdd = Set
```csharp
using Models.Climate;
using APSIM.Shared.Utilities;
using Models.Soils.Nutrients;
using Models.Soils;
using Models.Core;
using System;
using System.Linq;
using System.Collections.Generic;
using Models.AgPasture;
using Models.Interfaces;

namespace Models
{
    [Serializable] 
    [System.Xml.Serialization.XmlInclude(typeof(Model))]
    public class Script : Model
    {
        [Link] Clock clock;
        [Link] ISummary summary;
        [Link] private Solute[] solutes;

		private Solute solute;
		private List<DateTime> dates = new List<DateTime>();
		private List<double> values = new List<double>();

		public enum SetAddType { Set, Add }

		[Separator("Set the amount of solute in the simulation on 1 or more dates. The name of the solute can be specified. You can set the amount of solute or add a delta (kg/ha).")]
        

	    [Description("Name of solute:")]
    	public string SoluteName { get; set; }

	    [Description("Set the value of the solute or add a delta to it?")]
    	public SetAddType SetAdd { get; set; }

	    [Description("Dates (csv) for setting (adding to) the solute:")]
    	public string DateCsvString { get; set; }

	    [Description("Values (csv) kg/ha:")]
    	public string ValueCsvString { get; set; }
  
		
		public double SoluteAdded { get; set; }

		[EventSubscribe("StartOfSimulation")]
        private void OnStartOfSimulation(object sender, EventArgs e)
		{
			solute = Array.Find(solutes, s => s.Name.Equals(SoluteName, StringComparison.InvariantCultureIgnoreCase));
			if (solute == null)
				throw new Exception($"Cannot find solute {SoluteName}");
		
			var dateStrings = DateCsvString.Split(",", StringSplitOptions.RemoveEmptyEntries);
			foreach (var d in dateStrings)
			   dates.Add(DateTime.Parse(d));

			var valueStrings = ValueCsvString.Split(",", StringSplitOptions.RemoveEmptyEntries);
			foreach (var v in valueStrings)
			   values.Add(Convert.ToDouble(v));
    	}
    	
    	
        [EventSubscribe("DoDailyInitialisation")] private void DoDailyInitialisation(object sender, EventArgs e)
        {
	       	SoluteAdded = 0.0;
        	foreach (var d in dates)
        	{
        		if (clock.Today == d) 
	        	{
	        		if (SetAdd == SetAddType.Add)
		        		solute.AddKgHaDelta(SoluteSetterType.Other, values.ToArray());
		        	else
		        		solute.SetKgHa(SoluteSetterType.Other, values.ToArray());
		        	
		        	SoluteAdded = solute.kgha.Sum();
    	    	}
        	}
		}
    }
}
```
    Manager CalculateRollingWaterBalance
      WBTolerance = 0.01
```csharp
// This script calculates a *WaterBalance* term (output) that adds together the water balance
// water entering the system (e.g. rain, irrigation) and subtracts the water
// leaving the system (e.g. runoff, drainage, evaporation, plant water uptake). If mass balance
// is maintained, the *WaterBalance* variable should always be zero.   




using Models.Climate;
using APSIM.Shared.Utilities;
using Models.Soils.Nutrients;
using Models.Soils;
using Models.PMF;
using Models.Core;
using System.Xml.Serialization;
using System;
using System.Linq;
using Models.AgPasture;
using Models.Interfaces;

namespace Models
{
    [Serializable] 
    [System.Xml.Serialization.XmlInclude(typeof(Model))]
    public class Script : Model
    {
        [Link] Clock clock;
        [Link] ISummary summary;
        [Link] IWeather weather;
        [Link] Irrigation irrigation;
        [Link] private ISoilWater waterBalance;
        [Link] private IPlant[] plants;

  
                                [Separator("This manager checks that water in the simulation balances - that all inputs are accounted for as storage or losses. If the water balance exceeds (high or low) the tolerance then the simulation is crashed.")]
                                
                                [Description("What water mass balance error is tolerable in the cumulative water balance? (mm /year) (suggest substantially < 1 mm /year)")] public double WBTolerance { get; set; }
                                
                                
        public double WaterBalanceCumulative  { get; set; }
        public double WaterBalanceToday  { get; set; }

        public double SoilWaterAtInitialisation  { get; set; }
        public double SoilWaterYesterday  { get; set; }
                                public double SoilWaterNow  { get; set; }

                                public double PlantWaterUptake { get; set; }

        public double WaterAddedToday  { get; set; }
        public double WaterRemovedToday  { get; set; }
        public double WaterAddedCumulative  { get; set; }
        public double WaterRemovedCumulative  { get; set; }
        
        public double WBCheck { get; set; }
        

        [EventSubscribe("DoDailyInitialisation")]
        private void DoDailyInitialisation(object sender, EventArgs e)
        {
               if (clock.Today == clock.StartDate) 
               // capture the water in and on the soil as a starting point
               // doing this here as need the models to have intialised first
               {
                               SoilWaterAtInitialisation = waterBalance.Pond;
                               for (int i = 0; i < waterBalance.SWmm.Length; i++)
                                               SoilWaterAtInitialisation += waterBalance.SWmm[i];

                               SoilWaterYesterday = SoilWaterAtInitialisation;                  
                               WaterAddedCumulative = 0.0;
                               WaterRemovedCumulative = 0.0;
                               SoilWaterNow = 0.0;
               }
               else
               {
                               SoilWaterYesterday = SoilWaterNow;                     // SoilWaterNow holds the value calculated at reporting yesterday
                               WaterAddedToday = 0.0;
                               WaterRemovedToday = 0.0;
               }
                                }

        [EventSubscribe("DoReportCalculations")]
        private void DoReportCalculations(object sender, EventArgs e)
        {
               // All the WaterBalance variables should be zero. A positive value is a generation of water.
               SoilWaterNow = waterBalance.Pond;
               for (int i = 0; i < waterBalance.SWmm.Length; i++)
                               SoilWaterNow += waterBalance.SWmm[i]; // so all the water stored in or on the soil

               WaterAddedToday = weather.Rain + irrigation.IrrigationApplied;   // Can there be runon? Probably not but this will throw an error if that ever happens
               WaterAddedCumulative+= WaterAddedToday;

               WaterRemovedToday = waterBalance.Drainage + waterBalance.Es + waterBalance.Runoff + waterBalance.SubsurfaceDrain;
               PlantWaterUptake = 0.0;
               foreach (var plant in plants)
                               PlantWaterUptake += plant.WaterUptake.Sum();

               WaterRemovedToday += PlantWaterUptake;
               // Need to add subsurface drainage here

               WaterRemovedCumulative += WaterRemovedToday;

               WaterBalanceToday = WaterAddedToday - WaterRemovedToday - (SoilWaterNow - SoilWaterYesterday);
               WaterBalanceCumulative = WaterAddedCumulative - WaterRemovedCumulative - (SoilWaterNow - SoilWaterAtInitialisation);

               // need to add a warning value and a crash value and make a crash
               double simTimeYears = (clock.Today - clock.StartDate).Days/365.25;
               if (simTimeYears > 0.1)
               {
                               WBCheck = WaterBalanceCumulative * simTimeYears;
                               if (WBCheck > WBTolerance * simTimeYears)
                                               throw new Exception("The error in the water balance, " + WaterBalanceCumulative + ", exceeded the specified tolerance of " + WBTolerance * simTimeYears + ". There is likely a problem with SWIM or SoilWater.");
               }
                                }
    }
}
```
  Folder Pasture Graze Stock
    Manager AddManure on a fixed date
      ManureDate = 1-sep
      Amount = 1000
      MDMP = 1
      NConc = 0.05
```csharp
using Models.Soils;
using System;
using System.Linq;
using Models.Core;
using Models.PMF;
using APSIM.Shared.Utilities;
using Models.Surface;

namespace Models
{
    [Serializable]
    public class Script : Model
    {
        [Link] Clock Clock;
        [Link] SurfaceOrganicMatter SOM;
        
        [Separator("Add animal manure to surface organic matter")]
        [Description("Date to add animal manure")]
        public string ManureDate { get; set; }
        
        [Description("Amount of animal manure to Add (kg/ha)")]
        public double Amount { get; set; }

        [Description("Manure dry matter proportion (g/g)")]
        public double MDMP { get; set; }

        [Description("Manure N concentration in dry matter (g/g)")]
        public double NConc { get; set; }



        [EventSubscribe("DoManagement")]
        private void OnDoManagement(object sender, EventArgs e)
        {
            if (DateUtilities.WithinDates(ManureDate, Clock.Today, ManureDate))
            {
                SOM.FractionFaecesAdded = MDMP;
                AddFaecesType Data = new AddFaecesType();
                Data.OMWeight = Amount;
                Data.OMN = Amount * NConc;
                SOM.AddFaeces(Data);
            }
        }
    }
}
```
    Manager Urine deposition on fixed dates
      Amount = 1000
      EachYear = False
      Dates =
      Depth = 0
```csharp
using Models.Interfaces;
using APSIM.Shared.Utilities;
using Models.PMF;
using Models.Soils;
using Models.Core;
using System;
using System.Linq;
using Models.Soils.Nutrients;

namespace Models
{
    [Serializable]
    public class Script : Model
    {
        [Link] private Clock clock;
        [Link] private Fertiliser fertiliser;
        [Link] private ISummary summary;
        [Link] private Soil soil;
        private Nutrient nutrient;
        private SoilNitrogen soilN;
        [Link]
        private IPhysical soilPhysical;


        [Separator("Urine will be deposited on the date(s) below")]
        [Description("Apply urine on the same day(s) each year? If no, then must include the year of appliaction below")]
        public bool EachYear { get; set; }

        [Description("Dates for one or more urine depositions (dd-mmm or dd-mmm-yyyy) as a list with a comma between dates")]
        public string[] Dates { get; set; }

        [Separator("Urine deposition details")]
        [Description("Depth to which the urine should penetrate (mm)")]
        public double Depth { get; set; }

        [Description("Amount of urine to apply (kg N /ha) for each deposition")]
        public double Amount { get; set; }


        [EventSubscribe("StartOfSimulation")]
        private void FindSoilNOrNutrient(object sender, EventArgs e)
        {
            nutrient = this.FindInScope<Nutrient>() as Nutrient;
            soilN = this.FindInScope<SoilNitrogen>() as SoilNitrogen;

            if (nutrient == null && soilN == null)
                throw new Exception(string.Format("Error in script {0}: Unable to find nutrient or soilN.", Name));
        }

        [EventSubscribe("DoManagement")]
        private void OnDoManagement(object sender, EventArgs e)
        {
            if (OnDepositionDate())
            {
                double[] weights = GetLayerWeights();
                            double cumulativeDepth = 0.0;
                            Fertiliser.Types FertiliserType = Fertiliser.Types.UreaN;
                
                for (int i = 0; i < soilPhysical.Thickness.Length; i++)
               {
                                cumulativeDepth += soilPhysical.Thickness[i];
                                if (weights[i] > 0.0)
                                                fertiliser.Apply(Amount * weights[i], FertiliserType, cumulativeDepth - (soilPhysical.Thickness[i] / 2.0) );  
                            }
                            summary.WriteMessage(this, "Urine deposition of " + Amount + " kg N /ha to a depth of " + Depth + " mm", MessageType.Information); 
            }
        }

        /// <summary>Checks if today's date is one of the specified fertiliser application dates.</summary>
        private bool OnDepositionDate()
        {
            if (EachYear)
                return Dates.Any(d => DateUtilities.DatesEqual(d, clock.Today));
            
            DateTime[] dates = Dates.Select(d => DateTime.ParseExact(d, "d-MMM-yyyy", null)).ToArray();
            return dates.Any(d => SameDate(d, clock.Today));
        }

        private double[] GetLayerWeights()
        {
            double[] weights = new double[soilPhysical.Thickness.Length];
            double cumDepth = 0;
            for (int i = 0; i < soilPhysical.Thickness.Length; i++)
            {
                cumDepth += soilPhysical.Thickness[i];
                if (cumDepth < Depth)
                    weights[i] = soilPhysical.Thickness[i] / Depth;    // all the layer is within the deposition depth
                else if (cumDepth - soilPhysical.Thickness[i] <= Depth)
                    weights[i] = (Depth - (cumDepth - soilPhysical.Thickness[i])) / Depth;
                else
                    weights[i] = 0;
            }
            return weights;
        }

        private bool SameDate(DateTime d1, DateTime d2)
        {
            return d1.Year == d2.Year && d1.DayOfYear == d2.DayOfYear;
        }
    }
}
```
  Folder Other
    Manager Reset on sowing
      ResetWater = Yes
      ResetNutrients = Yes
      ResetSOM = Yes
```csharp
using Models.Soils.Nutrients;
using APSIM.Shared.Utilities;
using Models.Surface;
using Models.Utilities;
using Models.Soils.Nutrients;
using Models.Soils;
using Models.PMF;
using Models.Core;
using System;
using System.Linq;
using Models.Interfaces;

namespace Models
{
    [Serializable]
    public class Script : Model
    {
        [Link] private Plant Wheat;
        [Link] private ISoilWater SoilWater;
        [Link] private Nutrient nutrient;
        [Link] private SurfaceOrganicMatter SOM;
        [Link] private Summary Summary;

        [Description("Reset Water? (Yes or No)")]
        public string ResetWater {get;set;}

        [Description("Reset Soil Nutrients? (Yes or No)")]
        public string ResetNutrients {get;set;}

        [Description("Reset Surface Organic Matter? (Yes or No)")]
        public string ResetSOM {get;set;}

        [EventSubscribe("Sowing")]
        private void OnSowing(object sender, EventArgs e)
        {
            if (ResetWater == "Yes")
            {
                Summary.WriteMessage(this, "Reset Water", MessageType.Diagnostic);
                SoilWater.Reset();
            }
            if (ResetNutrients == "Yes")
            {
                Summary.WriteMessage(this, "Reset Nutrients", MessageType.Diagnostic);
                nutrient.Reset();
            }
            if (ResetSOM == "Yes")
            {
                Summary.WriteMessage(this, "Reset Surface OM", MessageType.Diagnostic);
                SOM.Reset();
            }
        }
    }
}
```
    Manager Reset on date
      ResetDate = 1-Jan
      ResetWater = Yes
      ResetNutrients = Yes
      ResetSOM = Yes
```csharp
using Models.Soils.Nutrients;
using APSIM.Shared.Utilities;
using Models.Surface;
using Models.Utilities;
using Models.Soils.Nutrients;
using Models.Soils;
using Models.PMF;
using Models.Core;
using System;
using System.Linq;
using Models.Interfaces;

namespace Models
{
    [Serializable]
    public class Script : Model
    {
        [Link] private Clock Clock;
        [Link] private Plant Wheat;
        [Link] private ISoilWater SoilWater;
        [Link] private Nutrient nutrient;
        [Link] private SurfaceOrganicMatter SOM;
        [Link] private Summary Summary;

        [Description("Date to reset on:")]
        public string ResetDate {get;set;}

        [Description("Reset Water? (Yes or No)")]
        public string ResetWater {get;set;}

        [Description("Reset Soil Nutrients ? (Yes or No)")]
        public string ResetNutrients {get;set;}

        [Description("Reset Surface Organic Matter? (Yes or No)")]
        public string ResetSOM {get;set;}

        [EventSubscribe("DoManagement")]
        private void OnDoManagement(object sender, EventArgs e)
        {
            if (DateUtilities.WithinDates(ResetDate, Clock.Today, ResetDate))
            {
                if (ResetWater == "Yes")
                {
                    Summary.WriteMessage(this, "Reset Water", MessageType.Diagnostic);
                    SoilWater.Reset();
                }
                if (ResetNutrients == "Yes")
                {
                    Summary.WriteMessage(this, "Reset Nitrogen", MessageType.Diagnostic);
                    nutrient.Reset();
                }
                if (ResetSOM == "Yes")
                {
                    Summary.WriteMessage(this, "Reset Surface OM", MessageType.Diagnostic);
                    SOM.Reset();
                }
            }
        }
    }
}
```
    Manager LocationInfo
      Country =
      State =
      Region =
```csharp
using Models.Soils;
using System;
using System.Linq;
using Models.Core;
using Models.PMF;
using APSIM.Shared.Utilities;

namespace Models
{
    [Serializable]
    public class Script : Model
    {
        [Link] Clock Clock;
        [Link] Fertiliser Fertiliser;
        [Link] Summary Summary;
        
        [Description("Country")]
        public string Country { get; set; }

        [Description("State")]
        public string State { get; set; }

        [Description("Region")]
        public string Region { get; set; }

    }
}
```
