Simulations: Version=80
  Memo
    This example shows some of the graphing capabilities.GRAPH SCOPING EXAMPLE:There is a SoilWater graph in each of the three simulations that plots sw(1) over time with observed data. The data source used was *.report which indicates that all simulations in scope will be plotted on the graph. Likewise the observed data was plotted with a data source of *.observed which means all data in scope will be plotted. This graph was then copied to all simulations and then to the top level "Simulations" node. The graphs in the simulations show only the simulation data while the top level graph shows all simulations and data.GRAPH WHERE DATA IS COMING FROM PROPERTIES OF A MODEL:The second example` shows a soil depth plot where all data is coming directly from the properties of the 'Soil' model e.g. [Soil].AirDry ...<br/>
  DataStore
  Folder
    Simulation HighWater
      Weather: FileName=%root%/Examples/WeatherFiles/lincoln.met
      Clock: Start=2003-10-20; End=2004-05-23
      Summary
      Zone Field: Area=1; Slope=0; AspectAngle=0; Altitude=50
        Report: EventNames=[Clock].DoReport
          VariableNames:
            [Clock].Today
            [Soil].SoilWater.SWmm
        Soil: SoilType=Black Vertosol; LocalName=Waco; Site=Jimbour; NearestTown=Jimbour, Q 4352; Region=South East Queensland; NaturalVegetation=Grassland, mainly Qld bluegrass; Latitude=0; Longitude=0
          Physical
            Thickness  BD    AirDry  LL15  DUL   SAT
            150        1.02  0.15    0.29  0.54  0.59
            150        1.03  0.26    0.29  0.53  0.58
            300        1.02  0.29    0.29  0.54  0.59
            300        1.02  0.29    0.29  0.54  0.58
            300        1.06  0.3     0.3   0.52  0.57
            300        1.11  0.31    0.31  0.5   0.55
            300        1.12  0.32    0.32  0.5   0.55
            300        1.15  0.33    0.33  0.48  0.53
            300        1.18  0.34    0.34  0.47  0.52
            300        1.2   0.35    0.35  0.46  0.51
            300        1.25  0.36    0.36  0.44  0.49
            SoilCrop WheatSoil
              LL=[0.29, 0.29, 0.32, 0.38, 0.39, 0.39, 0.41, 0.48, 0.47, 0.46, 0.44]
              KL=[0.1, 0.1, 0.08, 0.06, 0.04, 0.02, 0.01, 0, 0, 0, 0]
              XF=[1, 1, 1, 1, 1, 1, 1, 0, 0, 0, 0]
            SoilCrop BarleySoil
              LL=[0.29, 0.29, 0.36, 0.43, 0.51, 0.5, 0.5, 0.48, 0.47, 0.46, 0.44]
              KL=[0.1, 0.1, 0.08, 0.06, 0.04, 0.02, 0.01, 0, 0, 0, 0]
              XF=[1, 1, 1, 1, 1, 1, 1, 0, 0, 0, 0]
            SoilCrop PotatoSoil
              LL=[0.29, 0.29, 0.36, 0.43, 0.51, 0.5, 0.5, 0.48, 0.47, 0.46, 0.44]
              KL=[0.1, 0.1, 0.08, 0.06, 0.04, 0.02, 0.01, 0, 0, 0, 0]
              XF=[1, 1, 1, 1, 1, 1, 1, 0, 0, 0, 0]
          SoilWater: SummerDate=1-Nov; SummerU=6; SummerCona=3; WinterDate=1-Apr; WinterU=6; WinterCona=3; DiffusConst=40; DiffusSlope=16; Salb=0.13; CN2Bare=73; CNRed=20; CNCov=0.8; slope=0; discharge_width=0; catchment_area=0; max_pond=0; PrecipitationInterception=0
            Thickness  SWCON  KLAT
            150        0.3    0
            150        0.3    0
            300        0.3    0
            300        0.3    0
            300        0.3    0
            300        0.3    0
            300        0.3    0
            300        0.3    0
            300        0.3    0
            300        0.3    0
            300        0.3    0
          Organic: FOMCNRatio=40
            Thickness  Carbon  SoilCNRatio  FBiom  FInert  FOM
            150        1.04    12.5         0.025  0.4     48.1286
            150        0.89    12.5         0.02   0.6     41.4247
            300        0.89    12.5         0.015  0.8     30.6882
            300        0.89    12.5         0.01   0.9     22.7344
            300        0.77    12.5         0.01   0.95    16.842
            300        0.45    12.5         0.01   0.95    12.4769
            300        0.27    12.5         0.01   0.95    9.2431
            300        0.22    12.5         0.01   0.95    6.84746
            300        0.16    12.5         0.01   0.95    5.07272
            300        0.13    12.5         0.01   0.95    3.75796
            300        0.12    12.5         0.01   0.95    2.78397
          Chemical
            Thickness  NO3N    NH4N      PH   EC
            150        1116.5  0.599004  8.4  0.2
            150        2.101   0.100001  8.8  0.25
            300        2.101   0.100001  9    0.31
            300        1.701   0.100001  9.2  0.4
            300        1.701   0.100001  9.2  0.59
            300        1.701   0.100001  9.1  0.84
            300        1.701   0.100001  9    0.93
            300        1.701   0.100001  9    1.01
            300        1.701   0.100001  8.9  1.06
            300        1.701   0.100001  8.9  1.05
            300        1.701   0.100001  8.9  1.01
          InitialWater Initial water: PercentMethod=0; FractionFull=1
          Sample: Thickness=[150, 150, 300, 300, 300, 300, 300, 300, 300, 300, 300]; SWUnits=Volumetric; OCUnits=Total; PHUnits=Water
          CERESSoilTemperature
          Nutrient
            DirectedGraphInfo={Nodes=[{Name=Inert, OutlineColour=Black}, {Name=SurfaceResidue, OutlineColour=Black}, {Name=FOMLignin, OutlineColour=Black}, {Name=FOMCellulose, OutlineColour=Black}, {Name=FOMCarbohydrate, OutlineColour=Black}, {Name=Microbial, OutlineColour=Black}, {Name=Humic, OutlineColour=Black}, {Name=Urea, OutlineColour=Black}, {Name=NO3, OutlineColour=Black}, {Name=NH4, OutlineColour=Black}, {Name=Atmosphere, OutlineColour=White}], Arcs=[{SourceName=SurfaceResidue, DestinationName=Microbial}, {SourceName=SurfaceResidue, DestinationName=Humic}, {SourceName=FOMLignin, DestinationName=Microbial}, {SourceName=FOMLignin, DestinationName=Humic}, {SourceName=FOMCellulose, DestinationName=Microbial}, {SourceName=FOMCellulose, DestinationName=Humic}, {SourceName=FOMCarbohydrate, DestinationName=Microbial}, {SourceName=FOMCarbohydrate, DestinationName=Humic}, {SourceName=Microbial, DestinationName=Microbial}, {SourceName=Microbial, DestinationName=Humic}, {SourceName=Humic, DestinationName=Microbial}, {SourceName=Urea, DestinationName=NH4}, {SourceName=NO3, DestinationName=Atmosphere}, {SourceName=NH4, DestinationName=NO3}]}
        SurfaceOrganicMatter: InitialResidueName=Potato; InitialResidueType=Potato; InitialResidueMass=1000; InitialStandingFraction=0; InitialCPR=0; InitialCNR=80; FractionFaecesAdded=1
        MicroClimate: a_interception=0; b_interception=1; c_interception=0; d_interception=0; soil_albedo=0.3; SoilHeatFluxFraction=0.4; MinimumHeightDiffForNewLayer=0; NightInterceptionFraction=0.5; ReferenceHeight=2
      Input Observed
    Simulation MediumWater
      Weather: FileName=%root%\Examples\WeatherFiles\lincoln.met
      Clock: Start=2003-10-20; End=2004-05-23
      Summary
      Zone Field: Area=1; Slope=0; AspectAngle=0; Altitude=50
        Report: EventNames=[Clock].DoReport
          VariableNames:
            [Clock].Today
            [Soil].SoilWater.SWmm
        Soil: SoilType=Black Vertosol; LocalName=Waco; Site=Jimbour; NearestTown=Jimbour, Q 4352; Region=South East Queensland; NaturalVegetation=Grassland, mainly Qld bluegrass; Latitude=0; Longitude=0
          Physical: same as Folder.HighWater.Field.Soil.Physical
          SoilWater: same as Folder.HighWater.Field.Soil.SoilWater
          Organic: same as Folder.HighWater.Field.Soil.Organic
          Chemical: same as Folder.HighWater.Field.Soil.Chemical
          InitialWater Initial water: PercentMethod=0; FractionFull=0.3
          Sample: same as Folder.HighWater.Field.Soil.Sample
          CERESSoilTemperature
          Nutrient: same as Folder.HighWater.Field.Soil.Nutrient
        SurfaceOrganicMatter: InitialResidueName=Potato; InitialResidueType=Potato; InitialResidueMass=1000; InitialStandingFraction=0; InitialCPR=0; InitialCNR=80; FractionFaecesAdded=1
        MicroClimate: a_interception=0; b_interception=1; c_interception=0; d_interception=0; soil_albedo=0.3; SoilHeatFluxFraction=0.4; MinimumHeightDiffForNewLayer=0; NightInterceptionFraction=0.5; ReferenceHeight=2
      Input Observed
    Simulation LowWater
      Weather: FileName=%root%\Examples\WeatherFiles\lincoln.met
      Clock: Start=2003-10-20; End=2004-05-23
      Summary
      Zone Field: Area=1; Slope=0; AspectAngle=0; Altitude=50
        Report: EventNames=[Clock].DoReport
          VariableNames:
            [Clock].Today
            [Soil].SoilWater.SWmm
        Soil: SoilType=Black Vertosol; LocalName=Waco; Site=Jimbour; NearestTown=Jimbour, Q 4352; Region=South East Queensland; NaturalVegetation=Grassland, mainly Qld bluegrass; Latitude=0; Longitude=0
          Physical: same as Folder.HighWater.Field.Soil.Physical
          SoilWater: same as Folder.HighWater.Field.Soil.SoilWater
          Organic: same as Folder.HighWater.Field.Soil.Organic
          Chemical: same as Folder.HighWater.Field.Soil.Chemical
          InitialWater Initial water: PercentMethod=0; FractionFull=0
          Sample: same as Folder.HighWater.Field.Soil.Sample
          CERESSoilTemperature
          Nutrient: same as Folder.HighWater.Field.Soil.Nutrient
        SurfaceOrganicMatter: InitialResidueName=Potato; InitialResidueType=Potato; InitialResidueMass=1000; InitialStandingFraction=0; InitialCPR=0; InitialCNR=80; FractionFaecesAdded=1
        MicroClimate: a_interception=0; b_interception=1; c_interception=0; d_interception=0; soil_albedo=0.3; SoilHeatFluxFraction=0.4; MinimumHeightDiffForNewLayer=0; NightInterceptionFraction=0.5; ReferenceHeight=2
      Input Observed
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