Simulations: Version=85
  Simulation
    Weather: FileName=%root%/Examples/WeatherFiles/Popondetta.met
    Clock: Start=1996-03-01; End=2010-09-29
    MicroClimate: a_interception=0; b_interception=1; c_interception=0; d_interception=0; soil_albedo=0.23; SoilHeatFluxFraction=0.4; MinimumHeightDiffForNewLayer=0; NightInterceptionFraction=0.5; ReferenceHeight=2
    Summary
    Zone Block: Area=1; Slope=0; AspectAngle=0; Altitude=50
      Fertiliser
      SurfaceOrganicMatter SurfaceOM: InitialResidueName=oilpalm; InitialResidueType=oilpalm; InitialResidueMass=0; InitialStandingFraction=0; InitialCPR=0; InitialCNR=0; FractionFaecesAdded=1
      Soil: SoilType=Higaturu Series; Site=Sangara Estate; NearestTown=Popondetta; Region=Oro Province; Country=PNG; Latitude=0; Longitude=0
        Physical
          Thickness  BD    AirDry  LL15   DUL    SAT
          100        1.22  0.127   0.38   0.48   0.53
          200        1.22  0.127   0.38   0.48   0.53
          300        1.43  0.1     0.3    0.4    0.45
          300        1.14  0.137   0.41   0.51   0.56
          300        1.15  0.135   0.406  0.506  0.556
          300        1.15  0.135   0.406  0.506  0.556
          500        1.43  0.1     0.3    0.4    0.45
          500        1.43  0.1     0.3    0.4    0.45
          500        1.43  0.1     0.3    0.4    0.45
          500        1.43  0.1     0.3    0.4    0.45
          500        1.43  0.1     0.3    0.4    0.45
          1000       1.43  0.1     0.3    0.4    0.45
          SoilCrop OilPalmSoil
            LL=[0.38, 0.38, 0.3, 0.41, 0.406, 0.406, 0.3, 0.3, 0.3, 0.3, 0.3, 0.3]
            KL=[0.06, 0.04, 0.03, 0.02, 0.02, 0.02, 0.01, 0.01, 0.01, 0, 0, 0]
            XF=[1, 1, 1, 1, 1, 1, 1, 1, 1, 0, 0, 0]
        SoilWater: SummerDate=1-Nov; SummerU=5; SummerCona=5; WinterDate=1-Apr; WinterU=5; WinterCona=5; DiffusConst=88; DiffusSlope=35.4; Salb=0.18; CN2Bare=68; CNRed=20; CNCov=0.8; slope=0; discharge_width=0; catchment_area=0; max_pond=0; PrecipitationInterception=0
          Thickness  SWCON  KLAT
          100        0.7    0
          200        0.7    0
          300        0.7    0
          300        0.7    0
          300        0.7    0
          300        0.7    0
          500        0.5    0
          500        0.5    0
          500        0.5    0
          500        0.5    0
          500        0.5    0
          1000       0.5    0
        Organic: FOMCNRatio=30
          Thickness  Carbon  SoilCNRatio  FBiom  FInert  FOM
          100        2.1     12           0.04   0.24    532.719
          100        1.06    12           0.03   0.47    501.696
          100        0.65    12           0.015  0.77    472.479
          300        0.5     12           0.01   0.95    394.648
          300        0.4     12           0.01   0.99    329.638
          600        0.4     12           0.01   0.99    229.98
          500        0.4     12           0.01   0.99    170.374
          500        0.4     12           0.01   0.99    126.216
          500        0.4     12           0.01   0.99    93.5031
          500        0.4     12           0.01   0.99    69.2688
          500        0.4     12           0.01   0.99    51.3156
          1000       0.4     12           0.01   0.99    28.1626
        Chemical
          Thickness  NO3N  NH4N  PH
          100        5     0     6.3
          200        5     0     6.4
          300        1     0     6.7
          300        1     0     6.8
          300        1     0     6.8
          300        0     0     6.8
          500        0     0     6.8
          500        0     0     6.8
          500        0     0     6.8
          500        0     0     6.8
          500        0     0     6.8
          1000       0     0     6.8
        InitialWater: PercentMethod=1; FractionFull=1
        Sample InitialNitrogen: SWUnits=Volumetric; OCUnits=Total; PHUnits=Water
          Thickness=[100, 200, 300, 300, 300, 300, 500, 500, 500, 500, 500, 1000]
        CERESSoilTemperature
        Nutrient
          DirectedGraphInfo={Nodes=[{Name=Inert, OutlineColour=Black}, {Name=SurfaceResidue, OutlineColour=Black}, {Name=FOMLignin, OutlineColour=Black}, {Name=FOMCellulose, OutlineColour=Black}, {Name=FOMCarbohydrate, OutlineColour=Black}, {Name=Microbial, OutlineColour=Black}, {Name=Humic, OutlineColour=Black}, {Name=Urea, OutlineColour=Black}, {Name=NO3, OutlineColour=Black}, {Name=NH4, OutlineColour=Black}, {Name=Atmosphere, OutlineColour=White}], Arcs=[{SourceName=SurfaceResidue, DestinationName=Microbial}, {SourceName=SurfaceResidue, DestinationName=Humic}, {SourceName=FOMLignin, DestinationName=Microbial}, {SourceName=FOMLignin, DestinationName=Humic}, {SourceName=FOMCellulose, DestinationName=Microbial}, {SourceName=FOMCellulose, DestinationName=Humic}, {SourceName=FOMCarbohydrate, DestinationName=Microbial}, {SourceName=FOMCarbohydrate, DestinationName=Humic}, {SourceName=Microbial, DestinationName=Microbial}, {SourceName=Microbial, DestinationName=Humic}, {SourceName=Humic, DestinationName=Microbial}, {SourceName=Urea, DestinationName=NH4}, {SourceName=NO3, DestinationName=Atmosphere}, {SourceName=NH4, DestinationName=NO3}]}
      Report AnnualOutput: EventNames=[Clock].EndOfYear
        VariableNames:
          [Clock].Today
          [Clock].Today.Year
          [OilPalm].Age
          [OilPalm].LAI
          sum of [Weather].Rain from 1-Jan to 31-Dec as AnnualRain
          sum of [Soil].SoilWater.Eo from 1-Jan to 31-Dec as AnnualPotentialEvaporation
          sum of [Irrigation].IrrigationApplied from 1-Jan to 31-Dec as AnnualIrrigation
          sum of [Fertiliser].NitrogenApplied from 1-Jan to 31-Dec as AnnualFertiliserNAdded
          sum of [Soil].SoilWater.LeachNO3 from 1-Jan to 31-Dec as AnnualNLeaching
          sum of sum([Soil].Nutrient.Natm) from 1-Jan to 31-Dec as AnnualDenitrification
          sum of sum([Soil].Nutrient.N2Oatm) from 1-Jan to 31-Dec as AnnualN2O
          sum of ([OilPalm].UnderstoryNFixation+[Fertiliser].NitrogenApplied) from 1-Jan to 31-Dec as AnnualTotalNInput
          [Calculations].Script.AnnualFronds
          [Calculations].Script.AnnualBunches
          [Calculations].Script.AnnualYield
          [Calculations].Script.AnnualBunchSize
          sum of [OilPalm].UnderstoryDltDM*10 from 1-Jan to 31-Dec as AnnualUnderstoryNPP
          sum of [OilPalm].UnderstoryNFixation from 1-Jan to 31-Dec as AnnualUnderstoryNFixation
          sum of sum([OilPalm].UnderstoryNUptake) from 1-Jan to 31-Dec as AnnualUnderstoryNUptake
          sum of sum([OilPalm].NUptake) from 1-Jan to 31-Dec as AnnualPalmNUptake
          sum of [OilPalm].RootGrowth*10 from 1-Jan to 31-Dec as AnnualRootNPP
          sum of [OilPalm].StemGrowth*10 from 1-Jan to 31-Dec as AnnualStemNPP
          sum of [OilPalm].FrondGrowth*10 from 1-Jan to 31-Dec as AnnualFrondNPP
          sum of [OilPalm].BunchGrowth*10 from 1-Jan to 31-Dec as AnnualBunchNPP
          sum of (([OilPalm].RootGrowth+[OilPalm].StemGrowth+[OilPalm].FrondGrowth+[OilPalm].UnderstoryDltDM)*10) from 1-Jan to 31-Dec as AnnualTotalVegetativeNPP
          sum of (([OilPalm].RootGrowth+[OilPalm].StemGrowth+[OilPalm].FrondGrowth)*10) from 1-Jan to 31-Dec as AnnualPalmVegetativeNPP
          sum of ([Soil].SoilWater.Es + [OilPalm].EP + [OilPalm].UnderstoryEP) from 1-Jan to 31-Dec as AnnualET
          [Calculations].Script.AnnualNRemoved
          avg of sum([Soil].Nutrient.NO3.kgha) from 1-Jan to 31-Dec as AnnualAverageNO3
          avg of [SurfaceOM].Wt from 1-Jan to 31-Dec as AnnualLitterMass
          avg of [SurfaceOM].N from 1-Jan to 31-Dec as AnnualLitterN
      Report MonthlyOutput: EventNames=[Clock].StartOfMonth
        VariableNames:
          [Clock].Today.Year
          [Clock].Today
          [Clock].Today.Month
          [OilPalm].Age
          [SurfaceOM].N
          [SurfaceOM].Wt
          [OilPalm].LAI
          [OilPalm].StemMass
          [OilPalm].UnderstoryCoverGreen
          [Calculations].Script.surfaceom_wt_oilpalmstem
          [Calculations].Script.surfaceom_wt_oilpalmunderstory
          sum([Soil].Nutrient.TotalC)/1000 as SoilCtpha
          sum([Soil].Nutrient.TotalN) as SoilNkgpha
          sum([Soil].Nutrient.NO3.kgha) as TotalNO3
          sum([Soil].SoilWater.SWmm) as TotalSW
          sum([Soil].DULmm) as DUL
          sum([Soil].SATmm) as SAT
      OilPalm: LAI=0; UnderstoryCoverMax=0.4; UnderstoryLegumeFraction=1; MaximumRootDepth=5000; RootDepth=3030; DltDM=19.8711; ReproductiveGrowthFraction=0.540023; UnderstoryCoverGreen=0.0469482; UnderstoryPotNUptake=[9.0366, 16.9496, 10.5507, 0, 0, 0, 0, 0, 0, 0, 0, 0]
      Irrigation
      Manager Palm Management
        sowing_date = 1996-03-01
        population = 135
        cultivar = Dami
        sowing_depth = 200
        Plant_population = 0
```csharp
using System;
using System.Linq;
using Models.Core;
using Models.PMF;
using Models.PMF.OilPalm;
using Models.Surface;
using APSIM.Shared.Utilities;

namespace Models
{
    [Serializable]
    [System.Xml.Serialization.XmlInclude(typeof(Model))]
    public class Script : Model
    {
        [Link] Clock Clock; 
        [Link] OilPalm oilPalm;
        [Link] Summary Summary;
        [Link] SurfaceOrganicMatter surface;
        
        [Description("Sowing date")]
        public DateTime sowing_date {get; set;}
        
        [Description("Plant population /ha")]
        public double population {get; set;}


        [Description("Cultivar")]
        [Display(Type=DisplayType.CultivarName, PlantName = "OilPalm")]
        public string cultivar {get; set;}

        [Description("Sowing depth (mm)")]
        public double sowing_depth {get; set;}
        
        public double Plant_population {get;set;}
        
        private byte HarvestCounter = 1;

        [EventSubscribe("Commencing")]
        private void OnSimulationCommencing(object sender, EventArgs e)
        {
            Plant_population = 0;
            surface.Add(24000, 270.769, 0, "oilpalm", "oilpalm");
            surface.Add(63000, 191.172, 0, "oilpalmstem", "oilpalmstem");
        }
        
        [EventSubscribe("DoManagement")]
        private void OnDoManagement(object sender, EventArgs e)
        {    
            if (Clock.Today.Date == sowing_date)
            {
                oilPalm.Sow(population: population / 10000, cultivar:cultivar, depth:sowing_depth, rowSpacing:150);
            }
            
            if (HarvestCounter == 14)
            {
                oilPalm.Harvest();
                HarvestCounter = 1;
            }
            
            HarvestCounter++;
        }
    }
}
```
      Manager Calculations
        Offset = 6
        AnnualFronds = 0
        AnnualBunches = 0
        AnnualYield = 0
        AnnualBunchSize = 0
        surfaceom_wt_oilpalmstem = -
        surfaceom_wt_oilpalmunderstory = 0
        OilPalmYield = 0
        AnnualNRemoved = 0
```csharp
using System;
using Models.Core;
using Models.PMF;
using Models.PMF.OilPalm;
using Models.Soils;
using Models.Soils.Nutrients;
using Models.Surface;

namespace Models
{ 
    [Serializable]
    [System.Xml.Serialization.XmlInclude(typeof(Model))]
    public class Script : Model
    {
        [Link] Clock Clock;
        [Link] OilPalm OilPalm;
        [Link] Soil Soil;
        [Link] SurfaceOrganicMatter SurfaceOM;
        [Link] Summary Summary;
        [Link] Fertiliser Fertiliser;
        [Link] Weather Weather;
        [Link] Irrigation Irrigation;
        
        public double Offset {get; set;}
        public double AnnualFronds {get; set;}
        public double AnnualBunches {get; set;}
        public double AnnualYield {get; set;}
        public double AnnualBunchSize {get; set;}
        public double surfaceom_wt_oilpalmstem {get; set;}
        public double surfaceom_wt_oilpalmunderstory {get; set;}
        public double OilPalmYield {get; set;}
        public double AnnualNRemoved {get; set;}

        [EventSubscribe("Commencing")]
        private void OnSimulationCommencing(object sender, EventArgs e)
        {
            Offset = 0;
            OilPalmYield = 0;
            AnnualFronds = 0;
            AnnualBunches = 0;
            AnnualBunchSize = 0;
            AnnualYield = 0;
            surfaceom_wt_oilpalmstem = 0;
            surfaceom_wt_oilpalmunderstory = 0;    
            AnnualNRemoved = 0;

        }
        

       [EventSubscribe("StartOfYear")]
       private void OnStartOfYear(object sender, EventArgs e)
       {
               Offset = OilPalm.CumulativeFrondNumber;
            AnnualYield = 0;
            AnnualBunches = 0;
            AnnualBunchSize = 0;
            AnnualNRemoved = 0;
        }
        
       [EventSubscribe("DoManagementCalculations")]
       private void OnDoManagement(object sender, EventArgs e)
        {
            surfaceom_wt_oilpalmstem = SurfaceOM.GetWeightFromPool("oilpalmstem");
            AnnualFronds = OilPalm.CumulativeFrondNumber - Offset;  
        }
        
        [EventSubscribe("Harvesting")]
        private void OnHarvesting(object sender, EventArgs e)
        {
            AnnualYield += OilPalm.HarvestFFB;
            AnnualBunches += OilPalm.HarvestBunches;
            if (AnnualBunches > 0)
                AnnualBunchSize = AnnualYield * 1000 / AnnualBunches / (OilPalm.Population * 10000);
            AnnualNRemoved += OilPalm.HarvestNRemoved;
        }
    }
}
```
  DataStore
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