Simulations: Version=100
  DataStore
  Simulation RussetBurbank
    Weather: FileName=%root%\Examples\WeatherFiles\lincoln.met
    Clock: Start=2003-10-20; End=2004-06-05
    Summary
    SoilArbitrator Soil Arbitrator
    Zone Field: Area=1; Slope=0; AspectAngle=0; Altitude=50
      Soil: SoilType=Sedementary; LocalName=Lincoln; Latitude=0; Longitude=0
        Physical
          Thickness  BD   AirDry  LL15  DUL   SAT
          100        1.2  0.08    0.16  0.33  0.5
          200        1.2  0.16    0.16  0.33  0.5
          300        1.2  0.15    0.15  0.31  0.44
          300        1.2  0.13    0.13  0.27  0.46
          300        1.2  0.15    0.15  0.3   0.44
          300        1.2  0.15    0.15  0.3   0.44
          SoilCrop PotatoSoil: LL=[0.16, 0.16, 0.15, 0.2, 0.3, 0.3]; KL=[0.1, 0.06, 0.04, 0.01, 0, 0]; XF=[1, 1, 1, 1, 0, 0]
        WaterBalance SoilWater: SummerDate=1-Nov; SummerU=9; SummerCona=4.4; WinterDate=1-Apr; WinterU=9; WinterCona=4.4; DiffusConst=88; DiffusSlope=35.4; Salb=0.18; CN2Bare=0; CNRed=-9e-05; CNCov=0; Slope=0; DischargeWidth=0; CatchmentArea=0
          Thickness  SWCON  KLAT
          100        0.55   0
          200        0.55   0
          300        0.55   0
          300        0.55   0
          300        0.55   0
          300        0.55   0
        Organic: FOMCNRatio=30
          Thickness  Carbon  SoilCNRatio  FBiom  FInert  FOM
          100        3.5     11.5         0.025  0.3     1243.93
          200        2.5     11.5         0.025  0.4     833.832
          300        1.2     11.5         0.015  0.75    457.617
          300        1.03    11.5         0.01   0.9     251.145
          300        0.47    11.5         0.01   0.96    137.831
          300        0.47    11.5         0.01   0.96    75.6435
        Chemical
          Thickness  NO3N      NH4N       PH
          100        33.3333   0.0833333  6.6
          200        12.5      0.0416667  6.2
          300        3.88889   0.0277778  5.7
          300        3.88889   0.0277778  5.5
          300        0.383333  0.0277778  5.5
          300        0.383333  0.0277778  5.5
        InitialWater Initial water: PercentMethod=0; FractionFull=1
        Sample: Thickness=[100, 200, 300, 300, 300, 300]; SWUnits=Volumetric; OCUnits=Total; PHUnits=Water
        CERESSoilTemperature
        Nutrient
      SurfaceOrganicMatter: InitialResidueName=Wheat; InitialResidueType=Wheat; InitialResidueMass=2000; InitialStandingFraction=0; InitialCPR=0; InitialCNR=80
      MicroClimate: a_interception=0; b_interception=1; c_interception=0; d_interception=0; soil_albedo=0.23; SoilHeatFluxFraction=0.4; MinimumHeightDiffForNewLayer=0; NightInterceptionFraction=0.5; ReferenceHeight=2
      Irrigation
      Fertiliser
      Plant Potato
      Operations
        2003-10-20  [Fertiliser].Apply(100, Fertiliser.Types.UreaN, 0);
        2003-11-25  [Fertiliser].Apply(69, Fertiliser.Types.UreaN,0);
        2003-11-26  [Irrigation].Apply(15);
        2003-12-04  [Irrigation].Apply(50);
        2003-12-16  [Irrigation].Apply(15);
        2003-12-22  [Irrigation].Apply(50);
        2003-12-30  [Irrigation].Apply(50);
        2004-01-08  [Irrigation].Apply(50);
        2004-01-21  [Irrigation].Apply(50);
        2004-01-31  [Irrigation].Apply(50);
        2004-02-27  [Irrigation].Apply(25);
      Manager PotatoPlantAndHarvest
        PlantingDate = 10/22/2003 00:00:00
        CultivarName = RussetBurbank
        PlantSpacing = 280
        RowSpacing = 770
        PlantingDepth = 120
        StemNumberPerSeedTuber = 2.2
        SetFinalLeafNumber = 40
        HarvestDate = 05/01/2004 00:00:00
```csharp
using System.Xml.Serialization;
using APSIM.Shared.Utilities;
using Models.PMF;
using Models.Core;
using System;
using System.Linq;
        
namespace Models
{
    [Serializable] 
    [System.Xml.Serialization.XmlInclude(typeof(Model))]
    public class Script : Model
    {
        [Link(ByName = true)] Plant Potato;
        [Link] Clock Clock;
        [Link] Zone zone;
        [Link] Summary Summary;
        [Description("Planting Date")]
        public DateTime PlantingDate { get; set; }
        [Description("Cultivar")]
        [Display(Type=DisplayType.CultivarName, PlantName = "Potato")]
        public string CultivarName { get; set; }
        [Description("Spacing (mm) between plants on rows")]
        public double PlantSpacing { get; set; }
        [Description("Spacing (mm) between rows")]
        public double RowSpacing { get; set; }
        [Description("Depth (mm) tubers are planted")]
        public double PlantingDepth { get; set; }
        [Description("Number of stems per seed piece")]
        public double StemNumberPerSeedTuber { get; set; }
        [Description("Final leaf number.  Leave at 0 if not known")]
        public double SetFinalLeafNumber { get; set; }
        [Description("HarvestDate Date")]
        public DateTime HarvestDate { get; set; }
        [XmlIgnore] public string FinalTag { get; set; }
        [XmlIgnore] public bool Harvested { get; set; }
        [XmlIgnore] public bool ReadyForHarvest { get; set; }
        
        [EventSubscribe("DoManagement")]
        private void OnDoManagement(object sender, EventArgs e)
        {
            double PlantPopulation = 1 / ((RowSpacing / 1000) * (PlantSpacing / 1000));

            if (Clock.Today.Date == PlantingDate)
                Potato.Sow(population: PlantPopulation, cultivar: CultivarName, depth: PlantingDepth, rowSpacing: RowSpacing, budNumber: StemNumberPerSeedTuber);
            if (Clock.Today.Date == HarvestDate && Potato.IsAlive)
            {
                Potato.Harvest();
                Potato.EndCrop();
            }
            if (SetFinalLeafNumber > 0)
                zone.Set("Potato.Structure.FinalLeafNumber.FixedValue", SetFinalLeafNumber);
            if (SetFinalLeafNumber > 46)
                throw new Exception("The model will fail with leaf numbers > 46.  Reduce Final leaf number.");
        }
    }
}
```
      Report: EventNames=[Clock].DoReport
        VariableNames:
          [Clock].Today
          [Soil].Nutrient.NO3.kgha
          [Soil].SoilWater.Drainage
          [Soil].SoilWater.Eo
          [Soil].SoilWater.Es
          [Soil].SoilWater.pond
          [Soil].SoilWater.Runoff
          [Soil].SoilWater.SWmm
          [Potato].Arbitrator.DM.Allocated
          [Potato].Arbitrator.DM.TotalPlantDemand
          [Potato].Arbitrator.DM.NutrientLimitation
          [Potato].Arbitrator.DM.SinkLimitation
          [Potato].Arbitrator.DM.TotalFixationSupply
          [Potato].Arbitrator.N.TotalPlantDemand
          [Potato].Arbitrator.N.TotalPlantSupply
          [Potato].Arbitrator.N.Allocated
          [Potato].Leaf.AppearedCohortNo
          [Potato].Leaf.CohortParameters.MaximumNConc
          [Potato].Leaf.CohortParameters.MinimumNConc
          [Potato].Leaf.CoverDead
          [Potato].Leaf.CoverGreen
          [Potato].Leaf.CoverTotal
          [Potato].Leaf.Dead.N
          [Potato].Leaf.Dead.NConc
          [Potato].Leaf.Dead.Wt
          [Potato].Leaf.DeadCohortNo
          [Potato].Leaf.ExpandedCohortNo
          [Potato].Leaf.ExpandingCohortNo
          [Potato].Leaf.Fn
          [Potato].Leaf.Fw
          [Potato].Leaf.LAI
          [Potato].Leaf.LAIDead
          [Potato].Leaf.Live.N
          [Potato].Leaf.Live.NConc
          [Potato].Leaf.Live.Wt
          [Potato].Leaf.Photosynthesis.FT
          [Potato].Leaf.Photosynthesis.FVPD
          [Potato].Leaf.PlantAppearedGreenLeafNo
          [Potato].Leaf.SenescingCohortNo
          [Potato].Leaf.SpecificArea
          [Potato].Leaf.Transpiration
          [Potato].Leaf.PotentialEP
          [Potato].Phenology.CurrentPhaseName
          [Potato].Phenology.Stage
          [Potato].Phenology.Stage
          [Potato].Root.Dead.N
          [Potato].Root.Dead.NConc
          [Potato].Root.Dead.Wt
          [Potato].Root.Depth
          [Potato].Root.Live.N
          [Potato].Root.Live.NConc
          [Potato].Root.Live.Wt
          [Potato].Root.MaximumNConc
          [Potato].Root.MinimumNConc
          [Potato].Root.NUptake
          [Potato].Root.WaterUptake
          [Potato].Stem.Dead.N
          [Potato].Stem.Dead.NConc
          [Potato].Stem.Dead.Wt
          [Potato].Stem.Live.N
          [Potato].Stem.Live.NConc
          [Potato].Stem.Live.StorageWt
          [Potato].Stem.Live.StructuralWt
          [Potato].Stem.Live.Wt
          [Potato].Stem.MaximumNConc
          [Potato].Stem.MinimumNConc
          [Potato].Structure.Height
          [Potato].Structure.LeafTipsAppeared
          [Potato].Structure.FinalLeafNumber
          [Potato].Structure.PlantTotalNodeNo
          [Potato].Structure.PrimaryBudTotalNodeNo
          [Potato].Structure.TotalStemPopn
          [Potato].AboveGround.N
          [Potato].AboveGround.Wt
          [Potato].BelowGround.N
          [Potato].BelowGround.Wt
          [Potato].Total.N
          [Potato].Total.Wt
          [Potato].TotalDead.N
          [Potato].TotalDead.Wt
          [Potato].TotalLive.N
          [Potato].TotalLive.Wt
          [Potato].Tuber.Dead.N
          [Potato].Tuber.Dead.NConc
          [Potato].Tuber.Dead.Wt
          [Potato].Tuber.LiveFWt.DryMatterContent
          [Potato].Tuber.Live.N
          [Potato].Tuber.Live.NConc
          [Potato].Tuber.Live.Wt
          [Potato].Tuber.LiveFWt
          [Potato].Tuber.MaximumNConc
          [Potato].Tuber.MinimumNConc
          [Potato].Leaf.InitialisedCohortNo
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