Simulations: Version=67
  DataStore
  Experiment Crop Comparisions
    Memo Description
      This test simply simulates a range of different SCRUM crop types to show how they differ in their canopy and biomass accumulation patterns.  The 5 graphs demonstrate the differences in:
       - The speed at which cover is attained
       - The maximum cover that is achieved
       - The speed and which cover is senesced again
       - The speed and extent of biomass and N accumulation
       - The timing and extent of dry and fresh yield productin
      These graphs are intended to demonstrate how SCRUM represents approximate differences in differnt crops types with simple yet realistic temporal patterns
    Factors
      Factor Crop
        CompositeFactor SpringWheat
          Specifications:
            [SCRUMSowingRule].Script.CultivarName = Wheat_Spring
            [SCRUMSowingRule].Script.SowingDate = 1998-09-15
        CompositeFactor AutumnWheat
          Specifications:
            [SCRUMSowingRule].Script.CultivarName = Wheat_Autumn
            [SCRUMSowingRule].Script.SowingDate = 1998-05-15
        CompositeFactor Potatoes
          Specifications:
            [SCRUMSowingRule].Script.CultivarName = Potatoes_Long
            [SCRUMSowingRule].Script.SowingDate = 1998-10-15
        CompositeFactor Peas
          Specifications:
            [SCRUMSowingRule].Script.CultivarName = Green_Peas
            [SCRUMSowingRule].Script.SowingDate = 1998-10-15
        CompositeFactor Maize
          Specifications:
            [SCRUMSowingRule].Script.CultivarName = Maize_Short
            [SCRUMSowingRule].Script.SowingDate = 1998-11-15
        CompositeFactor Spinach
          Specifications:
            [SCRUMSowingRule].Script.CultivarName = Spinach
            [SCRUMSowingRule].Script.SowingDate = 1998-05-15
        CompositeFactor Kale
          Specifications:
            [SCRUMSowingRule].Script.CultivarName = Kale
            [SCRUMSowingRule].Script.SowingDate = 1998-10-15
        CompositeFactor Rape
          Specifications:
            [SCRUMSowingRule].Script.CultivarName = Rape
            [SCRUMSowingRule].Script.SowingDate = 1998-10-15
    Simulation CropCompBase
      Weather: FileName=%root%\Examples\WeatherFiles\lincoln.met
      Clock: Start=1998-05-01; End=1999-07-01
      Summary
      SoilArbitrator Soil Arbitrator
      Zone Field: Area=1; Slope=0
        Soil: Latitude=0; Longitude=0
          Chemical
            Thickness  NO3N     NH4N  PH
            100        225      0     6.6
            200        12.5     0     6.2
            300        1.38889  0     5.7
            300        1.38889  0     5.5
            300        0        0     5.5
            300        0        0     5.5
          InitialWater Initial water: PercentMethod=1; FractionFull=1
          Physical
            Thickness  BD   AirDry  LL15  DUL   SAT
            100        1.2  0.08    0.13  0.33  0.5
            200        1.2  0.13    0.13  0.33  0.5
            300        1.2  0.1     0.1   0.31  0.44
            300        1.2  0.06    0.06  0.15  0.46
            300        1.2  0.04    0.04  0.1   0.44
            300        1.2  0.02    0.02  0.06  0.44
            SoilCrop SCRUMSoil: LL=[0.13, 0.13, 0.1, 0.08, 0.11, 0.11]; KL=[0.08, 0.08, 0.08, 0.08, 0.08, 0.08]; XF=[1, 1, 1, 1, 1, 1]
            SoilCrop PotatoSoil: LL=[0.13, 0.13, 0.27, 0.27, 0.3, 0.3]; KL=[0.1, 0.06, 0.03, 0.01, 0, 0]; XF=[1, 1, 0.1, 0, 0, 0]
          SoilWater: SummerDate=1-Nov; SummerU=9; SummerCona=4.4; WinterDate=1-Apr; WinterU=9; WinterCona=4.4; DiffusConst=88; DiffusSlope=35.4; Salb=0.18; CN2Bare=68; CNRed=20; CNCov=0.8; slope=0; discharge_width=0; catchment_area=0; max_pond=0
            Thickness  SWCON  KLAT
            100        0.55   0
            200        0.55   0
            300        0.55   0
            300        0.55   0
            300        0.55   0
            300        0.55   0
          Organic: FOMCNRatio=30
            Thickness  Carbon  SoilCNRatio  FBiom  FInert  FOM
            100        1.82    11.5         0.025  0.3     1243.93
            200        1.47    11.5         0.025  0.4     833.832
            300        1.2     11.5         0.015  0.75    457.617
            300        1.03    11.5         0.01   0.9     251.145
            300        0.47    11.5         0.01   0.96    137.831
            300        0.47    11.5         0.01   0.96    75.6435
          Sample Initial nitrogen: Thickness=[100, 200, 300, 300, 300, 300]; SWUnits=Volumetric; OCUnits=Total; PHUnits=Water
          CERESSoilTemperature
          Nutrient
            DirectedGraphInfo={Nodes=[{Name=Inert, OutlineColour=Black}, {Name=SurfaceResidue, OutlineColour=Black}, {Name=FOMLignin, OutlineColour=Black}, {Name=FOMCellulose, OutlineColour=Black}, {Name=FOMCarbohydrate, OutlineColour=Black}, {Name=Microbial, OutlineColour=Black}, {Name=Humic, OutlineColour=Black}, {Name=Urea, OutlineColour=Black}, {Name=NO3, OutlineColour=Black}, {Name=NH4, OutlineColour=Black}, {Name=Atmosphere, OutlineColour=White}, {Name=PlantAvailableNO3, OutlineColour=Black}, {Name=PlantAvailableNH4, OutlineColour=Black}], Arcs=[{SourceName=SurfaceResidue, DestinationName=Microbial}, {SourceName=SurfaceResidue, DestinationName=Humic}, {SourceName=FOMLignin, DestinationName=Microbial}, {SourceName=FOMLignin, DestinationName=Humic}, {SourceName=FOMCellulose, DestinationName=Microbial}, {SourceName=FOMCellulose, DestinationName=Humic}, {SourceName=FOMCarbohydrate, DestinationName=Microbial}, {SourceName=FOMCarbohydrate, DestinationName=Humic}, {SourceName=Microbial, DestinationName=Microbial}, {SourceName=Microbial, DestinationName=Humic}, {SourceName=Humic, DestinationName=Microbial}, {SourceName=Urea, DestinationName=NH4}, {SourceName=NO3, DestinationName=Atmosphere}, {SourceName=NH4, DestinationName=NO3}]}
        MicroClimate: a_interception=0; b_interception=1; c_interception=0; d_interception=0; soil_albedo=0.23; SoilHeatFluxFraction=0.4; NightInterceptionFraction=0.5; ReferenceHeight=2
        Irrigation
        Fertiliser
        Manager SCRUMSowingRule
          CultivarName = Barley_Spring
          InitialRootDepth = 10
          SowingDate = 10/14/1998 00:00:00
```csharp
using System;
using Models.Core;
using Models.PMF;
namespace Models
{
    [Serializable] 
    [System.Xml.Serialization.XmlInclude(typeof(Model))]
    public class Script : Model
    {
        [Link] Plant SCRUM;
        [Link] Clock Clock;

        [Description("Cultivar")]
        [Display(Type=DisplayType.CultivarName, PlantName = "SCRUM")]
        public string CultivarName { get; set; }
        [Description("Initial Root Depth")]
        public double InitialRootDepth { get; set; }
        [Description("Sowing Date")]
        public DateTime SowingDate { get; set; }

               
        [EventSubscribe("DoManagement")]
        private void OnDoManagement(object sender, EventArgs e)
        {
            if (Clock.Today.Date == SowingDate)
                SCRUM.Sow(cultivar: CultivarName, population: 1, depth: InitialRootDepth, rowSpacing: 150);
            //PMFCrop.Sow(... Contains the following arguements:
            //Population  double  Optional  Seeds sowing/m2.  Default is zero
            //Cultivar    string  Required  "NameOfCultivar"
            //Depth       double  Optional  Depth (mm) seed sown.   Default is 100mm 
            //MaxCover    double  Optional  Proportion (0-1) of the ground row crop will cover.   Default is 1.0
            //BudNumber   double  Optional  Number of mainstems per seed sown.  Default is 1.0
            //RowSpacing  double  Optional  Spaceing (mm) between drill rows when crop is sown.  Default is 150mm
            //CropClass   string  Optional  Crop class to instantiate when crop is sown.  Default is "Plant"
        }
    }
}
```
        SurfaceOrganicMatter surface organic matter: InitialResidueName=wheat; InitialResidueType=wheat; InitialResidueMass=2000; InitialStandingFraction=0; InitialCPR=0; InitialCNR=80; FractionFaecesAdded=0.5
        Report: EventNames=[Clock].DoReport
          VariableNames:
            [Clock].Today
            [Soil].SoilWater.SWmm
            [Soil].Nutrient.NO3.kgha
            [SCRUM].Stover.Live.Wt
            [SCRUM].Root.Live.Wt
            [SCRUM].Product.Live.Wt
            [SCRUM].Stover.Live.N
            [SCRUM].Root.Live.N
            [SCRUM].Product.Live.N
            [SCRUM].Stover.Live.NConc
            [SCRUM].Root.Live.NConc
            [SCRUM].Product.Live.NConc
            [SCRUM].Root.WaterSupply
            [SCRUM].Root.WaterUptake
            [SCRUM].Stover.Transpiration
            [SCRUM].Stover.WaterDemand
            [SCRUM].Root.Depth
            [SCRUM].Stover.CoverTotal
            [SCRUM].Stover.CoverDead
            [SCRUM].Stover.CoverGreen
            [SCRUM].Stover.LAI
            [SCRUM].Stover.Height
            [SCRUM].Product.LiveFWt
            [SCRUM].Phenology.ThermalTime.Value()
            [SCRUM].Phenology.CurrentPhaseName
            [SCRUM].Phenology.Stage
        Plant SCRUM: CropType=SCRUM; IsEnding=false; DaysAfterEnding=0
        Manager AutomaticIrrigation
          Irrigation_Yes_No = yes
          Season_Start = 1-Oct
          Season_End = 30-Apr
          Season_Allocation = 1000
          Refull_Frac = 0.9
          Trigger_Frac = 0.7
          Return_days = 3
          Maximum_Irrigation_Amount = 40
          Top_Depth = 600
```csharp
using System;
using Models.Core;
using Models.PMF;
using Models.Soils;
using Models.Soils.Nutrients;
using System.Xml.Serialization;
using Models.PMF;
using APSIM.Shared.Utilities;

        
namespace Models
{
   [Serializable] 
   [System.Xml.Serialization.XmlInclude(typeof(Model))]
    public class Script : Model
    {      
       //Communication to other modules
       [Link] ISummary summary = null;
       [Link] Irrigation Irrigation;
       [Link] Clock Clock;
       [Link] Soil Soil;
       [Link] Plant SCRUM;
       
       //User inputs from properties tab
       [Description("Irrigation on (yes or no)")]
       public string Irrigation_Yes_No { get; set; }
       [Description("SeasonStart (dd-MMM)")]
       public string Season_Start { get; set; }
       [Description("SeasonEnd (dd-MMM)")]
       public string Season_End { get; set; }
       [Description("Season Allocation (mm)")]
       public double Season_Allocation { get; set; }
       [Description("% PAWC to refill soil to (0-1)")]
       public double Refull_Frac { get; set; }
       [Description("% PAWC to trigger irrigation (0-1)")]
       public double Trigger_Frac { get; set; }
       [Description("Minimum days for irrigation to return")]
       public double Return_days { get; set; }
       [Description("Maximum irrigation application (mm)")]
       public double Maximum_Irrigation_Amount { get; set; }
       [Description("Depth to calculate PAWC (mm)")]
       public double Top_Depth { get; set; }
       
       //Class members
       [XmlIgnore] private bool IrrigationIsAvailable { get; set; }
       [XmlIgnore] public bool SeasonIsOpen { get; set; }
       [XmlIgnore] private bool CropIsActive { get; set; }
       [XmlIgnore] private bool IrrigatorIsAvailable { get; set; }
       [XmlIgnore] private bool SoilIsDry { get; set; }
       [XmlIgnore] public double Top_DUL { get; set; }
       [XmlIgnore] public double Top_Refull { get; set; }
       [XmlIgnore] public double Top_Trigger { get; set; }
       [XmlIgnore] public double Top_LL { get; set; }
       [XmlIgnore] public double Top_SW { get; set; }
       [XmlIgnore] public double Accumulated_depth { get; set; }   
       [XmlIgnore] public double Days_since_irrigation { get; set; }
       [XmlIgnore] public double Amount_to_apply { get; set; }
       [XmlIgnore] public double Season_Application { get; set; }
        
       //Variables for date logic testing
       [XmlIgnore] public string StartString {get; set;}
       [XmlIgnore] public string EndString {get; set;}
       [XmlIgnore] public DateTime StartDate {get; set;}
       [XmlIgnore] public DateTime EndDate {get; set;}
       [XmlIgnore] public int TodayYear {get; set;}
       [XmlIgnore] public int TodayMonth {get; set;}
       [XmlIgnore] public int StartMonth {get; set;}
       [XmlIgnore] public int EndMonth {get; set;}
       [XmlIgnore] public int TodayDay {get; set;}
       [XmlIgnore] public int StartDay {get; set;}
       [XmlIgnore] public int EndDay {get; set;}
       
    
       //Calculate static soil variables
       [EventSubscribe("StartOfSimulation")]
       private void OnStartOfSimulation(object sender, EventArgs e)
       {   
          //Calculated soil water variables
          Accumulated_depth = 0;
          for (int layer = 0; Accumulated_depth < Top_Depth; layer++)
          {
             Top_LL += Soil.LL15mm[layer];
             Top_DUL += Soil.DULmm[layer];
             Accumulated_depth += Soil.Thickness[layer];
          }
          Top_Refull = Top_LL + (Top_DUL - Top_LL) * Refull_Frac;
       }
       
      
       //Determine daily requirement for irrigation
        [EventSubscribe("StartOfDay")]
           private void OnStartOfDay(object sender, EventArgs e)
           { 
          //Can we irrigate?
          IrrigationIsAvailable = false; 
          if (Irrigation_Yes_No == "yes")
             IrrigationIsAvailable = true; 
    
          //Are we Allowed to Irrigate?
          TodayYear = Clock.Today.Year;
          StartString = Season_Start + "-" + TodayYear.ToString();
          EndString = Season_End + "-" + TodayYear.ToString();
          StartDate = DateTime.Parse(StartString);
          EndDate = DateTime.Parse(EndString);
          TodayMonth = Clock.Today.Month;
          TodayDay = Clock.Today.Day;
          StartDay = StartDate.Day;
          StartMonth = StartDate.Month;
          EndDay = EndDate.Day;
          EndMonth = EndDate.Month;
          
          SeasonIsOpen = false;
          //if we are in the spring and after the start date then yes
          if((Clock.Today.Month > 6) && (Clock.Today >= StartDate))
          SeasonIsOpen = true;
          //if we are in the autumn and before the end date then yes
          if((Clock.Today.Month <= 6) && (Clock.Today <= EndDate))
          SeasonIsOpen = true;
          
          //Is there a crop in the ground that needs irrigation?
          CropIsActive = false;
          if ((SCRUM.Phenology.Stage >= 3.0) && (SCRUM.Phenology.Stage < 6.0))
                CropIsActive = true;
          
          //Is the irrigator available?
          IrrigatorIsAvailable = false;
          Days_since_irrigation += 1;
          if (Days_since_irrigation >= Return_days)
             IrrigatorIsAvailable = true;
          
          //Is the soil dry enough to require irrigation?
          SoilIsDry = false;
          double CurrentRootDepth = 0;
          double RootDepth = SCRUM.Root.Depth;
          CurrentRootDepth = Math.Max(RootDepth, CurrentRootDepth);
          
          double RelativeRootDepth = Math.Min(1.0, CurrentRootDepth / Top_Depth);
          Top_Trigger = Math.Min(Top_Refull, Top_DUL - (Top_DUL - Top_LL) * RelativeRootDepth * (1-Trigger_Frac)); 
          
          Accumulated_depth = 0;
          Top_SW = 0;
          for (int layer = 0; Accumulated_depth < Top_Depth; layer++)
          {
             Top_SW += Soil.SoilWater.SWmm[layer];
             Accumulated_depth += Soil.Thickness[layer];
          }
          if (Top_SW <= Top_Trigger)
             SoilIsDry = true;
                
          //Lets bloody well irrigate then!!!!
          if((IrrigationIsAvailable) && (SeasonIsOpen) && (CropIsActive) && (IrrigatorIsAvailable) && (SoilIsDry)) //The conditions are rife for irrigation
          {
             Amount_to_apply = Math.Min(Top_Refull - Top_SW, Maximum_Irrigation_Amount);
             Amount_to_apply = Math.Min(Amount_to_apply, Season_Allocation - Season_Application); 
             Amount_to_apply = Math.Max(Amount_to_apply, 0.0);
             Irrigation.Apply(Amount_to_apply);
             Days_since_irrigation = 0;
             Season_Application += Amount_to_apply;
             summary.WriteMessage(this, "Automatic Irrigation");
            
          }
       }
    }
}
```
        Manager AutomaticFertiliser
          Fertiliser_Yes_No = yes
          Season_Start = 1-Aug
          Season_End = 30-Apr
          Season_Allocation = 1000
          TriggerN = 50
          NApplicationAmount = 25
          Return_days = 3
          Top_Depth = 300
```csharp
using Models.Interfaces;
using APSIM.Shared.Utilities;
using Models.PMF;
using System.Xml.Serialization;
using Models.Soils;
using Models.Soils.Nutrients;
using Models.PMF;
using Models.Core;
using System;

        
namespace Models
{
   [Serializable] 
   [System.Xml.Serialization.XmlInclude(typeof(Model))]
    public class Script : Model
    {      
        [Link] private ISummary summary;
        [Link] private Fertiliser Fertiliser;
        [Link] private Clock Clock;
        [Link] private Plant SCRUM;
        [ScopedLinkByName]
        private ISolute NO3;
       //Communication to other modules
       [Link] Soils.Soil Soil;
       
       //User inputs from properties tab
       [Description("Fertiliser on (yes or no)")]
       public string Fertiliser_Yes_No { get; set; }
       [Description("SeasonStart (dd-MMM)")]
       public string Season_Start { get; set; }
       [Description("SeasonEnd (dd-MMM)")]
       public string Season_End { get; set; }
       [Description("Season Allocation (kg/ha)")]
       public double Season_Allocation { get; set; }
       [Description("Mineral N to maintain soil above (kg/ha)")]
       public double TriggerN { get; set; }
       [Description("Amount of N to apply (kg/ha)")]
       public double NApplicationAmount { get; set; }
       [Description("Minimum days for Fertiliser spreader to return")]
       public double Return_days { get; set; }
       [Description("Depth to calculate mineral N (mm)")]
       public double Top_Depth { get; set; }
       
       //Class members
       [XmlIgnore] private bool FertiliserIsAvailable { get; set; }
       [XmlIgnore] public bool SeasonIsOpen { get; set; }
       [XmlIgnore] private bool CropIsActive { get; set; }
       [XmlIgnore] private bool FertSpreaderIsAvailable { get; set; }
       [XmlIgnore] private bool SoilNIsLow { get; set; }
       [XmlIgnore] public double Top_SoilN { get; set; }
       [XmlIgnore] public double Accumulated_depth { get; set; }   
       [XmlIgnore] public double Days_since_fertiliser { get; set; }
       [XmlIgnore] public double Season_Application { get; set; }
        
       //Variables for date logic testing
       [XmlIgnore] public string StartString {get; set;}
       [XmlIgnore] public string EndString {get; set;}
       [XmlIgnore] public DateTime StartDate {get; set;}
       [XmlIgnore] public DateTime EndDate {get; set;}
       [XmlIgnore] public int TodayYear {get; set;}
       [XmlIgnore] public int TodayMonth {get; set;}
       [XmlIgnore] public int StartMonth {get; set;}
       [XmlIgnore] public int EndMonth {get; set;}
       [XmlIgnore] public int TodayDay {get; set;}
       [XmlIgnore] public int StartDay {get; set;}
       [XmlIgnore] public int EndDay {get; set;}
              
       //Determine daily requirement for fertiliser
        [EventSubscribe("StartOfDay")]
           private void OnStartOfDay(object sender, EventArgs e)
           { 
          //Can we irrigate?
          FertiliserIsAvailable = false; 
          if (Fertiliser_Yes_No == "yes")
             FertiliserIsAvailable = true; 
    
          //Are we Allowed to Irrigate?
          TodayYear = Clock.Today.Year;
          StartString = Season_Start + "-" + TodayYear.ToString();
          EndString = Season_End + "-" + TodayYear.ToString();
          StartDate = DateTime.Parse(StartString);
          EndDate = DateTime.Parse(EndString);
          TodayMonth = Clock.Today.Month;
          TodayDay = Clock.Today.Day;
          StartDay = StartDate.Day;
          StartMonth = StartDate.Month;
          EndDay = EndDate.Day;
          EndMonth = EndDate.Month;
          
          SeasonIsOpen = false;
          //if we are in the spring and after the start date then yes
          if((Clock.Today.Month > 6) && (Clock.Today >= StartDate))
          SeasonIsOpen = true;
          //if we are in the autumn and before the end date then yes
          if((Clock.Today.Month <= 6) && (Clock.Today <= EndDate))
          SeasonIsOpen = true;
          
          //Is there a crop in the ground that needs irrigation?
          CropIsActive = false;
          if ((SCRUM.Phenology.Stage >= 3.0) && (SCRUM.Phenology.Stage < 6.0))
                CropIsActive = true;
          
          //Is the irrigator available?
          FertSpreaderIsAvailable = false;
          Days_since_fertiliser += 1;
          if (Days_since_fertiliser >= Return_days)
             FertSpreaderIsAvailable = true;
          
          //Is the soil N low enough to require fertiliser?
          SoilNIsLow = false;
          double CurrentRootDepth = 0;
          double RootDepth = SCRUM.Root.Depth;
          CurrentRootDepth = Math.Max(RootDepth, CurrentRootDepth);
          
          Accumulated_depth = 0;
          Top_SoilN = 0;
          for (int layer = 0; Accumulated_depth < Top_Depth; layer++)
          {
             Top_SoilN += NO3.kgha[layer];
             Accumulated_depth += Soil.Thickness[layer];
          }
          if (Top_SoilN <= TriggerN)
             SoilNIsLow = true;
                
          //Lets bloody well irrigate then!!!!
          if((FertiliserIsAvailable) && (SeasonIsOpen) && (CropIsActive) && (FertSpreaderIsAvailable) && (SoilNIsLow)) //The conditions are rife for irrigation
          {
             Fertiliser.Apply(NApplicationAmount, Fertiliser.Types.UreaN, 10);
             Days_since_fertiliser = 0;
             Season_Application += NApplicationAmount;
             summary.WriteMessage(this, "Automatic Fertiliser");
            
          }
       }
    }
}
```
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