Simulations: Version=203
  Experiment
    Factors
      Permutation
        Factor CowLW: Specification=[Damage].Script.CowLiveweight = 0, 450
    Simulation SimBase
      Clock: Start=2010-07-01; End=2014-06-30
      Weather: FileName=C:\aaUnderVC\ApsimX\Examples\WeatherFiles\NZ_Hamilton.met
      MicroClimate: a_interception=0; b_interception=1; c_interception=0; d_interception=0; SoilHeatFluxFraction=0.4; MinimumHeightDiffForNewLayer=0; NightInterceptionFraction=0.5; ReferenceHeight=2
      Forages
        Parameters:
          Name                          LiveDigestibility  DeadDigestibility  LiveFractionConsumable  DeadFractionConsumable  LiveMinimumBiomass  DeadMinimumBiomass
          SurfaceOrganicMatter.Residue  0.7                0.3                0                       0                       0                   0
          AGPRyegrass.Leaf              FromModel          FromModel          1                       1                       10                  0
          AGPRyegrass.Stem              FromModel          FromModel          1                       1                       10                  0
          AGPRyegrass.Stolon            FromModel          FromModel          1                       1                       10                  0
          AGPWhiteClover.Leaf           FromModel          FromModel          1                       1                       10                  0
          AGPWhiteClover.Stem           FromModel          FromModel          1                       1                       10                  0
          AGPWhiteClover.Stolon         FromModel          FromModel          1                       1                       10                  0
      SoilArbitrator
      Summary
      Zone Field: Area=1; Slope=0; AspectAngle=0; Altitude=50
        Report: EventNames=[Clock].EndOfWeek
          VariableNames:
            [Clock].Today as Date
            [Clock].Today.Month as ProductionMonth
            Sum of ([AGPRyegrass].HarvestedWt + [AGPWhiteClover].HarvestedWt) from 1-Jul to [Clock].Today as HarvestedWt
            Max of ([Damage].Script.DamageUnitsSoil) from [Report].DayAfterLastOutput to [Clock].Today as MaxDamage
            Mean of ([Damage].Script.DamageUnitsSoil) from [Report].DayAfterLastOutput to [Clock].Today as MeanDamage
            Max of ([Damage].Script.WaterFactor) from [Report].DayAfterLastOutput to [Clock].Today as MaxWaterFactor
            Mean of ([Damage].Script.WaterFactor) from [Report].DayAfterLastOutput to [Clock].Today as MeanWaterFactor
        SimpleGrazing: GrazingRotationType=1; SimpleGrazingFrequencyString=28; SimpleMinGrazable=0; SimpleGrazingResidual=1500; FlexibleGrazePostDM=0; MaximumRotationLengthArray=[50, 50, 50, 50, 60, 60, 90, 70, 50, 50, 50, 50]; MinimumRotationLengthArray=[21, 21, 21, 21, 21, 21, 21, 21, 21, 21, 21, 21]; IsCutAndCarry=false; FractionClippingsReturned=0; FractionIntakeNToAnimal=[0.1]; DungNConc=2.6; FractionOfDungUrineOffPaddock=[0.05]; DepthUrineIsAdded=200; ShowAdvancedExcretaOptions=false; SendDungElsewhere=0; SendUrineElsewhere=0; UsePatching=false; PseudoPatches=true; ZoneCount=25; UrineReturnPattern=2; PseudoRandomSeed=666; MaxEffectiveNConcentration=3.5; FractionPopulationDecline=0; TramplingOn=false; MaximumPropLitterMovedToSoil=0.1; PastureConsumedAtMaximumRateOfLitterRemoval=1200
          PreGrazeDMArray=[2800, 2800, 2800, 2800, 2800, 2800, 2800, 2800, 2800, 2800, 2800, 2800]
          PostGrazeDMArray=[1800, 1800, 1800, 1800, 1250, 1000, 1000, 1250, 1800, 1800, 1800, 1900]
        Manager DamageOld (disabled)
          Month = aug
          Day = 11
          CowLiveweight = 450
          CowStockingDensityMilking = 100
          CowStockingDensityDry = 300
          GrazingDuration = 24
          PressureMultiplier = -0.639471
          DamageRyegrass = True
          DamageClover = True
          DamageSoil = True
          Grass = [AGPRyegrass]
          RecoveryRateGrass = 0.015
          Clover = [AGPWhiteClover]
          RecoveryRateClover = 0.015
          DepthDamage100Soil = 100
          DepthDamage005Soil = 250
          RecoveryRateSoil = 0.015
```csharp
//using Newtonsoft.Json;
using APSIM.Shared.Utilities;
using Models.Utilities;
using Models.Soils;
using Models.PMF;
using Models.Core;
using System;
using System.Linq;
using Models.AgPasture;

namespace Models
{
	[Serializable]
	public class Script : Model
	{
		[Link] private Clock clock;
		
		//[Link] private Fertiliser fertiliser;
		[Link] private ISummary summary;
		
		//[Link] private Soil soil;
		
		//private Nutrient nutrient;
		
		//private Nutrient soilN;
		
		[Link] private IPhysical physical;
		[Link] private Swim3 swim3;
		
		//[Link] private Nutrient Nutrient;
		
		//[Link(Path="[SurfaceOrganicMatter].SurfaceResidue.Decomposition")]
		
		//private OrganicFlow ResidueDecomposition;
		
		
        [Separator("Sets up the damage events - will be replaced eventually with dynamic causes")]
        [Separator("Note: Treading damage is also affected by the soil water content in the top 100 mm")]

		//[Description("Grazing on the same day(s) each year? If no, then must include the year below")]
		public bool EachYear {get; set;}
		
		//[Description("Dates for one or more grazing events (dd-mmm or dd-mmm-yyyy)")]
		public string[] Dates {get; set;}
		
		[Description("Month for the single grazing event")]
		public string Month {get; set;}
		
		[Description("Day for the single grazing event")]
		public int Day {get; set;}
		
		[Description("Cow liveweight (kg)")]
		public double CowLiveweight {get; set;}

		[Description("Stocking density during the milking season (cows /ha)")]
		public double CowStockingDensityMilking {get; set;}
 
		[Description("Stocking density when cows are dry, May to July (cows /ha)")]
		public double CowStockingDensityDry {get; set;}
 
		public double CowStockingDensity {get; set;}

		[Description("Grazing duration (hours)")]
		public double GrazingDuration {get; set;}


        [Separator("Calculation of the damage effect from grazing pressure")]

		[Description("Multiplier on grazing pressure for the exponent (*10^-3)")]
		public double PressureMultiplier {get; set;}
		
		[Description("Damage ryegrass?")]
		public bool DamageRyegrass {get; set;}
		
		[Description("Damage clover?")]
		public bool DamageClover {get; set;}
		
		[Description("Damage soil?")]
		public bool DamageSoil {get; set;}
		
		
        [Separator("Effect of the damage on the plants. Damage is 1:1 on the GLFGeneric.")]

		[Description("Grass species")] public PastureSpecies Grass {get; set;}

		[Description("Recovery rate for grass (/d)")]
		public double RecoveryRateGrass {get; set;}

		[Description("Clover species")] public PastureSpecies Clover {get; set;}
		
		[Description("Recovery rate for clover (/d)")]
		public double RecoveryRateClover {get; set;}

        [Separator("Effect of the damage on the soil properties")]

		[Description("Depth in the soil before damage starts decreasing (mm)")]
		public double DepthDamage100Soil {get; set;}

		[Description("Depth in the soil where damage is <5% of surface damage (mm)")]
		public double DepthDamage005Soil {get; set;}

		[Description("Recovery rate for soil - applies to both Ks and macroporosity (/d)")]
		public double RecoveryRateSoil {get; set;}



        // outputs
		public double DamageUnitsGrass {get; set;}
		public double DamageUnitsClover {get; set;}
		public double DamageUnitsSoil {get; set;}
		
		public double[] MaxPossChangeMacroporosity {get; set;}
		public double[] MaxPossChangeConductivity {get; set;}
		public double[] DepthFunctionForDamage {get; set;}
		
		public double GrazingPressure {get; set;}
		public double EffectiveGrazingPressure {get; set;}
		public double WaterFactor {get; set;}
		public double TreadingEffect {get; set;}
		public double[] DepthDamageFunction {get; set;}
		
		public double MinimumMacroporosity {get; set;}
		
		public double[] UndamagedKSat {get; set;}
		public double[] UndamagedMacroporosity {get; set;}
		public double[] UndamagedSAT {get; set;}
		public double[] UndamagedDUL {get; set;}
		
		//public double DecayConstantDamageDepthSoil {get; set;}

		
		//[Description("Extent (0-1) of a damage event - effect on plants")]
		//public double DamageEvent {get; set;}


		
        [EventSubscribe("StartOfSimulation")]
        private void OnStartOfSimulation(object sender, EventArgs e)
		{
			//Debugger.Break();
            EachYear = true;
            Dates = new string[1];
            Dates[0] = Day + "-" + Month;
            if ((Month == "may") || (Month == "jun") || (Month == "jul"))
                CowStockingDensity = CowStockingDensityDry;
            else
                CowStockingDensity = CowStockingDensityMilking;

            
            MaxPossChangeConductivity = new double[physical.Thickness.Length];
            MaxPossChangeMacroporosity = new double[physical.Thickness.Length];
            DepthFunctionForDamage = new double[physical.Thickness.Length];
            DepthDamageFunction = new double[physical.Thickness.Length];
            
            UndamagedMacroporosity = new double[physical.Thickness.Length];
            
            MinimumMacroporosity = 0.02;
            UndamagedSAT = (double[]) physical.SAT.Clone();
            UndamagedDUL = (double[]) physical.DUL.Clone();
            UndamagedKSat = (double[]) physical.KS.Clone();

			
			// get the maximum possible changes in soil properties by depth
            for (int i = 0; i < physical.Thickness.Length; i++)
            {
                UndamagedMacroporosity[i] =  physical.SAT[i] - physical.DUL[i] - MinimumMacroporosity; 

                // Assume that the minimum Ks is twice the K and DUL
                // or maybe should make this some percentage of existing Ks above KDUL
                MaxPossChangeConductivity[i] = physical.KS[i] - 2.0 * swim3.KDul;  // we are assuming that the change in soil physical propoerties is above DUL

                // Macroporosity is taken as the pore space from DUL to Total Porosity but still allowing for a little antrapped air 
                MaxPossChangeMacroporosity[i] = physical.SAT[i] - MinimumMacroporosity - physical.DUL[i] ;   // this is the total porosity above DUL excluding 0.05 for the entrapped air (https://acsess.onlinelibrary.wiley.com/doi/10.2136/vzj2005.0139)

                // set up the depth function for damage to the soil
                DepthFunctionForDamage[i] = Math.Min(1.0,Math.Max(0.0,1.0 - (DepthDamage005Soil - physical.DepthMidPoints[i])/(DepthDamage005Soil-DepthDamage100Soil)));
                DepthFunctionForDamage[i] = Math.Exp(-4.0 * DepthFunctionForDamage[i]);
                if (DepthFunctionForDamage[i] < 0.02)
                    DepthFunctionForDamage[i] = 0.0;
            }
		}
		
		[EventSubscribe("DoManagement")]
		private void OnDoManagement(object sender, EventArgs e)
		{
            GrazingPressure = 0.0;
		    EffectiveGrazingPressure = 0.0;
		    TreadingEffect = 0.0;
			
            // only needed on grazing days but up here for outputting
            WaterFactor = 0.0;
            double SatTo100mm = 0.0;
            double DulTo100mm = 0.0;
            double ThetaTo100mm = 0.0;
            for (int i = 0; physical.DepthMidPoints[i] < DepthDamage100Soil; i++)
            {
                SatTo100mm += physical.SATmm[i];
                DulTo100mm += physical.DULmm[i];
                ThetaTo100mm += swim3.SWmm[i];
            }
            WaterFactor += Math.Max(0.0, (ThetaTo100mm - DulTo100mm) / (SatTo100mm - DulTo100mm));

			if (OnDamageDate()) // this will be eventually be replaced with grazing pressure > 0
			{
                // calculate the grazing pressures
                
                
                GrazingPressure = CowLiveweight * CowStockingDensity * GrazingDuration / 1000.0;   // t LW /ha /hour
                EffectiveGrazingPressure = GrazingPressure * WaterFactor;
                TreadingEffect = 1.0 - Math.Exp(EffectiveGrazingPressure * PressureMultiplier / 1000.0);

                // finally add this into the dynamic damage units 
				if (DamageRyegrass)
    				DamageUnitsGrass = Math.Max(Math.Min(DamageUnitsGrass + TreadingEffect, 1.0), 0.0);
				if (DamageClover)
    				DamageUnitsClover = Math.Max(Math.Min(DamageUnitsClover + TreadingEffect, 1.0), 0.0);
				if (DamageSoil)
				{
				    DamageUnitsSoil = Math.Max(Math.Min(DamageUnitsSoil + TreadingEffect, 1.0), 0.0);
                    for (int i = 0; i < physical.Thickness.Length; i++)
                        DepthDamageFunction[i] = DamageUnitsSoil * DepthFunctionForDamage[i];
                 }
			}
			else // no recovery on the damage day
			{
    		    DamageUnitsGrass -= DamageUnitsGrass * RecoveryRateGrass;
			    DamageUnitsClover -= DamageUnitsClover * RecoveryRateClover;
			    DamageUnitsSoil -= DamageUnitsSoil * RecoveryRateSoil;
				
				for (int i = 0; i < physical.Thickness.Length; i++)
                    DepthDamageFunction[i] = DamageUnitsSoil * DepthFunctionForDamage[i];
			}

    		// now have the damage units affect the plants and soil
    		Grass.GlfGeneric = 1.0 - DamageUnitsGrass;
			Clover.GlfGeneric = 1.0 - DamageUnitsClover;
        	for (int i = 0; i < physical.Thickness.Length; i++)
            {
                physical.KS[i] = UndamagedKSat[i] - MaxPossChangeConductivity[i] * DepthDamageFunction[i];
                physical.DUL[i] = UndamagedDUL[i] + MaxPossChangeMacroporosity[i] * DepthDamageFunction[i];
            }
		}
		
		/// <summary>Checks if today's date is one of the specified fertiliser application dates.</summary>
		private bool OnDamageDate()
		{
			if (EachYear)
				return Dates.Any(d => DateUtilities.DatesEqual(d, clock.Today));
			DateTime[] dates = Dates.Select(d => DateTime.ParseExact(d, "d-MMM-yyyy", null)).ToArray();
			return dates.Any(d => SameDate(d, clock.Today));
		}
		
		private bool SameDate(DateTime d1, DateTime d2)
		{
			return d1.Year == d2.Year && d1.DayOfYear == d2.DayOfYear;
		}
	}
}
```
        Manager Damage
          Month = aug
          Day = 11
          CowLiveweight = 450
          CowStockingDensityMilking = 100
          CowStockingDensityDry = 300
          GrazingDuration = 24
          PressureMultiplier = -0.639471
          DamageRyegrass = True
          DamageClover = True
          DamageSoil = True
          Grass = [AGPRyegrass]
          RecoveryRateGrass = 0.015
          Clover = [AGPWhiteClover]
          RecoveryRateClover = 0.015
          DepthDamage100Soil = 100
          DepthDamage005Soil = 250
          RecoveryRateSoil = 0.015
```csharp
using Newtonsoft.Json;
using APSIM.Shared.Utilities;
using Models.Utilities;
using Models.Soils;
using Models.PMF;
using Models.Core;
using System;
using System.Linq;
using Models.AgPasture;
using System.Diagnostics;

namespace Models
{
	[Serializable]
	public class Script : Model
	{
		[Link] private Clock clock;
		
		[Link] private ISummary summary;
		[Link] private SimpleGrazing simpleGrazing;
		
		
		//[Link] private Soil soil;
		
		//private Nutrient nutrient;
		
		//private Nutrient soilN;
		
		[Link] private IPhysical physical;
		[Link] private Swim3 swim3;
		
		//[Link] private Nutrient Nutrient;
		
		//[Link(Path="[SurfaceOrganicMatter].SurfaceResidue.Decomposition")]
		
		//private OrganicFlow ResidueDecomposition;
		
		
        [Separator("Sets up the damage events - will be replaced eventually with dynamic causes")]
        [Separator("Note: Treading damage is also affected by the soil water content in the top 100 mm")]

		//[Description("Grazing on the same day(s) each year? If no, then must include the year below")]
		public bool EachYear {get; set;}
		
		//[Description("Dates for one or more grazing events (dd-mmm or dd-mmm-yyyy)")]
		public string[] Dates {get; set;}
		
		[Description("Month for the single grazing event")]
		public string Month {get; set;}
		
		[Description("Day for the single grazing event")]
		public int Day {get; set;}
		
		[Description("Cow liveweight (kg)")]
		public double CowLiveweight {get; set;}

		[Description("Stocking density during the milking season (cows /ha)")]
		public double CowStockingDensityMilking {get; set;}
 
		[Description("Stocking density when cows are dry, May to July (cows /ha)")]
		public double CowStockingDensityDry {get; set;}
 
		public double CowStockingDensity {get; set;}

		[Description("Grazing duration (hours)")]
		public double GrazingDuration {get; set;}


        [Separator("Calculation of the damage effect from grazing pressure")]

		[Description("Multiplier on grazing pressure for the exponent (*10^-3)")]
		public double PressureMultiplier {get; set;}
		
		[Description("Damage ryegrass?")]
		public bool DamageRyegrass {get; set;}
		
		[Description("Damage clover?")]
		public bool DamageClover {get; set;}
		
		[Description("Damage soil?")]
		public bool DamageSoil {get; set;}
		
		
        [Separator("Effect of the damage on the plants. Damage is 1:1 on the GLFGeneric.")]

		[Description("Grass species")] public PastureSpecies Grass {get; set;}

		[Description("Recovery rate for grass (/d)")]
		public double RecoveryRateGrass {get; set;}

		[Description("Clover species")] public PastureSpecies Clover {get; set;}
		
		[Description("Recovery rate for clover (/d)")]
		public double RecoveryRateClover {get; set;}

        [Separator("Effect of the damage on the soil properties")]

		[Description("Depth in the soil before damage starts decreasing (mm)")]
		public double DepthDamage100Soil {get; set;}

		[Description("Depth in the soil where damage is <5% of surface damage (mm)")]
		public double DepthDamage005Soil {get; set;}

		[Description("Recovery rate for soil - applies to both Ks and macroporosity (/d)")]
		public double RecoveryRateSoil {get; set;}



        // outputs
		public double DamageUnitsGrass {get; set;}
		public double DamageUnitsClover {get; set;}
		public double DamageUnitsSoil {get; set;}
		
		public double[] MaxPossChangeMacroporosity {get; set;}
		public double[] MaxPossChangeConductivity {get; set;}
		public double[] DepthFunctionForDamage {get; set;}
		
		public double GrazingPressure {get; set;}
		public double EffectiveGrazingPressure {get; set;}
		public double WaterFactor {get; set;}
		public double TreadingEffect {get; set;}
		public double[] DepthDamageFunction {get; set;}
		
		public double MinimumMacroporosity {get; set;}
		
		public double[] UndamagedKSat {get; set;}
		public double[] UndamagedMacroporosity {get; set;}
		public double[] UndamagedSAT {get; set;}
		public double[] UndamagedDUL {get; set;}
		
		//public double DecayConstantDamageDepthSoil {get; set;}

		
		//[Description("Extent (0-1) of a damage event - effect on plants")]
		//public double DamageEvent {get; set;}


		
        [EventSubscribe("StartOfSimulation")]
        private void OnStartOfSimulation(object sender, EventArgs e)
		{
			//Debugger.Break();
            EachYear = true;
            Dates = new string[1];
            Dates[0] = Day + "-" + Month;
            if ((Month == "may") || (Month == "jun") || (Month == "jul"))
                CowStockingDensity = CowStockingDensityDry;
            else
                CowStockingDensity = CowStockingDensityMilking;

            
            MaxPossChangeConductivity = new double[physical.Thickness.Length];
            MaxPossChangeMacroporosity = new double[physical.Thickness.Length];
            DepthFunctionForDamage = new double[physical.Thickness.Length];
            DepthDamageFunction = new double[physical.Thickness.Length];
            
            UndamagedMacroporosity = new double[physical.Thickness.Length];
            
            MinimumMacroporosity = 0.02;
            UndamagedSAT = (double[]) physical.SAT.Clone();
            UndamagedDUL = (double[]) physical.DUL.Clone();
            UndamagedKSat = (double[]) physical.KS.Clone();

			
			// get the maximum possible changes in soil properties by depth
            for (int i = 0; i < physical.Thickness.Length; i++)
            {
                UndamagedMacroporosity[i] =  physical.SAT[i] - physical.DUL[i] - MinimumMacroporosity; 

                // Assume that the minimum Ks is twice the K and DUL
                // or maybe should make this some percentage of existing Ks above KDUL
                MaxPossChangeConductivity[i] = physical.KS[i] - 2.0 * swim3.KDul;  // we are assuming that the change in soil physical propoerties is above DUL

                // Macroporosity is taken as the pore space from DUL to Total Porosity but still allowing for a little antrapped air 
                MaxPossChangeMacroporosity[i] = physical.SAT[i] - MinimumMacroporosity - physical.DUL[i] ;   // this is the total porosity above DUL excluding 0.05 for the entrapped air (https://acsess.onlinelibrary.wiley.com/doi/10.2136/vzj2005.0139)

                // set up the depth function for damage to the soil
                DepthFunctionForDamage[i] = Math.Min(1.0,Math.Max(0.0,1.0 - (DepthDamage005Soil - physical.DepthMidPoints[i])/(DepthDamage005Soil-DepthDamage100Soil)));
                DepthFunctionForDamage[i] = Math.Exp(-4.0 * DepthFunctionForDamage[i]);
                if (DepthFunctionForDamage[i] < 0.02)
                    DepthFunctionForDamage[i] = 0.0;
            }
		}


		[EventSubscribe("Grazed")]
		private void OnGrazed(object sender, EventArgs e)
		{
		    // eventually will need to ...
		    // get the amound of DM removed
		    // get the number and LW of the stock
		    // do the damage
		    
		    // initially set the SD and LW etc - the last four parameters in the first bracket
		    
                // calculate the grazing pressures
            GrazingPressure = CowLiveweight * CowStockingDensity * GrazingDuration / 1000.0;   // t LW /ha /hour
            EffectiveGrazingPressure = GrazingPressure * WaterFactor;
            TreadingEffect = 1.0 - Math.Exp(EffectiveGrazingPressure * PressureMultiplier / 1000.0);

            // finally add this into the dynamic damage units 
	        if (DamageRyegrass)
    			DamageUnitsGrass = Math.Max(Math.Min(DamageUnitsGrass + TreadingEffect, 1.0), 0.0);
			if (DamageClover)
    			DamageUnitsClover = Math.Max(Math.Min(DamageUnitsClover + TreadingEffect, 1.0), 0.0);
			if (DamageSoil)
			{
			    DamageUnitsSoil = Math.Max(Math.Min(DamageUnitsSoil + TreadingEffect, 1.0), 0.0);
                   for (int i = 0; i < physical.Thickness.Length; i++)
                       DepthDamageFunction[i] = DamageUnitsSoil * DepthFunctionForDamage[i];
            }

    		// now have the damage units affect the plants and soil
    		Grass.GlfGeneric = 1.0 - DamageUnitsGrass;
			Clover.GlfGeneric = 1.0 - DamageUnitsClover;
        	for (int i = 0; i < physical.Thickness.Length; i++)
            {
                physical.KS[i] = UndamagedKSat[i] - MaxPossChangeConductivity[i] * DepthDamageFunction[i];
                physical.DUL[i] = UndamagedDUL[i] + MaxPossChangeMacroporosity[i] * DepthDamageFunction[i];
            }

        }
		
		[EventSubscribe("DoManagement")]
		private void OnDoManagement(object sender, EventArgs e)
		{
            GrazingPressure = 0.0;
		    EffectiveGrazingPressure = 0.0;
		    TreadingEffect = 0.0;
			
            // only needed on grazing days but up here for outputting
            WaterFactor = 0.0;
            double SatTo100mm = 0.0;
            double DulTo100mm = 0.0;
            double ThetaTo100mm = 0.0;
            for (int i = 0; physical.DepthMidPoints[i] < DepthDamage100Soil; i++)
            {
                SatTo100mm += physical.SATmm[i];
                DulTo100mm += physical.DULmm[i];
                ThetaTo100mm += swim3.SWmm[i];
            }
            WaterFactor += Math.Max(0.0, (ThetaTo100mm - DulTo100mm) / (SatTo100mm - DulTo100mm));

			// no recovery on the damage day
    		    DamageUnitsGrass -= DamageUnitsGrass * RecoveryRateGrass;
			    DamageUnitsClover -= DamageUnitsClover * RecoveryRateClover;
			    DamageUnitsSoil -= DamageUnitsSoil * RecoveryRateSoil;
				
				for (int i = 0; i < physical.Thickness.Length; i++)
                    DepthDamageFunction[i] = DamageUnitsSoil * DepthFunctionForDamage[i];

    		// now have the damage units affect the plants and soil
    		Grass.GlfGeneric = 1.0 - DamageUnitsGrass;
			Clover.GlfGeneric = 1.0 - DamageUnitsClover;
        	for (int i = 0; i < physical.Thickness.Length; i++)
            {
                physical.KS[i] = UndamagedKSat[i] - MaxPossChangeConductivity[i] * DepthDamageFunction[i];
                physical.DUL[i] = UndamagedDUL[i] + MaxPossChangeMacroporosity[i] * DepthDamageFunction[i];
            }
		}
		
		
		private bool SameDate(DateTime d1, DateTime d2)
		{
			return d1.Year == d2.Year && d1.DayOfYear == d2.DayOfYear;
		}
	}
}
```
        Manager SetWatertable (disabled)
          MeanWTDepth = 1000
          AmpWTDepthProp = 0.45
          CriticalWTFilled = 0.01
```csharp
using Models.Climate;
using APSIM.Shared.Utilities;
using Models.Soils.Nutrients;
using Models.Soils;
using Models.PMF;
using Models.Core;
using System.Xml.Serialization;
using System;
using Models.AgPasture;
using Models.Interfaces;
using System.Linq;

namespace Models
{
    [Serializable] 
    [System.Xml.Serialization.XmlInclude(typeof(Model))]
    public class Script : Model
    {
        [Link] Clock clock;
        [Link] ISummary summary;
        [Link] private Swim3 swim;
        [Link] private Physical physical;
        [Link] private Water water;
        //[Link] private PastureSpecies ryegrass;
        //[Link] private SimpleGrazing grazing;
        
        public enum LowerBCTypeOptions {gradient,seepage,potential};
        
        public double SetCurrentWTDepth { get; set; }
        public double CurrentWTDepth { get; set; }
        public double SoilDepth { get; set; }

        [Separator("Sets the lower boundary condition type (and value if set to 'potential' for SWIM3. The change is applied at the beginning of the first day of the simulation.")]
        [Description("Mean water table depth? (mm) ")] public double MeanWTDepth { get; set; }
        [Description("Amplitude of the annual fluctuations in water table as a proportion of mean depth? (mm) ")] public double AmpWTDepthProp { get; set; }


        [Description("Proprtion of SAT-DUL water-filled for WT depth reporting?")] public double CriticalWTFilled { get; set; }

        public double LowerBCValue  { get; set; }
        public double AmpWTDepth  { get; set; }
        
        double PhaseShift = 59.0; // days

        [EventSubscribe("StartOfFirstDay")]
        private void DoStartOfFirstDay(object sender, EventArgs e)
        {
            //System.Diagnostics.Debugger.Break();
            
            AmpWTDepth = AmpWTDepthProp * MeanWTDepth;

            SetCurrentWTDepth = Math.Sin((clock.Today.DayOfYear - 59.0)/365.25 * Math.PI * 2.0) * AmpWTDepth + MeanWTDepth;   // this is in mm
            SoilDepth = physical.ThicknessCumulative.Last();
            LowerBCValue = (SoilDepth - SetCurrentWTDepth) / 10.0 ;  // to put it into cm for SWIM

            swim.SetLowerBCForGivenPotential(bbcPotential: LowerBCValue); 

        }

        [EventSubscribe("DoDailyInitialisation")]
        private void DoDailyInitialisation(object sender, EventArgs e)
        {
            SetCurrentWTDepth = Math.Sin((clock.Today.DayOfYear - 59.0)/365.25 * Math.PI * 2.0) * AmpWTDepth + MeanWTDepth;   // this is in mm
            LowerBCValue = (SoilDepth - SetCurrentWTDepth) / 10.0 ;  // to put it into cm for SWIM
            swim.SetLowerBCForGivenPotential(bbcPotential: LowerBCValue); 
        }

        [EventSubscribe("DoManagement")]
        private void DoDailyCalculations(object sender, EventArgs e)
        {
        }

        [EventSubscribe("DoReportCalculations")]
        private void DoReportCalculations(object sender, EventArgs e)
        {
            // find the apparent WT depth
            for (int i = swim.Thickness.Length-1; i > 0; i--)
            {
                double test = (physical.SAT[i] - water.Volumetric[i]) / (physical.SAT[i] - physical.DUL[i]);
                if (test < CriticalWTFilled)
                     CurrentWTDepth = SoilUtilities.ToCumThickness(swim.Thickness)[i-1];
            }
        }
    }
}
```
        Manager Fertilise
          EachYear = True
          Dates = 15-aug, 15-sep, 15-oct, 25-apr
          UseCritNThreshold = False
          CritNThreshold = 50
          CritNDepth = 75
          Depth = 33
          Amount = 0
          FertiliserType = UreaN
```csharp
using APSIM.Core;
using System;
using Models.Core;
using Models.Soils.Nutrients;
using Models.Soils;
using Models.PMF;
using APSIM.Shared.Utilities;
using System.Linq;
using Models.Interfaces;

namespace Models
{
    [Serializable]
    public class Script : Model, IStructureDependency
    {
        [Link] private Clock clock;
        [Link] private Fertiliser fertiliser;
        [Link] private ISummary summary;
        [Link] private Soil soil;
        private Nutrient nutrient;
        private Nutrient soilN;
        [Link]
        private IPhysical soilPhysical;
        [Link]
        private Nutrient Nutrient;
        [Link(Path="[SurfaceOrganicMatter].SurfaceResidue.Decomposition")]
        private OrganicFlow ResidueDecomposition;
        public IStructure Structure { private get; set; }
        
        


        [Separator("Fertiliser will be applied on the date(s) below")]
        [Description("Apply fertiliser on the same day(s) each year? If no, then must include the year of appliaction below")]
        public bool EachYear { get; set; }

        [Description("Dates for one or more fertiliser applications (dd-mmm or dd-mmm-yyyy) as a list with a comma between dates")]
        public string[] Dates { get; set; }

        [Separator("Test for the mineral N in the soil and don't apply the fertiliser if greater than X kgN/ha is stored in the soil above a depth of Y mm")]
        [Description("Use a critical soil mineral N to prevent application above a threshold?")]
        public bool UseCritNThreshold { get; set; }

        [Description("Don't add fertiliser if N in the soil to the depth below exceeds (kg/ha)")]
        public double CritNThreshold { get; set; }

        [Description("Depth to which the amount of N in the soil should be calculated (mm)")]
        public double CritNDepth { get; set; }

        [Separator("Fertiliser application details")]
        [Description("Depth at which to apply the fertiliser (mm)")]
        public double Depth { get; set; }

        [Description("Amount of fertiliser to apply (kg N /ha) per application")]
        public double Amount { get; set; }

        [Description("Fertiliser type - select from the list")]
        [Display(Type = DisplayType.FertiliserType)]public string FertiliserType { get; set; }


        [EventSubscribe("StartOfSimulation")]
        private void FindSoilNOrNutrient(object sender, EventArgs e)
        {
            nutrient =  Structure.Find<Nutrient>() as Nutrient;
            soilN =  Structure.Find<Nutrient>() as Nutrient;

            if (nutrient == null && soilN == null)
                throw new Exception(string.Format("Error in script {0}: Unable to find nutrient or soilN.", Name));
        }

        [EventSubscribe("DoManagement")]
        private void OnDoManagement(object sender, EventArgs e)
        {
            if (OnApplicationDate())
            {
                if (NContentBelowThreshold())
                    fertiliser.Apply(Amount, FertiliserType, Depth);
                else
                    summary.WriteMessage(this, "Skipping fertiliser application due to soil mineral N content being above critical threshold.", MessageType.Diagnostic);
            }
        }

        /// <summary>Checks if today's date is one of the specified fertiliser application dates.</summary>
        private bool OnApplicationDate()
        {
            if (EachYear)
                return Dates.Any(d => DateUtilities.DatesEqual(d, clock.Today));
            
            DateTime[] dates = Dates.Select(d => DateTime.ParseExact(d, "d-MMM-yyyy", null)).ToArray();
            return dates.Any(d => SameDate(d, clock.Today));
        }

        /// <summary>Checks if N content in soil is below critical threshold.</summary>
        private bool NContentBelowThreshold()
        {
            if (!UseCritNThreshold)
                return true;
            
            double[] weights = GetLayerWeights();
            double cumSoilN = 0;

            for (int i = 0; i < soilPhysical.Thickness.Length; i++)
            {
                if (nutrient != null)
                    cumSoilN += weights[i] * nutrient.MineralN[i];
                else if (soilN != null)
                    cumSoilN += weights[i] * soilN.MineralN[i];
            }

            return cumSoilN <= CritNThreshold;
        }

        private double[] GetLayerWeights()
        {
            double[] weights = new double[soilPhysical.Thickness.Length];
            double cumDepth = 0;

            for (int i = 0; i < soilPhysical.Thickness.Length; i++)
            {
                cumDepth += soilPhysical.Thickness[i];
                if (cumDepth < CritNDepth)
                    weights[i] = 1;
                else if (cumDepth - soilPhysical.Thickness[i] <= CritNDepth)
                    weights[i] = (CritNDepth - (cumDepth - soilPhysical.Thickness[i])) / soilPhysical.Thickness[i];
                else
                    weights[i] = 0;
            }

            return weights;
        }

        private bool SameDate(DateTime d1, DateTime d2)
        {
            return d1.Year == d2.Year && d1.DayOfYear == d2.DayOfYear;
        }
    }
}
```
        Manager Irrigate
          allowIrrigation = False
          IrrigStart = 1-sep
          IrrigEnd = 30-apr
          SoilDepth = 500
          CritPAWForShallow = 60
          CritRainToPause = 30
          DaysToPauseOnCritRain = 3
          IrrigReturnShallow = 2
          IrrigAmtShallow = 10
          PercPAWIrrigDeficitShallow = 0
          IrrigEffShallow = 100
          IrrigReturnDeep = 4
          IrrigAmtDeep = 20
          IrrigDeficitDeep = 25
          IrrigEffDeep = 100
```csharp
using Models.Soils;
using System;
using System.Linq;
using System.Diagnostics;
using Models.Core;
using Models.Interfaces;
using APSIM.Shared.Utilities;

namespace Models
{
    [Serializable]
    public class Script : Model
    {
        [Link] Clock clock;
        [Link] IWeather weather;
        [Link] Irrigation irrigation;
        [Link] ISummary summary;
        [Link] Physical physical;
        [Link] Water water;
        
        
        [Description("Turn irrigation on?")] public bool allowIrrigation { get; set; }

        [Separator("All soils")]

        [Description("Start of irrigation season (dd-mmm)")] 
        public string IrrigStart { get; set; }

        [Description("End of irrigation season (dd-mmm)")] 
        public string IrrigEnd { get; set; }

        [Description("Enter the depth to which water deficit is computed (mm)")] 
        public double SoilDepth { get; set; }
        
        [Description("PAW below which soil is considered 'shallow' (mm)")] 
        public double CritPAWForShallow { get; set; }

        [Description("Amount of rainfall over the last 3 days to cause pause to irrigator (mm)")] 
        public double CritRainToPause { get; set; }

        [Description("Number of days to pause irrigator after critical delay (days)")] 
        public double DaysToPauseOnCritRain { get; set; }
        
        [Separator("Shallow soils")]
        
        [Description("Irrigation return period for shallow soils (days)")] 
        public double IrrigReturnShallow { get; set; }

        [Description("Effective irrigation amount for shallow soils (mm)")] 
        public double IrrigAmtShallow { get; set; }

        [Description("Percentage of PAW at which to irrigate shallow soils (%)")] 
        public double PercPAWIrrigDeficitShallow { get; set; }

        [Description("Irrigation efficiency for shallow soils (%)")] 
        public double IrrigEffShallow { get; set; }

        [Separator("Deep soils")]
        
        [Description("Irrigation return period for deep soils (days)")] 
        public double IrrigReturnDeep { get; set; }

        [Description("Effective irrigation amount for deep soils (mm)")] 
        public double IrrigAmtDeep { get; set; }

        [Description("Percentage of PAW at which to irrigate deep soils (%)")] 
        public double IrrigDeficitDeep { get; set; }

        [Description("Irrigation efficiency for deep soils (%)")] 
        public double IrrigEffDeep { get; set; }


        // Output variables
        [Units("mm")]
        public double TodayDeficit {get; set; }
         
        [Units("mm")]
        public double TodayDeficit_nve {get; set; }
         
        [Units("")]
        public double IrrigDay {get; set; }
         
        [Units("")]
        public double SoilPAW {get; set; }
         
        [Units("")]
        public double IrrigDeficit {get; set; }
        
        [Units("")]
        public double IrrigReturn {get; set; }
        
        [Units("")]
        public double IrrigAmt {get; set; }
        
        [Units("")]
        public double IrrigEff {get; set; }
        
        [Units("mm")]
        public double Rain3 {get; set; }
        
        [Units("mm")]
        public double[] Rain_3 {get; set; } = new double[3];
        
        [Units("")]
        public double Days2Pause {get; set; }

         // private variables
        private double irrigDeficitShallow {get; set; }

        
        [EventSubscribe("StartOfSimulation")]
        private void OnStartOfSimulation(object sender, EventArgs e)
        {
            IrrigDay = 5000;  // so will reset to 1 on first day

            Rain3 = 0.0;
            Rain_3[0] = 0.0; Rain_3[1] = 0.0; Rain_3[2] = 0.0;

            SoilPAW = 0.0;
            double mySoilDepth = 0;
            for (int z = 0; z <= physical.Thickness.Length - 1; z++)
            {
                mySoilDepth = mySoilDepth + physical.Thickness[z];
                if (mySoilDepth <= SoilDepth)
                    SoilPAW = SoilPAW + physical.DULmm[z] - physical.LL15mm[z];
            }
            if (SoilPAW <= CritPAWForShallow)
            {
                IrrigDeficit = PercPAWIrrigDeficitShallow / (double)100 * SoilPAW;
                IrrigReturn = IrrigReturnShallow;
                IrrigAmt = IrrigAmtShallow;
                IrrigEff = IrrigEffShallow;
                summary.WriteMessage(this, "Soil is considered to be shallow " + CritPAWForShallow + " " + SoilPAW, MessageType.Information);
            }
            else
            {
                IrrigDeficit = IrrigDeficitDeep;
                IrrigReturn = IrrigReturnDeep;
                IrrigAmt = IrrigAmtDeep;
                IrrigEff = IrrigEffDeep;
                summary.WriteMessage(this, "Soil is considered to be deep", MessageType.Information);
            }

            summary.WriteMessage(this, $"Irrigation critical deficit (mm): {IrrigDeficit}", MessageType.Information);
            summary.WriteMessage(this, $"        Irrigation return (days): {IrrigReturn}", MessageType.Information);
            summary.WriteMessage(this, $"   Irrigation pumped amount (mm): {IrrigAmt}", MessageType.Information);
            summary.WriteMessage(this, $"       Irrigation efficiency (%): {IrrigEff}", MessageType.Information);
        }
        
        
        [EventSubscribe("DoManagement")]
        private void OnDoManagement(object sender, EventArgs e)
        {
            Rain_3[2] = Rain_3[1];
            Rain_3[1] = Rain_3[0];
            Rain_3[0] = weather.Rain;
            Rain3 = Rain_3[0] + Rain_3[1] + Rain_3[2];
            if (Rain3 >= CritRainToPause)
                Days2Pause = DaysToPauseOnCritRain;
            else
                Days2Pause = Days2Pause - 1;

            TodayDeficit = 0.0;
            SoilPAW = 0.0;
            double mySoilDepth = 0;

            for (int z = 0; z <= physical.Thickness.Length - 1; z++)
            {
                mySoilDepth = mySoilDepth + physical.Thickness[z];
                if (mySoilDepth <= SoilDepth)
                {
                    SoilPAW = SoilPAW + physical.DULmm[z] - physical.LL15mm[z];
                    TodayDeficit = TodayDeficit + physical.DULmm[z] - Math.Min(physical.DULmm[z], water.MM[z]);
                }
            }
            TodayDeficit_nve = -1 * TodayDeficit;

            if (DateUtilities.WithinDates(IrrigStart, clock.Today, IrrigEnd))
            {
                if (SoilPAW <= CritPAWForShallow)
                {
                    IrrigDeficit = PercPAWIrrigDeficitShallow / 100 * SoilPAW;
                    IrrigReturn = IrrigReturnShallow;
                    IrrigAmt = IrrigAmtShallow;
                    IrrigEff = IrrigEffShallow;
                }
                else
                {
                    IrrigDeficit = IrrigDeficitDeep;
                    IrrigReturn = IrrigReturnDeep;
                    IrrigAmt = IrrigAmtDeep;
                    IrrigEff = IrrigEffDeep;
                }

                if (Days2Pause < 0.5)
                {
                    IrrigDay = IrrigDay + 1;
                    if (IrrigDay > IrrigReturn)
                        IrrigDay = 1;// and day = 1 is when the irrigation happens

                    if (TodayDeficit >= IrrigDeficit)
                    {
                        if ((IrrigDay == 1) && (allowIrrigation))
                            irrigation.Apply(amount: IrrigAmt / (IrrigEff / 100.0));
                    }
                }
            }
        }    
    }
}
```
        Irrigation
        Fertiliser
        SurfaceOrganicMatter: InitialResidueName=Sward; InitialResidueType=grass; InitialResidueMass=1000; InitialStandingFraction=0; InitialCPR=0; InitialCNR=15
        PastureSpecies AGPRyegrass: doyGermination=275; daysEmergenceToAnthesis=120; daysAnthesisToMaturity=85; degreesDayForAnthesis=1100; degreesDayForMaturity=900; daysAnnualsFactor=45; CanopyType=PastureSpecies; InitialShootDM=1500; InitialRootDM=450; InitialRootDepth=600; initialDMFractionsGrasses=[0.15, 0.25, 0.25, 0.05, 0.05, 0.1, 0.1, 0.05, 0, 0, 0]; initialDMFractionsForbs=[0.2, 0.2, 0.15, 0.05, 0.1, 0.15, 0.1, 0.05, 0, 0, 0]; PhotosyntheticEfficiency=0.01; PhotosynthesisCurveFactor=0.8; FractionPAR=0.5; ReferenceCO2=380; CO2EffectScaleFactor=700; CO2EffectOffsetFactor=600; CO2EffectMinimum=0.7; CO2EffectExponent=2; ReproSeasonDurationCoeff=2; ReproSeasonShouldersLengthFactor=1; ReproSeasonOnsetDurationFactor=0.6; RelativeTurnoverEmerging=2; DetachmentDroughtCoefficient=3; DetachmentDroughtEffectMin=0.1; TurnoverStockFactor=0.01; TurnoverDefoliationEffectMin=0.025; MinimumGreenLeafProp=0.8; MinimumGreenRootProp=0.5
          initialDMFractionsLegumes=[0.16, 0.23, 0.22, 0.05, 0.03, 0.05, 0.05, 0.01, 0.04, 0.08, 0.08]
          LinearInterpolationFunction FVPDFunction
        PastureSpecies AGPWhiteClover: doyGermination=275; daysEmergenceToAnthesis=120; daysAnthesisToMaturity=85; degreesDayForAnthesis=1100; degreesDayForMaturity=900; daysAnnualsFactor=45; CanopyType=PastureSpecies; InitialShootDM=500; InitialRootDM=150; InitialRootDepth=300; initialDMFractionsGrasses=[0.15, 0.25, 0.25, 0.05, 0.05, 0.1, 0.1, 0.05, 0, 0, 0]; initialDMFractionsForbs=[0.2, 0.2, 0.15, 0.05, 0.1, 0.15, 0.1, 0.05, 0, 0, 0]; PhotosyntheticEfficiency=0.01; PhotosynthesisCurveFactor=0.8; FractionPAR=0.5; ReferenceCO2=380; CO2EffectScaleFactor=700; CO2EffectOffsetFactor=600; CO2EffectMinimum=0.7; CO2EffectExponent=2; ReproSeasonDurationCoeff=2; ReproSeasonShouldersLengthFactor=1; ReproSeasonOnsetDurationFactor=0.6; RelativeTurnoverEmerging=2; DetachmentDroughtCoefficient=3; DetachmentDroughtEffectMin=0.1; TurnoverStockFactor=0.01; TurnoverDefoliationEffectMin=0.025; MinimumGreenLeafProp=0.8; MinimumGreenRootProp=0.5
          initialDMFractionsLegumes=[0.16, 0.23, 0.22, 0.05, 0.03, 0.05, 0.05, 0.01, 0.04, 0.08, 0.08]
          LinearInterpolationFunction FVPDFunction
        Soil: ASCOrder=Gley; SoilType=Silt loam; LocalName=Taho (Silt loam (Opotiki No1347)); Site=Crooked Rd, south of junction with Dickenson Rd; NearestTown=Opotiki; Region=BayOfPlenty; Country=New Zealand; NaturalVegetation=long term grass; ApsoilNumber=1347; Latitude=-38.031; Longitude=177.25; LocationAccuracy=+/-50 m; YearOfSampling=1983
          DataSource=The database of New Zealand soils was compiled by AgResearch (www.agresearch.co.nz) and based on soil properties gathered, mainly from publications, in the course of conducting several simulation-based research projects but particularly from the Pastoral 21 Environment program which was funded by the New Zealand Ministry for Business, Innovation and Employment,  Dairy NZ, Fonterra and Meat & Wool NZ.
          Comments=The data is a combination of published or supplied measurements, pedotransfer functions, and expert opinion. See Cichota et al. (2013; Soil Research 51: 92-111, http://dx.doi.org/10.1071/SR12338) for a description of the pedotransfer functions. The soil carbon and fresh organic matter settings have been set as those broadly appropriate for permanent productive pastoral systems, see Cichota el al. (2012; Soil Research 50: 694-707, http://dx.doi.org/10.1071/SR12208). Users should take care to adapt these to local conditions before using the data in simulations. FOM values estimated to be 900 kg/ha of FOM in top 600mm of soil and another 100 kg/ha below.
          Physical
            Thickness  ParticleSizeSand  ParticleSizeSilt  ParticleSizeClay  Rocks  BD     AirDry  LL15   DUL    SAT    KS
            150        34                52                14                0      1.03   0.056   0.17   0.411  0.531  3186.27
            250        22                51                27                0      1.08   0.074   0.224  0.4    0.533  358.981
            250        32                53                15                0      0.89   0.048   0.144  0.375  0.59   795.543
            200        25                45                30                0      1.16   0.09    0.273  0.43   0.504  135.676
            300        52                36                12                0      1.14   0.06    0.183  0.378  0.493  2876.485
            1850       50                38                12                2      1.176  0.056   0.171  0.356  0.47   2676.044
            BD source: Field measured and checked for sensibility
            AirDry source: Estimated based on local knowledge
            LL15, DUL source: Laboratory measured
            SAT source: Calculated from measured, estimated or calculated BD
            SoilCrop AGPRyegrassSoil: LL=[0.17, 0.224, 0.144, 0.273, 0.183, 0.171]; KL=[0.06, 0.06, 0.056, 0.04, 0.04, 0.023]; XF=[1, 1, 1, 1, 1, 1]
              LL source: Estimated based on local knowledge
            SoilCrop AGPWhiteCloverSoil: same as Experiment.SimBase.Field.Soil.Physical.AGPRyegrassSoil
          Swim3: Salb=0.13; CN2Bare=0; CNRed=0; CNCov=0.8; KDul=1; PSIDul=-100; VC=true; DTMin=0; DTMax=1440; MaxWaterIncrement=10; SpaceWeightingFactor=0; SoluteSpaceWeightingFactor=1; Dis=0; Disp=1; A=2; DTHC=0.1; DTHP=2; vcon1=7.28e-09; vcon2=7.26e-07; eo_time=06:00; eo_durn=720; default_rain_time=00:00; default_rain_duration=720; Diagnostics=false
          Organic: FOMCNRatio=40; CarbonUnits=Total
            Thickness  Carbon  SoilCNRatio  FBiom  FInert  FOM
            150        3.6     11.25        0.078  0.497   92.8391
            250        1       11.25        0.017  0.514   56.3098
            250        0.5     11.25        0.008  0.911   34.1536
            200        0.4     11.25        0.008  0.963   22.8938
            300        0.5     11.25        0.008  0.99    12.5644
            1850       0.5     11.25        0.008  0.994   6.2393
          Chemical: PHUnits=Water
            Thickness  PH   CEC
            150        6.5  12.6
            250        6.5  9.2
            250        6.5  6.7
            200        6.5  7.9
            300        6.5  5.8
            1850       6.5  5.8
            PH source: Estimated based on local knowledge
          Nutrient
          Solute NO3: InitialValuesUnits=ppm; WaterTableConcentration=0; D0=0; DepthConstant=0; MaxDepthSoluteAccessible=0; RunoffEffectivenessAtMovingSolute=0; MaxEffectiveRunoff=0
            Thickness  InitialValues  Exco  FIP
            150        6              0     1
            250        2              0     1
            250        1              0     1
            200        1              0     1
            300        1              0     1
            1850       1              0     1
          Solute NH4: InitialValuesUnits=ppm; WaterTableConcentration=0; D0=0; DepthConstant=0; MaxDepthSoluteAccessible=0; RunoffEffectivenessAtMovingSolute=0; MaxEffectiveRunoff=0
            Thickness  InitialValues  Exco  FIP
            150        1              1     1
            250        1              1     1
            250        1              1     1
            200        1              1     1
            300        1              1     1
            1850       1              1     1
          Solute Urea: InitialValuesUnits=kg/ha; WaterTableConcentration=0; D0=0; DepthConstant=0; MaxDepthSoluteAccessible=0; RunoffEffectivenessAtMovingSolute=0; MaxEffectiveRunoff=0
            Thickness  InitialValues  Exco  FIP
            150        0              0     1
            250        0              0     1
            250        0              0     1
            200        0              0     1
            300        0              0     1
            1850       0              0     1
          Water: Thickness=[150, 250, 250, 200, 300, 1850]; InitialValues=[0.411, 0.4, 0.375, 0.43, 0.378, 0.356]; FilledFromTop=false
          LayerStructure
            Thickness=[10, 20, 30, 40, 50, 50, 50, 50, 200, 250, 250, 500, 500, 500, 300, 100, 100]
          SoilTemperature Temperature
  DataStore
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