Simulations: Version=2
  DataStore
  Folder OneSpecies
    Simulation AgPproto: Area=0; Slope=0
      Clock: StartDate=2000-07-01; EndDate=2002-06-30
      Weather: FileName=%root%\Tests\WeatherFiles\Ruakura.met
      Manager SetCO2
        ambientCO2 = 380
```csharp
using System;
using Models.Core;
using Models.PMF;
namespace Models
{
	[Serializable]
	public class Script : Model
	{
		[Link] Weather MetData;
		[Link] Clock Clock;
	
		[Description("Ambient CO2 concentration (ppm):")]
		public double ambientCO2 { get; set; }
		//= 350;
	
		[EventSubscribe("Commencing")]
		private void OnSimulationCommencing(object sender, EventArgs e)
		{
			MetData.CO2 = ambientCO2;
		}
	}
}
```
      Summary
      Zone Field: Area=0; Slope=0
        Folder Managers
          Manager CutRotation
            CutRotationStartDate = 0001-01-01
            CutInterval = 21
            PastureAmount = 1500
```csharp
using System;
using Models.Core;
using Models.PMF;
namespace Models
{
	[Serializable]
	public class Script : Model
	{
		[Link] Clock Clock;
		[Link] AgPastureProto Pasture;
		
		[Description("Date to begin rotation:")]
		public DateTime CutRotationStartDate { get; set; }
		[Description("Rotation interval (days):")]
		public int CutInterval { get; set; }
		[Description("Residual amount of pasture (kg/ha):")]
		public double PastureAmount { get; set; }
		
		private bool RotationAllowed = true;
		private int DaysAfterCut { get; set; }
		
		[EventSubscribe("Commencing")]
		private void OnSimulationCommencing(object sender, EventArgs e)
		{
			DaysAfterCut = 1000;
		}
		
		[EventSubscribe("DoManagement")]
		private void OnDoManagement(object sender, EventArgs e)
		{
			if (RotationAllowed)
			{
				if (Clock.Today.Date >= CutRotationStartDate.Date)
				{
					if (DaysAfterCut >= CutInterval)
					{
						Pasture.Harvest(type: "SetResidueAmount", amount: PastureAmount);
						DaysAfterCut = 0;
					}
					else
					{
						DaysAfterCut += 1;
					}
				}
			}
		}
	}
}
```
          Manager AutomaticFertiliser
            allowFertiliser = yes
            fertTarget = 25
            fertCritical = 5
            depthN = 500
            fertMinDays = 30
```csharp
using System;
using Models.Core;
using Models.PMF;
using Models.Soils;
using APSIM.Shared.Utilities;
using System.Xml.Serialization;

namespace Models
{
	[Serializable]
	public class Script : Model
	{
		[Link] Clock Clock;
		[Link] Fertiliser fertiliser;
		[Link] ISummary summary = null;
		[Link] Soil Soil;

		//User inputs from properties tab
		[Description("Turn ferliser applications on?")]
		public answerType allowFertiliser { get; set; }

		[Description("Target amount of NO3 in top soil (kgN/ha)")]
		public double fertTarget { get; set; }

		[Description("Minimal amount of NO3 in top soil (kgN/ha)")]
		public double fertCritical { get; set; }
		
		[Description("Depth to calculate available N (mm)")]
		public double depthN { get; set; }

		[Description("Minimum period between applications (days)")]
		public double fertMinDays { get; set; }
	   
		public enum answerType
		{
			/// <summary>a positive answer</summary>
			yes,
			/// <summary>a negative answer</summary>
			no
		}

		[XmlIgnore] public double TopMineralN { get; set; }
		
		private DateTime lastApplicationDate;
		private bool fertiliserIsAllowed;
		private int nLayers;

		[EventSubscribe("StartOfSimulation")]
		private void OnStartOfSimulation(object sender, EventArgs e)
		{
			fertiliserIsAllowed = (allowFertiliser == answerType.yes);
			nLayers = Soil.SoilWater.Thickness.Length;
		}

		[EventSubscribe("DoManagement")]
		private void OnDoManagement(object sender, EventArgs e)
		{
			double daysSinceLastApplication = (Clock.Today - lastApplicationDate).TotalDays;
			double depthFromSurface = 0.0;
			double fracLayer = 0.0;
			TopMineralN = 0.0;
			for (int layer = 0; layer < nLayers; layer++)
			{
				fracLayer = Math.Min(1.0, (depthN - depthFromSurface) / Soil.SoilWater.Thickness[layer]);
				TopMineralN += (Soil.SoilNitrogen.NO3[layer] + Soil.SoilNitrogen.NH4[layer]) * fracLayer;
				depthFromSurface += Soil.SoilWater.Thickness[layer];
				if (depthFromSurface >= depthN)
					layer = nLayers;
			}

			
			if (fertiliserIsAllowed && (daysSinceLastApplication >= fertMinDays))
			{			
				if (TopMineralN < fertCritical)
				{
					double nDeficit = fertTarget - TopMineralN;				
					fertiliser.Apply(nDeficit, Fertiliser.Types.UreaN, 1);
					lastApplicationDate = Clock.Today;
					//summary.WriteMessage(this, "Applied " + nDeficit + " (was " + NO3_available.ToString() + ")");
				}
			}
		}
	}
}
```
          Manager AutomaticIrrigation
            allowIrrigation = no
            seasonStart = 15-Sep
            seasonEnd = 30-May
            seasonsAllocation = 10000
            triggerDeficit = 90
            targetDeficit = 99
            returndays = 1
            maximumAmount = 30
            depthPAWC = 300
```csharp
using System;
using Models.Core;
using Models.PMF;
using Models.Soils;
using System.Xml.Serialization;
using Models.PMF;
using APSIM.Shared.Utilities;

        
namespace Models
{
	[Serializable] 
	[System.Xml.Serialization.XmlInclude(typeof(Model))]
	public class Script : Model
	{
		//Communication to other modules
		[Link] ISummary summary = null;
		[Link] Irrigation Irrigation;
		[Link] Clock Clock;
		[Link] Soil Soil;
		[Link(IsOptional = true)] Plant existingCrop;
	   
		//User inputs from properties tab
		[Description("Turn irrigation on?")]
		public answerType allowIrrigation { get; set; }
		[Description("Start of irrigation season (dd-MMM)")]
		public string seasonStart { get; set; }
		[Description("End of irrigation season (dd-MMM)")]
		public string seasonEnd { get; set; }
		[Description("Season allocation (mm)")]
		public double seasonsAllocation { get; set; }
		[Description("Deficit to trigger irrigation (% PAWC)")]
		public double triggerDeficit { get; set; }
		[Description("Deficit to stop irrigaton (% PAWC)")]
		public double targetDeficit { get; set; }
		[Description("Minimum days for irrigation to return")]
		public double returndays { get; set; }
		[Description("Maximum irrigation application (mm/day)")]
		public double maximumAmount { get; set; }
		[Description("Depth to calculate PAWC (mm)")]
		public double depthPAWC { get; set; }
	   
		public enum answerType
		{
			/// <summary>a positive answer</summary>
			yes,
			/// <summary>a negative answer</summary>
			no
		}

		//Class members
		[XmlIgnore] public double TopSWdeficit { get; set; }
		[XmlIgnore] public double TopSWC { get; set; }
		[XmlIgnore] public double DaysSinceIrrigation { get; set; }
		[XmlIgnore] public double AmountToApply { get; set; }
		[XmlIgnore] public double SeasonAppliedAmount { get; set; }
		
		private bool IrrigationIsAllowed { get; set; }
		private bool SeasonIsOpen { get; set; }
		private bool CropIsActive { get; set; }
		private bool IrrigatorIsAvailable { get; set; }
		private bool SoilIsDry { get; set; }

		private DateTime StartDate;
		private DateTime EndDate;
		private double TopDUL;
		private double TopLL;
		private int nLayers;
	
		//Calculate static soil variables
		[EventSubscribe("StartOfSimulation")]
		private void OnStartOfSimulation(object sender, EventArgs e)
		{   
			//Set the season dates
			StartDate = DateTime.Parse(seasonStart + "-" + Clock.Today.Year.ToString());
			EndDate = DateTime.Parse(seasonEnd + "-" + Clock.Today.Year.ToString());
			
			//Can we irrigate at all?
			IrrigationIsAllowed = false; 
			if (allowIrrigation == answerType.yes)
				IrrigationIsAllowed = true; 

			//Calculate soil water variables
			double depthFromSurface = 0.0;
			double fracLayer = 0.0;
			nLayers = Soil.SoilWater.Thickness.Length;
			for (int layer = 0; layer < nLayers; layer++)
			{
				fracLayer = Math.Min(1.0, (depthPAWC - depthFromSurface) / Soil.SoilWater.Thickness[layer]);
				TopLL += Soil.SoilWater.LL15mm[layer] * fracLayer;
				TopDUL += Soil.SoilWater.DULmm[layer] * fracLayer;
				depthFromSurface += Soil.SoilWater.Thickness[layer];
				if (depthFromSurface >= depthPAWC)
					layer = nLayers;
			}
		}
	   	  
		//Determine daily requirement for irrigation
		[EventSubscribe("StartOfDay")]
		private void OnStartOfDay(object sender, EventArgs e)
		{
			//Can we irrigate today?		  
			SeasonIsOpen = isBetween(Clock.Today, StartDate, EndDate);

			//Is there a crop in the ground that needs irrigation?
			CropIsActive = false;
			if ((existingCrop != null) && (existingCrop.IsAlive))
				CropIsActive = true;
			//if ((existingCrop.Phenology.Stage >= 3.0) && (existingCrop.Phenology.Stage < 6.0))
	      
			//Is the irrigator available?
			IrrigatorIsAvailable = false;
			DaysSinceIrrigation += 1;
			if (DaysSinceIrrigation >= returndays)
				IrrigatorIsAvailable = true;
	      
			//Is the soil dry enough to require irrigation?
			SoilIsDry = false;
			double depthFromSurface = 0.0;
			double fracLayer = 0.0;
			TopSWC = 0.0;
			for (int layer = 0; layer < nLayers; layer++)
			//for (int layer = 0; depthFromSurface < depthPAWC + Soil.SoilWater.Thickness[layer]; layer++)
			{
				fracLayer = Math.Min(1.0, (depthPAWC - depthFromSurface) / Soil.SoilWater.Thickness[layer]);
				TopSWC += Soil.SoilWater.SWmm[layer] * fracLayer;
				depthFromSurface += Soil.SoilWater.Thickness[layer];
				if (depthFromSurface >= depthPAWC)
					layer = nLayers;
			}
			
			TopSWdeficit = TopSWC - TopDUL;
			if (Math.Max(0.0, -TopSWdeficit) >= (TopDUL - TopLL) * (100 - triggerDeficit) / 100)
				SoilIsDry = true;
	            
			//Are all the conditions ratifying irrigation
			if (IrrigationIsAllowed && SeasonIsOpen && CropIsActive && IrrigatorIsAvailable && SoilIsDry)
			{
				//Lets bloody well irrigate then!!!!
				AmountToApply = TopDUL * targetDeficit / 100 - TopSWC;
				AmountToApply = Math.Max(0.0, Math.Min(AmountToApply, seasonsAllocation - SeasonAppliedAmount));
				Irrigation.Apply(AmountToApply);
				DaysSinceIrrigation = 0;
				SeasonAppliedAmount += AmountToApply;
			}
		}
		
		///Checks whether theDate is between iniDate and endDate (non-year specific)
		private bool isBetween(DateTime theDay, DateTime iniDate, DateTime endDate)
		{
			bool result = false;
			if (iniDate.DayOfYear < endDate.DayOfYear)
			{
				// period is within one year, ex: summer in the northern hemisphere
				if ((theDay.DayOfYear >= iniDate.DayOfYear) && (theDay.DayOfYear <= endDate.DayOfYear))
					result = true;
			}
			else
			{
				// period goes over the end of the year, ex: summer in the southern hemisphere
				if ((theDay.DayOfYear >= iniDate.DayOfYear) || (theDay.DayOfYear <= endDate.DayOfYear))
					result = true;
			}
			
			return result;
		}
	}
}
```
        MicroClimate: a_interception=0; b_interception=0; c_interception=0; d_interception=0; soil_albedo=0.23; air_pressure=1010; soil_emissivity=0.96; sun_angle=15; soil_heat_flux_fraction=0.4; night_interception_fraction=0.5; windspeed_default=3; refheight=2; albedo=0.293662; emissivity=0.96; gsmax=0.01; r50=200
        Irrigation
        Fertiliser
        SurfaceOrganicMatter: ReportAdditions=no; ReportRemovals=no; PoolName=AgPasture; type=grass; mass=1000; standing_fraction=0; cnr=40; CriticalResidueWeight=2000; OptimumDecompTemp=20; MaxCumulativeEOS=20; CNRatioDecompCoeff=0.277; CNRatioDecompThreshold=25; TotalLeachRain=25; MinRainToLeach=10; CriticalMinimumOrganicC=0.004; DefaultCPRatio=0; DefaultStandingFraction=0; StandingExtinctCoeff=0.5; FractionFaecesAdded=0.5
          Pools:
            {PoolName=AgPasture, ResidueType=grass, Mass=1000, CNRatio=40, StandingFraction=0}
          ResidueTypes: LoadFromResource=ResidueTypes
          TillageTypes TillageTypesList
        Soil LismoreSoil: SoilType=NZ_Sedimentary; LocalName=Lismore; Site=Winchmore; NearestTown=Ashburton; Region=Canterbury; Country=New Zealand; Latitude=-48.48; Longitude=0
          Analysis: PHUnits=Water; BoronUnits=HotWater
            Thickness  Rocks  PH  CEC   ParticleSizeSand  ParticleSizeSilt  ParticleSizeClay
            150        0      6   12.5  15                65                20
            150        0      6   10    20                65                15
            200        10     6   9     25                63                12
            150        40     6   5     35                57                8
            250        60     6   4     40                54                6
            300        70     6   4     40                55                5
            300        70     6   4     40                55                5
          Water
            Thickness  BD    AirDry  LL15   DUL    SAT   KS
            150        1.3   0.05    0.15   0.36   0.45  5000
            150        1.35  0.12    0.14   0.34   0.43  2500
            200        1     0.055   0.055  0.19   0.25  3000
            150        0.53  0.015   0.015  0.065  0.15  10000
            250        0.31  0.01    0.01   0.04   0.11  17500
            300        0.3   0.01    0.01   0.03   0.11  20000
            300        0.3   0.01    0.01   0.03   0.11  20000
            SoilCrop AgPastureSoil: LL=[0.15, 0.13, 0.08, 0.02, 0.01, 0.01, 0.01]; KL=[0.1, 0.1, 0.08, 0.04, 0.01, 0, 0]; XF=[1, 1, 1, 1, 1, 0, 0]
            SoilCrop SwardSoil: LL=[0.15, 0.13, 0.08, 0.02, 0.01, 0.01, 0.01]; KL=[0.1, 0.1, 0.08, 0.04, 0.01, 0, 0]; XF=[1, 1, 1, 1, 1, 0, 0]
            SoilCrop SwardProtoSoil: LL=[0.15, 0.13, 0.08, 0.02, 0.01, 0.01, 0.01]; KL=[0.1, 0.1, 0.08, 0.04, 0.01, 0, 0]; XF=[1, 1, 1, 1, 1, 0, 0]
            SoilCrop RyegrassSoil: LL=[0.15, 0.13, 0.08, 0.02, 0.01, 0.01, 0.01]; KL=[0.1, 0.1, 0.08, 0.04, 0.01, 0, 0]; XF=[1, 1, 1, 1, 1, 0, 0]
            SoilCrop WhiteCloverSoil: LL=[0.15, 0.13, 0.08, 0.02, 0.01, 0.01, 0.01]; KL=[0.1, 0.1, 0.08, 0.04, 0.01, 0, 0]; XF=[1, 1, 1, 1, 1, 0, 0]
            SoilCrop Slurp: LL=[0.14, 0.14, 0.03, 0.02, 0.02, 0.02, 0.02]; KL=[0.06, 0.06, 0.06, 0.06, 0.06, 0.06, 0.06]; XF=[1, 1, 1, 1, 1, 1, 1]
          SoilWater: residueinterception=0; SummerDate=1-Nov; SummerU=6; SummerCona=3.5; WinterDate=1-apr; WinterU=2; WinterCona=2; DiffusConst=88; DiffusSlope=35; Salb=0.13; CN2Bare=73; CNRed=20; CNCov=0.8; slope=0; discharge_width=0; catchment_area=0; max_pond=0
            Thickness  SWCON  KLAT
            150        0.5    0
            150        0.52   0
            200        0.55   0
            150        0.6    0
            250        0.65   0
            300        0.65   0
            300        0.65   0
          SoilNitrogen: fom_type=[default, manure, mucuna, lablab, shemp, stable]; fract_carb=[0.2, 0.3, 0.54, 0.57, 0.45, 0]; fract_cell=[0.7, 0.3, 0.37, 0.37, 0.47, 0.1]; fract_lign=[0.1, 0.4, 0.09, 0.06, 0.08, 0.9]; wfpsN2N2O_x=[22, 88]; wfpsN2N2O_y=[0.1, 1]
            oc=[3.71368, 2.46983, 1.2384, 0.49836, 0.250251, 0.150353, 0.100194]
          SoilOrganicMatter: RootCN=40; RootWt=1000; SoilCN=12; EnrACoeff=7.4; EnrBCoeff=0.2; OCUnits=Total
            Thickness  OC    FBiom  FInert
            150        3     0.04   0.5
            150        1     0.02   0.7
            200        0.6   0.02   0.83
            150        0.4   0.01   0.9
            250        0.25  0.01   0.95
            300        0.15  0      0.99
            300        0.1   0      0.99
          InitialWater Initial water: PercentMethod=EvenlyDistributed; FractionFull=0.95
          Sample Initial nitrogen: NO3Units=ppm; NH4Units=ppm; SWUnits=Volumetric; OCUnits=Total; PHUnits=Water
            Thickness  NO3   NH4
            150        5     0.1
            150        2.5   0.1
            200        1     0.1
            150        0.75  0.1
            250        0.5   0.1
            300        0.5   0.1
            300        0.5   0.1
        AgPastureProto AgPasture: alt_N_uptake=no; SwardName=AgPasture; NumSpecies=1; WaterUptakeSource=calc; SpeciesName=[Ryegrass]; SpeciesNType=[grass]; SpeciesCType=[C3]; InitialDMShoot=[2000]; InitialDMRoot=[500]; InitialRootDepth=[750]; MinimumGreenWt=[300]; ExpoLinearDepthParam=0.1; ExpoLinearCurveParam=3
        Report Results_Species: EventNames=[Clock].EndOfDay
          VariableNames:
            [Clock].Today as Date
            [AgPasture].SpeciesName[1] as Ryegrass.Name
            [AgPasture].SpeciesNType[1] as Ryegrass.CropType
            [AgPasture].SpeciesTotalWt[1] as Ryegrass.TotalWt
            [AgPasture].SpeciesAboveGroundWt[1] as Ryegrass.AboveGroundWt
            [AgPasture].SpeciesBelowGroundWt[1] as Ryegrass.BelowGroundWt
            [AgPasture].SpeciesStandingWt[1] as Ryegrass.StandingWt
            [AgPasture].SpeciesStandingLiveWt[1] as Ryegrass.StandingLiveWt
            [AgPasture].SpeciesStandingDeadWt[1] as Ryegrass.StandingDeadWt
            [AgPasture].SpeciesLeafWt[1] as Ryegrass.LeafWt
            [AgPasture].SpeciesStemWt[1] as Ryegrass.StemWt
            [AgPasture].SpeciesStolonWt[1] as Ryegrass.StolonWt
            [AgPasture].SpeciesRootWt[1] as Ryegrass.RootWt
            [AgPasture].SpeciesLeafStage1Wt[1] as Ryegrass.LeafStage1Wt
            [AgPasture].SpeciesLeafStage2Wt[1] as Ryegrass.LeafStage2Wt
            [AgPasture].SpeciesLeafStage3Wt[1] as Ryegrass.LeafStage3Wt
            [AgPasture].SpeciesLeafStage4Wt[1] as Ryegrass.LeafStage4Wt
            [AgPasture].SpeciesStemStage1Wt[1] as Ryegrass.StemStage1Wt
            [AgPasture].SpeciesStemStage2Wt[1] as Ryegrass.StemStage2Wt
            [AgPasture].SpeciesStemStage3Wt[1] as Ryegrass.StemStage3Wt
            [AgPasture].SpeciesStemStage4Wt[1] as Ryegrass.StemStage4Wt
            [AgPasture].SpeciesStolonStage1Wt[1] as Ryegrass.StolonStage1Wt
            [AgPasture].SpeciesStolonStage2Wt[1] as Ryegrass.StolonStage2Wt
            [AgPasture].SpeciesStolonStage3Wt[1] as Ryegrass.StolonStage3Wt
            [AgPasture].SpeciesPotCarbonAssimilation[1] as Ryegrass.PotCarbonAssimilation
            [AgPasture].SpeciesCarbonLossRespiration[1] as Ryegrass.CarbonLossRespiration
            [AgPasture].SpeciesGrossPotGrowth[1] as Ryegrass.GrossPotentialGrowthWt
            [AgPasture].SpeciesNetPotGrowth[1] as Ryegrass.NetPotentialGrowthWt
            [AgPasture].SpeciesPotGrowthW[1] as Ryegrass.PotGrowthWt_Wstress
            [AgPasture].SpeciesGrowthWt[1] as Ryegrass.ActualGrowthWt
            [AgPasture].PlantEffectiveGrowthWt as Ryegrass.EffectiveGrowthWt
            [AgPasture].HerbageGrowthWt as Ryegrass.HerbageGrowthWt
            [AgPasture].SpeciesLitterWt[1] as Ryegrass.LitterWt
            [AgPasture].SpeciesRootSenescedWt[1] as Ryegrass.RootSenescedWt
            [AgPasture].SpeciesTotalN[1] as Ryegrass.TotalN
            [AgPasture].SpeciesStandingN[1] as Ryegrass.StandingN
            [AgPasture].SpeciesLeafN[1] as Ryegrass.LeafN
            [AgPasture].SpeciesStemN[1] as Ryegrass.StemN
            [AgPasture].SpeciesStolonN[1] as Ryegrass.StolonN
            [AgPasture].SpeciesRootsN[1] as Ryegrass.RootN
            [AgPasture].SpeciesLeafStage1N[1] as Ryegrass.LeafStage1N
            [AgPasture].SpeciesLeafStage2N[1] as Ryegrass.LeafStage2N
            [AgPasture].SpeciesLeafStage3N[1] as Ryegrass.LeafStage3N
            [AgPasture].SpeciesLeafStage4N[1] as Ryegrass.LeafStage4N
            [AgPasture].SpeciesStemStage1N[1] as Ryegrass.StemStage1N
            [AgPasture].SpeciesStemStage2N[1] as Ryegrass.StemStage2N
            [AgPasture].SpeciesStemStage3N[1] as Ryegrass.StemStage3N
            [AgPasture].SpeciesStemStage4N[1] as Ryegrass.StemStage4N
            [AgPasture].SpeciesStolonStage1N[1] as Ryegrass.StolonStage1N
            [AgPasture].SpeciesStolonStage2N[1] as Ryegrass.StolonStage2N
            [AgPasture].SpeciesStolonStage3N[1] as Ryegrass.StolonStage3N
            [AgPasture].SpeciesLeafNConc[1] as Ryegrass.LeafNConc
            [AgPasture].SpeciesStemNConc[1] as Ryegrass.StemNConc
            [AgPasture].SpeciesStolonNConc[1] as Ryegrass.StolonNConc
            [AgPasture].SpeciesRootNConc[1] as Ryegrass.RootNConc
            [AgPasture].SpeciesLeafStage1NConc[1] as Ryegrass.LeafStage1NConc
            [AgPasture].SpeciesLeafStage2NConc[1] as Ryegrass.LeafStage2NConc
            [AgPasture].SpeciesLeafStage3NConc[1] as Ryegrass.LeafStage3NConc
            [AgPasture].SpeciesLeafStage4NConc[1] as Ryegrass.LeafStage4NConc
            [AgPasture].SpeciesStemStage1NConc[1] as Ryegrass.StemStage1NConc
            [AgPasture].SpeciesStemStage2NConc[1] as Ryegrass.StemStage2NConc
            [AgPasture].SpeciesStemStage3NConc[1] as Ryegrass.StemStage3NConc
            [AgPasture].SpeciesStemStage4NConc[1] as Ryegrass.StemStage4NConc
            [AgPasture].SpeciesStolonStage1NConc[1] as Ryegrass.StolonStage1NConc
            [AgPasture].SpeciesStolonStage2NConc[1] as Ryegrass.StolonStage2NConc
            [AgPasture].SpeciesStolonStage3NConc[1] as Ryegrass.StolonStage3NConc
            [AgPasture].SpeciesRemobilisableSenescedN[1] as Ryegrass.RemobilisableSenescedN
            [AgPasture].SpeciesSenescedNRemobilised[1] as Ryegrass.RemobilisedSenescedN
            [AgPasture].SpeciesRemobilisableLuxuryN[1] as Ryegrass.RemobilisableLuxuryN
            [AgPasture].SpeciesLuxuryNRemobilised[1] as Ryegrass.RemobilisedLuxuryN
            [AgPasture].SpeciesFixedN[1] as Ryegrass.FixedN
            [AgPasture].SpeciesRequiredNLuxury[1] as Ryegrass.RequiredLuxuryN
            [AgPasture].SpeciesRequiredNOptimum[1] as Ryegrass.RequiredOptimumN
            [AgPasture].SpeciesDemandN[1] as Ryegrass.DemandSoilN
            [AgPasture].SpeciesUptakeN[1] as Ryegrass.UptakeN
            [AgPasture].SpeciesLitterN[1] as Ryegrass.LitterN
            [AgPasture].SpeciesSenescedN[1] as Ryegrass.SenescedRootN
            [AgPasture].SpeciesGrowthN[1] as Ryegrass.ActualGrowthN
            [AgPasture].SpeciesGrowthNconc[1] as Ryegrass.ActualGrowthNConc
            [AgPasture].WaterDemand as Ryegrass.WaterDemand
            [AgPasture].WaterUptake as Ryegrass.WaterUptake
            [AgPasture].SpeciesLiveDMTurnoverRate[1] as Ryegrass.LiveDMTurnoverRate
            [AgPasture].SpeciesDeadDMTurnoverRate[1] as Ryegrass.DeadDMTurnoverRate
            [AgPasture].SpeciesStolonDMTurnoverRate[1] as Ryegrass.StolonDMTurnoverRate
            [AgPasture].SpeciesRootDMTurnoverRate[1] as Ryegrass.RootDMTurnoverRate
            [AgPasture].SpeciesTotalLAI[1] as Ryegrass.TotalLAI
            [AgPasture].SpeciesGreenLAI[1] as Ryegrass.GreenLAI
            [AgPasture].SpeciesDeadLAI[1] as Ryegrass.DeadLAI
            [AgPasture].SpeciesGLFT[1] as Ryegrass.GlfTemperature
            [AgPasture].SpeciesGLFW[1] as Ryegrass.GlfWater
            [AgPasture].SpeciesGLFN[1] as Ryegrass.GlfN
            [AgPasture].SpeciesIrradianceTopCanopy[1] as Ryegrass.IrradianceTopCanopy
            [AgPasture].SpeciesHarvestableWt[1] as Ryegrass.HarvestableWt
            [AgPasture].SpeciesHarvestWt[1] as Ryegrass.HarvestedWt
            [AgPasture].SpeciesHarvestFraction[1] as Ryegrass.HarvestedFraction
            [AgPasture].SpeciesHarvestN[1] as Ryegrass.HarvestedN
            [AgPasture].HerbageDigestibility as Ryegrass.HerbageDigestibility
        Report Results_Layers: EventNames=[Clock].EndOfDay
          VariableNames:
            [Clock].Today as Date
            [AgPasture].SwardName as Sward.Name
            [Soil].Thickness as Soil.Thickness
            [AgPasture].RootWtFraction as Ryegrass.RootWtFraction
            [AgPasture].Rlv as Ryegrass.RLD
            [AgPasture].NitrogenSupplyLayers as Ryegrass.NitrogenAvailable
            [AgPasture].NitrogenUptakeLayers as Ryegrass.NitrogenUptake
            [AgPasture].WaterSupplyLayers as Ryegrass.SoilAvailableWater
            [AgPasture].WaterUptakeLayers as Ryegrass.WaterUptake
        Report Results_MassBalance: EventNames=[Clock].EndOfDay
          VariableNames:
            [Clock].Today as Date
            [AgPasture].SwardName as Sward.Name
            [AgPasture].TotalPlantN as TotalPlantN
            sum([Soil].NO3N) as TotalNO3
            sum([Soil].NH4N) as TotalNH4
            sum([Soil].SoilNitrogen.HumicN) as TotalHumusN
            sum([Soil].SoilNitrogen.MicrobialN) as TotalBiomN
            sum([Soil].SoilNitrogen.FOMN) as TotalFomN
            [SurfaceOrganicMatter].N as SurfaceOMN
            Fertiliser.NitrogenApplied as FertiliserN
            [AgPasture].PlantFixedN as FixedN
            [AgPasture].HarvestN as HarvestedN
            sum([Soil].SoilNitrogen.Denitrification) as DenitrifiedN
            [Soil].SoilWater.LeachNO3 as LeachedN
            [AgPasture].NitrogenUptake as UptakeN
            [AgPasture].PlantRemobilisableSenescedN as SenescedNRemobilisable
            [AgPasture].PlantRemobilisedN as NitrogenRemobilisedSenescence
            [AgPasture].PlantLuxuryNRemobilised as NitrogenRemobilisedLuxury
            [AgPasture].PlantGrowthN as ActualGrowthN
            [AgPasture].LitterDepositionN as LitterDepositionN
            [AgPasture].RootSenescenceN as RootSenescenceN
    Simulation SwardProto: Area=0; Slope=0
      Clock: StartDate=2000-07-01; EndDate=2002-06-30
      Weather: FileName=%root%\Tests\WeatherFiles\Ruakura.met
      Manager SetCO2
        ambientCO2 = 380
        script: same as in OneSpecies.AgPproto.SetCO2
      Summary
      Zone Field: Area=0; Slope=0
        Folder Managers
          Manager CutRotation
            CutRotationStartDate = 0001-01-01
            CutInterval = 21
            PastureAmount = 1500
```csharp
using System;
using Models.Core;
using Models.PMF;
namespace Models
{
	[Serializable]
	public class Script : Model
	{
		[Link] Clock Clock;
		[Link] AgPasture.SwardProto Pasture;
		
		[Description("Date to begin rotation:")]
		public DateTime CutRotationStartDate { get; set; }
		[Description("Rotation interval (days):")]
		public int CutInterval { get; set; }
		[Description("Residual amount of pasture (kg/ha):")]
		public double PastureAmount { get; set; }
		
		private bool RotationAllowed = true;
		private int DaysAfterCut { get; set; }
		
		[EventSubscribe("Commencing")]
		private void OnSimulationCommencing(object sender, EventArgs e)
		{
			DaysAfterCut = 1000;
		}
		
		[EventSubscribe("DoManagement")]
		private void OnDoManagement(object sender, EventArgs e)
		{
			if (RotationAllowed)
			{
				if (Clock.Today.Date >= CutRotationStartDate.Date)
				{
					if (DaysAfterCut >= CutInterval)
					{
						Pasture.Harvest(type: "SetResidueAmount", amount: PastureAmount);
						DaysAfterCut = 0;
					}
					else
					{
						DaysAfterCut += 1;
					}
				}
			}
		}
	}
}
```
          Manager AutomaticFertiliser: same as OneSpecies.AgPproto.Field.Managers.AutomaticFertiliser
          Manager AutomaticIrrigation: same as OneSpecies.AgPproto.Field.Managers.AutomaticIrrigation
        MicroClimate: same as OneSpecies.AgPproto.Field.MicroClimate
        Irrigation
        Fertiliser
        SurfaceOrganicMatter: ReportAdditions=no; ReportRemovals=no; PoolName=Sward; type=grass; mass=1000; standing_fraction=0; cnr=40; CriticalResidueWeight=2000; OptimumDecompTemp=20; MaxCumulativeEOS=20; CNRatioDecompCoeff=0.277; CNRatioDecompThreshold=25; TotalLeachRain=25; MinRainToLeach=10; CriticalMinimumOrganicC=0.004; DefaultCPRatio=0; DefaultStandingFraction=0; StandingExtinctCoeff=0.5; FractionFaecesAdded=0.5
          Pools:
            {PoolName=Sward, ResidueType=grass, Mass=1000, CNRatio=40, StandingFraction=0}
          ResidueTypes: LoadFromResource=ResidueTypes
          TillageTypes TillageTypesList
        Soil LismoreSoil: same as OneSpecies.AgPproto.Field.LismoreSoil
        SwardProto Sward: AgPastureControlled=yes; WaterUptakeSource=sward; NUptakeSource=sward; UseAlternativeWaterUptake=no; UseAlternativeNUptake=no; ReferenceKSuptake=1000; ExpoLinearDepthParam=0.12; ExpoLinearCurveParam=3.2
          PastureSpeciesSwd Ryegrass: SpeciesFamily=grass; SpeciesPhotoPathway=C3; InitialDMShoot=2000; InitialDMRoot=500; InitialRootDepth=750; ReferencePhotosynthesisRate=1; MaintenanceRespirationCoefficient=0.03; GrowthRespirationCoefficient=0.25; LightExtentionCoeff=0.5; GrowthTmin=2; GrowthTmax=32; GrowthTopt=20; GrowthTq=1.75; HeatOnsetT=28; HeatFullT=35; HeatSumT=30; ReferenceT4Heat=25; ColdFullT=-3; ColdSumT=20; SpecificLeafArea=20; SpecificRootLength=75; MaxRootFraction=0.25; ShootSeasonalAllocationIncrease=0.8; DayInitHigherShootAllocation=232; HigherShootAllocationPeriods=[35, 60, 30]; FracToLeaf=0.7; TurnoverRateLive2Dead=0.025; TurnoverRateDead2Litter=0.11; TurnoverRateRootSenescence=0.02; TissueTurnoverTmin=2; TissueTurnoverTopt=20; TissueTurnoverWFactorMax=2; TissueTurnoverGLFWopt=0.5; DigestibilityLive=0.6; DigestibilityDead=0.2; MinimumGreenWt=300; PreferenceForGreenDM=1; PreferenceForDeadDM=1; LeafNopt=4; LeafNmax=5; LeafNmin=1.2; RelativeNStems=0.5; RelativeNRoots=0.5; RelativeNStage2=1; RelativeNStage3=1; DillutionCoefN=0.5; GlfGeneric=1; WaterStressExponent=1; WaterLoggingCoefficient=0.1; ReferenceCO2=380; CoefficientCO2EffectOnPhotosynthesis=700; OffsetCO2EffectOnNuptake=600; MinimumCO2EffectOnNuptake=0.7; ExponentCO2EffectOnNuptake=2; ExpoLinearDepthParam=0.12; ExpoLinearCurveParam=3.2; MaximumStomatalConductance=1; KNO3=1; KNH4=1
            zero: interceptedRadn, ColdOnsetT, ReferenceT4Cold, FracToStolon, MinimumDeadWt, RelativeNStolons, MinimumNFixation, MaximumNFixation, KappaNRemob2, KappaNRemob3, KappaNRemob4
        Report Results_Species: EventNames=[Clock].EndOfDay
          VariableNames:
            [Clock].Today as Date
            [Sward].Ryegrass.Name as Ryegrass.Name
            [Sward].Ryegrass.CropType as Ryegrass.CropType
            [Sward].Ryegrass.TotalWt as Ryegrass.TotalWt
            [Sward].Ryegrass.AboveGroundWt as Ryegrass.AboveGroundWt
            [Sward].Ryegrass.BelowGroundWt as Ryegrass.BelowGroundWt
            [Sward].Ryegrass.StandingWt as Ryegrass.StandingWt
            [Sward].Ryegrass.StandingLiveWt as Ryegrass.StandingLiveWt
            [Sward].Ryegrass.StandingDeadWt as Ryegrass.StandingDeadWt
            [Sward].Ryegrass.LeafWt as Ryegrass.LeafWt
            [Sward].Ryegrass.StemWt as Ryegrass.StemWt
            [Sward].Ryegrass.StolonWt as Ryegrass.StolonWt
            [Sward].Ryegrass.RootWt as Ryegrass.RootWt
            [Sward].Ryegrass.LeafStage1Wt as Ryegrass.LeafStage1Wt
            [Sward].Ryegrass.LeafStage2Wt as Ryegrass.LeafStage2Wt
            [Sward].Ryegrass.LeafStage3Wt as Ryegrass.LeafStage3Wt
            [Sward].Ryegrass.LeafStage4Wt as Ryegrass.LeafStage4Wt
            [Sward].Ryegrass.StemStage1Wt as Ryegrass.StemStage1Wt
            [Sward].Ryegrass.StemStage2Wt as Ryegrass.StemStage2Wt
            [Sward].Ryegrass.StemStage3Wt as Ryegrass.StemStage3Wt
            [Sward].Ryegrass.StemStage4Wt as Ryegrass.StemStage4Wt
            [Sward].Ryegrass.StolonStage1Wt as Ryegrass.StolonStage1Wt
            [Sward].Ryegrass.StolonStage2Wt as Ryegrass.StolonStage2Wt
            [Sward].Ryegrass.StolonStage3Wt as Ryegrass.StolonStage3Wt
            [Sward].Ryegrass.PotCarbonAssimilation as Ryegrass.PotCarbonAssimilation
            [Sward].Ryegrass.CarbonLossRespiration as Ryegrass.CarbonLossRespiration
            [Sward].Ryegrass.GrossPotentialGrowthWt as Ryegrass.GrossPotentialGrowthWt
            [Sward].Ryegrass.NetPotentialGrowthWt as Ryegrass.NetPotentialGrowthWt
            [Sward].Ryegrass.PotGrowthWt_Wstress as Ryegrass.PotGrowthWt_Wstress
            [Sward].Ryegrass.ActualGrowthWt as Ryegrass.ActualGrowthWt
            [Sward].Ryegrass.EffectiveGrowthWt as Ryegrass.EffectiveGrowthWt
            [Sward].Ryegrass.HerbageGrowthWt as Ryegrass.HerbageGrowthWt
            [Sward].Ryegrass.LitterWt as Ryegrass.LitterWt
            [Sward].Ryegrass.RootSenescedWt as Ryegrass.RootSenescedWt
            [Sward].Ryegrass.TotalN as Ryegrass.TotalN
            [Sward].Ryegrass.StandingN as Ryegrass.StandingN
            [Sward].Ryegrass.LeafN as Ryegrass.LeafN
            [Sward].Ryegrass.StemN as Ryegrass.StemN
            [Sward].Ryegrass.StolonN as Ryegrass.StolonN
            [Sward].Ryegrass.RootN as Ryegrass.RootN
            [Sward].Ryegrass.LeafStage1N as Ryegrass.LeafStage1N
            [Sward].Ryegrass.LeafStage2N as Ryegrass.LeafStage2N
            [Sward].Ryegrass.LeafStage3N as Ryegrass.LeafStage3N
            [Sward].Ryegrass.LeafStage4N as Ryegrass.LeafStage4N
            [Sward].Ryegrass.StemStage1N as Ryegrass.StemStage1N
            [Sward].Ryegrass.StemStage2N as Ryegrass.StemStage2N
            [Sward].Ryegrass.StemStage3N as Ryegrass.StemStage3N
            [Sward].Ryegrass.StemStage4N as Ryegrass.StemStage4N
            [Sward].Ryegrass.StolonStage1N as Ryegrass.StolonStage1N
            [Sward].Ryegrass.StolonStage2N as Ryegrass.StolonStage2N
            [Sward].Ryegrass.StolonStage3N as Ryegrass.StolonStage3N
            [Sward].Ryegrass.LeafNConc as Ryegrass.LeafNConc
            [Sward].Ryegrass.StemNConc as Ryegrass.StemNConc
            [Sward].Ryegrass.StolonNConc as Ryegrass.StolonNConc
            [Sward].Ryegrass.RootNConc as Ryegrass.RootNConc
            [Sward].Ryegrass.LeafStage1NConc as Ryegrass.LeafStage1NConc
            [Sward].Ryegrass.LeafStage2NConc as Ryegrass.LeafStage2NConc
            [Sward].Ryegrass.LeafStage3NConc as Ryegrass.LeafStage3NConc
            [Sward].Ryegrass.LeafStage4NConc as Ryegrass.LeafStage4NConc
            [Sward].Ryegrass.StemStage1NConc as Ryegrass.StemStage1NConc
            [Sward].Ryegrass.StemStage2NConc as Ryegrass.StemStage2NConc
            [Sward].Ryegrass.StemStage3NConc as Ryegrass.StemStage3NConc
            [Sward].Ryegrass.StemStage4NConc as Ryegrass.StemStage4NConc
            [Sward].Ryegrass.StolonStage1NConc as Ryegrass.StolonStage1NConc
            [Sward].Ryegrass.StolonStage2NConc as Ryegrass.StolonStage2NConc
            [Sward].Ryegrass.StolonStage3NConc as Ryegrass.StolonStage3NConc
            [Sward].Ryegrass.RemobilisableSenescedN as Ryegrass.RemobilisableSenescedN
            [Sward].Ryegrass.RemobilisedSenescedN as Ryegrass.RemobilisedSenescedN
            [Sward].Ryegrass.RemobilisableLuxuryN as Ryegrass.RemobilisableLuxuryN
            [Sward].Ryegrass.RemobilisedLuxuryN as Ryegrass.RemobilisedLuxuryN
            [Sward].Ryegrass.FixedN as Ryegrass.FixedN
            [Sward].Ryegrass.RequiredLuxuryN as Ryegrass.RequiredLuxuryN
            [Sward].Ryegrass.RequiredOptimumN as Ryegrass.RequiredOptimumN
            [Sward].Ryegrass.DemandSoilN as Ryegrass.DemandSoilN
            sum([Sward].Ryegrass.UptakeN) as Ryegrass.UptakeN
            [Sward].Ryegrass.LitterN as Ryegrass.LitterN
            [Sward].Ryegrass.SenescedRootN as Ryegrass.SenescedRootN
            [Sward].Ryegrass.ActualGrowthN as Ryegrass.ActualGrowthN
            [Sward].Ryegrass.ActualGrowthNConc as Ryegrass.ActualGrowthNConc
            [Sward].Ryegrass.WaterDemand as Ryegrass.WaterDemand
            sum([Sward].Ryegrass.WaterUptake) as Ryegrass.WaterUptake
            [Sward].Ryegrass.LiveDMTurnoverRate as Ryegrass.LiveDMTurnoverRate
            [Sward].Ryegrass.DeadDMTurnoverRate as Ryegrass.DeadDMTurnoverRate
            [Sward].Ryegrass.StolonDMTurnoverRate as Ryegrass.StolonDMTurnoverRate
            [Sward].Ryegrass.RootDMTurnoverRate as Ryegrass.RootDMTurnoverRate
            [Sward].Ryegrass.TotalLAI as Ryegrass.TotalLAI
            [Sward].Ryegrass.GreenLAI as Ryegrass.GreenLAI
            [Sward].Ryegrass.DeadLAI as Ryegrass.DeadLAI
            [Sward].Ryegrass.GlfTemperature as Ryegrass.GlfTemperature
            [Sward].Ryegrass.GlfWater as Ryegrass.GlfWater
            [Sward].Ryegrass.GlfN as Ryegrass.GlfN
            [[Sward]].Ryegrass.IrradianceTopCanopy as Ryegrass.IrradianceTopCanopy
            [Sward].Ryegrass.HarvestableWt as Ryegrass.HarvestableWt
            [Sward].Ryegrass.HarvestedWt as Ryegrass.HarvestedWt
            [Sward].Ryegrass.HarvestedFraction as Ryegrass.HarvestedFraction
            [Sward].Ryegrass.HarvestedN as Ryegrass.HarvestedN
            [Sward].Ryegrass.HerbageDigestibility as Ryegrass.HerbageDigestibility
        Report Results_Layers: EventNames=[Clock].EndOfDay
          VariableNames:
            [Clock].Today as Date
            [Sward].Name as Sward.Name
            [Soil].Thickness as Soil.Thickness
            [Sward].RootWtFraction as Ryegrass.RootWtFraction
            [Sward].RLD as Ryegrass.RLD
            [Sward].NitrogenAvailable as Ryegrass.NitrogenAvailable
            [Sward].NitrogenUptake as Ryegrass.NitrogenUptake
            [Sward].SoilAvailableWater as Ryegrass.SoilAvailableWater
            [Sward].WaterUptake as Ryegrass.WaterUptake
        Report Results_MassBalance: EventNames=[Clock].EndOfDay
          VariableNames:
            [Clock].Today as Date
            [Sward].Name as Sward.Name
            [Sward].TotalN as TotalPlantN
            sum([Soil].NO3N) as TotalNO3
            sum([Soil].NH4N) as TotalNH4
            sum([Soil].SoilNitrogen.HumicN) as TotalHumusN
            sum([Soil].SoilNitrogen.MicrobialN) as TotalBiomN
            sum([Soil].SoilNitrogen.FOMN) as TotalFomN
            [SurfaceOrganicMatter].N as SurfaceOMN
            Fertiliser.NitrogenApplied as FertiliserN
            [Sward].NitrogenFixed as FixedN
            [Sward].HarvestedN as HarvestedN
            sum([Soil].SoilNitrogen.Denitrification) as DenitrifiedN
            [Soil].SoilWater.LeachNO3 as LeachedN
            sum([Sward].NitrogenUptake) as NitrogenUptake as UptakeN
            [Sward].SenescedNRemobilisable as SenescedNRemobilisable
            [Sward].NitrogenRemobilisedSenescence as NitrogenRemobilisedSenescence
            [Sward].NitrogenRemobilisedLuxury as NitrogenRemobilisedLuxury
            [Sward].ActualGrowthN as ActualGrowthN
            [Sward].LitterDepositionN as LitterDepositionN
            [Sward].RootSenescenceN as RootSenescenceN
    Simulation Ryegrass: Area=0; Slope=0
      Clock: StartDate=2000-07-01; EndDate=2002-06-30
      Weather: FileName=%root%\Tests\WeatherFiles\Ruakura.met
      Manager SetCO2: same as OneSpecies.AgPproto.SetCO2
      Summary
      Zone Field: Area=0; Slope=0
        Folder Managers
          Manager CutRotation
            CutRotationStartDate = 0001-01-01
            CutInterval = 21
            PastureAmount = 1500
```csharp
using System;
using Models.Core;
using Models.PMF;
namespace Models
{
	[Serializable]
	public class Script : Model
	{
		[Link] Clock Clock;
		[Link] AgPasture.PastureSpecies Pasture;
		
		[Description("Date to begin rotation:")]
		public DateTime CutRotationStartDate { get; set; }
		[Description("Rotation interval (days):")]
		public int CutInterval { get; set; }
		[Description("Residual amount of pasture (kg/ha):")]
		public double PastureAmount { get; set; }
		
		private bool RotationAllowed = true;
		private int DaysAfterCut { get; set; }
		
		[EventSubscribe("Commencing")]
		private void OnSimulationCommencing(object sender, EventArgs e)
		{
			DaysAfterCut = 1000;
		}
		
		[EventSubscribe("DoManagement")]
		private void OnDoManagement(object sender, EventArgs e)
		{
			if (RotationAllowed)
			{
				if (Clock.Today.Date >= CutRotationStartDate.Date)
				{
					if (DaysAfterCut >= CutInterval)
					{
						Pasture.Harvest(type: "SetResidueAmount", amount: PastureAmount);
						DaysAfterCut = 0;
					}
					else
					{
						DaysAfterCut += 1;
					}
				}
			}
		}
	}
}
```
          Manager AutomaticFertiliser: same as OneSpecies.AgPproto.Field.Managers.AutomaticFertiliser
          Manager AutomaticIrrigation: same as OneSpecies.AgPproto.Field.Managers.AutomaticIrrigation
        MicroClimate: same as OneSpecies.AgPproto.Field.MicroClimate
        Irrigation
        Fertiliser
        SurfaceOrganicMatter: same as OneSpecies.SwardProto.Field.SurfaceOrganicMatter
        Soil LismoreSoil: same as OneSpecies.AgPproto.Field.LismoreSoil
        PastureSpecies Ryegrass: Albedo=0.26; Gsmax=0.011; R50=200; SpeciesFamily=grass; SpeciesPhotoPathway=C3; InitialDMShoot=2000; InitialDMRoot=500; InitialRootDepth=750; ReferencePhotosynthesisRate=1; MaintenanceRespirationCoefficient=0.03; GrowthRespirationCoefficient=0.25; LightExtentionCoeff=0.5; GrowthTmin=2; GrowthTmax=32; GrowthTopt=20; GrowthTq=1.75; HeatOnsetT=28; HeatFullT=35; HeatSumT=30; ReferenceT4Heat=25; ColdFullT=-3; ColdSumT=20; SpecificLeafArea=20; SpecificRootLength=75; MaxRootFraction=0.25; ShootSeasonalAllocationIncrease=0.8; DayInitHigherShootAllocation=232; HigherShootAllocationPeriods=[35, 60, 30]; FracToLeaf=0.7; TurnoverRateLive2Dead=0.025; TurnoverRateDead2Litter=0.11; TurnoverRateRootSenescence=0.02; TissueTurnoverTmin=2; TissueTurnoverTopt=20; TissueTurnoverWFactorMax=2; TissueTurnoverGLFWopt=0.5; DigestibilityLive=0.6; DigestibilityDead=0.2; MinimumGreenWt=300; PreferenceForGreenDM=1; PreferenceForDeadDM=1; LeafNopt=4; LeafNmax=5; LeafNmin=1.2; RelativeNStems=0.5; RelativeNRoots=0.5; RelativeNStage2=1; RelativeNStage3=1; DillutionCoefN=0.5; GlfGeneric=1; WaterStressExponent=1; WaterLoggingCoefficient=0.1; ReferenceCO2=380; CoefficientCO2EffectOnPhotosynthesis=700; OffsetCO2EffectOnNuptake=600; MinimumCO2EffectOnNuptake=0.7; ExponentCO2EffectOnNuptake=2; ExpoLinearDepthParam=0.12; ExpoLinearCurveParam=3.2; MaximumStomatalConductance=1; KNO3=1; KNH4=1
          zero: interceptedRadn, ColdOnsetT, ReferenceT4Cold, FracToStolon, MinimumDeadWt, RelativeNStolons, MinimumNFixation, MaximumNFixation, KappaNRemob2, KappaNRemob3, KappaNRemob4
        Report Results_Species: EventNames=[Clock].EndOfDay
          VariableNames:
            [Clock].Today as Date
            [Ryegrass].Name as Ryegrass.Name
            [Ryegrass].CropType as Ryegrass.CropType
            [Ryegrass].TotalWt as Ryegrass.TotalWt
            [Ryegrass].AboveGroundWt as Ryegrass.AboveGroundWt
            [Ryegrass].BelowGroundWt as Ryegrass.BelowGroundWt
            [Ryegrass].StandingWt as Ryegrass.StandingWt
            [Ryegrass].StandingLiveWt as Ryegrass.StandingLiveWt
            [Ryegrass].StandingDeadWt as Ryegrass.StandingDeadWt
            [Ryegrass].LeafWt as Ryegrass.LeafWt
            [Ryegrass].StemWt as Ryegrass.StemWt
            [Ryegrass].StolonWt as Ryegrass.StolonWt
            [Ryegrass].RootWt as Ryegrass.RootWt
            [Ryegrass].LeafStage1Wt as Ryegrass.LeafStage1Wt
            [Ryegrass].LeafStage2Wt as Ryegrass.LeafStage2Wt
            [Ryegrass].LeafStage3Wt as Ryegrass.LeafStage3Wt
            [Ryegrass].LeafStage4Wt as Ryegrass.LeafStage4Wt
            [Ryegrass].StemStage1Wt as Ryegrass.StemStage1Wt
            [Ryegrass].StemStage2Wt as Ryegrass.StemStage2Wt
            [Ryegrass].StemStage3Wt as Ryegrass.StemStage3Wt
            [Ryegrass].StemStage4Wt as Ryegrass.StemStage4Wt
            [Ryegrass].StolonStage1Wt as Ryegrass.StolonStage1Wt
            [Ryegrass].StolonStage2Wt as Ryegrass.StolonStage2Wt
            [Ryegrass].StolonStage3Wt as Ryegrass.StolonStage3Wt
            [Ryegrass].PotCarbonAssimilation as Ryegrass.PotCarbonAssimilation
            [Ryegrass].CarbonLossRespiration as Ryegrass.CarbonLossRespiration
            [Ryegrass].GrossPotentialGrowthWt as Ryegrass.GrossPotentialGrowthWt
            [Ryegrass].NetPotentialGrowthWt as Ryegrass.NetPotentialGrowthWt
            [Ryegrass].PotGrowthWt_Wstress as Ryegrass.PotGrowthWt_Wstress
            [Ryegrass].ActualGrowthWt as Ryegrass.ActualGrowthWt
            [Ryegrass].EffectiveGrowthWt as Ryegrass.EffectiveGrowthWt
            [Ryegrass].HerbageGrowthWt as Ryegrass.HerbageGrowthWt
            [Ryegrass].LitterWt as Ryegrass.LitterWt
            [Ryegrass].RootSenescedWt as Ryegrass.RootSenescedWt
            [Ryegrass].TotalN as Ryegrass.TotalN
            [Ryegrass].StandingN as Ryegrass.StandingN
            [Ryegrass].LeafN as Ryegrass.LeafN
            [Ryegrass].StemN as Ryegrass.StemN
            [Ryegrass].StolonN as Ryegrass.StolonN
            [Ryegrass].RootN as Ryegrass.RootN
            [Ryegrass].LeafStage1N as Ryegrass.LeafStage1N
            [Ryegrass].LeafStage2N as Ryegrass.LeafStage2N
            [Ryegrass].LeafStage3N as Ryegrass.LeafStage3N
            [Ryegrass].LeafStage4N as Ryegrass.LeafStage4N
            [Ryegrass].StemStage1N as Ryegrass.StemStage1N
            [Ryegrass].StemStage2N as Ryegrass.StemStage2N
            [Ryegrass].StemStage3N as Ryegrass.StemStage3N
            [Ryegrass].StemStage4N as Ryegrass.StemStage4N
            [Ryegrass].StolonStage1N as Ryegrass.StolonStage1N
            [Ryegrass].StolonStage2N as Ryegrass.StolonStage2N
            [Ryegrass].StolonStage3N as Ryegrass.StolonStage3N
            [Ryegrass].LeafNConc as Ryegrass.LeafNConc
            [Ryegrass].StemNConc as Ryegrass.StemNConc
            [Ryegrass].StolonNConc as Ryegrass.StolonNConc
            [Ryegrass].RootNConc as Ryegrass.RootNConc
            [Ryegrass].LeafStage1NConc as Ryegrass.LeafStage1NConc
            [Ryegrass].LeafStage2NConc as Ryegrass.LeafStage2NConc
            [Ryegrass].LeafStage3NConc as Ryegrass.LeafStage3NConc
            [Ryegrass].LeafStage4NConc as Ryegrass.LeafStage4NConc
            [Ryegrass].StemStage1NConc as Ryegrass.StemStage1NConc
            [Ryegrass].StemStage2NConc as Ryegrass.StemStage2NConc
            [Ryegrass].StemStage3NConc as Ryegrass.StemStage3NConc
            [Ryegrass].StemStage4NConc as Ryegrass.StemStage4NConc
            [Ryegrass].StolonStage1NConc as Ryegrass.StolonStage1NConc
            [Ryegrass].StolonStage2NConc as Ryegrass.StolonStage2NConc
            [Ryegrass].StolonStage3NConc as Ryegrass.StolonStage3NConc
            [Ryegrass].RemobilisableSenescedN as Ryegrass.RemobilisableSenescedN
            [Ryegrass].RemobilisedSenescedN as Ryegrass.RemobilisedSenescedN
            [Ryegrass].RemobilisableLuxuryN as Ryegrass.RemobilisableLuxuryN
            [Ryegrass].RemobilisedLuxuryN as Ryegrass.RemobilisedLuxuryN
            [Ryegrass].FixedN as Ryegrass.FixedN
            [Ryegrass].RequiredLuxuryN as Ryegrass.RequiredLuxuryN
            [Ryegrass].RequiredOptimumN as Ryegrass.RequiredOptimumN
            [Ryegrass].DemandSoilN as Ryegrass.DemandSoilN
            sum([Ryegrass].UptakeN) as Ryegrass.UptakeN
            [Ryegrass].LitterN as Ryegrass.LitterN
            [Ryegrass].SenescedRootN as Ryegrass.SenescedRootN
            [Ryegrass].ActualGrowthN as Ryegrass.ActualGrowthN
            [Ryegrass].ActualGrowthNConc as Ryegrass.ActualGrowthNConc
            [Ryegrass].WaterDemand as Ryegrass.WaterDemand
            sum([Ryegrass].WaterUptake) as Ryegrass.WaterUptake
            [Ryegrass].LiveDMTurnoverRate as Ryegrass.LiveDMTurnoverRate
            [Ryegrass].DeadDMTurnoverRate as Ryegrass.DeadDMTurnoverRate
            [Ryegrass].StolonDMTurnoverRate as Ryegrass.StolonDMTurnoverRate
            [Ryegrass].RootDMTurnoverRate as Ryegrass.RootDMTurnoverRate
            [Ryegrass].TotalLAI as Ryegrass.TotalLAI
            [Ryegrass].GreenLAI as Ryegrass.GreenLAI
            [Ryegrass].DeadLAI as Ryegrass.DeadLAI
            [Ryegrass].GlfTemperature as Ryegrass.GlfTemperature
            [Ryegrass].GlfWater as Ryegrass.GlfWater
            [Ryegrass].GlfN as Ryegrass.GlfN
            [Ryegrass].IrradianceTopCanopy as Ryegrass.IrradianceTopCanopy
            [Ryegrass].HarvestableWt as Ryegrass.HarvestableWt
            [Ryegrass].HarvestedWt as Ryegrass.HarvestedWt
            [Ryegrass].HarvestedFraction as Ryegrass.HarvestedFraction
            [Ryegrass].HarvestedN as Ryegrass.HarvestedN
            [Ryegrass].HerbageDigestibility as Ryegrass.HerbageDigestibility
        Report Results_Layers: EventNames=[Clock].EndOfDay
          VariableNames:
            [Clock].Today as Date
            [Ryegrass].Name as Sward.Name
            [Soil].Thickness as Soil.Thickness
            [Ryegrass].RootWtFraction as Ryegrass.RootWtFraction
            [Ryegrass].RLD as Ryegrass.RLD
            [Ryegrass].NitrogenAvailable as Ryegrass.NitrogenAvailable
            [Ryegrass].NitrogenUptake as Ryegrass.NitrogenUptake
            [Ryegrass].SoilAvailableWater as Ryegrass.SoilAvailableWater
            [Ryegrass].WaterUptake as Ryegrass.WaterUptake
        Report Results_MassBalance: EventNames=[Clock].EndOfDay
          VariableNames:
            [Clock].Today as Date
            [Ryegrass].Name as Sward.Name
            [Ryegrass].TotalN as TotalPlantN
            sum([Soil].NO3N) as TotalNO3
            sum([Soil].NH4N) as TotalNH4
            sum([Soil].SoilNitrogen.HumicN) as TotalHumusN
            sum([Soil].SoilNitrogen.MicrobialN) as TotalBiomN
            sum([Soil].SoilNitrogen.FOMN) as TotalFomN
            [SurfaceOrganicMatter].N as SurfaceOMN
            Fertiliser.NitrogenApplied as FertiliserN
            [Ryegrass].FixedN as NitrogeFixed as FixedN
            [Ryegrass].HarvestedN as HarvestedN
            sum([Soil].SoilNitrogen.Denitrification) as DenitrifiedN
            [Soil].SoilWater.LeachNO3 as LeachedN
            sum([Ryegrass].UptakeN) as UptakeN
            [Ryegrass].SenescedNRemobilisable as SenescedNRemobilisable
            [Ryegrass].SenescedNRemobilised as NitrogenRemobilisedSenescence
            [Ryegrass].RemobilisedLuxuryN as NitrogenRemobilisedLuxury
            [Ryegrass].ActualGrowthN as ActualGrowthN
            [Ryegrass].LitterN as LitterDepositionN
            [Ryegrass].SenescedRootN as RootSenescenceN
    Simulation Sward: Area=0; Slope=0
      Clock: StartDate=2000-07-01; EndDate=2002-06-30
      Weather: FileName=%root%\Tests\WeatherFiles\Ruakura.met
      Manager SetCO2: same as OneSpecies.SwardProto.SetCO2
      Summary
      Zone Field: Area=0; Slope=0
        Folder Managers
          Manager CutRotation
            CutRotationStartDate = 0001-01-01
            CutInterval = 21
            PastureAmount = 1500
```csharp
using System;
using Models.Core;
using Models.PMF;
namespace Models
{
	[Serializable]
	public class Script : Model
	{
		[Link] Clock Clock;
		[Link] AgPasture.Sward Pasture;
		
		[Description("Date to begin rotation:")]
		public DateTime CutRotationStartDate { get; set; }
		[Description("Rotation interval (days):")]
		public int CutInterval { get; set; }
		[Description("Residual amount of pasture (kg/ha):")]
		public double PastureAmount { get; set; }
		
		private bool RotationAllowed = true;
		private int DaysAfterCut { get; set; }
		
		[EventSubscribe("Commencing")]
		private void OnSimulationCommencing(object sender, EventArgs e)
		{
			DaysAfterCut = 1000;
		}
		
		[EventSubscribe("DoManagement")]
		private void OnDoManagement(object sender, EventArgs e)
		{
			if (RotationAllowed)
			{
				if (Clock.Today.Date >= CutRotationStartDate.Date)
				{
					if (DaysAfterCut >= CutInterval)
					{
						Pasture.Harvest(type: "SetResidueAmount", amount: PastureAmount);
						DaysAfterCut = 0;
					}
					else
					{
						DaysAfterCut += 1;
					}
				}
			}
		}
	}
}
```
          Manager AutomaticFertiliser: same as OneSpecies.AgPproto.Field.Managers.AutomaticFertiliser
          Manager AutomaticIrrigation: same as OneSpecies.AgPproto.Field.Managers.AutomaticIrrigation
        MicroClimate: same as OneSpecies.AgPproto.Field.MicroClimate
        Irrigation
        Fertiliser
        SurfaceOrganicMatter: same as OneSpecies.SwardProto.Field.SurfaceOrganicMatter
        Soil LismoreSoil: same as OneSpecies.AgPproto.Field.LismoreSoil
        Sward: AgPastureControlled=yes; WaterUptakeSource=sward; NUptakeSource=sward; UseAlternativeWaterUptake=no; UseAlternativeNUptake=no; ReferenceKSuptake=1000; ExpoLinearDepthParam=0.12; ExpoLinearCurveParam=3.2
          PastureSpecies Ryegrass: SpeciesFamily=grass; SpeciesPhotoPathway=C3; InitialDMShoot=2000; InitialDMRoot=500; InitialRootDepth=750; ReferencePhotosynthesisRate=1; MaintenanceRespirationCoefficient=0.03; GrowthRespirationCoefficient=0.25; LightExtentionCoeff=0.5; GrowthTmin=2; GrowthTmax=32; GrowthTopt=20; GrowthTq=1.75; HeatOnsetT=28; HeatFullT=35; HeatSumT=30; ReferenceT4Heat=25; ColdFullT=-3; ColdSumT=20; SpecificLeafArea=20; SpecificRootLength=75; MaxRootFraction=0.25; ShootSeasonalAllocationIncrease=0.8; DayInitHigherShootAllocation=232; HigherShootAllocationPeriods=[35, 60, 30]; FracToLeaf=0.7; TurnoverRateLive2Dead=0.025; TurnoverRateDead2Litter=0.11; TurnoverRateRootSenescence=0.02; TissueTurnoverTmin=2; TissueTurnoverTopt=20; TissueTurnoverWFactorMax=2; TissueTurnoverGLFWopt=0.5; DigestibilityLive=0.6; DigestibilityDead=0.2; MinimumGreenWt=300; PreferenceForGreenDM=1; PreferenceForDeadDM=1; LeafNopt=4; LeafNmax=5; LeafNmin=1.2; RelativeNStems=0.5; RelativeNRoots=0.5; RelativeNStage2=1; RelativeNStage3=1; DillutionCoefN=0.5; GlfGeneric=1; WaterStressExponent=1; WaterLoggingCoefficient=0.1; ReferenceCO2=380; CoefficientCO2EffectOnPhotosynthesis=700; OffsetCO2EffectOnNuptake=600; MinimumCO2EffectOnNuptake=0.7; ExponentCO2EffectOnNuptake=2; ExpoLinearDepthParam=0.12; ExpoLinearCurveParam=3.2; MaximumStomatalConductance=1; KNO3=1; KNH4=1
            zero: interceptedRadn, ColdOnsetT, ReferenceT4Cold, FracToStolon, MinimumDeadWt, RelativeNStolons, MinimumNFixation, MaximumNFixation, KappaNRemob2, KappaNRemob3, KappaNRemob4
        Report Results_Species: same as OneSpecies.SwardProto.Field.Results_Species
        Report Results_Layers: same as OneSpecies.SwardProto.Field.Results_Layers
        Report Results_MassBalance: same as OneSpecies.SwardProto.Field.Results_MassBalance
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