Simulations: Version=1
  DataStore
    ExcelInput Observed: FileName=Observed.xlsx; SheetNames=[ObservedWarraBlock1]
  Folder Validation
    Simulation WarraBlock1: Area=0; Slope=0
      Clock: StartDate=2004-03-22; EndDate=2005-10-04
      Summary SummaryFile
      Weather: FileName=Validation\warra.met
      SoilArbitrator Soil Arbitrator
      ForestrySystem WindbreakSystem: Area=0.55; Slope=0
        TreeProxy: RootRadius=0.02; Kd=1E-07; BaseKL=0.02; heights=[10000, 10000, 10000, 10000, 10000]; NDemands=[0.1, 0.1, 0.1, 0.1, 0.1]
          Table=[[Parameter, 0, 0.5h, 1h, 1.5h, 2h, 2.5h, 3h, 4h, 5h, 6h], [Shade (%), Root Length Density (cm/cm3), Depth (cm), 0-15, 15-30, 30-60, 60-90, 90-120, 120-150], [100, , , 6, 5, 4, 2, 1.5, 1], [0, , , 6, 5, 4, 2, 1.5, 1], [0, , , 5, 4, 3.5, 2, 1.5, 1], [0, , , 4, 3, 3, 1.5, 1, 1], [0, , , 3, 2, 2, 1, 0, 0], [0, , , 2, 1, 1, 0, 0, 0], [0, , , 1, .5, .2, 0, 0, 0], [0, , , 0, 0, 0, 0, 0, 0], [0, , , 0, 0, 0, 0, 0, 0], [0, , , 0, 0, 0, 0, 0, 0]]
          dates=[1900-01-01, 1900-03-01, 1900-06-01, 1900-09-01, 1900-12-31]
        RectangularZone TreeRow: Area=0.05; Slope=0; Length=100; Width=5
          LocalMicroClimate
          MicroClimate: air_pressure=1010; soil_emissivity=0.96; sun_angle=15; soil_heat_flux_fraction=0.4; night_interception_fraction=0.5; windspeed_default=3; refheight=2; albedo=0.15; emissivity=0.96; gsmax=0.01; r50=200; a_interception=0; b_interception=0; c_interception=0; d_interception=0; soil_albedo=0.23
          Report: ResultsPerPage=0
            VariableNames:
              [Clock].Today
              [Zone].Area
              Distance
              Radn
              [LocalMicroClimate].Radn
              [TreeProxy].Shade
          Report DailyReport: EventNames=[Clock].DoReport; ResultsPerPage=0
            VariableNames:
              [Clock].Today
              Distance
              LocalMicroClimate.Wind
              sum([Soil].NO3N) as TotalNO3N
              sum([Soil].NH4N) as TotalNH4N
              sum([TreeProxy].WaterUptake) as WaterUptake
              sum([Soil].SoilWater.SWmm[1:4]) as SW90cm
              [TreeProxy].Urel
              [TreeProxy].H
              [TreeProxy].SWDemand
              [TreeProxy].heightToday
              [MicroClimate].peta
              [MicroClimate].petr
              [Soil].SoilWater.Eo
              [TreeProxy].WaterStress
          Fertiliser
          SurfaceOrganicMatter: PoolName=wheat_stubble; type=wheat; mass=500; standing_fraction=0; cnr=100; CriticalResidueWeight=2000; OptimumDecompTemp=20; MaxCumulativeEOS=20; CNRatioDecompCoeff=0.277; CNRatioDecompThreshold=25; TotalLeachRain=25; MinRainToLeach=10; CriticalMinimumOrganicC=0.004; DefaultCPRatio=0; DefaultStandingFraction=0; StandingExtinctCoeff=0.5; FractionFaecesAdded=0.5
            Pools:
              {PoolName=wheat_stubble, ResidueType=wheat, Mass=500, CNRatio=100, StandingFraction=0}
            ResidueTypes: LoadFromResource=ResidueTypes
          Soil: ASCOrder=Vertosol; ASCSubOrder=Grey; SoilType=Clay; Site=Warra; NearestTown=Warra, Q, 4411; Region=Darling Downs and Granite Belt; State=Queensland; Country=Australia; NaturalVegetation=Brigalow scrub; ApsoilNumber=19; Latitude=-26.897; Longitude=150.909; LocationAccuracy=+/- 20m; DataSource=0; Comments=CSIRO Sustainable Ecosystems, Toowoomba
            Water
              Thickness  BD    AirDry  LL15  DUL   SAT   KS
              150        1.39  0.105   0.22  0.4   0.45  20
              150        1.35  0.168   0.21  0.41  0.46  20
              300        1.35  0.22    0.22  0.41  0.46  20
              300        1.43  0.22    0.24  0.38  0.43  20
              300        1.44  0.22    0.26  0.38  0.43  20
              300        1.45  0.22    0.34  0.37  0.42  20
            SoilWater: residueinterception=0; SummerDate=1-Nov; SummerU=6; SummerCona=3.5; WinterDate=1-Apr; WinterU=4; WinterCona=2.5; DiffusConst=40; DiffusSlope=16; Salb=0.12; CN2Bare=73; CNRed=20; CNCov=0.8; max_pond=0; Thickness=[150, 150, 300, 300, 300, 300]; SWCON=[0.3, 0.3, 0.3, 0.3, 0.3, 0.3]
            SoilNitrogen: fom_type=[default, manure, mucuna, lablab, shemp, stable]; fract_carb=[0.2, 0.3, 0.54, 0.57, 0.45, 0]; fract_cell=[0.7, 0.3, 0.37, 0.37, 0.47, 0.1]; fract_lign=[0.1, 0.4, 0.09, 0.06, 0.08, 0.9]; wfpsN2N2O_x=[22, 88]; wfpsN2N2O_y=[0.1, 1]
            SoilOrganicMatter: RootCN=40; RootWt=1000; SoilCN=12; EnrACoeff=7.4; EnrBCoeff=0.2; OCUnits=Total
              Thickness  OC     FBiom  FInert
              150        0.915  0.04   0.4
              150        0.777  0.02   0.6
              300        0.346  0.02   0.8
              300        0.231  0.02   1
              300        0.154  0.01   1
              300        0.123  0.01   1
            Analysis: Thickness=[150, 150, 300, 300, 300, 300]; PH=[8, 8, 8, 8, 8, 8]; PHUnits=Water; BoronUnits=HotWater
            InitialWater: PercentMethod=FilledFromTop; FractionFull=0.248756
            Sample InitialN: NO3Units=ppm; NH4Units=ppm; SWUnits=Volumetric; OCUnits=Total; PHUnits=Water
              Thickness  NO3  NH4
              150        1    0.1
              150        1    0.1
              300        1    0.1
              300        1    0.1
              300        1    0.1
              300        1    0.1
            Fertiliser
        RectangularZone 5m: Area=0.05; Slope=0; Length=100; Width=5
          LocalMicroClimate
          MicroClimate: same as Validation.WarraBlock1.WindbreakSystem.TreeRow.MicroClimate
          Report: ResultsPerPage=0
            VariableNames:
              [Clock].Today
              [Zone].Area
              Distance
              Radn
              [LocalMicroClimate].Radn
              [TreeProxy].Shade
          Report DailyReport: EventNames=[Clock].DoReport; ResultsPerPage=0
            VariableNames:
              [Clock].Today
              Distance
              LocalMicroClimate.Wind
              sum([Soil].SoilWater.SWmm[1:4]) as SW90cm
              sum([Soil].NO3N) as TotalNO3N
              sum([Soil].NH4N) as TotalNH4N
              [MicroClimate].peta
              [MicroClimate].petr
          Fertiliser
          SurfaceOrganicMatter: same as Validation.WarraBlock1.WindbreakSystem.TreeRow.SurfaceOrganicMatter
          Soil: ASCOrder=Vertosol; ASCSubOrder=Grey; SoilType=Clay; Site=Warra; NearestTown=Warra, Q, 4411; Region=Darling Downs and Granite Belt; State=Queensland; Country=Australia; NaturalVegetation=Brigalow scrub; ApsoilNumber=19; Latitude=-26.897; Longitude=150.909; LocationAccuracy=+/- 20m; DataSource=0; Comments=CSIRO Sustainable Ecosystems, Toowoomba
            Water
              Thickness  BD    AirDry  LL15  DUL   SAT
              150        1.39  0.105   0.22  0.4   0.45
              150        1.35  0.168   0.21  0.41  0.46
              300        1.35  0.22    0.22  0.41  0.46
              300        1.43  0.22    0.24  0.38  0.43
              300        1.44  0.22    0.26  0.38  0.43
              300        1.45  0.22    0.34  0.37  0.42
            SoilWater: same as Validation.WarraBlock1.WindbreakSystem.TreeRow.Soil.SoilWater
            SoilNitrogen: fom_type=[default, manure, mucuna, lablab, shemp, stable]; fract_carb=[0.2, 0.3, 0.54, 0.57, 0.45, 0]; fract_cell=[0.7, 0.3, 0.37, 0.37, 0.47, 0.1]; fract_lign=[0.1, 0.4, 0.09, 0.06, 0.08, 0.9]; wfpsN2N2O_x=[22, 88]; wfpsN2N2O_y=[0.1, 1]
            SoilOrganicMatter: same as Validation.WarraBlock1.WindbreakSystem.TreeRow.Soil.SoilOrganicMatter
            Analysis: Thickness=[150, 150, 300, 300, 300, 300]; PH=[8, 8, 8, 8, 8, 8]; PHUnits=Water; BoronUnits=HotWater
            InitialWater: PercentMethod=FilledFromTop; FractionFull=0.323383
            Sample: NO3Units=ppm; NH4Units=ppm; SWUnits=Volumetric; OCUnits=Total; PHUnits=Water
              Thickness  NO3  NH4
              150        1    0.1
              150        1    0.1
              300        1    0.1
              300        1    0.1
              300        1    0.1
              300        1    0.1
        RectangularZone 10m: Area=0.05; Slope=0; Length=100; Width=5
          LocalMicroClimate
          MicroClimate: same as Validation.WarraBlock1.WindbreakSystem.TreeRow.MicroClimate
          Report: ResultsPerPage=0
            VariableNames:
              [Clock].Today
              Distance
              [Zone].Area
              Distance
              Radn
              [LocalMicroClimate].Radn
              [TreeProxy].Shade
          Report DailyReport: EventNames=[Clock].DoReport; ResultsPerPage=0
            VariableNames:
              [Clock].Today
              Distance
              LocalMicroClimate.Wind
              sum([Soil].SoilWater.SWmm[1:4]) as SW90cm
              sum([Soil].NO3N) as TotalNO3N
              sum([Soil].NH4N) as TotalNH4N
              [MicroClimate].peta
              [MicroClimate].petr
          Fertiliser
          SurfaceOrganicMatter: same as Validation.WarraBlock1.WindbreakSystem.TreeRow.SurfaceOrganicMatter
          Soil: ASCOrder=Vertosol; ASCSubOrder=Grey; SoilType=Clay; Site=Warra; NearestTown=Warra, Q, 4411; Region=Darling Downs and Granite Belt; State=Queensland; Country=Australia; NaturalVegetation=Brigalow scrub; ApsoilNumber=19; Latitude=-26.897; Longitude=150.909; LocationAccuracy=+/- 20m; DataSource=0; Comments=CSIRO Sustainable Ecosystems, Toowoomba
            Water
              Thickness  BD    AirDry  LL15  DUL   SAT
              150        1.39  0.105   0.22  0.4   0.45
              150        1.35  0.168   0.21  0.41  0.46
              300        1.35  0.22    0.22  0.41  0.46
              300        1.43  0.22    0.24  0.38  0.43
              300        1.44  0.22    0.26  0.38  0.43
              300        1.45  0.22    0.34  0.37  0.42
            SoilWater: same as Validation.WarraBlock1.WindbreakSystem.TreeRow.Soil.SoilWater
            SoilNitrogen: fom_type=[default, manure, mucuna, lablab, shemp, stable]; fract_carb=[0.2, 0.3, 0.54, 0.57, 0.45, 0]; fract_cell=[0.7, 0.3, 0.37, 0.37, 0.47, 0.1]; fract_lign=[0.1, 0.4, 0.09, 0.06, 0.08, 0.9]; wfpsN2N2O_x=[22, 88]; wfpsN2N2O_y=[0.1, 1]
            SoilOrganicMatter: same as Validation.WarraBlock1.WindbreakSystem.TreeRow.Soil.SoilOrganicMatter
            Analysis: Thickness=[150, 150, 300, 300, 300, 300]; PH=[8, 8, 8, 8, 8, 8]; PHUnits=Water; BoronUnits=HotWater
            InitialWater: PercentMethod=FilledFromTop; FractionFull=0.39801
            Sample: NO3Units=ppm; NH4Units=ppm; SWUnits=Volumetric; OCUnits=Total; PHUnits=Water
              Thickness  NO3  NH4
              150        1    0.1
              150        1    0.1
              300        1    0.1
              300        1    0.1
              300        1    0.1
              300        1    0.1
        RectangularZone 15m: Area=0.05; Slope=0; Length=100; Width=5
          LocalMicroClimate
          MicroClimate: same as Validation.WarraBlock1.WindbreakSystem.TreeRow.MicroClimate
          Report: ResultsPerPage=0
            VariableNames:
              [Clock].Today
              [Zone].Area
              Distance
              Radn
              [LocalMicroClimate].Radn
              [TreeProxy].Shade
          Report DailyReport: EventNames=[Clock].DoReport; ResultsPerPage=0
            VariableNames:
              [Clock].Today
              Distance
              LocalMicroClimate.Wind
              sum([Soil].SoilWater.SWmm[1:4]) as SW90cm
              sum([Soil].NO3N) as TotalNO3N
              sum([Soil].NH4N) as TotalNH4N
              [MicroClimate].peta
              [MicroClimate].petr
          Fertiliser
          SurfaceOrganicMatter: same as Validation.WarraBlock1.WindbreakSystem.TreeRow.SurfaceOrganicMatter
          Soil: ASCOrder=Vertosol; ASCSubOrder=Grey; SoilType=Clay; Site=Warra; NearestTown=Warra, Q, 4411; Region=Darling Downs and Granite Belt; State=Queensland; Country=Australia; NaturalVegetation=Brigalow scrub; ApsoilNumber=19; Latitude=-26.897; Longitude=150.909; LocationAccuracy=+/- 20m; DataSource=0; Comments=CSIRO Sustainable Ecosystems, Toowoomba
            Water
              Thickness  BD    AirDry  LL15  DUL   SAT
              150        1.39  0.105   0.22  0.4   0.45
              150        1.35  0.168   0.21  0.41  0.46
              300        1.35  0.22    0.22  0.41  0.46
              300        1.43  0.22    0.24  0.38  0.43
              300        1.44  0.22    0.26  0.38  0.43
              300        1.45  0.22    0.34  0.37  0.42
            SoilWater: same as Validation.WarraBlock1.WindbreakSystem.TreeRow.Soil.SoilWater
            SoilNitrogen: fom_type=[default, manure, mucuna, lablab, shemp, stable]; fract_carb=[0.2, 0.3, 0.54, 0.57, 0.45, 0]; fract_cell=[0.7, 0.3, 0.37, 0.37, 0.47, 0.1]; fract_lign=[0.1, 0.4, 0.09, 0.06, 0.08, 0.9]; wfpsN2N2O_x=[22, 88]; wfpsN2N2O_y=[0.1, 1]
            SoilOrganicMatter: same as Validation.WarraBlock1.WindbreakSystem.TreeRow.Soil.SoilOrganicMatter
            Analysis: Thickness=[150, 150, 300, 300, 300, 300]; PH=[8, 8, 8, 8, 8, 8]; PHUnits=Water; BoronUnits=HotWater
            InitialWater: PercentMethod=FilledFromTop; FractionFull=0.58
            Sample: NO3Units=ppm; NH4Units=ppm; SWUnits=Volumetric; OCUnits=Total; PHUnits=Water
              Thickness  NO3  NH4
              150        1    0.1
              150        1    0.1
              300        1    0.1
              300        1    0.1
              300        1    0.1
              300        1    0.1
        RectangularZone 20m: Area=0.1; Slope=0; Length=100; Width=10
          LocalMicroClimate
          MicroClimate: same as Validation.WarraBlock1.WindbreakSystem.TreeRow.MicroClimate
          Report: ResultsPerPage=0
            VariableNames:
              [Clock].Today
              [Zone].Area
              Distance
              Radn
              [LocalMicroClimate].Radn
              [TreeProxy].Shade
          Report DailyReport: EventNames=[Clock].DoReport; ResultsPerPage=0
            VariableNames:
              [Clock].Today
              Distance
              LocalMicroClimate.Wind
              sum([Soil].SoilWater.SWmm[1:4]) as SW90cm
              sum([Soil].NO3N) as TotalNO3N
              sum([Soil].NH4N) as TotalNH4N
              [MicroClimate].peta
              [MicroClimate].petr
          Fertiliser
          SurfaceOrganicMatter: same as Validation.WarraBlock1.WindbreakSystem.TreeRow.SurfaceOrganicMatter
          Soil: ASCOrder=Vertosol; ASCSubOrder=Grey; SoilType=Clay; Site=Warra; NearestTown=Warra, Q, 4411; Region=Darling Downs and Granite Belt; State=Queensland; Country=Australia; NaturalVegetation=Brigalow scrub; ApsoilNumber=19; Latitude=-26.897; Longitude=150.909; LocationAccuracy=+/- 20m; DataSource=0; Comments=CSIRO Sustainable Ecosystems, Toowoomba
            Water
              Thickness  BD    AirDry  LL15  DUL   SAT
              150        1.39  0.105   0.22  0.4   0.45
              150        1.35  0.168   0.21  0.41  0.46
              300        1.35  0.22    0.22  0.41  0.46
              300        1.43  0.22    0.24  0.38  0.43
              300        1.44  0.22    0.26  0.38  0.43
              300        1.45  0.22    0.34  0.37  0.42
            SoilWater: same as Validation.WarraBlock1.WindbreakSystem.TreeRow.Soil.SoilWater
            SoilNitrogen: fom_type=[default, manure, mucuna, lablab, shemp, stable]; fract_carb=[0.2, 0.3, 0.54, 0.57, 0.45, 0]; fract_cell=[0.7, 0.3, 0.37, 0.37, 0.47, 0.1]; fract_lign=[0.1, 0.4, 0.09, 0.06, 0.08, 0.9]; wfpsN2N2O_x=[22, 88]; wfpsN2N2O_y=[0.1, 1]
            SoilOrganicMatter: same as Validation.WarraBlock1.WindbreakSystem.TreeRow.Soil.SoilOrganicMatter
            Analysis: Thickness=[150, 150, 300, 300, 300, 300]; PH=[8, 8, 8, 8, 8, 8]; PHUnits=Water; BoronUnits=HotWater
            InitialWater: PercentMethod=FilledFromTop; FractionFull=0.65
            Sample: NO3Units=ppm; NH4Units=ppm; SWUnits=Volumetric; OCUnits=Total; PHUnits=Water
              Thickness  NO3  NH4
              150        1    0.1
              150        1    0.1
              300        1    0.1
              300        1    0.1
              300        1    0.1
              300        1    0.1
        RectangularZone 30m: Area=0.05; Slope=0; Length=100; Width=5
          LocalMicroClimate
          MicroClimate: same as Validation.WarraBlock1.WindbreakSystem.TreeRow.MicroClimate
          Report: ResultsPerPage=0
            VariableNames:
              [Clock].Today
              [Zone].Area
              Distance
              Radn
              [LocalMicroClimate].Radn
              [TreeProxy].Shade
          Report DailyReport: EventNames=[Clock].DoReport; ResultsPerPage=0
            VariableNames:
              [Clock].Today
              Distance
              LocalMicroClimate.Wind
              sum([Soil].SoilWater.SWmm[1:4]) as SW90cm
              sum([Soil].NO3N) as TotalNO3N
              sum([Soil].NH4N) as TotalNH4N
              [MicroClimate].peta
              [MicroClimate].petr
          Fertiliser
          SurfaceOrganicMatter: same as Validation.WarraBlock1.WindbreakSystem.TreeRow.SurfaceOrganicMatter
          Soil: ASCOrder=Vertosol; ASCSubOrder=Grey; SoilType=Clay; Site=Warra; NearestTown=Warra, Q, 4411; Region=Darling Downs and Granite Belt; State=Queensland; Country=Australia; NaturalVegetation=Brigalow scrub; ApsoilNumber=19; Latitude=-26.897; Longitude=150.909; LocationAccuracy=+/- 20m; DataSource=0; Comments=CSIRO Sustainable Ecosystems, Toowoomba
            Water
              Thickness  BD    AirDry  LL15  DUL   SAT
              150        1.39  0.105   0.22  0.4   0.45
              150        1.35  0.168   0.21  0.41  0.46
              300        1.35  0.22    0.22  0.41  0.46
              300        1.43  0.22    0.24  0.38  0.43
              300        1.44  0.22    0.26  0.38  0.43
              300        1.45  0.22    0.34  0.37  0.42
            SoilWater: same as Validation.WarraBlock1.WindbreakSystem.TreeRow.Soil.SoilWater
            SoilNitrogen: fom_type=[default, manure, mucuna, lablab, shemp, stable]; fract_carb=[0.2, 0.3, 0.54, 0.57, 0.45, 0]; fract_cell=[0.7, 0.3, 0.37, 0.37, 0.47, 0.1]; fract_lign=[0.1, 0.4, 0.09, 0.06, 0.08, 0.9]; wfpsN2N2O_x=[22, 88]; wfpsN2N2O_y=[0.1, 1]
            SoilOrganicMatter: same as Validation.WarraBlock1.WindbreakSystem.TreeRow.Soil.SoilOrganicMatter
            Analysis: Thickness=[150, 150, 300, 300, 300, 300]; PH=[8, 8, 8, 8, 8, 8]; PHUnits=Water; BoronUnits=HotWater
            InitialWater: PercentMethod=FilledFromTop; FractionFull=0.63
            Sample: NO3Units=ppm; NH4Units=ppm; SWUnits=Volumetric; OCUnits=Total; PHUnits=Water
              Thickness  NO3  NH4
              150        1    0.1
              150        1    0.1
              300        1    0.1
              300        1    0.1
              300        1    0.1
              300        1    0.1
        RectangularZone 40m: Area=0.1; Slope=0; Length=100; Width=10
          LocalMicroClimate
          MicroClimate: same as Validation.WarraBlock1.WindbreakSystem.TreeRow.MicroClimate
          Report: ResultsPerPage=0
            VariableNames:
              [Clock].Today
              [Zone].Area
              Distance
              Radn
              [LocalMicroClimate].Radn
              [TreeProxy].Shade
          Report DailyReport: EventNames=[Clock].DoReport; ResultsPerPage=0
            VariableNames:
              [Clock].Today
              Distance
              LocalMicroClimate.Wind
              sum([Soil].SoilWater.SWmm[1:4]) as SW90cm
              sum([Soil].NO3N) as TotalNO3N
              sum([Soil].NH4N) as TotalNH4N
              [MicroClimate].peta
              [MicroClimate].petr
          Fertiliser
          SurfaceOrganicMatter: same as Validation.WarraBlock1.WindbreakSystem.TreeRow.SurfaceOrganicMatter
          Soil: ASCOrder=Vertosol; ASCSubOrder=Grey; SoilType=Clay; Site=Warra; NearestTown=Warra, Q, 4411; Region=Darling Downs and Granite Belt; State=Queensland; Country=Australia; NaturalVegetation=Brigalow scrub; ApsoilNumber=19; Latitude=-26.897; Longitude=150.909; LocationAccuracy=+/- 20m; DataSource=0; Comments=CSIRO Sustainable Ecosystems, Toowoomba
            Water
              Thickness  BD    AirDry  LL15  DUL   SAT
              150        1.39  0.105   0.22  0.4   0.45
              150        1.35  0.168   0.21  0.41  0.46
              300        1.35  0.22    0.22  0.41  0.46
              300        1.43  0.22    0.24  0.38  0.43
              300        1.44  0.22    0.26  0.38  0.43
              300        1.45  0.22    0.34  0.37  0.42
            SoilWater: same as Validation.WarraBlock1.WindbreakSystem.TreeRow.Soil.SoilWater
            SoilNitrogen: fom_type=[default, manure, mucuna, lablab, shemp, stable]; fract_carb=[0.2, 0.3, 0.54, 0.57, 0.45, 0]; fract_cell=[0.7, 0.3, 0.37, 0.37, 0.47, 0.1]; fract_lign=[0.1, 0.4, 0.09, 0.06, 0.08, 0.9]; wfpsN2N2O_x=[22, 88]; wfpsN2N2O_y=[0.1, 1]
            SoilOrganicMatter: same as Validation.WarraBlock1.WindbreakSystem.TreeRow.Soil.SoilOrganicMatter
            Analysis: Thickness=[150, 150, 300, 300, 300, 300]; PH=[8, 8, 8, 8, 8, 8]; PHUnits=Water; BoronUnits=HotWater
            InitialWater: PercentMethod=FilledFromTop; FractionFull=0.56
            Sample: NO3Units=ppm; NH4Units=ppm; SWUnits=Volumetric; OCUnits=Total; PHUnits=Water
              Thickness  NO3  NH4
              150        1    0.1
              150        1    0.1
              300        1    0.1
              300        1    0.1
              300        1    0.1
              300        1    0.1
        RectangularZone 50m: Area=0.1; Slope=0; Length=100; Width=10
          LocalMicroClimate
          MicroClimate: same as Validation.WarraBlock1.WindbreakSystem.TreeRow.MicroClimate
          Report: ResultsPerPage=0
            VariableNames:
              [Clock].Today
              [Zone].Area
              Distance
              Radn
              [LocalMicroClimate].Radn
              [TreeProxy].Shade
          Report DailyReport: EventNames=[Clock].DoReport; ResultsPerPage=0
            VariableNames:
              [Clock].Today
              Distance
              LocalMicroClimate.Wind
              sum([Soil].SoilWater.SWmm[1:4]) as SW90cm
              sum([Soil].NO3N) as TotalNO3N
              sum([Soil].NH4N) as TotalNH4N
              [MicroClimate].peta
              [MicroClimate].petr
          Fertiliser
          SurfaceOrganicMatter: same as Validation.WarraBlock1.WindbreakSystem.TreeRow.SurfaceOrganicMatter
          Soil: ASCOrder=Vertosol; ASCSubOrder=Grey; SoilType=Clay; Site=Warra; NearestTown=Warra, Q, 4411; Region=Darling Downs and Granite Belt; State=Queensland; Country=Australia; NaturalVegetation=Brigalow scrub; ApsoilNumber=19; Latitude=-26.897; Longitude=150.909; LocationAccuracy=+/- 20m; DataSource=0; Comments=CSIRO Sustainable Ecosystems, Toowoomba
            Water
              Thickness  BD    AirDry  LL15  DUL   SAT
              150        1.39  0.105   0.22  0.4   0.45
              150        1.35  0.168   0.21  0.41  0.46
              300        1.35  0.22    0.22  0.41  0.46
              300        1.43  0.22    0.24  0.38  0.43
              300        1.44  0.22    0.26  0.38  0.43
              300        1.45  0.22    0.34  0.37  0.42
            SoilWater: same as Validation.WarraBlock1.WindbreakSystem.TreeRow.Soil.SoilWater
            SoilNitrogen: fom_type=[default, manure, mucuna, lablab, shemp, stable]; fract_carb=[0.2, 0.3, 0.54, 0.57, 0.45, 0]; fract_cell=[0.7, 0.3, 0.37, 0.37, 0.47, 0.1]; fract_lign=[0.1, 0.4, 0.09, 0.06, 0.08, 0.9]; wfpsN2N2O_x=[22, 88]; wfpsN2N2O_y=[0.1, 1]
            SoilOrganicMatter: same as Validation.WarraBlock1.WindbreakSystem.TreeRow.Soil.SoilOrganicMatter
            Analysis: Thickness=[150, 150, 300, 300, 300, 300]; PH=[8, 8, 8, 8, 8, 8]; PHUnits=Water; BoronUnits=HotWater
            InitialWater: PercentMethod=FilledFromTop; FractionFull=0.55
            Sample: NO3Units=ppm; NH4Units=ppm; SWUnits=Volumetric; OCUnits=Total; PHUnits=Water
              Thickness  NO3  NH4
              150        1    0.1
              150        1    0.1
              300        1    0.1
              300        1    0.1
              300        1    0.1
              300        1    0.1
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