Simulations: Version=2
  Replacements
    Plant Bambatsi: CropType=Bambatsi
      AccumulateFunction Age: StartStageName=Emergence; EndStageName=Old
        Constant day: Value=0.00273973
      Phenology: DaysAfterSowing=0
        StageBasedInterpolation StageCode: Stages=[Emergence, EndJuvenile, Maturity, Old]; Codes=[1, 2, 3, 4]; Proportional=true
        Constant ThermalTime: Value=1
        GerminatingPhase Germinating: Start=Sowing; End=Germination
        EmergingPhase Emerging: Start=Germination; End=Emergence; ShootLag=1; ShootRate=0
          VariableReference ThermalTime: VariableName=[Phenology].ThermalTime.Value
        GenericPhase Juvenile: Start=Emergence; End=EndJuvenile
          Constant ThermalTime: Value=1
          Constant Target: Value=365
        GenericPhase Mature: Start=EndJuvenile; End=Maturity
          Constant ThermalTime: Value=1
          Constant Target: Value=1825
        GenericPhase Declining: Start=Maturity; End=Old
          Constant ThermalTime: Value=1
          Constant Target: Value=27010
        EndPhase Old: Start=Old; End=Unused
          Constant ThermalTime: Value=1
      OrganArbitrator Arbitrator: NArbitrationOption=RelativeAllocation; DMArbitrationOption=RelativeAllocation
      CompositeBiomass AboveGround: Propertys=[[Leaf].Live, [Leaf].Dead, [Stem].Live, [Stem].Dead]
      CompositeBiomass BelowGround: Propertys=[[Root].Live, [Root].Dead]
      CompositeBiomass Total
        Propertys=[[Leaf].Live, [Leaf].Dead, [Stem].Live, [Stem].Dead, [Root].Live, [Root].Dead]
      CompositeBiomass TotalLive: Propertys=[[Leaf].Live, [Stem].Live, [Root].Live]
      CompositeBiomass TotalDead: Propertys=[[Leaf].Dead, [Stem].Dead, [Root].Dead]
      PerennialLeaf Leaf: CohortsInitialised=false; Albedo=0.18; Gsmax=0.015; R50=150
        zero: MaintenanceRespiration, GrowthRespiration, TipsAtEmergence, CohortsAtInitialisation, InitialisedCohortNo, AppearedCohortNo, PlantAppearedLeafNo, LAI, Height, FRGR, PotentialEP, KDead, WaterDemand, LAIDead, WaterAllocation
        MultiplyFunction InitialWtFunction
          Constant InitialPlantWt: Value=1; Units=g/plant
          VariableReference Population: VariableName=[Plant].Population
        Constant LaiDeadFunction: Value=0; Units=m^2/m^2
        Constant StructuralFraction: Value=1; Units=0-1
        MinimumFunction FRGRFunction
          AirTemperatureFunction FRGRFunctionTemp
            XYPairs: X=[5, 20, 25, 35]; Y=[0, 1, 1, 0]
        PartitionFractionDemandFunction DMDemandFunction
          Constant PartitionFraction: Value=0.33
            Memo
              Value of 0.57 from
              Radiation Interception and Growth of Planted and Coppice Stands of Four Fast-GrowingTropical Trees
              Author(s): Robin A. Harrington and James H. Fownes
              Source: Journal of Applied Ecology, Vol. 32, No. 1 (Feb., 1995), pp. 1-8

              But their data suggests a value of 0.3
        Constant ExtinctionCoefficient: Value=0.57
          Memo
            Value of 0.57 from
            Radiation Interception and Growth of Planted and Coppice Stands of Four Fast-GrowingTropical Trees
            Author(s): Robin A. Harrington and James H. Fownes
            Source: Journal of Applied Ecology, Vol. 32, No. 1 (Feb., 1995), pp. 1-8

            But their data suggests a value of 0.3
        LinearInterpolationFunction HeightFunction: XProperty=[Phenology].Stage
          XYPairs: X=[3, 5, 6]; Y=[100, 800, 1200]
        Constant MaximumNConc: Value=0.03
          Memo
            0.043 gN/g from R.B. Thomas 1, D.D. Richter 2, H. Ye 2, P.R. Heine z, and B.R. Strain 1 Nitrogen dynamics and growth of seedlings of an N-fixing tree
            (GKricidia sepium (Jacq.) Walp.) exposed to elevated atmospheric carbon dioxide Oecologia (1991) 88:415-421
        Constant MinimumNConc: Value=0.015
        Constant NReallocationFactor: Value=0
        Constant SenescenceRate: Value=0
        Folder BiomassRemovalDefaults
          OrganBiomassRemovalType Harvest: FractionLiveToRemove=0; FractionDeadToRemove=0; FractionLiveToResidue=0.9; FractionDeadToResidue=0.9
          OrganBiomassRemovalType Cut: FractionLiveToRemove=0.8; FractionDeadToRemove=0; FractionLiveToResidue=0; FractionDeadToResidue=0
          OrganBiomassRemovalType Prune: FractionLiveToRemove=0; FractionDeadToRemove=0; FractionLiveToResidue=0.6; FractionDeadToResidue=0
          OrganBiomassRemovalType Graze: FractionLiveToRemove=0.6; FractionDeadToRemove=0; FractionLiveToResidue=0.1; FractionDeadToResidue=0
        Constant DetachmentRateFunction: Value=0
        MultiplyFunction LAIFunction
          VariableReference LeafWt: VariableName=[Leaf].Live.Wt
          LinearInterpolationFunction SLA: XProperty=[Bambatsi].Age.Value
            XYPairs: X=[0, 1, 2, 3, 6]; Y=[0.016, 0.013, 0.011, 0.01, 0.008]
        Constant LeafResidenceTime: Value=365
        Constant DMConversionEfficiency: Value=1
        Constant LeafDetachmentTime: Value=7
        Constant DMRetranslocationFactor: Value=0
        Constant NRetranslocationFactor: Value=0
        RUEModel Photosynthesis
          Constant RUE: Value=1.3
          WeightedTemperatureFunction FT: MaximumTemperatureWeighting=0.75
            XYPairs: X=[5, 20, 25, 35]; Y=[0, 1, 1, 0]
          LinearInterpolationFunction FVPD: XProperty=[Leaf].Photosynthesis.VPD
            XYPairs: X=[0, 10, 50]; Y=[1, 1, 0]
          LinearInterpolationFunction FN: XProperty=[Leaf].Fn
            XYPairs: X=[0, 1, 1.5]; Y=[0, 1, 1]
          LinearInterpolationFunction FW: XProperty=[Leaf].Fw
            XYPairs: X=[0, 1, 1.5]; Y=[0, 1, 1]
          RUECO2Function FCO2: PhotosyntheticPathway=C3
          Memo
            Ayaz eta 2004 presented a RUE of 1.6 g/MJ PAR during non-limiting temperature conditions for field pea.  Halving this to make it total radiation gives 0.8 g/MJ and adding 20% to account for root and  nodule production and N fixiation costs gives 1.0 g/MJ
          VariableReference RadnInt: VariableName=[Leaf].RadIntTot
      Root: GrowthRespiration=0; MaintenanceRespiration=0
        CompositeBiomass Live: Propertys=[[Root].LayerLive]
        CompositeBiomass Dead: Propertys=[[Root].LayerDead]
        PhaseBasedSwitch NitrogenDemandSwitch: Start=Emergence; End=Old
        Constant RootFrontVelocity: Value=10
        Constant SenescenceRate: Value=0.005
        PhaseLookup PartitionFraction
          PhaseLookupValue: Start=Emergence; End=Old
            Constant: Value=0.2
        Constant MaximumNConc: Value=0.0041
        Constant MaxDailyNUptake: Value=6
        Constant MinimumNConc: Value=0.004
        Constant MaximumRootDepth: Value=1000000
        LinearInterpolationFunction KLModifier: XProperty=[Leaf].LAI
          XYPairs: X=[0, 3]; Y=[1, 1]
        LinearInterpolationFunction KNO3: XProperty=[Root].RootLengthDenisty
          XYPairs: X=[0, 0.003]; Y=[0.03, 0.03]
        LinearInterpolationFunction KNH4: XProperty=[Root].RootLengthDenisty
          XYPairs: X=[0, 0.003]; Y=[0, 0]
        LinearInterpolationFunction NUptakeSWFactor: XProperty=[Root].RWC
          XYPairs: X=[0, 1]; Y=[0, 1]
        Constant InitialDM: Value=5; Units=g/plant
        Constant SpecificRootLength: Value=100; Units=m/g
        Folder BiomassRemovalDefaults
          OrganBiomassRemovalType Harvest: FractionLiveToRemove=0; FractionDeadToRemove=0; FractionLiveToResidue=0; FractionDeadToResidue=0
          OrganBiomassRemovalType Cut: FractionLiveToRemove=0; FractionDeadToRemove=0; FractionLiveToResidue=0.3; FractionDeadToResidue=0
          OrganBiomassRemovalType Prune: FractionLiveToRemove=0; FractionDeadToRemove=0; FractionLiveToResidue=0.1; FractionDeadToResidue=0
          OrganBiomassRemovalType Graze: FractionLiveToRemove=0; FractionDeadToRemove=0; FractionLiveToResidue=0.15; FractionDeadToResidue=0
          OrganBiomassRemovalType Thin: FractionLiveToRemove=0; FractionDeadToRemove=0; FractionLiveToResidue=0.05; FractionDeadToResidue=0
      GenericOrgan Stem: MaintenanceRespiration=0
        Constant NReallocationFactor: Value=0
        Constant NRetranslocationFactor: Value=0.05
        PhaseBasedSwitch NitrogenDemandSwitch: Start=Emergence; End=Old
        Constant DMRetranslocationFactor: Value=0
        PartitionFractionDemandFunction DMDemandFunction
          Constant PartitionFraction: Value=0.3
        Constant SenescenceRate: Value=0; Units=/d
        Constant MaximumNConc: Value=0.0015
        Constant MinimumNConc: Value=0.0014
        Biomass Live
        Biomass Dead
        Constant InitialWtFunction: Value=0; Units=g/m^2
        Constant StructuralFraction: Value=1; Units=g/g
        Constant DetachmentRateFunction: Value=0; Units=/d
        Folder BiomassRemovalDefaults
          OrganBiomassRemovalType Harvest: FractionLiveToRemove=0.9; FractionDeadToRemove=0.9; FractionLiveToResidue=0; FractionDeadToResidue=0
          OrganBiomassRemovalType Cut: FractionLiveToRemove=0.8; FractionDeadToRemove=0; FractionLiveToResidue=0; FractionDeadToResidue=0
          OrganBiomassRemovalType Prune: FractionLiveToRemove=0.9; FractionDeadToRemove=0.9; FractionLiveToResidue=0.1; FractionDeadToResidue=0.1
          OrganBiomassRemovalType Graze: FractionLiveToRemove=0.6; FractionDeadToRemove=0; FractionLiveToResidue=0.2; FractionDeadToResidue=0
          OrganBiomassRemovalType Thin: FractionLiveToRemove=0; FractionDeadToRemove=0; FractionLiveToResidue=0.05; FractionDeadToResidue=0
      Cultivar Bambatsi
    Report: EventNames=[Clock].DoReport
      VariableNames:
        [Clock].Today
        Bambatsi.Phenology.CurrentPhaseName
        Bambatsi.Phenology.StageCode.Value
        Bambatsi.Root.NSupplyUptake
        [Soil].SoilWater.Eo
        [Soil].SoilWater.Es
        [Soil].SoilWater.Drainage
        [Soil].SoilWater.Runoff
        [Soil].SoilWater.pond
        Bambatsi.AboveGround.Wt
        Bambatsi.BelowGround.Wt
        Bambatsi.Total.Wt
        Bambatsi.Leaf.Dead.Wt
        Bambatsi.Leaf.Live.Wt
        Bambatsi.Stem.Dead.Wt
        Bambatsi.Stem.Live.Wt
        Bambatsi.Root.Dead.Wt
        Bambatsi.Root.Live.Wt
        Bambatsi.AboveGround.N
        Bambatsi.BelowGround.N
        Bambatsi.Total.N
        Bambatsi.TotalLive.N
        Bambatsi.TotalDead.N
        Bambatsi.Leaf.Dead.N
        Bambatsi.Leaf.Live.N
        Bambatsi.Stem.Dead.N
        Bambatsi.Stem.Live.N
        Bambatsi.Branch.Live.Wt
        Bambatsi.Branch.Live.N
        Bambatsi.Wood.Wt
        Bambatsi.Root.Live.N
        Bambatsi.Root.Dead.N
        Bambatsi.Leaf.Live.NConc
        Bambatsi.Leaf.Dead.NConc
        Bambatsi.Stem.Live.NConc
        Bambatsi.Root.Live.NConc
        Bambatsi.Root.WaterSupply
        Bambatsi.Root.WaterUptake
        Bambatsi.Leaf.Transpiration
        Bambatsi.Leaf.WaterDemand
        Bambatsi.Root.Depth
        Bambatsi.Leaf.CoverGreen
        Bambatsi.Leaf.CoverTotal
        Bambatsi.Leaf.CoverDead
        Bambatsi.Leaf.LAI
        Bambatsi.Leaf.LAIDead
        Bambatsi.Leaf.Fn
        Bambatsi.Leaf.Fw
        Bambatsi.Leaf.Photosynthesis.FT.Value
        Bambatsi.Leaf.Photosynthesis.FVPD.Value
        Bambatsi.Leaf.Photosynthesis.RueAct
        Bambatsi.Stem.MinimumNConc.Value
        Bambatsi.Root.MinimumNConc.Value
        Bambatsi.Stem.MaximumNConc.Value
        Bambatsi.Root.MaximumNConc.Value
        Bambatsi.TotalLive.Wt
        Bambatsi.Stem.Live.StructuralWt
        Bambatsi.Stem.Live.NonStructuralWt
        Bambatsi.Leaf.SpecificArea
        Bambatsi.TotalDead.Wt
        [Soil].SoilWater.SWmm
        [Soil].NO3N
        Bambatsi.Arbitrator.NDemand
        Bambatsi.Leaf.LAIFunction.SpecificLeafArea.Value
        Bambatsi.IndividualTreeLiveWt.Value
        Bambatsi.Age.Value
  DataStore
    Input: ErrorMessage=The specified file does not exist.; FileName=BambatsiValidationData.txt
    ExcelInput Observed: FileName=BambatsiValidationData.xlsx; SheetNames=[Observed]
    PredictedObserved: PredictedTableName=Report; ObservedTableName=Observed; FieldNameUsedForMatch=Clock.Today
  Folder Validation
    Folder LiverpoolPlains
      Simulation Hudson
        Weather: FileName=Hudson.met
        Clock: StartDate=1994-08-05; EndDate=2000-01-23
        Summary
        SoilArbitrator Soil Arbitrator
        Zone Field: Area=0; Slope=0
          Soil: Latitude=0; Longitude=0; Area=0
            Water
              Thickness  BD   AirDry  LL15  DUL   SAT
              100        1    0.1     0.24  0.47  0.53
              200        1.1  0.1     0.28  0.53  0.57
              200        1.1  0.1     0.28  0.52  0.57
              200        1.1  0.1     0.29  0.52  0.55
              200        1.1  0.1     0.29  0.51  0.54
              200        1.2  0.1     0.29  0.5   0.53
              200        1.2  0.1     0.29  0.5   0.53
              200        1.2  0.1     0.33  0.48  0.51
              200        1.2  0.1     0.33  0.48  0.51
              200        1.2  0.1     0.35  0.48  0.51
              200        1.2  0.1     0.35  0.47  0.5
              200        1.2  0.1     0.35  0.45  0.48
              200        1.3  0.1     0.35  0.45  0.48
              200        1.3  0.1     0.35  0.45  0.48
              200        1.3  0.1     0.35  0.45  0.48
              200        1.3  0.1     0.35  0.45  0.48
              SoilCrop BambatsiSoil
                LL=[0.25, 0.3, 0.3, 0.3, 0.3, 0.33, 0.35, 0.38, 0.38, 0.4, 0.4, 0.4, 0.4, 0.4, 0.4, 0.4]
                KL=[0.04, 0.04, 0.04, 0.03, 0.02, 0.01, 0.01, 0.01, 0.005, 0.005, 0.005, 0.005, 0.005, 0.005, 0.005, 0.005]
                XF=[1, 1, 1, 1, 1, 1, 1, 1, 1, 1, 0, 0, 0, 0, 0, 0]
            SoilWater: SummerDate=1-Nov; SummerU=9; SummerCona=5; WinterDate=1-Apr; WinterU=9; WinterCona=5; DiffusConst=40; DiffusSlope=16; Salb=0.13; CN2Bare=72; CNRed=20; CNCov=0.8; max_pond=0; residueinterception=0
              Thickness=[100, 200, 200, 200, 200, 200, 200, 200, 200, 200, 200, 200, 200, 200, 200, 200]
              SWCON=[0.4, 0.4, 0.4, 0.4, 0.4, 0.4, 0.4, 0.4, 0.4, 0.4, 0.4, 0.4, 0.4, 0.4, 0.4, 0.4]
            SoilNitrogen: fom_type=[default, manure, mucuna, lablab, shemp, stable]; fract_carb=[0.2, 0.3, 0.54, 0.57, 0.45, 0]; fract_cell=[0.7, 0.3, 0.37, 0.37, 0.47, 0.1]; fract_lign=[0.1, 0.4, 0.09, 0.06, 0.08, 0.9]; wfpsN2N2O_x=[22, 88]; wfpsN2N2O_y=[0.1, 1]
            SoilOrganicMatter: RootCN=40; RootWt=10; SoilCN=14.5; EnrACoeff=7.4; EnrBCoeff=0.2; OCUnits=Total
              Thickness  OC    FBiom  FInert
              100        1.4   0.03   0.45
              200        1.4   0.03   0.45
              200        1.4   0.02   0.6
              200        1.35  0.015  0.7
              200        0.95  0.01   0.85
              200        1     0.01   0.9
              200        0.8   0.01   0.99
              200        0.45  0.01   0.99
              200        0.45  0.01   0.99
              200        0.45  0.01   0.99
              200        0.45  0.01   0.99
              200        0.45  0.01   0.99
              200        0.45  0.01   0.99
              200        0.45  0.01   0.99
              200        0.45  0.01   0.99
              200        0.45  0.01   0.99
            Analysis: PH=[6, 6.4, 6.8, 7.2, 7.6, 8, 8, 8, 8, 8, 8, 8, 8, 8, 8, 8]; PHUnits=Water; BoronUnits=HotWater
              Thickness=[100, 200, 200, 200, 200, 200, 200, 200, 200, 200, 200, 200, 200, 200, 200, 200]
            Sample Initial nitrogen: NO3Units=ppm; NH4Units=ppm; SWUnits=Volumetric; OCUnits=Total; PHUnits=Water
              Thickness  NO3   NH4
              100        10.7  0.3
              200        9.99  0.3
              200        7.87  0.3
              200        6.2   0.3
              200        4.85  0.3
              200        3.56  0.3
              200        2.72  0.3
              200        2.34  0.3
              200        2.47  0.3
              200        3.24  0.3
              200        4.25  0.3
              200        4.94  0.3
              200        5.2   0.3
              200        4.95  0.3
              200        4.52  0.3
              200        4.24  0.3
            Sample Initial water: NO3Units=ppm; NH4Units=ppm; SWUnits=Volumetric; OCUnits=Total; PHUnits=Water
              Thickness=[100, 200, 200, 200, 200, 200, 200, 200, 200, 200, 200, 200, 200, 200, 200, 200]
              SW=[0.47, 0.47, 0.53, 0.5, 0.47, 0.46, 0.45, 0.45, 0.45, 0.43, 0.42, 0.42, 0.41, 0.43, 0.42, 0.41]
          Irrigation
          Fertiliser
          SurfaceOrganicMatter: PoolName=Wheat; type=Wheat; mass=2000; standing_fraction=0; cnr=80; CriticalResidueWeight=2000; OptimumDecompTemp=20; MaxCumulativeEOS=20; CNRatioDecompCoeff=0.277; CNRatioDecompThreshold=25; TotalLeachRain=25; MinRainToLeach=10; CriticalMinimumOrganicC=0.004; DefaultCPRatio=0; DefaultStandingFraction=0; StandingExtinctCoeff=0.5; FractionFaecesAdded=0.5
            Pools:
              {PoolName=Wheat, ResidueType=Wheat, Mass=2000, CNRatio=80, StandingFraction=0}
            ResidueTypes: LoadFromResource=ResidueTypes
            TillageTypes
          MicroClimate: a_interception=0; b_interception=1; c_interception=0; d_interception=0; soil_albedo=0.13; air_pressure=1010; soil_emissivity=0.96; sun_angle=15; soil_heat_flux_fraction=0.4; night_interception_fraction=0.5; windspeed_default=3; refheight=2; albedo=0.293662; emissivity=0.96; gsmax=0.01; r50=200; RadIntTotal=0
          Plant Bambatsi: CropType=Bambatsi
          Report: EventNames=[Clock].DoReport
            VariableNames:
              [Clock].Today
              Bambatsi.Phenology.CurrentPhaseName
              Bambatsi.Phenology.StageCode.Value
              Bambatsi.Root.NSupplyUptake
              [Soil].SoilWater.Eo
              [Soil].SoilWater.Es
              [Soil].SoilWater.Drainage
              [Soil].SoilWater.Runoff
              [Soil].SoilWater.pond
              Bambatsi.AboveGround.Wt
              Bambatsi.BelowGround.Wt
              Bambatsi.Total.Wt
              Bambatsi.Leaf.Dead.Wt
              Bambatsi.Leaf.Live.Wt
              Bambatsi.Stem.Dead.Wt
              Bambatsi.Stem.Live.Wt
              Bambatsi.Root.Dead.Wt
              Bambatsi.Root.Live.Wt
              Bambatsi.AboveGround.N
              Bambatsi.BelowGround.N
              Bambatsi.Total.N
              Bambatsi.TotalLive.N
              Bambatsi.TotalDead.N
              Bambatsi.Leaf.Dead.N
              Bambatsi.Leaf.Live.N
              Bambatsi.Stem.Dead.N
              Bambatsi.Stem.Live.N
              Bambatsi.Root.Live.N
              Bambatsi.Root.Dead.N
              Bambatsi.Leaf.Live.NConc
              Bambatsi.Leaf.Dead.NConc
              Bambatsi.Stem.Live.NConc
              Bambatsi.Root.Live.NConc
              Bambatsi.Root.WaterSupply
              Bambatsi.Root.WaterUptake
              Bambatsi.Leaf.Transpiration
              Bambatsi.Leaf.WaterDemand
              Bambatsi.Root.Depth
              Bambatsi.Leaf.CoverGreen
              Bambatsi.Leaf.CoverTotal
              Bambatsi.Leaf.CoverDead
              Bambatsi.Leaf.LAI
              Bambatsi.Leaf.LAIDead
              Bambatsi.Leaf.Fn
              Bambatsi.Leaf.Fw
              Bambatsi.Leaf.Photosynthesis.FT.Value
              Bambatsi.Leaf.Photosynthesis.FVPD.Value
              Bambatsi.Stem.MinimumNConc.Value
              Bambatsi.Root.MinimumNConc.Value
              Bambatsi.Stem.MaximumNConc.Value
              Bambatsi.Root.MaximumNConc.Value
              Bambatsi.TotalLive.Wt
              Bambatsi.Stem.Live.StructuralWt
              Bambatsi.Stem.Live.NonStructuralWt
              Bambatsi.Leaf.SpecificArea
              Bambatsi.TotalDead.Wt
              [Soil].SoilWater.SWmm
              [Soil].NO3N
              Bambatsi.Arbitrator.NDemand
              Bambatsi.Leaf.LAIFunction.SpecificLeafArea.Value
              Bambatsi.IndividualTreeLiveWt.Value
              Bambatsi.Age.Value
              Bambatsi.Leaf.Photosynthesis.Value
              Bambatsi.Arbitrator.NSupply
              ([SurfaceOrganicMatter].Wt / 10)  as Litter
          Operations
            1994-01-01  [Fertiliser].Apply(20.0, Fertiliser.Types.UreaN, 0);
            1995-01-01  [Bambatsi].Sow(population: 100, cultivar: Bambatsi, depth: 100, rowSpacing: 100);
            1995-10-09  [Bambatsi].Harvest();
            1995-11-21  [Fertiliser].Apply(50.0, Fertiliser.Types.UreaN, 0);
            1995-12-01  [Bambatsi].Harvest();
            1996-01-30  [Bambatsi].Harvest();
            1996-02-28  [Bambatsi].Harvest();
            1996-11-26  [Bambatsi].Harvest();
            1996-12-22  [Fertiliser].Apply(50.0, Fertiliser.Types.UreaN, 0);
            1997-01-14  [Bambatsi].Harvest();
            1997-03-04  [Bambatsi].Harvest();
            1997-06-26  [Fertiliser].Apply(22.0, Fertiliser.Types.UreaN, 0);
            1997-11-17  [Bambatsi].Harvest();
            1998-04-07  [Bambatsi].Harvest();
            1998-10-09  [Fertiliser].Apply(30.0, Fertiliser.Types.UreaN, 0);
            1998-12-17  [Bambatsi].Harvest();
            1999-02-16  [Bambatsi].Harvest();
            1999-06-02  [Bambatsi].Harvest();
            1999-11-10  [Fertiliser].Apply(50.0, Fertiliser.Types.UreaN, 0);
            1999-09-29  [Bambatsi].Harvest();
            2000-02-02  [Bambatsi].Harvest();
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