Simulations: Version=7
  Memo TitlePage
    # APSIM Barley Model

    _Khaembah E.N., Zyskowski, R.F. and Brown, H.E._

    The APSIM Barley Model has been developed using the Plant Modelling Framework (PMF) of Brown et al. (2014). This framework provides a library of plant organ and process submodels that can be coupled, at runtime, to construct a model in much the same way that models can be coupled to construct a simulation. This means that dynamic composition of lower level process and organ classes (e.g. photosynthesis, leaf) into larger constructions (e.g. maize, wheat, sorghum) can be achieved by the model developer without additional coding.

    The model consists of:

    * a phenology model to simulate development between growth phases
    * a structure model to simulate plant morphology
    * a collection of organs to simulate the various plant parts
    * an arbitrator to allocate resources (N, biomass) to various plant organs.
  Memo References
    Alzueta I, Abeledo LG, Mignonea CM, Miralles DJ 2012. Differences between wheat and barley in leaf and tillering coordination under contrasting nitrogen and sulfur conditions. Europ. J. Agronomy 4: 92-102.

    Brown HE, Huth NI, Holzworth DP et al. 2014. "Plant Modelling Framework: Software for building and running crop models on the APSIM platform. Environmental Modelling & Software 62: 385-398.

    De Ruiter JM 1999. Yield and quality of malting barley (Hordeum vulgare L. ‘Valetta') in response to irrigation and nitrogen fertilisation. New Zealand Journal of Crop and Horticultural Science 24: 307-317

    Jamieson PD, Munro CA 1999. A simple method for the phenological evaluation of new cereal cultivars. Proceeding of the 29th Agronomy Society of New Zealand 29: 63-68.

    Jamieson PD, Martin RJ, Francis GS 1995. Drought influences on grain yield of barley, wheat, and maize. New Zealand Journal of Crop and Horticultural Science 23: 55-66

    Jamieson PD, Francis GS, Wilson DR, Martin RJ 1994. Effects of water deficits on evapotranspiration from barley. Agricultural and Forest Meteorology 76 (1995) 41-58

    Jamieson PD, Martin RJ, Francis GS, Wilson DR 1995. Drought effects on biomass production and radiation use efficiency in barley. Field Crops Research 43: 77-86

    Kirby EJM 1995. Factors affecting rate of leaf emergence in barley and wheat. Crop Science 35: 11-19.

    Mirschel W, Wenkel K, Schultz A, Pommerening J, Verch G 2005. Dynamic phenological model for winter rye and winter barley. European Journal of Agronomy 23: 123-135.
  Replacements
    Plant Barley: CropType=Barley
      OrganArbitrator Arbitrator
        RelativeAllocation NArbitrator
        RelativeAllocation DMArbitrator
      Phenology: DaysAfterSowing=0
        Memo
          Phenology takes into account the daily mean soil (pre-germination) and air (post-germination) temperature, the length of photoperiod as well as the water, nitrogen and vernalisation statuses (e.g. Mirschel et al. (2005).
          The barley cultivar "Valetta" used in this model is not sensitive to vernalisation and therefore nil sensitivity is used.
          The data  shows a slowdown in phenological developement in winter conditions, which could be due to temperature and photoperiod.
        MultiplyFunction ThermalTime
          Memo
            Photothermal time based on Sonego 1997

            TTbase = T-0

            FP = Max (0, (P-7)/9)

            TT = TTBase*FP

            Note.  Effectively Mid winter thermal time approaces 0, whereas midsummer approaches TTbase thus mabely accumlating a low temperature eefect.
          AirTemperatureFunction ThermalTimeB0
            XYPairs: X=[0, 15, 30, 40]; Y=[0, 15, 30, 0]
            Memo
              Thermal time determines the rate of developmental progress through many of the crops phases and is used by organs to determing potential growth rates.
          MaximumFunction FP
            Constant Zero: FixedValue=0
            DivideFunction
              SubtractFunction PP7
                VariableReference Photoperiod: VariableName=[Phenology].Photoperiod.Value()
                Constant Seven: FixedValue=7
              Constant Nine: FixedValue=9
        SoilTemperatureFunction: maxt_soil_surface=20; mint_soil_surface=10
          XYPairs: X=[0, 30, 40]; Y=[0, 30, 0]
        PhotoperiodFunction Photoperiod: Twilight=-6; DayLength=0
        PhotoperiodDeltaFunction: Twilight=-6
        PhaseLookup PercievedPhotoPeriod
          PhaseLookupValue ApexBelowGround: Start=Germination; End=Emergence
            Constant Photoperiod: FixedValue=0; Units=h
          PhaseLookupValue ApexAboveGround: Start=Emergence; End=HarvestRipe
            MultiplyFunction
              VariableReference Photoperiod: VariableName=[Phenology].Photoperiod.Value()
              LinearInterpolationFunction: XProperty=[Phenology].PhotoperiodDeltaFunction.Value()
                XYPairs: X=[-24, 0, 0.1, 24]; Y=[0, 0, 1, 1]
        Constant VrnSensitivity: FixedValue=0; Units=Leaves
          Memo
            Barley cultivar "Valetta" used in this model is a spring variety and therefore does not require a period of cold temperature (vernalisation) to initiate reproduction.
        Constant MinimumLeafNumber: FixedValue=6; Units=Leaves
          Memo
            Number of leaves the plant will produce when grown in long photoperiod.
        Constant VernLag: FixedValue=1; Units=Unitless
          Memo
            The amount of vernalising temperature required before vernalisation response will be evident.  Value of relative to the amount offl vernalisation temperature required from the end of the lag until vernalisation saturation.  A value of 0 means there is no lag, a value of 1 means the lag is the same (in vernal time) as the vernalisation requirement and a value of 2 means the lag is twice as long as the vernalisation response phase

            Not used in barley
        Constant PpSensitivity: FixedValue=6; Units=Leaves
          Memo
            The reduction in leaf number going from 8 to 16 h Pp

            Not used in current barley model
        Constant EarlyReproductivePpSensitivity: FixedValue=0
          Memo
            The phyllochrons duration for the plant to go from flag leaf ligual appearance at 16 h Pp compared to the phyllochron duration for the same phase at 8 h Pp.

            Not used in current barley model.
        Constant EarlyReproductiveLongDayBase: FixedValue=2.5
          Memo
            The phyllochrons duration for the plant to go from flag leaf ligual appearance at 16 h Pp.

            Not used in current barley model.
        GerminatingPhase Germinating: Start=Sowing; End=Germination
        EmergingPhase Emerging: Start=Germination; End=Emergence; ShootLag=40; ShootRate=1
          VariableReference ThermalTime: VariableName=[Phenology].ThermalTime.Value()
          Memo
            This assumes 150°Cd from sowing to emergence(Alzueta et al. 2012).
        GenericPhase Vegetative: Start=Emergence; End=VS
          Memo
            This is the first 4-6 leaf growth of the emerged oat plant, In the current model is decides the final leaf number based on Martin et al 1998.

            At the end of this grwth stage a trigger event occurs which calculates the FLN.

            Currently the leaf number is 4, due to March sowings in which th sixth leaf dosn'y emerge until after june.
          VariableReference ThermalTime: VariableName=[Phenology].ThermalTime.Value()
          MultiplyFunction Target
            Constant Six: FixedValue=6
            VariableReference Phyll: VariableName=[Structure].BasePhyllochron.Value()
        GenericPhase EarlyReproductive: Start=VS; End=TerminalSpikelet
          Memo
            Growth occurs until terminal spikelet occurs.

            In this case TS is driven fron the FLN

            Duration is (TS-6)*Phyllocgron
          VariableReference ThermalTime: VariableName=[Phenology].ThermalTime.Value()
          MultiplyFunction Target
            SubtractFunction
              VariableReference TST: VariableName=[Structure].TSLN.Value()
              Constant Six: FixedValue=6
            VariableReference Phyllochron: VariableName=[Structure].BasePhyllochron.Value()
        GenericPhase StemElongation: Start=TerminalSpikelet; End=FlagLeaf
          Memo
            The Time for the FlagLeaf to appear post TS

            1.5 * Phyylchron
          VariableReference ThermalTime: VariableName=[Phenology].ThermalTime.Value()
          MultiplyFunction Target
            VariableReference Phyllochron: VariableName=[Structure].BasePhyllochron.Value()
            Constant exp: FixedValue=1.5
        GenericPhase EarDevelopment: Start=FlagLeaf; End=Flowering
          VariableReference ThermalTime: VariableName=[Phenology].ThermalTime.Value()
          Memo
            The Time from flagLeaf  appearanace  to flowering

            Was constant at 100, however have cahnge it 1 Phyllchron.
          MultiplyFunction Target
            VariableReference Phyllochron: VariableName=[Structure].BasePhyllochron.Value()
            Constant exp: FixedValue=1
        GenericPhase GrainDevelopment: Start=Flowering; End=StartGrainFill
          Constant Target: FixedValue=240
          VariableReference ThermalTime: VariableName=[Phenology].ThermalTime.Value()
        GenericPhase GrainFilling: Start=StartGrainFill; End=EndGrainFill
          Constant Target: FixedValue=900
          VariableReference ThermalTime: VariableName=[Phenology].ThermalTime.Value()
        GenericPhase Maturing: Start=EndGrainFill; End=Maturity
          Constant Target: FixedValue=35
          VariableReference ThermalTime: VariableName=[Phenology].ThermalTime.Value()
        GenericPhase Ripening: Start=Maturity; End=HarvestRipe
          Constant Target: FixedValue=300
          VariableReference ThermalTime: VariableName=[Phenology].ThermalTime.Value()
        EndPhase ReadyForHarvesting: Start=HarvestRipe; End=Unused
          VariableReference ThermalTime: VariableName=[Phenology].ThermalTime.Value()
        ZadokPMF Zadok
        OnEventFunction FlagLeafDAS: SetEvent=FlagLeaf; ReSetEvent=never
          Memo
            A function is used to provide flowering date as days after sowing(DAS).
          Constant PreEventValue: FixedValue=0
            Constant PreEventValue: FixedValue=0
          VariableReference PostEventValue: VariableName=[Phenology].DaysAfterSowing
        OnEventFunction FloweringDAS: SetEvent=Flowering; ReSetEvent=never
          Memo
            A function is used to provide flowering date as days after sowing(DAS).
          Constant PreEventValue: FixedValue=0
          VariableReference PostEventValue: VariableName=[Phenology].DaysAfterSowing
        OnEventFunction MaturityDAS: SetEvent=Maturity; ReSetEvent=never
          Memo
            A function is used to provide maturity date as days after sowing(DAS).
          Constant PreEventValue: FixedValue=0
          VariableReference PostEventValue: VariableName=[Phenology].DaysAfterSowing
            VariableReference PostEventValue: VariableName=[Phenology].DaysAfterSowing
      Structure: Initialised=false; Germinated=false; Emerged=false; CohortToInitialise=0; TipToAppear=0; ApexNum=0
        VariableReference ThermalTime: VariableName=[Phenology].ThermalTime.Value()
        MultiplyFunction MainStemNodeAppearanceRate
          Memo Rational
            Based on [Jamieson_SIRIUS_1998] where leaf appearace could be described by a base phyllochron determined between leaves 2 and 7 and a phyllochron that was 70% of base phyllochron for leaves < 2 and 130% of base phyllochron for leaves > 7
          LinearInterpolationFunction LeafStageFactor: XProperty=[Leaf].AppearedCohortNo
            XYPairs: X=[0, 2, 4, 6, 8, 14, 18]; Y=[0.75, 0.9, 1, 1.1, 1.2, 1.1, 1.5]
          LinearInterpolationFunction PhotoPeriodEffect: XProperty=[Phenology].Photoperiod.Value()
            XYPairs: X=[8, 12, 14]; Y=[1, 1, 1]
          VariableReference Phyllochron: VariableName=[Structure].BasePhyllochron.Value()
        MultiplyFunction BranchingRate
          PhaseLookup PotentialBranchingRate
            PhaseLookupValue Vegetative: Start=Emergence; End=TerminalSpikelet
              LinearInterpolationFunction PotentialBranchingRate: XProperty=[Structure].LeafTipsAppeared
                XYPairs: X=[1, 2, 3, 4, 5, 6, 7, 8]; Y=[1, 1, 1, 2, 2, 2, 2, 2]
            PhaseLookupValue Reproductive: Start=TerminalSpikelet; End=HarvestRipe
              Constant Zero: FixedValue=0
          MinimumFunction StressFactors
            LinearInterpolationFunction WSC: XProperty=[Stem].PercentWSC.Value()
              XYPairs: X=[0.2, 0.27]; Y=[1, 1]
            LinearInterpolationFunction Nitrogen: XProperty=[Arbitrator].FN
              XYPairs: X=[0.5, 2, 3]; Y=[0, 1, 1]
            LinearInterpolationFunction Cover: XProperty=[Leaf].CoverTotal
              XYPairs: X=[0, 0.1, 0.25]; Y=[1, 1, 0]
            LinearInterpolationFunction Growth: XProperty=[Structure].MeanTillerGrowthRate.Value()
              XYPairs: X=[0, 0.001, 0.005]; Y=[1, 1, 1]
            LinearInterpolationFunction PhotoPeriodEffect: XProperty=[Phenology].Photoperiod.Value()
              XYPairs: X=[11.99, 12, 14]; Y=[1, 1, 1]
            LinearInterpolationFunction TemperatureEffect: XProperty=[Weather].MeanT
              XYPairs: X=[4, 10, 14]; Y=[1, 1, 1]
        PhaseLookup BranchMortality
          PhaseLookupValue MortalityPhase: Start=FlagLeaf; End=Flowering
            MultiplyFunction Mortality
              LinearInterpolationFunction MortalityPerDegDay: XProperty=[Structure].MeanTillerGrowthRate.Value()
                XYPairs: X=[0, 0.005, 0.005]; Y=[0.002, 0, 0]
              VariableReference ThermalTime: VariableName=[Phenology].ThermalTime.Value()
        HeightFunction HeightModel
          LinearInterpolationFunction PotentialHeight: XProperty=[Phenology].Stage
            XYPairs: X=[3, 4, 5, 6, 7]; Y=[10, 200, 1000, 1100, 1200]
          LinearInterpolationFunction WaterStress: XProperty=[Barley].WaterSupplyDemandRatio
            XYPairs: X=[0.3, 1]; Y=[0, 1]
        MovingAverageFunction MeanTillerGrowthRate: NumberOfDays=5; InitialValue=0
          DivideFunction TillerGrowthRate
            VariableReference DailyGrowth: VariableName=[Arbitrator].DM.TotalFixationSupply
            VariableReference ThermalTime: VariableName=[Phenology].ThermalTime.Value()
            VariableReference StemPopulation: VariableName=[Structure].TotalStemPopn
        MovingAverageFunction MeanPhyllochron: NumberOfDays=300; InitialValue=80
          VariableReference Phyllochron: VariableName=[Structure].MainStemNodeAppearanceRate.Value()
        DivideFunction HaunStageTerminalSpikelet
          SubtractFunction FLNlessIntercept
            VariableReference FinalLeafNumber: VariableName=[Structure].MainStemFinalNodeNumber.Value()
            Constant Intercept: FixedValue=2.85
          Constant Slope: FixedValue=1.1
        AddFunction HaunStage
          VariableReference AppearedLeaves: VariableName=[Leaf].ExpandedCohortNo
          VariableReference ProportionOfExpandingLeaf: VariableName=[Leaf].NextExpandingLeafProportion
        PhaseLookup ThermalTimeP
          PhaseLookupValue SoilTemperature: Start=Sowing; End=TerminalSpikelet
            SoilTemperatureFunction: maxt_soil_surface=20; mint_soil_surface=10
              XYPairs: X=[0, 30, 40]; Y=[0, 30, 0]
          PhaseLookupValue AirTemperature: Start=TerminalSpikelet; End=HarvestRipe
            AirTemperatureFunction
              XYPairs: X=[0, 30, 40]; Y=[0, 30, 0]
        MinimumFunction MainStemFinalNodeNumber
          Memo
            An event driven method of calculating the final leaf number, Base on Martin et al 1998

            Event  occurs when vegtative stage switches to Reproductive, either 4 or 6 leaf appearance.

            If event occurs when PhotoPeriod is decreasing, then final leaf number is the MLN -2.

            Otherwise

            FLN = MLN - lc(PPS)

            For Drummond these values  MLN = 17 and Lc = 0.56

            THe model allows these to be cultivar deined.
          Constant MaxLN: FixedValue=15
          MinimumFunction FLN
            OnEventFunction AtLeafSix: SetEvent=VS; ReSetEvent=never
              VariableReference PreEventValue: VariableName=[Structure].MaxLN.Value()
              MaximumFunction PostEventValue
                Constant Zero: FixedValue=0
                LessThanFunction
                  VariableReference TestVariable: VariableName=[Phenology].PhotoperiodDeltaFunction.Value()
                  Constant Zero: FixedValue=0
                  SubtractFunction IfTrue
                    VariableReference MLN: VariableName=[Structure].MaxLN.Value()
                    Constant Two: FixedValue=2
                  SubtractFunction IfFalse
                    VariableReference MLN: VariableName=[Structure].MaxLN.Value()
                    MultiplyFunction Ic
                      VariableReference PP: VariableName=[Phenology].Photoperiod.Value()
                      VariableReference PPS: VariableName=[Structure].PPSlope.Value()
            VariableReference MLN: VariableName=[Structure].MaxLN.Value()
        MinimumFunction TSLN
          Memo
            Terminal spikelet leaf number

            This value is highly related to final leaf number, The FLN is probably dependent on TSLN rather than as cuurently defined.

            Calculation baed on Sonego 2000

            TSLN = FLN*0.995 - 1.95
          VariableReference MLN: VariableName=[Structure].MaxLN.Value()
          SubtractFunction
            MultiplyFunction
              VariableReference FLN: VariableName=[Structure].MainStemFinalNodeNumber.Value()
              Constant PS: FixedValue=0.995
            Constant LVS: FixedValue=1.95
        Constant MaxLN: FixedValue=17
        Constant BasePhyllochron: FixedValue=100; Units=oC.d
          Memo
            This is based on a range of 96.4 - 119.7°Cd for different varieties of barley measured in a previous experiment(Alzueta et al. 2012).
        Constant PPSlope: FixedValue=0.5
      ReproductiveOrgan Grain: GrowthRespiration=0; MaintenanceRespiration=0; RipeStage=Ripe
        Memo
          Grain model current a pure supply model, that is currently uses  a partition model to determine amount

          The grain Number model model left here does nothing, it is there so we can switch to it later if required.

          N conc values are from Zhao et al 2009
        Biomass Live
        Biomass Dead
        Constant MaxNConcDailyGrowth: FixedValue=0.03
        Constant WaterContent: FixedValue=0.12
        Constant MinimumNConc: FixedValue=0.02; Units=0.045
        Constant MaximumNConc: FixedValue=0.0192
          Memo
            Grain N concentration of 1.92 % according to Procrop (ref xx)
        Constant MaximumPotentialGrainSize: FixedValue=0.043; Units=g
        PhaseBasedSwitch NitrogenDemandSwitch: Start=Germination; End=Maturity
        AccumulateFunction AccumThermalTime: StartStageName=Flowering; EndStageName=Maturity; FractionRemovedOnCut=0; FractionRemovedOnHarvest=0; FractionRemovedOnGraze=0; FractionRemovedOnPrune=0
          VariableReference DailyThermalTimeValue: VariableName=[Phenology].ThermalTime.Value()
        AirTemperatureFunction FillingRate
          XYPairs: X=[0, 26, 30, 35]; Y=[0, 0.0015, 0.0015, 0.0015]
        PartitionFractionDemandFunction DMDemandFunction
          Memo
            Currently using Partitioning model based on SIRIUS rather tha grin filling model.
          PhaseLookup PartitionFraction
            PhaseLookupValue InitialPhase: Start=Flowering; End=StartGrainFill
              Constant: FixedValue=0.01
            PhaseLookupValue LinearPhase: Start=StartGrainFill; End=EndGrainFill
              MultiplyFunction
                Constant: FixedValue=0.6
                LinearInterpolationFunction FW: XProperty=[Leaf].Fw
                  XYPairs: X=[0, 0.5, 1]; Y=[1.5, 1, 1]
            PhaseLookupValue Ripening: Start=EndGrainFill; End=HarvestRipe
              Constant: FixedValue=0
        ExpressionFunction Protein
          Expression=([Grain].Live.N + [Grain].Dead.N)/([Grain].Live.Wt + [Grain].Dead.Wt) * 100 * 5.71
        DivideFunction GrowthRateGrainDevelopment
          AccumulateFunction AccumulatedGrowth: StartStageName=FlagLeaf; EndStageName=StartGrainFill; FractionRemovedOnCut=0; FractionRemovedOnHarvest=0; FractionRemovedOnGraze=0; FractionRemovedOnPrune=0
            VariableReference DailyBiomassProduction: VariableName=[Arbitrator].DM.TotalFixationSupply
          AccumulateFunction DaysOfGrainDevelopment: StartStageName=FlagLeaf; EndStageName=StartGrainFill; FractionRemovedOnCut=0; FractionRemovedOnHarvest=0; FractionRemovedOnGraze=0; FractionRemovedOnPrune=0
            Constant LenthOfADay: FixedValue=1; Units=days/day
        Constant InitialGrainProportion: FixedValue=0.2
        PhaseLookup NFillingRate
          PhaseLookupValue GrainFilling: Start=Flowering; End=EndGrainFill
            FillingRateFunction
              VariableReference NumberFunction: VariableName=[Grain].NumberFunction.Value()
              AddFunction FillingDuration
                VariableReference FloweringToGrainFilling: VariableName=[Phenology].GrainDevelopment.Target.Value()
                VariableReference GrainFilling: VariableName=[Phenology].GrainFilling.Target.Value()
              VariableReference ThermalTime: VariableName=[Phenology].ThermalTime.Value()
              MultiplyFunction PotentialSizeIncrement
                Constant MaximumFinalNConc: FixedValue=0.026; Units=g/g
                VariableReference MaximumSize: VariableName=[Grain].MaximumPotentialGrainSize.Value()
        BiomassRemoval BiomassRemovalDefaults
          OrganBiomassRemovalType Harvest: FractionLiveToRemove=1; FractionDeadToRemove=0; FractionLiveToResidue=0; FractionDeadToResidue=0
          OrganBiomassRemovalType Cut: FractionLiveToRemove=1; FractionDeadToRemove=0; FractionLiveToResidue=0; FractionDeadToResidue=0
          OrganBiomassRemovalType Prune: FractionLiveToRemove=0; FractionDeadToRemove=0; FractionLiveToResidue=0.8; FractionDeadToResidue=0
          OrganBiomassRemovalType Graze: FractionLiveToRemove=0.6; FractionDeadToRemove=0; FractionLiveToResidue=0.2; FractionDeadToResidue=0
          OrganBiomassRemovalType Thin: FractionLiveToRemove=0; FractionDeadToRemove=0; FractionLiveToResidue=0.05; FractionDeadToResidue=0
        HoldFunction NumberFunction: WhenToHold=Flowering
          MultiplyFunction ValueToHold
            Constant GrainsPerGramOfStem: FixedValue=22; Units=grains
            VariableReference StemMass: VariableName=[StemPlusSpike].Wt
              VariableReference StemMass: VariableName=[StemPlusSpike].Wt
      Root: GrowthRespiration=0; MaintenanceRespiration=0
        CompositeBiomass Live: Propertys=[[Root].LayerLive]
        CompositeBiomass Dead: Propertys=[[Root].LayerDead]
        LinearInterpolationFunction KLModifier: XProperty=[Leaf].LAI
          XYPairs: X=[0, 3]; Y=[1, 1]
        Constant SoilWaterEffect: FixedValue=1
        Constant MaxDailyNUptake: FixedValue=20
        Constant SenescenceRate: FixedValue=0.005
        Constant StructuralFraction: FixedValue=1
        Constant MaximumRootDepth: FixedValue=1000000
        PhaseLookup PartitionFraction
          PhaseLookupValue PreEmergence: Start=Germination; End=Emergence
            Constant Value: FixedValue=0
          PhaseLookupValue PreFlowering: Start=Emergence; End=Flowering
            Constant Value: FixedValue=0.2
          PhaseLookupValue PostFlowering: Start=Flowering; End=EndGrainFill
            Constant Value: FixedValue=0
        Constant MaximumNConc: FixedValue=0.01
        Constant MinimumNConc: FixedValue=0.01
        PhaseLookup RootFrontVelocity
          PhaseLookupValue PreEmergence: Start=Germination; End=Emergence
            Constant Value: FixedValue=5
          PhaseLookupValue PostEmergence: Start=Emergence; End=Maturity
            Constant Value: FixedValue=20
        PhaseBasedSwitch NitrogenDemandSwitch: Start=Germination; End=Maturity
        BiomassRemoval BiomassRemovalDefaults
          OrganBiomassRemovalType Harvest: FractionLiveToRemove=0; FractionDeadToRemove=0; FractionLiveToResidue=0.2; FractionDeadToResidue=0
          OrganBiomassRemovalType Cut: FractionLiveToRemove=0; FractionDeadToRemove=0; FractionLiveToResidue=0.3; FractionDeadToResidue=0
          OrganBiomassRemovalType Prune: FractionLiveToRemove=0; FractionDeadToRemove=0; FractionLiveToResidue=0.1; FractionDeadToResidue=0
          OrganBiomassRemovalType Graze: FractionLiveToRemove=0; FractionDeadToRemove=0; FractionLiveToResidue=0.15; FractionDeadToResidue=0
          OrganBiomassRemovalType Thin: FractionLiveToRemove=0; FractionDeadToRemove=0; FractionLiveToResidue=0.05; FractionDeadToResidue=0
        LinearInterpolationFunction KNO3: XProperty=[Root].LengthDensity
          XYPairs: X=[0, 0.004]; Y=[0.002, 0.02]
        LinearInterpolationFunction KNH4: XProperty=[Root].LengthDensity
          XYPairs: X=[0, 0.004]; Y=[0.001, 0.01]
        LinearInterpolationFunction NUptakeSWFactor: XProperty=[Root].RWC
          XYPairs: X=[0, 0.2, 1]; Y=[1, 1, 1]
        Constant InitialDM: FixedValue=0.2; Units=g/plant
        Constant SpecificRootLength: FixedValue=40; Units=m/g
      Leaf: MaxCover=1; Albedo=0.2; Gsmax=0.015; R50=150; MicroClimatePresent=true; KDead=0.3; MaximumMainStemLeafNumber=30
        zero: GrowthRespiration, MaintenanceRespiration, CurrentExpandingLeaf, StartFractionExpanded, FractionNextleafExpanded, DeadNodesYesterday, FRGR, PotentialEP, DMConversionEfficiency, TipsAtEmergence, CohortsAtInitialisation, FractionDied
        LeafCohort InitialLeaves[1]: DeltaWaterConstrainedArea=0; DeltaCarbonConstrainedArea=0; Rank=1; Area=200; MaintenanceRespiration=0
        LeafCohort InitialLeaves[2]: DeltaWaterConstrainedArea=0; DeltaCarbonConstrainedArea=0; Rank=2; Area=0; MaintenanceRespiration=0
        CompositeBiomass Live: Propertys=[[Leaf].CohortLive]
        CompositeBiomass Dead: Propertys=[[Leaf].CohortDead]
        ArrayBiomass CohortArrayLive: Propertys=[[Leaf].Live]; ArraySize=[Leaf].MaxNodeNo
        ArrayBiomass CohortArrayDead: Propertys=[[Leaf].Dead]; ArraySize=[Leaf].MaxNodeNo
        LeafCohortParameters CohortParameters
          Constant NReallocationFactor: FixedValue=1
          Constant MaintenanceRespirationFunction: FixedValue=0
          Constant NRetranslocationFactor: FixedValue=0.03
          Constant DMReallocationFactor: FixedValue=0
          Constant DMRetranslocationFactor: FixedValue=0.1
          MinimumFunction CellDivisionStress
            LinearInterpolationFunction WaterStressFactor: XProperty=[Barley].WaterSupplyDemandRatio
              XYPairs: X=[0, 1]; Y=[0.5, 1]
            LinearInterpolationFunction NitrogenStressFactor: XProperty=[Barley].Leaf.Fn
              XYPairs: X=[0, 0.5, 1]; Y=[0.1, 0.1, 1]
          MinimumFunction ExpansionStress
            LinearInterpolationFunction WaterStress: XProperty=[Barley].WaterSupplyDemandRatio
              XYPairs: X=[0, 0.7, 1]; Y=[0, 1, 1]
            LinearInterpolationFunction TemperatureEffect: XProperty=[Weather].MeanT
              XYPairs: X=[0, 12, 14]; Y=[0, 1, 1]
          MultiplyFunction MaxArea
            Constant AreaLargestLeaves: FixedValue=5000; Units=mm^2
            LinearInterpolationFunction AgeFactor: XProperty=[Phenology].Stage
              XYPairs: X=[3, 4, 5, 6, 7]; Y=[0.2, 0.4, 1, 0.4, 0.2]
              Memo
                Growth Stages and Phenology
                1 Sowing
                2 Germination
                3 Emergence
                4 VS
                5 TS
                6 FLag leaf
                7 Flowering
                8 SGF
                9 EGF
                10 HR
                11
          MultiplyFunction GrowthDuration
            Constant Multiplier: FixedValue=4
            VariableReference Phyllochron: VariableName=[Structure].MainStemNodeAppearanceRate.Value()
          PhaseLookup LagDurationP
            PhaseLookupValue VegetativeGrowth: Start=Emergence; End=TerminalSpikelet
              MultiplyFunction LagDuration
                VariableReference Phyllochron: VariableName=[Structure].MainStemNodeAppearanceRate.Value()
                LinearInterpolationFunction AgeFactor: XProperty=[Phenology].Stage
                  XYPairs: X=[0, 4, 9, 11]; Y=[1, 7, 9, 0]
                  Memo
                    Growth Stages and Phenology
                    1 Sowing
                    2 Germination
                    3 Emergence
                    4 VS
                    5 TS
                    6 FLag leaf
                    7 Flowering
                    8 SGF
                    9 EGF
                    10 HR
                    11
                Constant Multiplier: FixedValue=1
            PhaseLookupValue StemElongation: Start=TerminalSpikelet; End=Maturity
              SubtractFunction LagDuration
                AddFunction ThermalTimeToRipe
                  VariableReference GrainDevelopment: VariableName=[Phenology].GrainDevelopment.Target.Value()
                  VariableReference GrainFilling: VariableName=[Phenology].GrainFilling.Target.Value()
                  VariableReference Maturing: VariableName=[Phenology].Maturing.Target.Value()
                  VariableReference Ripening: VariableName=[Phenology].Ripening.Target.Value()
                ExpressionFunction SenescenceDuration: Expression=[Leaf].CohortParameters.SenescenceDuration.Value()
          MultiplyFunction LagDuration
            VariableReference Phyllochron: VariableName=[Structure].MainStemNodeAppearanceRate.Value()
            LinearInterpolationFunction AgeFactor: XProperty=[Phenology].Stage
              XYPairs: X=[0, 4, 9, 11]; Y=[1, 2, 3, 0]
              Memo
                Growth Stages and Phenology
                1 Sowing
                2 Germination
                3 Emergence
                4 VS
                5 TS
                6 FLag leaf
                7 Flowering
                8 SGF
                9 EGF
                10 HR
                11
            Constant Multiplier: FixedValue=1
          MultiplyFunction SenescenceDuration
            Constant Multiplier: FixedValue=1
            VariableReference Phyllochron: VariableName=[Structure].MainStemNodeAppearanceRate.Value()
            LinearInterpolationFunction: XProperty=[Leaf].CohortParameters.MaxArea.Value()
              XYPairs: X=[0, 2000, 4500, 6000]; Y=[1, 2, 3, 4]
            LinearInterpolationFunction AgeFactor: XProperty=[Phenology].Stage
              XYPairs: X=[2, 4, 9, 11]; Y=[2, 2, 6, 0]
              Memo
                Growth Stages and Phenology
                1 Sowing
                2 Germination
                3 Emergence
                4 VS
                5 TS
                6 FLag leaf
                7 Flowering
                8 SGF
                9 EGF
                10 HR
                11
          Constant DetachmentLagDuration: FixedValue=1000000
          Constant DetachmentDuration: FixedValue=1000000
          Constant RelativeBranchLeafSize: FixedValue=1
          LinearInterpolationFunction MaximumNConc: XProperty=[Phenology].Stage
            XYPairs: X=[3, 4, 6]; Y=[0.08, 0.05, 0.02]
          LinearInterpolationFunction CriticalNConc: XProperty=[Phenology].Stage
            XYPairs: X=[3, 4, 6]; Y=[0.07, 0.04, 0.015]
          LinearInterpolationFunction MinimumNConc: XProperty=[Phenology].Stage
            XYPairs: X=[3, 4]; Y=[0.01, 0.005]
          AddFunction DroughtInducedLagAcceleration
            Constant One: FixedValue=1
            MultiplyFunction Stress
              Constant StressResponseCoefficient: FixedValue=1
              LinearInterpolationFunction StressFactor: XProperty=[Barley].WaterSupplyDemandRatio
                XYPairs: X=[0, 0.7]; Y=[1, 0]
          AddFunction DroughtInducedSenAcceleration: same as Replacements.Barley.Leaf.CohortParameters.DroughtInducedLagAcceleration
          LinearInterpolationFunction SpecificLeafAreaMax: XProperty=[Phenology].Stage
            XYPairs: X=[4, 5]; Y=[35000, 50000]
            Memo
              Growth Stages and Phenology
              1 Sowing
              2 Germination
              3 Emergence
              4 VS
              5 TS
              6 FLag leaf
              7 Flowering
              8 SGF
              9 EGF
              10 HR
              11
          Constant SpecificLeafAreaMin: FixedValue=25000
          Constant InitialNConc: FixedValue=0
          Constant NonStructuralFraction: FixedValue=0.5
          Constant LeafSizeShapeParameter: FixedValue=0.3
          Constant SenessingLeafRelativeSize: FixedValue=1; Units=0-1
          MultiplyFunction ShadeInducedSenescenceRate
            LinearInterpolationFunction RatePerDegDay: XProperty=[Leaf].CohortCurrentRankCoverAbove
              XYPairs: X=[0.99, 1]; Y=[0, 0]
              Memo
                1% per degree day means it takes one phyllochron for a shaded leaf to fully sceness
            VariableReference ThermalTime: VariableName=[Phenology].ThermalTime.Value()
          PhaseLookup StructuralFraction
            PhaseLookupValue VegetativeGrowth: Start=Emergence; End=StartGrainFill
              Constant: FixedValue=0.5
            PhaseLookupValue StemElongation: Start=StartGrainFill; End=Maturity
              Constant: FixedValue=0
        RUEModel Photosynthesis
          Constant RUE: FixedValue=1.5
          WeightedTemperatureFunction FT: MaximumTemperatureWeighting=1
            XYPairs: X=[0, 4, 9, 15, 40]; Y=[0, 0, 1, 1, 1]
          LinearInterpolationFunction FVPD: XProperty=[Leaf].Photosynthesis.VPD
            XYPairs: X=[0, 10, 50]; Y=[1, 1, 1]
          LinearInterpolationFunction FN: XProperty=[Leaf].Fn
            XYPairs: X=[0, 1, 1.5]; Y=[0, 1, 1]
          LinearInterpolationFunction FW: XProperty=[Leaf].Fw
            XYPairs: X=[0, 0.3, 1]; Y=[0, 1, 1]
          RUECO2Function FCO2: PhotosyntheticPathway=C3
          VariableReference RadnInt: VariableName=[Leaf].RadIntTot
        LinearInterpolationFunction FrostFraction: XProperty=[Weather].MinT
          XYPairs: X=[-1, 0]; Y=[0, 0]
        VariableReference ThermalTime: VariableName=[Phenology].ThermalTime.Value()
        MinimumFunction FRGRFunction
          VariableReference RUE_FT: VariableName=[Leaf].Photosynthesis.FT.Value()
          MinimumFunction Others
            VariableReference RUE_FN: VariableName=[Leaf].Photosynthesis.FN.Value()
            VariableReference RUE_FVPD: VariableName=[Leaf].Photosynthesis.FVPD.Value()
        BiomassRemoval BiomassRemovalDefaults
          OrganBiomassRemovalType Harvest: FractionLiveToRemove=0; FractionDeadToRemove=0; FractionLiveToResidue=0.3; FractionDeadToResidue=0.3
          OrganBiomassRemovalType Cut: FractionLiveToRemove=0.8; FractionDeadToRemove=0.8; FractionLiveToResidue=0; FractionDeadToResidue=0
          OrganBiomassRemovalType Prune: FractionLiveToRemove=0; FractionDeadToRemove=0; FractionLiveToResidue=0.6; FractionDeadToResidue=0.6
          OrganBiomassRemovalType Graze: FractionLiveToRemove=0.6; FractionDeadToRemove=0.6; FractionLiveToResidue=0.1; FractionDeadToResidue=0.1
          OrganBiomassRemovalType Thin: FractionLiveToRemove=0; FractionDeadToRemove=0; FractionLiveToResidue=0.05; FractionDeadToResidue=0.05
        Constant ExtinctionCoeff: FixedValue=0.5
        Constant StructuralFraction: FixedValue=0
        Constant DMConversionEfficiencyFunction: FixedValue=1; Units=0-1
      GenericOrgan Spike
        PopulationBasedDemandFunction DMDemandFunction
          VariableReference ThermalTime: VariableName=[Phenology].ThermalTime.Value()
          Constant ExpansionStress: FixedValue=1
          VariableReference OrganPopulation: VariableName=[Spike].HeadNumber.Value()
          Constant StartStage: FixedValue=4.5
          Constant MaximumOrganWt: FixedValue=0.2
          AddFunction GrowthDuration
            VariableReference EarlyReproductive: VariableName=[Phenology].EarlyReproductive.Target.Value()
            VariableReference GrainDevelopment: VariableName=[Phenology].GrainDevelopment.Target.Value()
        Biomass Live
        Biomass Dead
        Constant NReallocationFactor: FixedValue=0
        Constant NRetranslocationFactor: FixedValue=0.1
        Constant MaximumNConc: FixedValue=0.01
        Constant StructuralFraction: FixedValue=0.9
        Constant SenescenceRate: FixedValue=0; Units=/d
        Constant MinimumNConc: FixedValue=0.003
        MultiplyFunction HeadNumber
          Constant FertileTillers: FixedValue=1
          VariableReference StemPopulation: VariableName=[Structure].TotalStemPopn
        BiomassRemoval BiomassRemovalDefaults
          OrganBiomassRemovalType Harvest: FractionLiveToRemove=0.5; FractionDeadToRemove=0; FractionLiveToResidue=0.1; FractionDeadToResidue=0
          OrganBiomassRemovalType Cut: FractionLiveToRemove=0.8; FractionDeadToRemove=0; FractionLiveToResidue=0; FractionDeadToResidue=0
          OrganBiomassRemovalType Prune: FractionLiveToRemove=0; FractionDeadToRemove=0; FractionLiveToResidue=0.6; FractionDeadToResidue=0
          OrganBiomassRemovalType Graze: FractionLiveToRemove=0.6; FractionDeadToRemove=0; FractionLiveToResidue=0.2; FractionDeadToResidue=0
          OrganBiomassRemovalType Thin: FractionLiveToRemove=0; FractionDeadToRemove=0; FractionLiveToResidue=0.05; FractionDeadToResidue=0
        PhaseBasedSwitch NitrogenDemandSwitch: Start=Emergence; End=StartGrainFill
        PhaseLookup DMRetranslocationFactor
          PhaseLookupValue VegetativeGrowth: Start=Emergence; End=StartGrainFill
            Constant DMRetranslocationFactor: FixedValue=0
          PhaseLookupValue ReproductiveGrowth: Start=StartGrainFill; End=EndGrainFill
            Constant DMRetranslocationFactor: FixedValue=0.5
        Constant InitialWtFunction: FixedValue=0; Units=g/m^2
        Constant DetachmentRateFunction: FixedValue=0; Units=/d
        Constant MaintenanceRespirationFunction: FixedValue=0; Units=0-1
        Constant DMConversionEfficiency: FixedValue=1; Units=0-1
      GenericOrgan Stem
        Memo
          The stem model  currently uses  a partition model to determine amount allocated

          N conc values are from Zhao et al 2009
        Biomass Live
        Biomass Dead
        PhaseLookup StructuralFraction
          PhaseLookupValue VegetativeGrowth: Start=Sowing; End=FlagLeaf
            Constant Fraction: FixedValue=0.7
          PhaseLookupValue ReproductiveGrowth: Start=FlagLeaf; End=Flowering
            Constant Fraction: FixedValue=0.7
          PhaseLookupValue GrainFilling: Start=Flowering; End=EndGrainFill
            Constant Fraction: FixedValue=1
          PhaseLookupValue EndStemGrowth: Start=EndGrainFill; End=Maturity
            Constant Fraction: FixedValue=1
        Constant SenescenceRate: FixedValue=0; Units=/d
        LinearInterpolationFunction MaximumNConc: XProperty=[Phenology].Stage
          XYPairs: X=[3, 4, 5, 6]; Y=[0.045, 0.045, 0.045, 0.045]
        LinearInterpolationFunction MinimumNConc: XProperty=[Phenology].Stage
          XYPairs: X=[3, 4, 6]; Y=[0.0025, 0.0025, 0.0025]
        PhaseBasedSwitch NitrogenDemandSwitch: Start=Emergence; End=StartGrainFill
        Constant NReallocationFactor: FixedValue=0
        PhaseLookup NRetranslocationFactor
          PhaseLookupValue VegetativeGrowth: Start=Sowing; End=Flowering
            Constant Fraction: FixedValue=0
          PhaseLookupValue ReproductiveGrowth: Start=Flowering; End=HarvestRipe
            Constant Fraction: FixedValue=0.5
        PhaseLookup DMRetranslocationFactor: same as Replacements.Barley.Spike.DMRetranslocationFactor
        PartitionFractionDemandFunction DMDemandFunction
          PhaseLookup PartitionFraction
            PhaseLookupValue PreStemElongation: Start=Emergence; End=TerminalSpikelet
              Constant StemFraction: FixedValue=0.4
            PhaseLookupValue StemElongation: Start=TerminalSpikelet; End=FlagLeaf
              Constant StemFraction: FixedValue=0.6
            PhaseLookupValue EarEmergence: Start=FlagLeaf; End=Flowering
              Constant StemFraction: FixedValue=0.4
            PhaseLookupValue PostEarEmergence: Start=Flowering; End=StartGrainFill
              Constant StemFraction: FixedValue=0.4
              SubtractFunction
                Constant: FixedValue=0
            PhaseLookupValue BGF: Start=StartGrainFill; End=EndGrainFill
              Constant StemFraction: FixedValue=0.1
              SubtractFunction
                Constant: FixedValue=0
            PhaseLookupValue PostGrainFill: Start=EndGrainFill; End=HarvestRipe
              Constant One: FixedValue=0
              VariableReference: VariableName=[Grain].PartitionFraction.Value()
        BiomassRemoval BiomassRemovalDefaults: same as Replacements.Barley.Spike.BiomassRemovalDefaults
        DivideFunction PercentWSC
          VariableReference WSC: VariableName=[Stem].Live.NonStructuralWt
          VariableReference StemWt: VariableName=[Stem].Live.Wt
        Constant InitialWtFunction: FixedValue=0; Units=g/m^2
        Constant DetachmentRateFunction: FixedValue=0; Units=/d
        Constant MaintenanceRespirationFunction: FixedValue=0; Units=0-1
        Constant DMConversionEfficiency: FixedValue=1; Units=0-1
      CompositeBiomass AboveGround
        Propertys=[[Leaf].Live, [Leaf].Dead, [Stem].Live, [Stem].Dead, [Spike].Live, [Spike].Dead, [Grain].Live, [Grain].Dead]
      CompositeBiomass AboveGroundLive: Propertys=[[Leaf].Live, [Stem].Live, [Spike].Live, [Grain].Live]
      CompositeBiomass AboveGroundDead: Propertys=[[Leaf].Dead, [Stem].Dead, [Spike].Dead, [Grain].Dead]
      CompositeBiomass BelowGround: Propertys=[[Root].Live, [Root].Dead]
      CompositeBiomass Total
        Propertys=[[Leaf].Live, [Leaf].Dead, [Stem].Live, [Stem].Dead, [Root].Live, [Root].Dead, [Spike].Live, [Spike].Dead, [Grain].Live, [Grain].Dead]
      CompositeBiomass TotalLive
        Propertys=[[Leaf].Live, [Stem].Live, [Root].Live, [Spike].Live, [Grain].Live]
      CompositeBiomass TotalDead
        Propertys=[[Leaf].Dead, [Stem].Dead, [Root].Dead, [Spike].Dead, [Grain].Dead]
      CompositeBiomass Ear: Propertys=[[Spike].Live, [Grain].Live, [Spike].Dead, [Grain].Dead]
        Memo
          The Ear composite biomass object includes the Live and dead pools of all organs within the Ear to allow output for total dry matter and Nutrient contents, including total structural, non-structural and metabolic pools.
      CompositeBiomass StemPlusSpike: Propertys=[[Stem].Live, [Spike].Live, [Stem].Dead, [Spike].Dead]
      CultivarFolder Cultivars
        Cultivar Valetta
          Command:
            [Phenology].MinimumLeafNumber.FixedValue = 9
            [Phenology].VrnSensitivity.FixedValue = 7
            [Phenology].PpSensitivity.FixedValue = 3
            [Structure].BasePhyllochron.FixedValue = 80
        Cultivar Triumph
          Command:
            [Phenology].MinimumLeafNumber.FixedValue = 9
            [Phenology].VrnSensitivity.FixedValue = 7
            [Phenology].PpSensitivity.FixedValue = 3
            [Structure].BasePhyllochron.FixedValue = 80
        Cultivar Boss
          Command:
            [Phenology].MinimumLeafNumber.FixedValue = 9
            [Phenology].VrnSensitivity.FixedValue = 7
            [Phenology].PpSensitivity.FixedValue = 3
            [Structure].BasePhyllochron.FixedValue = 80
        Cultivar Cellar
          Command:
            [Phenology].MinimumLeafNumber.FixedValue = 9
            [Phenology].VrnSensitivity.FixedValue = 7
            [Phenology].PpSensitivity.FixedValue = 3
            [Structure].BasePhyllochron.FixedValue = 80
        Cultivar County
          Command:
            [Phenology].MinimumLeafNumber.FixedValue = 9
            [Phenology].VrnSensitivity.FixedValue = 7
            [Phenology].PpSensitivity.FixedValue = 3
            [Structure].BasePhyllochron.FixedValue = 80
        Cultivar Dash
          Command:
            [Phenology].MinimumLeafNumber.FixedValue = 9
            [Phenology].VrnSensitivity.FixedValue = 7
            [Phenology].PpSensitivity.FixedValue = 3
            [Structure].BasePhyllochron.FixedValue = 80
        Cultivar Doyen
          Command:
            [Phenology].MinimumLeafNumber.FixedValue = 9
            [Phenology].VrnSensitivity.FixedValue = 7
            [Phenology].PpSensitivity.FixedValue = 3
            [Structure].BasePhyllochron.FixedValue = 80
        Cultivar Omaka
          Command:
            [Phenology].MinimumLeafNumber.FixedValue = 9
            [Phenology].VrnSensitivity.FixedValue = 7
            [Phenology].PpSensitivity.FixedValue = 3
            [Structure].BasePhyllochron.FixedValue = 80
        Cultivar Optic
          Command:
            [Phenology].MinimumLeafNumber.FixedValue = 9
            [Phenology].VrnSensitivity.FixedValue = 7
            [Phenology].PpSensitivity.FixedValue = 3
            [Structure].BasePhyllochron.FixedValue = 80
        Cultivar Pyramid
          Command:
            [Phenology].MinimumLeafNumber.FixedValue = 9
            [Phenology].VrnSensitivity.FixedValue = 7
            [Phenology].PpSensitivity.FixedValue = 3
            [Structure].BasePhyllochron.FixedValue = 80
        Cultivar Sherwood
          Command:
            [Phenology].MinimumLeafNumber.FixedValue = 9
            [Phenology].VrnSensitivity.FixedValue = 7
            [Phenology].PpSensitivity.FixedValue = 3
            [Structure].BasePhyllochron.FixedValue = 80
        Cultivar Tavern
          Command:
            [Phenology].MinimumLeafNumber.FixedValue = 9
            [Phenology].VrnSensitivity.FixedValue = 7
            [Phenology].PpSensitivity.FixedValue = 3
            [Structure].BasePhyllochron.FixedValue = 80
        Cultivar Vortex
          Command:
            [Phenology].MinimumLeafNumber.FixedValue = 9
            [Phenology].VrnSensitivity.FixedValue = 7
            [Phenology].PpSensitivity.FixedValue = 3
            [Structure].BasePhyllochron.FixedValue = 80
        Cultivar Grimmett
          Command:
            [Phenology].MinimumLeafNumber.FixedValue = 9
            [Phenology].VrnSensitivity.FixedValue = 7
            [Phenology].PpSensitivity.FixedValue = 3
            [Structure].BasePhyllochron.FixedValue = 80
        Cultivar Booma
          Command:
            [Phenology].MinimumLeafNumber.FixedValue = 9
            [Phenology].VrnSensitivity.FixedValue = 7
            [Phenology].PpSensitivity.FixedValue = 3
            [Structure].BasePhyllochron.FixedValue = 80
        Cultivar Quencher
          Command:
            [Phenology].MinimumLeafNumber.FixedValue = 9
            [Phenology].VrnSensitivity.FixedValue = 7
            [Phenology].PpSensitivity.FixedValue = 3
            [Structure].BasePhyllochron.FixedValue = 80
        Cultivar Retriever
          Command:
            [Phenology].MinimumLeafNumber.FixedValue = 9
            [Phenology].VrnSensitivity.FixedValue = 7
            [Phenology].PpSensitivity.FixedValue = 3
            [Structure].BasePhyllochron.FixedValue = 80
    Report DailyReport: EventNames=[Clock].DoReport
      VariableNames:
        [Clock].Today
        [Weather].MeanT
        [Soil].SoilWater.SW
        [Soil].SoilWater.SWmm
        sum([Soil].SoilNitrogen.TotalN) as ProfileN
        [Soil].SoilNitrogen.TotalN
        sum([Soil].SoilNitrogen.NO3) as TotalSoilN
        sum([Soil].SoilWater.SWmm) as ProfileWater
        [Barley].AboveGround.N
        [Barley].AboveGroundLive.Wt as AboveGround_LiveWt
        [Barley].AboveGroundLive.N
        [Barley].AboveGroundLive.N as AboveGround_LiveN
        [Barley].AboveGround.Wt as TotalAboveGroundWt
        [Barley].AboveGroundDead.N
        [Barley].AboveGroundDead.Wt
        [Barley].Arbitrator.DMDemand
        [Barley].Arbitrator.DM.TotalFixationSupply
        [Barley].Ear.N
        [Barley].Ear.Nconc
        [Barley].Ear.Wt
        [Barley].Grain.N
        [Barley].Grain.NConc
        [Barley].Grain.Number
        [Barley].Grain.Size
        [Barley].Grain.Wt
        [Barley].Grain.Live.Wt
        [Barley].Leaf.AppearedCohortNo
        [Barley].Leaf.CoverDead
        [Barley].Leaf.CoverGreen
        [Barley].Leaf.CoverTotal
        [Barley].Leaf.Dead.N
        [Barley].Leaf.Dead.NConc
        [Barley].Leaf.Dead.Wt
        [Barley].Leaf.DeadCohortNo
        [Barley].Leaf.SenescingCohortNo
        [Barley].Leaf.ExpandedCohortNo
        [Barley].Leaf.Fn
        [Barley].Leaf.Fw
        [Barley].Leaf.Height
        [Barley].Leaf.InitialisedCohortNo
        [Barley].Leaf.LAI
        [Barley].Leaf.Live.N
        [Barley].Leaf.Live.NConc
        [Barley].Leaf.Live.Wt
        [Barley].Leaf.SpecificArea
        [Barley].Leaf.Transpiration
        [Barley].Phenology.CurrentPhaseName
        [Barley].Phenology.CurrentStageName
        [Barley].Phenology.DailyVernalisation.Value()
        [Barley].Phenology.MeanTemp.Value()
        [Barley].Phenology.Photoperiod.Value()
        [Barley].Phenology.Stage
        [Barley].Phenology.ThermalTime.Value()
        [Barley].Phenology.AccumulatedTT.Value()
        [Barley].Phenology.Vrn1.Value()
        [Barley].Phenology.Vrn2.Value()
        [Barley].Phenology.Vrn4.Value()
        [Barley].Phenology.Zadok.Stage
        [Barley].Population
        [Barley].Root.Depth
        [Barley].Root.N
        [Barley].Root.Wt
        [Barley].Root.Nconc
        [Barley].Root.WaterUptake
        [Barley].Spike.N
        [Barley].Spike.NConc
        [Barley].Spike.Wt
        [Barley].Spike.Live.NonStructuralWt
        [Barley].Stem.N
        [Barley].Stem.NConc
        [Barley].Stem.Wt
        [Barley].Stem.PercentWSC
        [Barley].Stem.Live.NonStructuralWt
        [Barley].StemPlusSpike.Wt
        [Barley].StemPlusSpike.N
        [Barley].SowingData.Cultivar
        [Barley].Structure.HaunStage.ValueTerminalSpikelet.Value()
        [Barley].Structure.HaunStage.Value()
        [Barley].Structure.Height
        [Barley].Structure.LeafTipsAppeared
        [Barley].Structure.MainStemFinalNodeNumber.Value()
        [Barley].Structure.MainStemFinalNodeNumber.ValueToHold.PhotoPLeaves.Value()
        [Barley].Structure.MainStemPopn
        [Barley].Structure.MeanTillerGrowthRate.Value()
        [Barley].Structure.TotalStemPopn
        [Barley].Total.N
        [Barley].Total.Wt
        [SurfaceOrganicMatter].Wt
        ([Barley].Leaf.Transpiration + [Soil].SoilWater.Es + [MicroClimate].interception) as ET
        sum([Soil].SoilNitrogen.NO3) as TotalSoilN
        [Barley].Phenology.FlagLeafDAS.Value()
        [Barley].Phenology.FloweringDAS.Value()
        [Barley].Phenology.MaturityDAS.Value()
        [Barley].Phenology.PhotoPeriod
        [Barley].Phenology.PhotoPeriodDeltaFunction
        [Barley].Phenology.Stage
        [Barley].Phenology.SoilTemperatureFunction.Value()
        [Irrigation].IrrigationApplied as Irrigation
        [Fertiliser].NitrogenApplied as NFert
        [Weather].Rain
        [Barley].Leaf.Fn
        [Barley].Leaf.Fw
    Report EndTrialReport: EventNames=[Clock].EndOfSimulation
  DataStore
    Input Biomass9596: ErrorMessage=The specified file does not exist.; FileName=Observations\BarleyObservedData95_96.txt
    Input Biomass1516: FileName=Observations\BarleyObservedData15_16.txt
      ErrorMessage=The process cannot access the file 'C:\ApsimX\Prototypes\Barley\Observations\BarleyObservedData15_16.txt' because it is being used by another process.
    Input Biomass8889: FileName=Observations\BarleyObservedData88_89.txt
      ErrorMessage=The process cannot access the file 'C:\ApsimX\Prototypes\Barley\Observations\BarleyObservedData88_89.txt' because it is being used by another process.
    Input Biomass0910: FileName=Observations\BarleyObservedData09_10.txt
      ErrorMessage=The process cannot access the file 'C:\ApsimX\Prototypes\Barley\Observations\BarleyObservedData09_10.txt' because it is being used by another process.
    Input Biomass1011: FileName=Observations\BarleyObservedData10-11.txt
      ErrorMessage:
        Invalid number of values on line:
        in file: C:\ApsimX\Prototypes\Barley\Observations\BarleyObservedData10-11.txt
    Input Biomass1112: FileName=Observations\BarleyObservedData11_12.txt
      ErrorMessage=The process cannot access the file 'C:\ApsimX\Prototypes\Barley\Observations\BarleyObservedData11_12.txt' because it is being used by another process.
    Input CPT_Phenology: FileName=Observations\CPTBarleyPhenology.txt
      ErrorMessage=The process cannot access the file 'C:\ApsimX\Prototypes\Barley\Observations\CPTBarleyPhenology.txt' because it is being used by another process.
    Input Australia: ErrorMessage=The specified file does not exist.; FileName=Observations\AustraliaData.txt
    Input Biomass1415: ErrorMessage=The specified file does not exist.; FileName=Observations\BarleyObservedData14_15.txt
    PredictedObserved PredictedObserved_9596: PredictedTableName=DailyReport; ObservedTableName=Biomass9596; FieldNameUsedForMatch=Clock.Today
      Tests: POName=PredictedObserved_Aussie
        AcceptedStats:
          Name                n   Slope     Intercept  SEslope   SEintercept  R2         RMSE    NSE        ME        MAE      RSR
          Barley.Grain.Wt     18  0.294745  -70.3322   0.262424  102.786      0.0730819  372.26  -6.28577   -328.876  344.57   2.62317
          TotalAboveGroundWt  18  0.447837  563.424    0.219208  234.077      0.206891   343.03  -0.073789  2.85448   271.545  1.00704
        AcceptedStatsName=Name n Slope Intercept SEslope SEintercept R2 RMSE NSE ME MAE RSR
    PredictedObserved PredictedObserved_8889: PredictedTableName=DailyReport; ObservedTableName=Biomass8889; FieldNameUsedForMatch=Clock.Today
      Tests: same as DataStore.PredictedObserved_9596.Tests
    PredictedObserved PredictedObserved_1516: PredictedTableName=DailyReport; ObservedTableName=Biomass1516; FieldNameUsedForMatch=Clock.Today
      Tests: same as DataStore.PredictedObserved_9596.Tests
    PredictedObserved PredictedObserved_CPT: PredictedTableName=DailyReport; ObservedTableName=CPT_Phenology; FieldNameUsedForMatch=Barley.Phenology.Zadok.Stage
      Tests: POName=PredictedObserved_CPT
        AcceptedStats:
          Name                                   n   Slope    Intercept  SEslope   SEintercept  RMSE     NSE       ME        MAE      RSR      R2
          Barley.Phenology.FlagLeafDAS.Value()   55  0        0          0         0            116.746  -8.6705   -110.545  110.545  3.08134  -
          Barley.Phenology.FloweringDAS.Value()  55  0        0          0         0            128.904  -10.3782  -123.109  123.109  3.34236  -
          Barley.Structure.LeafTipsAppeared      52  1.32208  -6.47987   0.159086  1.12488      4.30626  -31.7867  -4.21539  4.21539  5.67064  0.580057
        AcceptedStatsName=Name n Slope Intercept SEslope SEintercept R2 RMSE NSE ME MAE RSR
    PredictedObserved PredictedObserved_Aussie: PredictedTableName=DailyReport; ObservedTableName=Australia; FieldNameUsedForMatch=Clock.Today
      Tests: same as DataStore.PredictedObserved_9596.Tests
    PredictedObserved PredictedObserved_0910: PredictedTableName=DailyReport; ObservedTableName=Biomass0910; FieldNameUsedForMatch=Clock.Today
      Tests: same as DataStore.PredictedObserved_9596.Tests
    PredictedObserved PredictedObserved_1112: PredictedTableName=DailyReport; ObservedTableName=Biomass1112; FieldNameUsedForMatch=Clock.Today
      Tests: same as DataStore.PredictedObserved_9596.Tests
    PredictedObserved PredictedObserved_1011: PredictedTableName=DailyReport; ObservedTableName=Biomass1011; FieldNameUsedForMatch=Clock.Today
      Tests: same as DataStore.PredictedObserved_9596.Tests
    PredictedObserved PredictedObserved_1415: PredictedTableName=DailyReport; ObservedTableName=Biomass1415; FieldNameUsedForMatch=Clock.Today
      Tests: same as DataStore.PredictedObserved_9596.Tests
  Folder New Zealand CPT
    Experiment Boss
      Factors
        Factor _
          Factor May03: Specifications=[Sowing].Script.SowingDate = 2003-05-21
          Factor Sep03: Specifications=[Sowing].Script.SowingDate = 2003-09-02
          Factor May04: Specifications=[Sowing].Script.SowingDate = 2004-05-28
          Factor Sep04: Specifications=[Sowing].Script.SowingDate = 2004-09-06
      Simulation Boss
        Weather: FileName=Weather\lincoln.met
        Clock: StartDate=2003-05-01; EndDate=2006-12-31
        Summary summaryfile
        SoilArbitrator Soil Arbitrator
        Manager DAS
          DAS = 0
```csharp
using System;
using Models.Core;
using System.Collections.Generic;
using System.Text;
using Models.PMF;
using Models;
using System.Xml.Serialization;
using APSIM.Shared.Utilities;
using System.Data;

namespace Models
{
	[Serializable] 
	//[System.Xml.Serialization.XmlInclude(typeof(Model))]
	public class Script : Model
	{
		
	
		
		
		[Description("Days after sowing")]
		public double DAS { get; set; }
		
		[EventSubscribe("DoInitialSummary")]
		private void OnDoInitialSummary(object sender, EventArgs e)
		{
			DAS = 0;
		}
		
		[EventSubscribe("DoReportCalculations")]
		private void OnDoReportCalculations(object sender, EventArgs e)
		{
			DAS += 1;
		}
	
	}
}
```
        Zone Paddock: Area=1; Slope=0
          Soil: SoilType=NZ_sedementary; Region=Plains; State=Canterbury; Country=New Zealnd; Latitude=0; Longitude=0
            Analysis: Thickness=[100, 200, 300, 300, 300, 300]; PH=[6.6, 6.2, 5.7, 5.5, 5.5, 5.5]; PHUnits=Water; BoronUnits=HotWater
            Water
              Thickness  BD    AirDry  LL15  DUL   SAT   KS
              200        1.23  0.05    0.14  0.33  0.48  4832.039
              200        1.23  0.05    0.14  0.33  0.48  389.229
              200        1.59  0.16    0.16  0.29  0.4   16.362
              200        1.57  0.17    0.17  0.28  0.38  97.995
              200        1.57  0.17    0.17  0.3   0.37  97.995
              200        1.6   0.17    0.17  0.3   0.36  97.995
              200        1.6   0.17    0.17  0.3   0.36  97.995
              200        1.6   0.12    0.12  0.3   0.32  97.995
              SoilCrop BarleySoil: LL=[0.1, 0.1, 0.157, 0.173, 0.173, 0.165, 0.165, 0.115]; KL=[0.1, 0.1, 0.1, 0.1, 0.1, 0.1, 0.1, 0.1]; XF=[1, 1, 1, 1, 1, 1, 1, 1]
            SoilWater: SummerDate=1-Nov; SummerU=6; SummerCona=2; WinterDate=1-Apr; WinterU=9; WinterCona=4.4; DiffusConst=0; DiffusSlope=0; Salb=0.18; CN2Bare=68; CNRed=20; CNCov=0.8; slope=0; discharge_width=0; catchment_area=0; max_pond=0; residueinterception=0
              Thickness  SWCON  KLAT
              200        0.9    0
              200        0.6    0
              200        0.4    0
              200        0.4    0
              200        0.4    0
              200        0.9    0
              200        0.9    0
              200        0.9    0
            SoilNitrogen: fom_type=[default, manure, mucuna, lablab, shemp, stable]; fract_carb=[0.2, 0.3, 0.54, 0.57, 0.45, 0]; fract_cell=[0.7, 0.3, 0.37, 0.37, 0.47, 0.1]; fract_lign=[0.1, 0.4, 0.09, 0.06, 0.08, 0.9]; wfpsN2N2O_x=[22, 88]; wfpsN2N2O_y=[0.1, 1]; oc=[1.83566, 1.46334, 1.19884, 1.0301, 0.470338, 0.470138]
            SoilOrganicMatter: RootCN=31.5; RootWt=1500; SoilCN=11; EnrACoeff=7.4; EnrBCoeff=0.2; OCUnits=Total
              Thickness  OC    FBiom  FInert
              100        2.68  0.025  0.45
              200        2.78  0.025  0.6
              300        1.45  0.015  0.75
              200        0.38  0.01   0.9
              100        0.24  0.01   0.96
              200        0.24  0.01   0.96
              100        0.24  0.01   0.96
              300        0.24  0.01   0.96
            Sample Initial water: Thickness=[200, 200, 200, 200, 200, 200, 200, 200]; SW=[0.31, 0.31, 0.16, 0.15, 0.1, 0.1, 0.11, 0.12]; NO3Units=kgha; NH4Units=ppm; SWUnits=Volumetric; OCUnits=Total; PHUnits=Water
            Sample InitialN: NO3Units=kgha; NH4Units=kgha; SWUnits=Volumetric; OCUnits=Total; PHUnits=Water
              Thickness  NO3  NH4  SW
              100        23   2.2  0.31
              200        18   2    0.31
              300        15   1.8  0.16
              200        1.5  1.2  0.15
              100        1.5  1    0.2
              200        1.5  0.9  0.2
              100        1.5  0.1  0.2
              300        1    0.1  0.2
            CERESSoilTemperature
          Plant Barley: CropType=Wheat
          SurfaceOrganicMatter Surface Organic Matter: PoolName=wheat_stubble; type=wheat; mass=1500; standing_fraction=0; cnr=80; CriticalResidueWeight=2000; OptimumDecompTemp=20; MaxCumulativeEOS=20; CNRatioDecompCoeff=0.277; CNRatioDecompThreshold=25; TotalLeachRain=25; MinRainToLeach=10; CriticalMinimumOrganicC=0.004; DefaultCPRatio=0; DefaultStandingFraction=0; StandingExtinctCoeff=0.5; FractionFaecesAdded=0.5
            Pools:
              {PoolName=wheat_stubble, ResidueType=wheat, Mass=1500, CNRatio=80, StandingFraction=0}
            ResidueTypes: LoadFromResource=ResidueTypes
          MicroClimate: a_interception=0; b_interception=1; c_interception=0; d_interception=0; soil_albedo=0.3; sun_angle=15; soil_heat_flux_fraction=0.4; night_interception_fraction=0.5; refheight=2; albedo=0.293662; emissivity=0.96; RadIntTotal=0
          Irrigation
          Fertiliser
          Report DailyReport: EventNames=[Clock].DoReport
            VariableNames:
              [Clock].Today
              [Weather].MeanT
              [Soil].SoilWater.SW
              [Soil].SoilWater.SWmm
              sum([Soil].SoilWater.SWmm) as ProfileWater
              [Barley].AboveGround.N
              [Barley].AboveGround.Wt
              [Barley].AboveGroundLive.N
              [Barley].AboveGroundLive.N*10 as AboveGroundN
              [Barley].AboveGroundLive.Wt
              [Barley].AboveGroundDead.N
              [Barley].AboveGroundDead.Wt
              [Barley].Arbitrator.DMDemand
              [Barley].Arbitrator.DM.TotalFixationSupply
              [Barley].Ear.N
              [Barley].Ear.Nconc
              [Barley].Ear.Wt
              [Barley].Grain.N
              [Barley].Grain.NConc
              [Barley].Grain.Number
              [Barley].Grain.Size
              [Barley].Grain.Wt
              [Barley].Grain.Live.Wt
              [Barley].Leaf.AppearedCohortNo
              [Barley].Leaf.CoverDead
              [Barley].Leaf.CoverGreen
              [Barley].Leaf.CoverTotal
              [Barley].Leaf.Dead.N
              [Barley].Leaf.Dead.NConc
              [Barley].Leaf.Dead.Wt
              [Barley].Leaf.DeadCohortNo
              [Barley].Leaf.SenescingCohortNo
              [Barley].Leaf.ExpandedCohortNo
              [Barley].Leaf.Fn
              [Barley].Leaf.Fw
              [Barley].Leaf.Height
              [Barley].Leaf.InitialisedCohortNo
              [Barley].Leaf.LAI
              [Barley].Leaf.Live.N
              [Barley].Leaf.Live.NConc
              [Barley].Leaf.Live.Wt
              [Barley].Leaf.SpecificArea
              [Barley].Leaf.Transpiration
              [Barley].Phenology.CurrentPhaseName
              [Barley].Phenology.CurrentStageName
              [Barley].Phenology.DailyVernalisation.Value()
              [Barley].Phenology.MeanTemp.Value()
              [Barley].Phenology.Photoperiod.Value()
              [Barley].Phenology.Stage
              [Barley].Phenology.ThermalTime.Value()
              [Barley].Phenology.ThermalTime.Value
              [Barley].Phenology.Vrn1.Value()
              [Barley].Phenology.Vrn2.Value()
              [Barley].Phenology.Vrn4.Value()
              [Barley].Phenology.Zadok.Stage
              [Barley].Root.Depth
              [Barley].Root.N
              [Barley].Root.Wt
              [Barley].Root.Nconc
              [Barley].Root.WaterUptake
              [Barley].Spike.N
              [Barley].Spike.NConc
              [Barley].Spike.Wt
              [Barley].Spike.Live.NonStructuralWt
              [Barley].Stem.N
              [Barley].Stem.NConc
              [Barley].Stem.Wt
              [Barley].Stem.PercentWSC
              [Barley].Stem.Live.NonStructuralWt
              [Barley].StemPlusSpike.Wt
              [Barley].StemPlusSpike.N
              [Barley].SowingData.Cultivar
              [Barley].Structure.HaunStage.ValueTerminalSpikelet.Value()
              [Barley].Structure.HaunStage.Value()
              [Barley].Structure.Height
              [Barley].Structure.LeafTipsAppeared
              [Barley].Structure.MainStemFinalNodeNumber.Value()
              [Barley].Structure.MainStemFinalNodeNumber.ValueToHold.PhotoPLeaves.Value()
              [Barley].Structure.MainStemPopn
              [Barley].Structure.MeanTillerGrowthRate.Value()
              [Barley].Structure.TotalStemPopn
              [Barley].Total.N
              [Barley].Total.Wt
              [SurfaceOrganicMatter].Wt
              ([Barley].Leaf.Transpiration + [Soil].SoilWater.Es + [MicroClimate].interception) as ET
              sum([Soil].SoilNitrogen.NO3) as TotalSoilNitrogen
              [Barley].Phenology.FlagLeafDAS
              [Barley].Phenology.FloweringDAS
              [Barley].Phenology.MaturityDAS
              [Barley].Phenology.PhotoPeriod
              [Barley].Phenology.PhotoPeriodDeltaFunction
              [Barley].Phenology.Stage
              [Barley].Phenology.SoilTemperatureFunction.Value()
              [Barley].Population
          Report EndTrialReport: EventNames=[Clock].EndOfSimulation
            VariableNames:
              [Barley].Structure.LeafTipsAppeared
              [Barley].Structure.MainStemFinalNodeNumber
              [Barley].Phenology.FlagLeafDAS
              [Barley].Phenology.FloweringDAS
              [Barley].Phenology.MaturityDAS
              [Script].CalcVals.SowMonth
          SoluteManager
          Manager Sowing
            InitialRootDepth = 40
            Cultivar = Valetta
            SowingDate = 2003-05-21
```csharp
using System;
using Models.Core;
using System.Collections.Generic;
using System.Text;
using Models.PMF;
using Models;
using System.Xml.Serialization;
using APSIM.Shared.Utilities;
using System.Data;
using Models.PMF.Interfaces;
using Models.SurfaceOM;

namespace Models
{
	[Serializable] 
	//[System.Xml.Serialization.XmlInclude(typeof(Model))]
	public class Script : Model
	{
		[Link] Plant Barley;
		[Link] Clock Clock;
		[Link] Zone zone;
		[Link] Simulation Simulation;
		[Link] SurfaceOrganicMatter SurfOM;
		
				
		[Description("Initial Root Depth")]
		public double InitialRootDepth { get; set; }
		[Description("Cultivar name")]
		public string Cultivar { get; set; }
		[Description("Sowing Date")]
		public DateTime SowingDate { get; set; }
		
		
		[EventSubscribe("DoManagement")]
		private void OnDoManagement(object sender, EventArgs e)
		{
			if (Clock.Today.Date == SowingDate)
			{
				Barley.Sow(cultivar: Cultivar, population: 9, depth: InitialRootDepth, rowSpacing: 500);
				
			}
					
			
		}
	}
}
```
          Manager Harvesting
```csharp
using System;
using Models.Core;
using System.Collections.Generic;
using System.Text;
using Models.Soils;
using Models.PMF;
using Models;
using System.Xml.Serialization;
using APSIM.Shared.Utilities;

namespace Models
{
	[Serializable] 
	public class Script : Model
	{
		[Link] Plant Barley;
		[EventSubscribe("DoManagement")]
		private void OnDoManagement(object sender, EventArgs e)
		{
			if (Barley.Phenology.CurrentPhaseName == "ReadyForHarvesting")
			{
				Barley.Harvest();
				Barley.EndCrop();
			}
		}
	}
}
```
          Manager Auto_Irrigation
            Trigger_Def = 30
            Irrigation_Amount = 30
            Top_Depth = 1000
```csharp
using System;
using Models.Core;
using Models.PMF;
using Models.Soils;
using System.Xml.Serialization;
using Models.PMF;
using APSIM.Shared.Utilities;

        
namespace Models
{
	[Serializable] 
	[System.Xml.Serialization.XmlInclude(typeof(Model))]
	public class Script : Model
	{
		//Communication to other modules
		[Link] ISummary summary = null;
		[Link] Irrigation Irrig;
		[Link] Clock Clock;
		[Link] Soils.Soil soil;
		[Link] Plant Barley;
		[Link] Simulation Simulation;
        
       
		//User inputs from properties tab

		[Description("Deficit to trigger irrigation Y(mm)")]
		public double Trigger_Def { get; set; }
		[Description("Irrigation application Y(mm)")]
		public double Irrigation_Amount { get; set; }
		[Description("Depth to calculate Deficit (mm)")]
		public double Top_Depth { get; set; }
        
		//private
		[XmlIgnore] public bool SoilIsDry { get; set; }
		[XmlIgnore] public double Top_DUL { get; set; }
		[XmlIgnore] public double Top_Refull { get; set; }
		[XmlIgnore] public double Top_Trigger { get; set; }
		[XmlIgnore] public double Top_LL { get; set; }
		[XmlIgnore] public double Top_SW { get; set; }
		[XmlIgnore] public double Accumulated_depth { get; set; }
		[XmlIgnore] public double Current_Deficit { get; set; }
        
        
       
    
		//Calculate static soil variables
		[EventSubscribe("StartOfSimulation")]
		private void OnStartOfSimulation(object sender, EventArgs e)
		{   
			//Calculated soil water variables
			Accumulated_depth = 0;
			for (int layer = 0; Accumulated_depth < Top_Depth; layer++)
			{
				Top_LL += soil.SoilWater.LL15mm[layer];
				Top_DUL += soil.SoilWater.DULmm[layer];
				Accumulated_depth += soil.SoilWater.Thickness[layer];
			}
			Top_Trigger = Top_DUL - Trigger_Def;
			//SeasonIsOpen = false;
        
		}
       
      
		//Determine daily requirement for irrigation
		[EventSubscribe("DoManagement")]
		private void OnDoManagement(object sender, EventArgs e)
		{
			//double DAS = (double)Apsim.Get(Simulation, "DAS.Script.DAS");
                        
		
		
		
            
              
			//Is the soil dry enough to require irrigation?
			SoilIsDry = false;
			double CurrentRootDepth = 0;
			double RootDepth = Barley.Root.Depth;
			CurrentRootDepth = Math.Max(RootDepth, CurrentRootDepth);
          
			Accumulated_depth = 0;
			Top_SW = 0;
			for (int layer = 0; Accumulated_depth < Top_Depth; layer++)
			{
				Top_SW += soil.SoilWater.SWmm[layer];
				Accumulated_depth += soil.SoilWater.Thickness[layer];
			}
            
			if (Top_SW <= Top_Trigger)
				SoilIsDry = true;
            
                
			
			if (SoilIsDry) //Set Deficit-based irrigation
			{
                
				
				Irrig.Apply(Irrigation_Amount);
				summary.WriteMessage(this, "Automatic Irrigation");
				
                            
			}
		}
	}
}
```
          Manager ApplyN_at_sowing
```csharp
using System;
using Models.Core;
using System.Collections.Generic;
using System.Text;
using Models.Soils;
using Models.PMF;
using Models;
using System.Xml.Serialization;
using APSIM.Shared.Utilities;

namespace Models
{
	[Serializable] 
	public class Script : Model
	{
		[Link] Clock Clock;
		[Link] Fertiliser Fertiliser;
		[Link] Irrigation Irrig;
		[Link] Simulation Simulation;
		
					
		[XmlIgnore] public bool InitialDay { get; set; }
		//[XmlIgnore] public double FertN { get; set; }
		
		[EventSubscribe("Commencing")]
		private void OnSimulationCommencing(object sender, EventArgs e)
		{
			InitialDay = true;
		}
		
		[EventSubscribe("DoManagement")]
		private void OnDoManagement(object sender, EventArgs e)
		{
			double DAS = (double)Apsim.Get(Simulation, "DAS.Script.DAS");
			if (DAS == 1)
				Fertiliser.Apply(100, Fertiliser.Types.NO3N, 50);
		}
	}
	
}
```
    Experiment Cellar
      Factors
        Factor _
          Factor May04: Specifications=[Sowing].Script.SowingDate = 2004-05-28
          Factor Sep04: Specifications=[Sowing].Script.SowingDate = 2004-09-06
          Factor May05: Specifications=[Sowing].Script.SowingDate = 2005-05-27
          Factor May06: Specifications=[Sowing].Script.SowingDate = 2006-05-10
          Factor Oct06: Specifications=[Sowing].Script.SowingDate = 2006-10-11
      Simulation Cellar
        Weather: FileName=Weather\lincoln.met
        Clock: StartDate=2004-05-01; EndDate=2007-11-30
        Summary summaryfile
        SoilArbitrator Soil Arbitrator
        Zone Paddock: Area=1; Slope=0
          Soil: same as New Zealand CPT.Boss.Boss.Paddock.Soil
          Plant Barley: CropType=Wheat
          SurfaceOrganicMatter Surface Organic Matter: same as New Zealand CPT.Boss.Boss.Paddock.Surface Organic Matter
          MicroClimate: a_interception=0; b_interception=1; c_interception=0; d_interception=0; soil_albedo=0.3; sun_angle=15; soil_heat_flux_fraction=0.4; night_interception_fraction=0.5; refheight=2; albedo=0.293662; emissivity=0.96; RadIntTotal=0
          Irrigation
          Fertiliser
          Manager Sowing
            InitialRootDepth = 40
            Cultivar = Cellar
            SowingDate = 2004-05-28
            script: same as in New Zealand CPT.Boss.Boss.Paddock.Sowing
          Manager Harvesting: same as New Zealand CPT.Boss.Boss.Paddock.Harvesting
          Report DailyReport: same as New Zealand CPT.Boss.Boss.Paddock.DailyReport
          Report EndTrialReport: EventNames=[Clock].EndOfSimulation
            VariableNames:
              [Barley].Structure.LeafTipsAppeared
              [Barley].Structure.MainStemFinalNodeNumber
              [Barley].Phenology.FlagLeafDAS
              [Barley].Phenology.FloweringDAS
              [Barley].Phenology.MaturityDAS
              [Script].CalcVals.SowMonth
          SoluteManager
          Manager ApplyN_at_sowing: same as New Zealand CPT.Boss.Boss.Paddock.ApplyN_at_sowing
          Manager Auto_Irrigation: same as New Zealand CPT.Boss.Boss.Paddock.Auto_Irrigation
        Manager DAS: same as New Zealand CPT.Boss.Boss.DAS
    Experiment County
      Factors
        Factor _
          Factor May03: Specifications=[Sowing].Script.SowingDate = 2003-05-21
          Factor Sep03: Specifications=[Sowing].Script.SowingDate = 2003-09-02
          Factor May04: Specifications=[Sowing].Script.SowingDate = 2004-05-28
          Factor May05: Specifications=[Sowing].Script.SowingDate = 2005-05-27
          Factor Sep05: Specifications=[Sowing].Script.SowingDate = 2005-09-05
      Simulation County
        Weather: FileName=Weather\lincoln.met
        Clock: StartDate=2003-05-01; EndDate=2006-11-30
        Summary summaryfile
        SoilArbitrator Soil Arbitrator
        Zone Paddock: Area=1; Slope=0
          Soil: same as New Zealand CPT.Boss.Boss.Paddock.Soil
          Plant Barley: CropType=Wheat
          SurfaceOrganicMatter Surface Organic Matter: same as New Zealand CPT.Boss.Boss.Paddock.Surface Organic Matter
          MicroClimate: a_interception=0; b_interception=1; c_interception=0; d_interception=0; soil_albedo=0.3; sun_angle=15; soil_heat_flux_fraction=0.4; night_interception_fraction=0.5; refheight=2; albedo=0.293662; emissivity=0.96; RadIntTotal=0
          Irrigation
          Fertiliser
          Report DailyReport: same as New Zealand CPT.Boss.Boss.Paddock.DailyReport
          Report EndTrialReport: EventNames=[Clock].EndOfSimulation
            VariableNames:
              [Barley].Structure.LeafTipsAppeared
              [Barley].Structure.MainStemFinalNodeNumber
              [Barley].Phenology.FlagLeafDAS
              [Barley].Phenology.FloweringDAS
              [Barley].Phenology.MaturityDAS
              [Script].CalcVals.SowMonth
          SoluteManager
          Manager Sowing
            InitialRootDepth = 40
            Cultivar = County
            SowingDate = 2003-05-21
            script: same as in New Zealand CPT.Boss.Boss.Paddock.Sowing
          Manager Harvesting: same as New Zealand CPT.Boss.Boss.Paddock.Harvesting
          Manager ApplyN_at_sowing: same as New Zealand CPT.Boss.Boss.Paddock.ApplyN_at_sowing
          Manager Auto_Irrigation: same as New Zealand CPT.Boss.Boss.Paddock.Auto_Irrigation
        Manager DAS: same as New Zealand CPT.Boss.Boss.DAS
    Experiment Dash
      Factors
        Factor _
          Factor May03: Specifications=[Sowing].Script.SowingDate = 2003-05-21
          Factor Sep03: Specifications=[Sowing].Script.SowingDate = 2003-09-02
          Factor May04: Specifications=[Sowing].Script.SowingDate = 2004-05-28
          Factor Sep04: Specifications=[Sowing].Script.SowingDate = 2004-09-06
          Factor May05: Specifications=[Sowing].Script.SowingDate = 2005-05-27
          Factor Sep05: Specifications=[Sowing].Script.SowingDate = 2005-09-05
      Simulation Dash
        Weather: FileName=Weather\lincoln.met
        Clock: StartDate=2003-05-01; EndDate=2007-11-30
        Summary summaryfile
        SoilArbitrator Soil Arbitrator
        Zone Paddock: Area=1; Slope=0
          Soil: same as New Zealand CPT.Boss.Boss.Paddock.Soil
          Plant Barley: CropType=Wheat
          SurfaceOrganicMatter Surface Organic Matter: same as New Zealand CPT.Boss.Boss.Paddock.Surface Organic Matter
          MicroClimate: a_interception=0; b_interception=1; c_interception=0; d_interception=0; soil_albedo=0.3; sun_angle=15; soil_heat_flux_fraction=0.4; night_interception_fraction=0.5; refheight=2; albedo=0.293662; emissivity=0.96; RadIntTotal=0
          Irrigation
          Fertiliser
          Report DailyReport: same as New Zealand CPT.Boss.Boss.Paddock.DailyReport
          Report EndTrialReport: EventNames=[Clock].EndOfSimulation
            VariableNames:
              [Barley].Structure.LeafTipsAppeared
              [Barley].Structure.MainStemFinalNodeNumber
              [Barley].Phenology.FlagLeafDAS
              [Barley].Phenology.FloweringDAS
              [Barley].Phenology.MaturityDAS
              [Script].CalcVals.SowMonth
          SoluteManager
          Manager Harvesting: same as New Zealand CPT.Boss.Boss.Paddock.Harvesting
          Manager Sowing
            InitialRootDepth = 40
            Cultivar = Dash
            SowingDate = 2003-05-21
            script: same as in New Zealand CPT.Boss.Boss.Paddock.Sowing
          Manager ApplyN_at_sowing: same as New Zealand CPT.Boss.Boss.Paddock.ApplyN_at_sowing
          Manager Auto_Irrigation: same as New Zealand CPT.Boss.Boss.Paddock.Auto_Irrigation
        Manager DAS: same as New Zealand CPT.Boss.Boss.DAS
    Experiment Doyen
      Factors: same as New Zealand CPT.Cellar.Factors
      Simulation Doyen
        Weather: FileName=Weather\lincoln.met
        Clock: StartDate=2004-05-01; EndDate=2007-11-30
        Summary summaryfile
        SoilArbitrator Soil Arbitrator
        Zone Paddock: Area=1; Slope=0
          Soil: same as New Zealand CPT.Boss.Boss.Paddock.Soil
          Plant Barley: CropType=Wheat
          SurfaceOrganicMatter Surface Organic Matter: same as New Zealand CPT.Boss.Boss.Paddock.Surface Organic Matter
          MicroClimate: a_interception=0; b_interception=1; c_interception=0; d_interception=0; soil_albedo=0.3; sun_angle=15; soil_heat_flux_fraction=0.4; night_interception_fraction=0.5; refheight=2; albedo=0.293662; emissivity=0.96; RadIntTotal=0
          Irrigation
          Fertiliser
          Manager Sowing
            InitialRootDepth = 40
            Cultivar = Doyen
            SowingDate = 2004-05-28
            script: same as in New Zealand CPT.Boss.Boss.Paddock.Sowing
          Manager Harvesting: same as New Zealand CPT.Boss.Boss.Paddock.Harvesting
          Report DailyReport: same as New Zealand CPT.Boss.Boss.Paddock.DailyReport
          Report EndTrialReport: EventNames=[Clock].EndOfSimulation
            VariableNames:
              [Barley].Structure.LeafTipsAppeared
              [Barley].Structure.MainStemFinalNodeNumber
              [Barley].Phenology.FlagLeafDAS
              [Barley].Phenology.FloweringDAS
              [Barley].Phenology.MaturityDAS
              [Script].CalcVals.SowMonth
          SoluteManager
          Manager ApplyN_at_sowing: same as New Zealand CPT.Boss.Boss.Paddock.ApplyN_at_sowing
          Manager Auto_Irrigation: same as New Zealand CPT.Boss.Boss.Paddock.Auto_Irrigation
        Manager DAS: same as New Zealand CPT.Boss.Boss.DAS
    Experiment Omaka
      Factors
        Factor _
          Factor May03: Specifications=[Sowing].Script.SowingDate = 2013-05-21
          Factor Sep03: Specifications=[Sowing].Script.SowingDate = 2003-09-02
          Factor May04: Specifications=[Sowing].Script.SowingDate = 2004-05-28
          Factor Sep04: Specifications=[Sowing].Script.SowingDate = 2004-09-06
      Simulation Oma
        Weather: FileName=Weather\lincoln.met
        Clock: StartDate=2003-05-01; EndDate=2007-11-30
        Summary summaryfile
        SoilArbitrator Soil Arbitrator
        Zone Paddock: Area=1; Slope=0
          Soil: same as New Zealand CPT.Boss.Boss.Paddock.Soil
          Plant Barley: CropType=Wheat
          SurfaceOrganicMatter Surface Organic Matter: same as New Zealand CPT.Boss.Boss.Paddock.Surface Organic Matter
          MicroClimate: a_interception=0; b_interception=1; c_interception=0; d_interception=0; soil_albedo=0.3; sun_angle=15; soil_heat_flux_fraction=0.4; night_interception_fraction=0.5; refheight=2; albedo=0.293662; emissivity=0.96; RadIntTotal=0
          Irrigation
          Fertiliser
          Report DailyReport: same as New Zealand CPT.Boss.Boss.Paddock.DailyReport
          Report EndTrialReport: EventNames=[Clock].EndOfSimulation
            VariableNames:
              [Barley].Structure.LeafTipsAppeared
              [Barley].Structure.MainStemFinalNodeNumber
              [Barley].Phenology.FlagLeafDAS
              [Barley].Phenology.FloweringDAS
              [Barley].Phenology.MaturityDAS
              [Script].CalcVals.SowMonth
          SoluteManager
          Manager Sowing
            InitialRootDepth = 40
            Cultivar = Omaka
            SowingDate = 2003-05-21
            script: same as in New Zealand CPT.Boss.Boss.Paddock.Sowing
          Manager Harvesting: same as New Zealand CPT.Boss.Boss.Paddock.Harvesting
          Manager ApplyN_at_sowing: same as New Zealand CPT.Boss.Boss.Paddock.ApplyN_at_sowing
          Manager Auto_Irrigation: same as New Zealand CPT.Boss.Boss.Paddock.Auto_Irrigation
        Manager DAS: same as New Zealand CPT.Boss.Boss.DAS
    Experiment Optic
      Factors: same as New Zealand CPT.Dash.Factors
      Simulation Optic
        Weather: FileName=Weather\lincoln.met
        Clock: StartDate=2003-05-01; EndDate=2007-11-30
        Summary summaryfile
        SoilArbitrator Soil Arbitrator
        Zone Paddock: Area=1; Slope=0
          Soil: same as New Zealand CPT.Boss.Boss.Paddock.Soil
          Plant Barley: CropType=Wheat
          SurfaceOrganicMatter Surface Organic Matter: same as New Zealand CPT.Boss.Boss.Paddock.Surface Organic Matter
          MicroClimate: a_interception=0; b_interception=1; c_interception=0; d_interception=0; soil_albedo=0.3; sun_angle=15; soil_heat_flux_fraction=0.4; night_interception_fraction=0.5; refheight=2; albedo=0.293662; emissivity=0.96; RadIntTotal=0
          Irrigation
          Fertiliser
          Report DailyReport: same as New Zealand CPT.Boss.Boss.Paddock.DailyReport
          Report EndTrialReport: EventNames=[Clock].EndOfSimulation
            VariableNames:
              [Barley].Structure.LeafTipsAppeared
              [Barley].Structure.MainStemFinalNodeNumber
              [Barley].Phenology.FlagLeafDAS
              [Barley].Phenology.FloweringDAS
              [Barley].Phenology.MaturityDAS
              [Script].CalcVals.SowMonth
          SoluteManager
          Manager Harvesting: same as New Zealand CPT.Boss.Boss.Paddock.Harvesting
          Manager Sowing
            InitialRootDepth = 40
            Cultivar = Optic
            SowingDate = 2003-05-21
            script: same as in New Zealand CPT.Boss.Boss.Paddock.Sowing
          Manager ApplyN_at_sowing: same as New Zealand CPT.Boss.Boss.Paddock.ApplyN_at_sowing
          Manager Auto_Irrigation: same as New Zealand CPT.Boss.Boss.Paddock.Auto_Irrigation
        Manager DAS: same as New Zealand CPT.Boss.Boss.DAS
    Experiment Pyramid
      Factors
        Factor _
          Factor May05: Specifications=[Sowing].Script.SowingDate = 2005-05-27
          Factor May06: Specifications=[Sowing].Script.SowingDate = 2006-05-10
          Factor Oct06: Specifications=[Sowing].Script.SowingDate = 2006-10-11
      Simulation Pyramid
        Weather: FileName=Weather\lincoln.met
        Clock: StartDate=2003-05-01; EndDate=2007-11-30
        Summary summaryfile
        SoilArbitrator Soil Arbitrator
        Zone Paddock: Area=1; Slope=0
          Soil: same as New Zealand CPT.Boss.Boss.Paddock.Soil
          Plant Barley: CropType=Wheat
          SurfaceOrganicMatter Surface Organic Matter: same as New Zealand CPT.Boss.Boss.Paddock.Surface Organic Matter
          MicroClimate: a_interception=0; b_interception=1; c_interception=0; d_interception=0; soil_albedo=0.3; sun_angle=15; soil_heat_flux_fraction=0.4; night_interception_fraction=0.5; refheight=2; albedo=0.293662; emissivity=0.96; RadIntTotal=0
          Irrigation
          Fertiliser
          Report DailyReport: same as New Zealand CPT.Boss.Boss.Paddock.DailyReport
          Report EndTrialReport: EventNames=[Clock].EndOfSimulation
            VariableNames:
              [Barley].Structure.LeafTipsAppeared
              [Barley].Structure.MainStemFinalNodeNumber
              [Barley].Phenology.FlagLeafDAS
              [Barley].Phenology.FloweringDAS
              [Barley].Phenology.MaturityDAS
              [Script].CalcVals.SowMonth
          SoluteManager
          Manager Harvesting: same as New Zealand CPT.Boss.Boss.Paddock.Harvesting
          Manager Sowing
            InitialRootDepth = 40
            Cultivar = Pyramid
            SowingDate = 2005-05-27
            script: same as in New Zealand CPT.Boss.Boss.Paddock.Sowing
          Manager ApplyN_at_sowing: same as New Zealand CPT.Boss.Boss.Paddock.ApplyN_at_sowing
          Manager Auto_Irrigation: same as New Zealand CPT.Boss.Boss.Paddock.Auto_Irrigation
        Manager DAS: same as New Zealand CPT.Boss.Boss.DAS
    Experiment Sherwood
      Factors: same as New Zealand CPT.Dash.Factors
      Simulation Sherwood
        Weather: FileName=Weather\lincoln.met
        Clock: StartDate=2003-05-01; EndDate=2006-11-30
        Summary summaryfile
        SoilArbitrator Soil Arbitrator
        Zone Paddock: Area=1; Slope=0
          Soil: same as New Zealand CPT.Boss.Boss.Paddock.Soil
          Plant Barley: CropType=Wheat
          SurfaceOrganicMatter Surface Organic Matter: same as New Zealand CPT.Boss.Boss.Paddock.Surface Organic Matter
          MicroClimate: a_interception=0; b_interception=1; c_interception=0; d_interception=0; soil_albedo=0.3; sun_angle=15; soil_heat_flux_fraction=0.4; night_interception_fraction=0.5; refheight=2; albedo=0.293662; emissivity=0.96; RadIntTotal=0
          Irrigation
          Fertiliser
          Report DailyReport: same as New Zealand CPT.Boss.Boss.Paddock.DailyReport
          Report EndTrialReport: EventNames=[Clock].EndOfSimulation
            VariableNames:
              [Barley].Structure.LeafTipsAppeared
              [Barley].Structure.MainStemFinalNodeNumber
              [Barley].Phenology.FlagLeafDAS
              [Barley].Phenology.FloweringDAS
              [Barley].Phenology.MaturityDAS
              [Script].CalcVals.SowMonth
          SoluteManager
          Manager Sowing
            InitialRootDepth = 40
            Cultivar = Sherwood
            SowingDate = 2003-05-21
            script: same as in New Zealand CPT.Boss.Boss.Paddock.Sowing
          Manager Harvesting: same as New Zealand CPT.Boss.Boss.Paddock.Harvesting
          Manager ApplyN_at_sowing: same as New Zealand CPT.Boss.Boss.Paddock.ApplyN_at_sowing
          Manager Auto_Irrigation: same as New Zealand CPT.Boss.Boss.Paddock.Auto_Irrigation
        Manager DAS: same as New Zealand CPT.Boss.Boss.DAS
    Experiment Tavern
      Factors: same as New Zealand CPT.Dash.Factors
      Simulation Tavern
        Weather: FileName=Weather\lincoln.met
        Clock: StartDate=2003-05-01; EndDate=2007-11-30
        Summary summaryfile
        SoilArbitrator Soil Arbitrator
        Zone Paddock: Area=1; Slope=0
          Soil: same as New Zealand CPT.Boss.Boss.Paddock.Soil
          Plant Barley: CropType=Wheat
          SurfaceOrganicMatter Surface Organic Matter: same as New Zealand CPT.Boss.Boss.Paddock.Surface Organic Matter
          MicroClimate: a_interception=0; b_interception=1; c_interception=0; d_interception=0; soil_albedo=0.3; sun_angle=15; soil_heat_flux_fraction=0.4; night_interception_fraction=0.5; refheight=2; albedo=0.293662; emissivity=0.96; RadIntTotal=0
          Irrigation
          Fertiliser
          Report DailyReport: same as New Zealand CPT.Boss.Boss.Paddock.DailyReport
          Report EndTrialReport: EventNames=[Clock].EndOfSimulation
            VariableNames:
              [Barley].Structure.LeafTipsAppeared
              [Barley].Structure.MainStemFinalNodeNumber
              [Barley].Phenology.FlagLeafDAS
              [Barley].Phenology.FloweringDAS
              [Barley].Phenology.MaturityDAS
              [Script].CalcVals.SowMonth
          SoluteManager
          Manager Sowing
            InitialRootDepth = 40
            Cultivar = Tavern
            SowingDate = 2003-05-21
            script: same as in New Zealand CPT.Boss.Boss.Paddock.Sowing
          Manager Harvesting: same as New Zealand CPT.Boss.Boss.Paddock.Harvesting
          Manager ApplyN_at_sowing: same as New Zealand CPT.Boss.Boss.Paddock.ApplyN_at_sowing
          Manager Auto_Irrigation: same as New Zealand CPT.Boss.Boss.Paddock.Auto_Irrigation
        Manager DAS: same as New Zealand CPT.Boss.Boss.DAS
    Experiment Vortex
      Factors
        Factor _
          Factor May03: Specifications=[Sowing].Script.SowingDate = 2003-05-21
          Factor Sep03: Specifications=[Sowing].Script.SowingDate = 2003-09-02
          Factor May04: Specifications=[Sowing].Script.SowingDate = 2004-05-28
          Factor Sep04: Specifications=[Sowing].Script.SowingDate = 2004-09-06
          Factor May05: Specifications=[Sowing].Script.SowingDate = 2005-05-27
      Simulation Vortex
        Weather: FileName=Weather\lincoln.met
        Clock: StartDate=2003-09-01; EndDate=2007-11-30
        Summary summaryfile
        SoilArbitrator Soil Arbitrator
        Zone Paddock: Area=1; Slope=0
          Soil: same as New Zealand CPT.Boss.Boss.Paddock.Soil
          Plant Barley: CropType=Wheat
          SurfaceOrganicMatter Surface Organic Matter: same as New Zealand CPT.Boss.Boss.Paddock.Surface Organic Matter
          MicroClimate: a_interception=0; b_interception=1; c_interception=0; d_interception=0; soil_albedo=0.3; sun_angle=15; soil_heat_flux_fraction=0.4; night_interception_fraction=0.5; refheight=2; albedo=0.293662; emissivity=0.96; RadIntTotal=0
          Irrigation
          Fertiliser
          Report DailyReport: same as New Zealand CPT.Boss.Boss.Paddock.DailyReport
          Report EndTrialReport: EventNames=[Clock].EndOfSimulation
            VariableNames:
              [Barley].Structure.LeafTipsAppeared
              [Barley].Structure.MainStemFinalNodeNumber
              [Barley].Phenology.FlagLeafDAS
              [Barley].Phenology.FloweringDAS
              [Barley].Phenology.MaturityDAS
              [Script].CalcVals.SowMonth
          SoluteManager
          Manager Sowing
            InitialRootDepth = 40
            Cultivar = Vortex
            SowingDate = 2003-05-21
            script: same as in New Zealand CPT.Boss.Boss.Paddock.Sowing
          Manager Harvesting: same as New Zealand CPT.Boss.Boss.Paddock.Harvesting
          Manager ApplyN_at_sowing: same as New Zealand CPT.Boss.Boss.Paddock.ApplyN_at_sowing
          Manager Auto_Irrigation: same as New Zealand CPT.Boss.Boss.Paddock.Auto_Irrigation
        Manager DAS: same as New Zealand CPT.Boss.Boss.DAS
  Folder New Zealand RainShelter Trials
    Experiment RS1995_96
      Memo Experiment
        This is a water response trial conducted inside and outside the rain shelter at the New Zealand Institute for Plant & Food Research in Lincoln and described in De Ruiter et al (1999). Briefly, a vernalisation insensitive barley, variety "Valetta", was sown at 280 plant/m^2^ on 20 October 1995 and subjected to five water treatments as follows:

        1. Full drought (located inside the rain shelter) – was not irrigated except for 17 mm rainfall as a result of shelter failure 42 days after sowing;

        2. Early drought (located inside the rain shelter) – also receive 17 mm rainfall and the drought was fully relieved at the onset stem elongation;

        3. Late drought (located inside the rain shelter) – received full irrigation (equivalent to the net crop water use + soil water evaporation) up to stem elongation and thereafter received no water until completion of the experiment;

        4. Rain-fed (located outside the rain shelter) – received all the rain but no irrigation

        5. Full irrigation (located outside the rain shelter) – received all the rain and irrigation to replace ET
      Factors
        Factor _
          Factor Rainfed
            Specifications:
              [Water]
              [InitialN]
            Water
              Thickness  BD   AirDry  LL15  DUL   SAT
              200        1.3  0.08    0.08  0.29  0.44
              200        1.3  0.07    0.07  0.3   0.4
              200        1.3  0.07    0.07  0.28  0.4
              200        1.3  0.09    0.09  0.26  0.38
              200        1.3  0.11    0.11  0.26  0.38
              200        1.3  0.16    0.16  0.28  0.38
              200        1.3  0.15    0.15  0.27  0.38
              200        1.3  0.12    0.12  0.22  0.38
              SoilCrop BarleySoil: LL=[0.08, 0.07, 0.07, 0.09, 0.11, 0.16, 0.15, 0.12]; KL=[0.05, 0.03, 0.02, 0.03, 0.03, 0.03, 0.01, 0.01]; XF=[1, 1, 1, 1, 1, 1, 1, 1]
            Sample InitialN: NO3Units=kgha; NH4Units=kgha; SWUnits=Volumetric; OCUnits=Total; PHUnits=Water
              Thickness  NO3  NH4  SW
              100        23   2.2  0.27
              200        18   2    0.3
              300        15   1.8  0.28
              200        1.5  1.4  0.25
              100        1.5  1    0.24
              200        1.5  0.9  0.27
              100        1.5  0.1  0.27
              300        1    0.1  0.21
          Factor Fullirrigation
            Specifications:
              [IrrigationEvents]
              [Water]
              [InitialN]
              [ClimateControl]
            Operations IrrigationEvents
              1995-10-28  [Irrigation].Apply(2);
              1995-11-04  [Irrigation].Apply(3.8);
              1995-11-15  [Irrigation].Apply(5.2);
              1995-11-28  [Irrigation].Apply(49.3);
              1995-12-05  [Irrigation].Apply(5.3);
              1995-12-12  [Irrigation].Apply(32);
              1995-12-18  [Irrigation].Apply(5);
              1995-12-19  [Irrigation].Apply(40.3);
              1995-12-27  [Irrigation].Apply(5.3);
              1996-01-03  [Irrigation].Apply(80);
              1996-01-09  [Irrigation].Apply(50.3);
              1996-01-16  [Irrigation].Apply(36);
              1996-01-23  [Irrigation].Apply(24.8);
              1996-01-30  [Irrigation].Apply(21.4);
              1996-02-07  [Irrigation].Apply(15.9);
              1996-02-12  [Irrigation].Apply(11.3);
            Water
              Thickness  BD   AirDry  LL15  DUL    SAT
              200        1.3  0.08    0.08  0.281  0.44
              200        1.3  0.08    0.08  0.28   0.44
              200        1.3  0.09    0.09  0.27   0.44
              200        1.3  0.12    0.12  0.296  0.44
              200        1.3  0.11    0.11  0.231  0.44
              200        1.3  0.16    0.16  0.245  0.44
              200        1.3  0.1     0.1   0.204  0.44
              200        1.3  0.08    0.08  0.156  0.44
              SoilCrop BarleySoil: LL=[0.08, 0.08, 0.09, 0.12, 0.11, 0.16, 0.1, 0.08]; KL=[0.05, 0.03, 0.02, 0.03, 0.03, 0.03, 0.01, 0.01]; XF=[1, 1, 1, 1, 1, 1, 1, 1]
            Manager ClimateControl
              StartDate = 1995-10-20
              EndDate = 1996-04-01
              CCOnOff = False
```csharp
using System;
using Models.Core;
using APSIM.Shared.Utilities;



using System.Collections.Generic;
using System.Text;
using Models.PMF;
using Models;
using System.Xml.Serialization;

namespace Models
{
	[Serializable] 
	[System.Xml.Serialization.XmlInclude(typeof(Model))]
	public class Script : Model
	{
		[Link] Weather Met;
		[Link] Clock Clock;
    
		[Description("Start Date")]
		public DateTime StartDate { get; set; }
        
		[Description("End Date")]
		public DateTime EndDate { get; set; }

		[Description("Turn on or off")]
		public bool CCOnOff { get; set; }
 
		[EventSubscribe("PreparingNewWeatherData")]
		private void OnPreparingNewWeatherData(object sender, EventArgs e)
		{
			if (CCOnOff == true)
			if ((Clock.Today.Date >= StartDate) && (Clock.Today.Date <= EndDate))
				Met.Rain = 0;		
		}
	}
}
```
            Sample InitialN: NO3Units=kgha; NH4Units=kgha; SWUnits=Volumetric; OCUnits=Total; PHUnits=Water
              Thickness  NO3  NH4  SW
              100        23   2.2  0.28
              200        18   2    0.27
              300        15   1.8  0.25
              200        1.5  1.4  0.27
              100        1.5  1    0.31
              200        1.5  0.9  0.25
              100        1.5  0.1  0.28
              300        1    0.1  0.14
          Factor Earlydrought
            Specifications:
              [IrrigationEvents]
              [Water]
              [InitialN]
              [ClimateControl]
            Operations IrrigationEvents
              1995-10-28  [Irrigation].Apply(2);
              1995-11-04  [Irrigation].Apply(0);
              1995-11-15  [Irrigation].Apply(0);
              1995-11-28  [Irrigation].Apply(31.2);
              1995-12-05  [Irrigation].Apply(5);
              1995-12-12  [Irrigation].Apply(5);
              1995-12-18  [Irrigation].Apply(0);
              1995-12-19  [Irrigation].Apply(32.1);
              1995-12-27  [Irrigation].Apply(0);
              1996-01-03  [Irrigation].Apply(79.3);
              1996-01-09  [Irrigation].Apply(44.7);
              1996-01-16  [Irrigation].Apply(38.8);
              1996-01-23  [Irrigation].Apply(30);
              1996-01-30  [Irrigation].Apply(21.4);
              1996-02-07  [Irrigation].Apply(0);
              1996-02-12  [Irrigation].Apply(0);
            Water
              Thickness  BD   AirDry  LL15  DUL      SAT
              200        1.3  0.06    0.06  0.31     0.44
              200        1.3  0.09    0.09  0.3      0.44
              200        1.3  0.07    0.07  0.28     0.44
              200        1.3  0.12    0.12  0.31145  0.44
              200        1.3  0.16    0.16  0.3079   0.44
              200        1.3  0.16    0.16  0.3007   0.44
              200        1.3  0.15    0.15  0.28705  0.44
              200        1.3  0.16    0.16  0.3117   0.44
              SoilCrop BarleySoil: LL=[0.06, 0.09, 0.07, 0.12, 0.16, 0.16, 0.15, 0.16]; KL=[0.05, 0.03, 0.02, 0.03, 0.03, 0.03, 0.01, 0.01]; XF=[1, 1, 1, 1, 1, 1, 1, 1]
            Manager ClimateControl
              StartDate = 1995-10-20
              EndDate = 1996-04-01
              CCOnOff = True
              script: same as in New Zealand RainShelter Trials.RS1995_96.Factors._.Fullirrigation.ClimateControl
            Sample InitialN: NO3Units=kgha; NH4Units=kgha; SWUnits=Volumetric; OCUnits=Total; PHUnits=Water
              Thickness  NO3  NH4  SW
              100        23   2.2  0.27
              200        18   2    0.27
              300        15   1.8  0.21
              200        1.5  1.4  0.31
              100        1.5  1    0.31
              200        1.5  0.9  0.3
              100        1.5  0.1  0.29
              300        1    0.1  0.31
          Factor Latedrought
            Specifications:
              [IrrigationEvents]
              [Water]
              [InitialN]
              [ClimateControl]
            Operations IrrigationEvents
              1995-10-28  [Irrigation].Apply(2);
              1995-11-04  [Irrigation].Apply(0);
              1995-11-15  [Irrigation].Apply(0);
              1995-11-28  [Irrigation].Apply(47);
              1995-12-05  [Irrigation].Apply(5);
              1995-12-12  [Irrigation].Apply(30.5);
              1995-12-18  [Irrigation].Apply(5);
              1995-12-19  [Irrigation].Apply(3.1);
              1995-12-27  [Irrigation].Apply(0);
              1996-01-03  [Irrigation].Apply(0);
              1996-01-09  [Irrigation].Apply(0);
              1996-01-16  [Irrigation].Apply(0);
              1996-01-23  [Irrigation].Apply(0);
              1996-01-30  [Irrigation].Apply(0);
              1996-02-07  [Irrigation].Apply(0);
              1996-02-12  [Irrigation].Apply(0);
            Water: same as New Zealand RainShelter Trials.RS1995_96.Factors._.Fullirrigation.Water
            Manager ClimateControl: same as New Zealand RainShelter Trials.RS1995_96.Factors._.Earlydrought.ClimateControl
            Sample InitialN: NO3Units=kgha; NH4Units=kgha; SWUnits=Volumetric; OCUnits=Total; PHUnits=Water
              Thickness  NO3  NH4  SW
              100        23   2.2  0.28
              200        18   2    0.28
              300        15   1.8  0.27
              200        1.5  1.4  0.3
              100        1.5  1    0.23
              200        1.5  0.9  0.25
              100        1.5  0.1  0.2
              300        1    0.1  0.31
          Factor Fulldrought
            Specifications:
              [IrrigationEvents]
              [Water]
              [InitialN]
              [ClimateControl]
            Operations IrrigationEvents
              1995-10-28  [Irrigation].Apply(2);
              1995-11-28  [Irrigation].Apply(31.2);
              1995-12-05  [Irrigation].Apply(5);
              1995-12-18  [Irrigation].Apply(5);
              1995-12-19  [Irrigation].Apply(3.1);
            Water
              Thickness  BD   AirDry  LL15  DUL      SAT
              200        1.3  0.08    0.08  0.31     0.44
              200        1.3  0.07    0.07  0.27     0.44
              200        1.3  0.06    0.06  0.25355  0.44
              200        1.3  0.09    0.09  0.2364   0.44
              200        1.3  0.15    0.15  0.2635   0.44
              200        1.3  0.16    0.16  0.27705  0.44
              200        1.3  0.15    0.15  0.3392   0.44
              200        1.3  0.08    0.08  0.2      0.44
              SoilCrop BarleySoil: LL=[0.08, 0.07, 0.06, 0.09, 0.15, 0.16, 0.15, 0.08]; KL=[0.05, 0.03, 0.02, 0.03, 0.03, 0.03, 0.01, 0.01]; XF=[1, 1, 1, 1, 1, 1, 1, 1]
            Manager ClimateControl: same as New Zealand RainShelter Trials.RS1995_96.Factors._.Earlydrought.ClimateControl
            Sample InitialN: NO3Units=kgha; NH4Units=kgha; SWUnits=Volumetric; OCUnits=Total; PHUnits=Water
              Thickness  NO3  NH4  SW
              100        23   2.2  0.28
              200        18   2    0.27
              300        15   1.8  0.25
              200        1.5  1.4  0.24
              100        1.5  1    0.26
              200        1.5  0.9  0.28
              100        1.5  0.1  0.34
              300        1    0.1  0.2
      Simulation Rainfed
        Weather: FileName=C:\ApsimX\Prototypes\Barley\Weather\lincoln.met
        Clock: StartDate=1995-10-19; EndDate=1996-03-31
        Summary summaryfile
        SoilArbitrator Soil Arbitrator
        Zone Paddock: Area=1; Slope=0
          Manager DAS: same as New Zealand CPT.Boss.Boss.DAS
          Soil: SoilType=NZ_sedementary; Region=Plains; State=Canterbury; Country=New Zealnd; Latitude=0; Longitude=0
            Analysis: Thickness=[100, 200, 300, 300, 300, 300]; PH=[6.6, 6.2, 5.7, 5.5, 5.5, 5.5]; PHUnits=Water; BoronUnits=HotWater
            Water
              Thickness  BD    AirDry  LL15  DUL   SAT   KS
              200        1.23  0.05    0.14  0.33  0.48  4832.039
              200        1.23  0.05    0.14  0.33  0.48  389.229
              200        1.59  0.16    0.13  0.29  0.4   16.362
              200        1.57  0.17    0.11  0.28  0.38  97.995
              200        1.57  0.17    0.17  0.3   0.37  97.995
              200        1.6   0.17    0.17  0.3   0.36  97.995
              200        1.6   0.17    0.17  0.3   0.36  97.995
              200        1.6   0.12    0.12  0.3   0.32  97.995
              SoilCrop BarleySoil: LL=[0.1, 0.1, 0.157, 0.173, 0.173, 0.165, 0.165, 0.115]; KL=[0.1, 0.1, 0.1, 0.1, 0.1, 0.1, 0.1, 0.1]; XF=[1, 1, 1, 1, 1, 1, 1, 1]
            SoilWater: same as New Zealand CPT.Boss.Boss.Paddock.Soil.SoilWater
            SoilNitrogen: same as New Zealand CPT.Boss.Boss.Paddock.Soil.SoilNitrogen
            SoilOrganicMatter: same as New Zealand CPT.Boss.Boss.Paddock.Soil.SoilOrganicMatter
            Sample InitialN: NO3Units=kgha; NH4Units=kgha; SWUnits=Volumetric; OCUnits=Total; PHUnits=Water
              Thickness  NO3  NH4  SW
              100        23   2.2  0.31
              200        18   2    0.31
              300        15   1.8  0.16
              200        1.5  1.4  0.15
              100        1.5  1    0.2
              200        1.1  0.9  0.2
              100        1    0.1  0.2
              300        1    0.1  0.2
            CERESSoilTemperature
          Plant Barley: CropType=Wheat
          SurfaceOrganicMatter Surface Organic Matter: same as New Zealand CPT.Boss.Boss.Paddock.Surface Organic Matter
          MicroClimate: a_interception=0; b_interception=1; c_interception=0; d_interception=0; soil_albedo=0.3; sun_angle=15; soil_heat_flux_fraction=0.4; night_interception_fraction=0.5; refheight=2; albedo=0.293662; emissivity=0.96; RadIntTotal=0
          Irrigation
          Fertiliser
          Folder Manager folder
            Operations SowingEvent
              1995-10-20  [Barley].Sow(population:280, cultivar:"Valetta", depth:40, rowSpacing:150);
            Operations IrrigationEvents
              1995-10-28  [Irrigation].Apply(2);
              1995-11-04  [Irrigation].Apply(0);
              1995-11-15  [Irrigation].Apply(0);
              1995-11-28  [Irrigation].Apply(21.3);
              1995-12-05  [Irrigation].Apply(5.3);
              1995-12-12  [Irrigation].Apply(1.5);
              1995-12-18  [Irrigation].Apply(5);
              1995-12-19  [Irrigation].Apply(11.3);
              1995-12-27  [Irrigation].Apply(5.3);
              1996-01-03  [Irrigation].Apply(2.8);
              1996-01-09  [Irrigation].Apply(8.4);
              1996-01-16  [Irrigation].Apply(5.9);
              1996-01-23  [Irrigation].Apply(0.7);
              1996-01-30  [Irrigation].Apply(0.7);
              1996-02-07  [Irrigation].Apply(0);
              1996-02-12  [Irrigation].Apply(0);
            Operations FertiliserEvents
              1995-10-28  [Fertiliser].Apply(50, Fertiliser.Types.NO3N,0);
              1995-12-05  [Fertiliser].Apply(50, Fertiliser.Types.NO3N,0);
              1995-12-18  [Fertiliser].Apply(50, Fertiliser.Types.NO3N,0);
          Manager ClimateControl
            StartDate = 1995-10-15
            EndDate = 1996-04-01
            CCOnOff = False
            script: same as in New Zealand RainShelter Trials.RS1995_96.Factors._.Fullirrigation.ClimateControl
          Manager Harvesting
```csharp
using System;
using Models.Core;
using System.Collections.Generic;
using System.Text;
using Models.Soils;
using Models.PMF;
using Models;
using System.Xml.Serialization;
using APSIM.Shared.Utilities;

namespace Models
{
	[Serializable] 
	public class Script : Model
	{
		[Link] Plant Barley;
		[EventSubscribe("DoManagement")]
		private void OnDoManagement(object sender, EventArgs e)
		{
			if (Barley.Phenology.CurrentPhaseName == "Ripening")
			{
				Barley.Harvest();
				Barley.EndCrop();
			}
		}
	}
}
```
          Report DailyReport: EventNames=[Clock].DoReport
            VariableNames:
              [Clock].Today
              [Weather].MeanT
              [Soil].SoilWater.SW
              [Soil].SoilWater.SWmm
              sum([Soil].SoilWater.SWmm) as ProfileWater
              [Barley].AboveGround.N
              [Barley].AboveGround.Wt
              [Barley].AboveGroundLive.N
              [Barley].AboveGroundLive.N*10 as AboveGroundN
              [Barley].AboveGroundLive.Wt
              [Barley].AboveGroundDead.N
              [Barley].AboveGroundDead.Wt
              [Barley].Arbitrator.DMDemand
              [Barley].Arbitrator.DM.TotalFixationSupply
              [Barley].Ear.N
              [Barley].Ear.Nconc
              [Barley].Ear.Wt
              [Barley].Grain.N
              [Barley].Grain.NConc
              [Barley].Grain.Number
              [Barley].Grain.Size
              [Barley].Grain.Wt
              [Barley].Grain.Live.Wt
              [Barley].Leaf.AppearedCohortNo
              [Barley].Leaf.CoverDead
              [Barley].Leaf.CoverGreen
              [Barley].Leaf.CoverTotal
              [Barley].Leaf.Dead.N
              [Barley].Leaf.Dead.NConc
              [Barley].Leaf.Dead.Wt
              [Barley].Leaf.DeadCohortNo
              [Barley].Leaf.SenescingCohortNo
              [Barley].Leaf.ExpandedCohortNo
              [Barley].Leaf.Fn
              [Barley].Leaf.Fw
              [Barley].Leaf.Height
              [Barley].Leaf.InitialisedCohortNo
              [Barley].Leaf.LAI
              [Barley].Leaf.Live.N
              [Barley].Leaf.Live.NConc
              [Barley].Leaf.Live.Wt
              [Barley].Leaf.SpecificArea
              [Barley].Leaf.Transpiration
              [Barley].Phenology.CurrentPhaseName
              [Barley].Phenology.CurrentStageName
              [Barley].Phenology.DailyVernalisation.Value()
              [Barley].Phenology.MeanTemp.Value()
              [Barley].Phenology.Photoperiod.Value()
              [Barley].Phenology.Stage
              [Barley].Phenology.ThermalTime.Value()
              [Barley].Phenology.ThermalTime.Value
              [Barley].Phenology.Vrn1.Value()
              [Barley].Phenology.Vrn2.Value()
              [Barley].Phenology.Vrn4.Value()
              [Barley].Phenology.Zadok.Stage
              [Barley].Root.Depth
              [Barley].Root.N
              [Barley].Root.Wt
              [Barley].Root.Nconc
              [Barley].Root.WaterUptake
              [Barley].Spike.N
              [Barley].Spike.NConc
              [Barley].Spike.Wt
              [Barley].Spike.Live.NonStructuralWt
              [Barley].Stem.N
              [Barley].Stem.NConc
              [Barley].Stem.Wt
              [Barley].Stem.PercentWSC
              [Barley].Stem.Live.NonStructuralWt
              [Barley].StemPlusSpike.Wt
              [Barley].StemPlusSpike.N
              [Barley].SowingData.Cultivar
              [Barley].Structure.HaunStage.ValueTerminalSpikelet.Value()
              [Barley].Structure.HaunStage.Value()
              [Barley].Structure.Height
              [Barley].Structure.LeafTipsAppeared
              [Barley].Structure.MainStemFinalNodeNumber.Value()
              [Barley].Structure.MainStemFinalNodeNumber.ValueToHold.PhotoPLeaves.Value()
              [Barley].Structure.MainStemPopn
              [Barley].Structure.MeanTillerGrowthRate.Value()
              [Barley].Structure.TotalStemPopn
              [Barley].Total.N
              [Barley].Total.Wt
              [SurfaceOrganicMatter].Wt
              ([Barley].Leaf.Transpiration + [Soil].SoilWater.Es + [MicroClimate].interception) as ET
              sum([Soil].SoilNitrogen.NO3) as TotalSoilNitrogen
              [Barley].Phenology.FlagLeafDAS
              [Barley].Phenology.FloweringDAS
              [Barley].Phenology.MaturityDAS
              [Barley].Phenology.PhotoPeriod
              [Barley].Phenology.PhotoPeriodDeltaFunction
              [Barley].Phenology.Stage
              [Barley].Phenology.SoilTemperatureFunction.Value()
              [Barley].Population
              [Soil].SoilNitrogen.TotalN
          Report EndTrialReport: EventNames=[Clock].EndOfSimulation
            VariableNames:
              [Barley].Structure.LeafTipsAppeared
              [Barley].Structure.MainStemFinalNodeNumber
              [Barley].Phenology.FlagLeafDAS
              [Barley].Phenology.FloweringDAS
              [Barley].Phenology.MaturityDAS
              [Script].CalcVals.SowMonth
          SoluteManager
    Experiment RS1988_89
      Memo
        This experiment was conducted in the rainshelter at Plant and Food Research in Lincoln, New Zealand. The objective was to evaluate the effect of drought on the yield of barley crops. The experiment is fully described by Jamieson et al (1995).  Briefly, 'Triumph' barley was sown at 188kg/ha on 07 September 1988. This sowing rate resulted in a population of 291 ± 6 plants/m2.  Plants were evaluated for their response to drought of varying duration. Six of these treatments have been included in this validation:

        1.	Full irrigation – measured ET replaced weekly (06 October to 29 December)
        2.	Early Drought 1 – irrigated from 03 November to 05 January
        3.	Early Drought 2 – irrigated from 17 November to 19 January
        4.	Early Drought 3 – irrigated from 24 November to 19 January
        5.	Early Drought 3 – irrigated from 01 December to 09 February
        6.	Middle Drought 1 – irrigated (06/10/1988 to 03/11/1988) and (24/11/1988 to 29/12/1989)
        7.	Middle Drought 2 – irrigated (06/10/1988 to 03/11/1988) and (01/12/1988 to 29/12/1989)
        8.	Middle Drought 3 – irrigated (06/10/1988 to 03/11/1988) and (15/12/1988 to 29/12/1989)
        9.	Middle Drought 3 – irrigated (06/10/1988 to 03/11/1988)
        10.	Late Drought 1 – irrigated (06/10/1988 to 17/11/1988)
        11.	Late Drought 2 – irrigated (06/10/1988 to 24/11/1988)
        12.	Late Drought 3 – irrigated (06/10/1988 to 01/12/1989)
      Factors
        Factor _
          Factor Control
            Specifications:
              [Water]
              [InitialN]
              [ClimateControl]
            Water
              Thickness  BD   AirDry  LL15  DUL   SAT
              200        1.3  0.08    0.08  0.29  0.44
              200        1.3  0.07    0.07  0.3   0.4
              200        1.3  0.07    0.07  0.28  0.4
              200        1.3  0.09    0.09  0.26  0.38
              200        1.3  0.11    0.11  0.26  0.38
              200        1.3  0.16    0.16  0.28  0.38
              200        1.3  0.15    0.15  0.27  0.38
              200        1.3  0.12    0.12  0.22  0.38
              SoilCrop BarleySoil: LL=[0.08, 0.07, 0.07, 0.09, 0.11, 0.16, 0.15, 0.12]; KL=[0.05, 0.03, 0.02, 0.03, 0.03, 0.03, 0.01, 0.01]; XF=[1, 0.2, 0.3, 1, 1, 1, 1, 1]
            Sample InitialN: NO3Units=kgha; NH4Units=kgha; SWUnits=Volumetric; OCUnits=Total; PHUnits=Water
              Thickness  NO3  NH4  SW
              200        30   5    0.27
              200        15   0.5  0.3
              200        15   0.5  0.28
              200        10   0    0.25
              200        5    0    0.24
              200        5    0    0.27
              200        5    0    0.27
              200        5    0    0.21
            Manager ClimateControl
              StartDate = 1988-09-01
              EndDate = 1989-12-31
              CCOnOff = False
              script: same as in New Zealand RainShelter Trials.RS1995_96.Factors._.Fullirrigation.ClimateControl
          Factor EarlyDrought1
            Specifications:
              [IrrigationEvents]
              [Water]
              [InitialN]
              [ClimateControl]
            Operations IrrigationEvents
              1988-11-03  [Irrigation].Apply(45);
              1988-11-10  [Irrigation].Apply(47);
              1988-11-17  [Irrigation].Apply(32);
              1988-10-24  [Irrigation].Apply(18);
              1988-12-01  [Irrigation].Apply(35);
              1988-12-08  [Irrigation].Apply(24);
              1988-12-15  [Irrigation].Apply(43);
              1988-12-22  [Irrigation].Apply(32);
              1988-12-29  [Irrigation].Apply(36);
              1989-01-05  [Irrigation].Apply(35);
            Water
              Thickness  BD   AirDry  LL15  DUL      SAT
              200        1.3  0.06    0.06  0.31     0.44
              200        1.3  0.09    0.09  0.3      0.44
              200        1.3  0.07    0.07  0.28     0.44
              200        1.3  0.12    0.12  0.31145  0.44
              200        1.3  0.16    0.16  0.3079   0.44
              200        1.3  0.16    0.16  0.3007   0.44
              200        1.3  0.15    0.15  0.28705  0.44
              200        1.3  0.16    0.16  0.3117   0.44
              SoilCrop BarleySoil: LL=[0.06, 0.09, 0.07, 0.12, 0.16, 0.16, 0.15, 0.16]; KL=[0.05, 0.03, 0.02, 0.03, 0.03, 0.03, 0.01, 0.01]; XF=[1, 0.2, 0.3, 1, 1, 1, 1, 1]
            Sample InitialN: NO3Units=ppm; NH4Units=ppm; SWUnits=Volumetric; OCUnits=Total; PHUnits=Water
              Thickness  NO3  NH4  SW
              200        30   5    0.32
              200        15   0.5  0.3
              200        15   0.5  0.29
              200        10   0    0.33
              200        5    0    0.31
              200        5    0    0.3
              200        5    0    0.3
              200        5    0    0.23
            Manager ClimateControl
              StartDate = 1988-09-01
              EndDate = 1989-12-31
              CCOnOff = True
              script: same as in New Zealand RainShelter Trials.RS1995_96.Factors._.Fullirrigation.ClimateControl
          Factor EarlyDrought2
            Specifications:
              [IrrigationEvents]
              [Water]
              [InitialN]
              [ClimateControl]
            Operations IrrigationEvents
              1988-11-17  [Irrigation].Apply(57);
              1988-10-24  [Irrigation].Apply(18);
              1988-12-01  [Irrigation].Apply(35);
              1988-12-08  [Irrigation].Apply(24);
              1988-12-15  [Irrigation].Apply(43);
              1988-12-22  [Irrigation].Apply(32);
              1988-12-29  [Irrigation].Apply(36);
              1989-01-05  [Irrigation].Apply(35);
              1989-01-12  [Irrigation].Apply(26);
              1989-01-19  [Irrigation].Apply(22);
            Water: same as New Zealand RainShelter Trials.RS1988_89.Factors._.EarlyDrought1.Water
            Manager ClimateControl: same as New Zealand RainShelter Trials.RS1988_89.Factors._.EarlyDrought1.ClimateControl
            Sample InitialN: same as New Zealand RainShelter Trials.RS1988_89.Factors._.EarlyDrought1.InitialN
          Factor EarlyDrought3
            Specifications:
              [IrrigationEvents]
              [Water]
              [InitialN]
              [ClimateControl]
            Operations IrrigationEvents
              1988-10-24  [Irrigation].Apply(43);
              1988-12-01  [Irrigation].Apply(35);
              1988-12-08  [Irrigation].Apply(24);
              1988-12-15  [Irrigation].Apply(43);
              1988-12-22  [Irrigation].Apply(32);
              1988-12-29  [Irrigation].Apply(36);
              1989-01-05  [Irrigation].Apply(35);
              1989-01-12  [Irrigation].Apply(26);
              1989-01-19  [Irrigation].Apply(22);
            Water: same as New Zealand RainShelter Trials.RS1988_89.Factors._.EarlyDrought1.Water
            Manager ClimateControl: same as New Zealand RainShelter Trials.RS1988_89.Factors._.EarlyDrought1.ClimateControl
            Sample InitialN: same as New Zealand RainShelter Trials.RS1988_89.Factors._.EarlyDrought1.InitialN
          Factor EarlyDrought4
            Specifications:
              [IrrigationEvents]
              [Water]
              [InitialN]
              [ClimateControl]
            Operations IrrigationEvents
              1988-12-01  [Irrigation].Apply(35);
              1988-12-08  [Irrigation].Apply(50);
              1988-12-15  [Irrigation].Apply(43);
              1988-12-22  [Irrigation].Apply(32);
              1988-12-29  [Irrigation].Apply(36);
              1989-01-05  [Irrigation].Apply(35);
              1989-01-12  [Irrigation].Apply(26);
              1989-01-19  [Irrigation].Apply(22);
              1989-01-26  [Irrigation].Apply(20);
              1989-02-02  [Irrigation].Apply(17);
              1989-02-09  [Irrigation].Apply(15);
            Water: same as New Zealand RainShelter Trials.RS1988_89.Factors._.EarlyDrought1.Water
            Manager ClimateControl: same as New Zealand RainShelter Trials.RS1988_89.Factors._.EarlyDrought1.ClimateControl
            Sample InitialN: same as New Zealand RainShelter Trials.RS1988_89.Factors._.EarlyDrought1.InitialN
          Factor MiddleDrought1
            Specifications:
              [IrrigationEvents]
              [Water]
              [InitialN]
              [ClimateControl]
            Operations IrrigationEvents
              1988-10-06  [Irrigation].Apply(27);
              1988-10-13  [Irrigation].Apply(10);
              1988-10-20  [Irrigation].Apply(30);
              1988-10-27  [Irrigation].Apply(25);
              1988-11-03  [Irrigation].Apply(25);
              1988-11-24  [Irrigation].Apply(43);
              1988-12-01  [Irrigation].Apply(35);
              1988-12-08  [Irrigation].Apply(24);
              1988-12-15  [Irrigation].Apply(43);
              1988-12-22  [Irrigation].Apply(32);
              1988-12-29  [Irrigation].Apply(36);
            Water: same as New Zealand RainShelter Trials.RS1988_89.Factors._.EarlyDrought1.Water
            Manager ClimateControl: same as New Zealand RainShelter Trials.RS1988_89.Factors._.EarlyDrought1.ClimateControl
            Sample InitialN: same as New Zealand RainShelter Trials.RS1988_89.Factors._.EarlyDrought1.InitialN
          Factor MiddleDrought2
            Specifications:
              [IrrigationEvents]
              [Water]
              [InitialN]
              [ClimateControl]
            Operations IrrigationEvents
              1988-10-06  [Irrigation].Apply(27);
              1988-10-13  [Irrigation].Apply(10);
              1988-10-20  [Irrigation].Apply(30);
              1988-10-27  [Irrigation].Apply(25);
              1988-11-03  [Irrigation].Apply(25);
              1988-11-24  [Irrigation].Apply(0);
              1988-12-01  [Irrigation].Apply(35);
              1988-12-08  [Irrigation].Apply(50);
              1988-12-15  [Irrigation].Apply(43);
              1988-12-22  [Irrigation].Apply(32);
              1988-12-29  [Irrigation].Apply(36);
            Water: same as New Zealand RainShelter Trials.RS1988_89.Factors._.EarlyDrought1.Water
            Manager ClimateControl: same as New Zealand RainShelter Trials.RS1988_89.Factors._.EarlyDrought1.ClimateControl
            Sample InitialN: same as New Zealand RainShelter Trials.RS1988_89.Factors._.EarlyDrought1.InitialN
          Factor MiddleDrought3
            Specifications:
              [IrrigationEvents]
              [Water]
              [InitialN]
              [ClimateControl]
            Operations IrrigationEvents
              1988-10-06  [Irrigation].Apply(27);
              1988-10-13  [Irrigation].Apply(10);
              1988-10-20  [Irrigation].Apply(30);
              1988-10-27  [Irrigation].Apply(25);
              1988-11-03  [Irrigation].Apply(25);
              1988-11-24  [Irrigation].Apply(0);
              1988-12-01  [Irrigation].Apply(0);
              1988-12-08  [Irrigation].Apply(0);
              1988-12-15  [Irrigation].Apply(43);
              1988-12-22  [Irrigation].Apply(32);
              1988-12-29  [Irrigation].Apply(36);
            Water: same as New Zealand RainShelter Trials.RS1988_89.Factors._.EarlyDrought1.Water
            Sample Initial water: NO3Units=ppm; NH4Units=ppm; SWUnits=Volumetric; OCUnits=Total; PHUnits=Water
              Thickness  NO3  NH4  SW
              200        30   5    0.2655
              200        15   0.5  0.27
              200        15   0.5  0.209
              200        10   0    0.31145
              200        5    0    0.3079
              200        5    0    0.3007
              200        5    0    0.28705
              200        5    0    0.3117
            Manager ClimateControl: same as New Zealand RainShelter Trials.RS1988_89.Factors._.EarlyDrought1.ClimateControl
          Factor MiddleDrought4
            Specifications:
              [IrrigationEvents]
              [Water]
              [InitialN]
              [ClimateControl]
            Operations IrrigationEvents
              1988-10-06  [Irrigation].Apply(27);
              1988-10-13  [Irrigation].Apply(10);
              1988-10-20  [Irrigation].Apply(30);
              1988-10-27  [Irrigation].Apply(25);
              1988-11-03  [Irrigation].Apply(0);
              1988-11-24  [Irrigation].Apply(0);
              1988-12-01  [Irrigation].Apply(0);
              1988-12-08  [Irrigation].Apply(0);
              1988-12-15  [Irrigation].Apply(0);
              1988-12-22  [Irrigation].Apply(0);
              1988-12-29  [Irrigation].Apply(0);
            Water: same as New Zealand RainShelter Trials.RS1988_89.Factors._.EarlyDrought1.Water
            Manager ClimateControl: same as New Zealand RainShelter Trials.RS1988_89.Factors._.EarlyDrought1.ClimateControl
            Sample InitialN: same as New Zealand RainShelter Trials.RS1988_89.Factors._.EarlyDrought1.InitialN
          Factor LateDrought1
            Specifications:
              [IrrigationEvents]
              [Water]
              [InitialN]
              [ClimateControl]
            Operations IrrigationEvents
              1988-10-06  [Irrigation].Apply(27);
              1988-10-13  [Irrigation].Apply(10);
              1988-10-20  [Irrigation].Apply(30);
              1988-10-27  [Irrigation].Apply(25);
              1988-11-03  [Irrigation].Apply(25);
              1988-11-10  [Irrigation].Apply(47);
              1988-11-17  [Irrigation].Apply(32);
            Water: same as New Zealand RainShelter Trials.RS1988_89.Factors._.EarlyDrought1.Water
            Manager ClimateControl: same as New Zealand RainShelter Trials.RS1988_89.Factors._.EarlyDrought1.ClimateControl
            Sample InitialN: same as New Zealand RainShelter Trials.RS1988_89.Factors._.EarlyDrought1.InitialN
          Factor LateDrought2
            Specifications:
              [IrrigationEvents]
              [Water]
              [InitialN]
              [ClimateControl]
            Operations IrrigationEvents
              1988-10-06  [Irrigation].Apply(27);
              1988-10-13  [Irrigation].Apply(10);
              1988-10-20  [Irrigation].Apply(30);
              1988-10-27  [Irrigation].Apply(25);
              1988-11-03  [Irrigation].Apply(25);
              1988-11-10  [Irrigation].Apply(47);
              1988-11-17  [Irrigation].Apply(32);
              1988-11-24  [Irrigation].Apply(18);
            Water: same as New Zealand RainShelter Trials.RS1988_89.Factors._.EarlyDrought1.Water
            Manager ClimateControl: same as New Zealand RainShelter Trials.RS1988_89.Factors._.EarlyDrought1.ClimateControl
            Sample InitialN: same as New Zealand RainShelter Trials.RS1988_89.Factors._.EarlyDrought1.InitialN
          Factor LateDrought3
            Specifications:
              [IrrigationEvents]
              [Water]
              [InitialN]
              [ClimateControl]
            Operations IrrigationEvents
              1988-10-06  [Irrigation].Apply(27);
              1988-10-13  [Irrigation].Apply(10);
              1988-10-20  [Irrigation].Apply(30);
              1988-10-27  [Irrigation].Apply(25);
              1988-11-03  [Irrigation].Apply(25);
              1988-11-10  [Irrigation].Apply(47);
              1988-11-17  [Irrigation].Apply(32);
              1988-11-24  [Irrigation].Apply(18);
              1988-12-01  [Irrigation].Apply(35);
            Water: same as New Zealand RainShelter Trials.RS1988_89.Factors._.EarlyDrought1.Water
            Manager ClimateControl: same as New Zealand RainShelter Trials.RS1988_89.Factors._.EarlyDrought1.ClimateControl
            Sample InitialN: same as New Zealand RainShelter Trials.RS1988_89.Factors._.EarlyDrought1.InitialN
      Simulation FullIrrig
        Weather: FileName=Weather\lincoln.met
        Clock: StartDate=1988-09-01; EndDate=1989-03-01
        Summary summaryfile
        SoilArbitrator Soil Arbitrator
        Zone Paddock: Area=1; Slope=0
          Soil: Region=Plains; State=Canterbury; Country=New Zealand; Latitude=0; Longitude=0
            DataSource=Generic profile descriptions provided by Trevor Webb and data for functional horizions based on SWAMP project results
            Comments=Bulk density values were measured on the fine earth fraction so values entered into apsim soil are adjusted down to account for stone content (assuming stones are inert from all soil process so their mass and volume is removed from model paramaters).  SAT, DUL, LL15 and Air dry have been adjusted down to account for stone content.  OC has not been adjusted so the model will get the correct carbon and N amounts using the adjusted BD.
            Analysis: Thickness=[100, 200, 200, 100, 300, 200, 100, 300]; PH=[6, 6, 6, 6, 6, 6, 6, 6]; PHUnits=Water; BoronUnits=HotWater
            Water
              Thickness  BD     AirDry  LL15   DUL   SAT
              100        1.23   0.05    0.14   0.33  0.48
              200        1.23   0.05    0.14   0.33  0.48
              300        1.59   0.157   0.13   0.29  0.4
              200        1.57   0.173   0.11   0.28  0.38
              100        1.57   0.173   0.173  0.3   0.366
              200        1.6    0.165   0.165  0.3   0.358
              100        1.6    0.165   0.165  0.3   0.358
              300        1.601  0.115   0.115  0.3   0.316
              SoilCrop BarleySoil: LL=[0.1, 0.1, 0.157, 0.173, 0.173, 0.165, 0.165, 0.115]; KL=[0.1, 0.1, 0.1, 0.1, 0.1, 0.1, 0.1, 0.1]; XF=[1, 1, 1, 1, 1, 1, 1, 1]
            SoilWater: SummerDate=1-oct; SummerU=9; SummerCona=4.4; WinterDate=1-Apr; WinterU=2; WinterCona=1.5; DiffusConst=88; DiffusSlope=35; Salb=0.13; CN2Bare=73; CNRed=20; CNCov=0.8; max_pond=0; Thickness=[100, 200, 300, 200, 100, 200, 100, 300]; SWCON=[0.9, 0.6, 0.4, 0.4, 0.4, 0.9, 0.9, 0.9]; residueinterception=0
            SoilNitrogen: fom_type=[default, manure, mucuna, lablab, shemp, stable]; fract_carb=[0.2, 0.3, 0.54, 0.57, 0.45, 0]; fract_cell=[0.7, 0.3, 0.37, 0.37, 0.47, 0.1]; fract_lign=[0.1, 0.4, 0.09, 0.06, 0.08, 0.9]; wfpsN2N2O_x=[22, 88]; wfpsN2N2O_y=[0.1, 1]
            SoilOrganicMatter: RootCN=31.5; RootWt=1500; SoilCN=11; EnrACoeff=7.4; EnrBCoeff=0.2; OCUnits=Total
              Thickness  OC     FBiom  FInert
              100        2.677  0.025  0.45
              200        2.784  0.025  0.6
              300        1.454  0.015  0.75
              200        0.383  0.01   0.9
              100        0.243  0.01   0.96
              200        0.243  0.01   0.96
              100        0.243  0.01   0.96
              300        0.243  0.01   0.96
            Sample InitialN: NO3Units=kgha; NH4Units=kgha; SWUnits=Volumetric; OCUnits=Total; PHUnits=Water
              Thickness  NO3  NH4  SW
              100        30   5    0.27
              200        15   0.5  0.3
              300        15   0.5  0.28
              200        10   0    0.25
              100        5    0    0.24
              200        5    0    0.27
              100        5    0    0.27
              300        5    0    0.21
            CERESSoilTemperature
          Plant Barley: CropType=Wheat
          SurfaceOrganicMatter Surface Organic Matter: PoolName=wheat_stubble; type=wheat; mass=1000; standing_fraction=0; cnr=80; CriticalResidueWeight=2000; OptimumDecompTemp=20; MaxCumulativeEOS=20; CNRatioDecompCoeff=0.277; CNRatioDecompThreshold=25; TotalLeachRain=25; MinRainToLeach=10; CriticalMinimumOrganicC=0.004; DefaultCPRatio=0; DefaultStandingFraction=0; StandingExtinctCoeff=0.5; FractionFaecesAdded=0.5
            Pools:
              {PoolName=wheat_stubble, ResidueType=wheat, Mass=1000, CNRatio=80, StandingFraction=0}
            ResidueTypes: LoadFromResource=ResidueTypes
          MicroClimate: a_interception=0; b_interception=1; c_interception=0; d_interception=0; soil_albedo=0.3; sun_angle=15; soil_heat_flux_fraction=0.4; night_interception_fraction=0.5; refheight=2; albedo=0.293662; emissivity=0.96; RadIntTotal=0
          Irrigation
          Fertiliser
          Folder Manager folder
            Operations SowingEvent
              1988-09-07  [Barley].Sow(population:250, cultivar:"Triumph", depth:40, rowSpacing:150);
            Operations IrrigationEvents
              1988-10-06  [Irrigation].Apply(27);
              1988-10-13  [Irrigation].Apply(10);
              1988-10-20  [Irrigation].Apply(30);
              1988-10-27  [Irrigation].Apply(25);
              1988-11-03  [Irrigation].Apply(25);
              1988-11-10  [Irrigation].Apply(47);
              1988-11-17  [Irrigation].Apply(32);
              1988-11-24  [Irrigation].Apply(18);
              1988-12-01  [Irrigation].Apply(35);
              1988-12-08  [Irrigation].Apply(24);
              1988-12-15  [Irrigation].Apply(43);
              1988-12-22  [Irrigation].Apply(32);
              1988-12-29  [Irrigation].Apply(36);
            Operations FertiliserEvents
              1988-09-26  [Fertiliser].Apply(50, Fertiliser.Types.NO3N,10);
              1988-11-02  [Fertiliser].Apply(70, Fertiliser.Types.NO3N,10);
            Manager ClimateControl: same as New Zealand RainShelter Trials.RS1988_89.Factors._.Control.ClimateControl
          Manager Harvesting: same as New Zealand RainShelter Trials.RS1995_96.Rainfed.Paddock.Harvesting
          Report DailyReport: EventNames=[Clock].DoReport
            VariableNames:
              [Clock].Today
              [Weather].MeanT
              [Soil].SoilWater.SW
              [Soil].SoilWater.SWmm
              sum([Soil].SoilWater.SWmm) as ProfileWater
              [Barley].AboveGround.N
              [Barley].AboveGround.Wt
              [Barley].AboveGroundLive.N
              [Barley].AboveGroundLive.N*10 as AboveGroundN
              [Barley].AboveGroundLive.Wt
              [Barley].AboveGroundDead.N
              [Barley].AboveGroundDead.Wt
              [Barley].Arbitrator.DMDemand
              [Barley].Arbitrator.DM.TotalFixationSupply
              [Barley].Ear.N
              [Barley].Ear.Nconc
              [Barley].Ear.Wt
              [Barley].Grain.N
              [Barley].Grain.NConc
              [Barley].Grain.Number
              [Barley].Grain.Size
              [Barley].Grain.Wt
              [Barley].Grain.Live.Wt
              [Barley].Leaf.AppearedCohortNo
              [Barley].Leaf.CoverDead
              [Barley].Leaf.CoverGreen
              [Barley].Leaf.CoverTotal
              [Barley].Leaf.Dead.N
              [Barley].Leaf.Dead.NConc
              [Barley].Leaf.Dead.Wt
              [Barley].Leaf.DeadCohortNo
              [Barley].Leaf.SenescingCohortNo
              [Barley].Leaf.ExpandedCohortNo
              [Barley].Leaf.Fn
              [Barley].Leaf.Fw
              [Barley].Leaf.Height
              [Barley].Leaf.InitialisedCohortNo
              [Barley].Leaf.LAI
              [Barley].Leaf.Live.N
              [Barley].Leaf.Live.NConc
              [Barley].Leaf.Live.Wt
              [Barley].Leaf.SpecificArea
              [Barley].Leaf.Transpiration
              [Barley].Phenology.CurrentPhaseName
              [Barley].Phenology.CurrentStageName
              [Barley].Phenology.DailyVernalisation.Value()
              [Barley].Phenology.MeanTemp.Value()
              [Barley].Phenology.Photoperiod.Value()
              [Barley].Phenology.Stage
              [Barley].Phenology.ThermalTime.Value()
              [Barley].Phenology.ThermalTime.Value
              [Barley].Phenology.Vrn1.Value()
              [Barley].Phenology.Vrn2.Value()
              [Barley].Phenology.Vrn4.Value()
              [Barley].Phenology.Zadok.Stage
              [Barley].Root.Depth
              [Barley].Root.N
              [Barley].Root.Wt
              [Barley].Root.Nconc
              [Barley].Root.WaterUptake
              [Barley].Spike.N
              [Barley].Spike.NConc
              [Barley].Spike.Wt
              [Barley].Spike.Live.NonStructuralWt
              [Barley].Stem.N
              [Barley].Stem.NConc
              [Barley].Stem.Wt
              [Barley].Stem.PercentWSC
              [Barley].Stem.Live.NonStructuralWt
              [Barley].StemPlusSpike.Wt
              [Barley].StemPlusSpike.N
              [Barley].SowingData.Cultivar
              [Barley].Structure.HaunStage.ValueTerminalSpikelet.Value()
              [Barley].Structure.HaunStage.Value()
              [Barley].Structure.Height
              [Barley].Structure.LeafTipsAppeared
              [Barley].Structure.MainStemFinalNodeNumber.Value()
              [Barley].Structure.MainStemFinalNodeNumber.ValueToHold.PhotoPLeaves.Value()
              [Barley].Structure.MainStemPopn
              [Barley].Structure.MeanTillerGrowthRate.Value()
              [Barley].Structure.TotalStemPopn
              [Barley].Total.N
              [Barley].Total.Wt
              [SurfaceOrganicMatter].Wt
              ([Barley].Leaf.Transpiration + [Soil].SoilWater.Es + [MicroClimate].interception) as ET
              sum([Soil].SoilNitrogen.NO3) as TotalSoilNitrogen
              [Barley].Phenology.FlagLeafDAS
              [Barley].Phenology.FloweringDAS
              [Barley].Phenology.MaturityDAS
              [Barley].Phenology.PhotoPeriod
              [Barley].Phenology.PhotoPeriodDeltaFunction
              [Barley].Phenology.Stage
              [Barley].Phenology.SoilTemperatureFunction.Value()
          Report EndTrialReport: EventNames=[Clock].EndOfSimulation
            VariableNames:
              [Barley].Structure.LeafTipsAppeared
              [Barley].Structure.MainStemFinalNodeNumber
              [Barley].Phenology.FlagLeafDAS
              [Barley].Phenology.FloweringDAS
              [Barley].Phenology.MaturityDAS
              [Script].CalcVals.SowMonth
          SoluteManager
    Experiment RS2014_15
      Memo Experiment
        This was a field experiment established at the PFR rain-out shelter in October 2014. Barley cultivars cv Dash and cv Omaka, differing canopy characteristics and water extraction capabilities were established with a range of irrigation treatments aimed at producing a range of soil moisture deficits.
        1.	High =Full replacement irrigation: replace weekly, measured crop water use
        2.	Mid =Intermediate replacement with reduced frequency and higher volume eg monthly application of ½ measured crop water use
        3.	Low =Nil (or near nil) irrigation, likely to be irrigated once at anthesis

        The treatments were monitored for:

        1.	Soil water - this was measured continously using autologging TDR and weekly using a nuetron prob
        2.	Canopy light interception
        3.	Biomass - quantified four times during crop growth
        4.	Leaf area
      Factors
        Factor _
          Factor Dash: Specifications=[IrrigationEvents]
            Operations Low
              2014-11-18  [Irrigation].Apply(0);
              2014-11-26  [Irrigation].Apply(0);
              2014-11-27  [Irrigation].Apply(0);
              2014-12-02  [Irrigation].Apply(36.7);
              2014-12-10  [Irrigation].Apply(0);
              2014-12-16  [Irrigation].Apply(0);
              2014-12-23  [Irrigation].Apply(0);
              2014-12-30  [Irrigation].Apply(0);
              2015-01-06  [Irrigation].Apply(0);
              2015-02-12  [Irrigation].Apply(0);
              2015-02-12  [Irrigation].Apply(0);
              2015-02-16  [Irrigation].Apply(0);
              2015-02-19  [Irrigation].Apply(0);
              2015-02-23  [Irrigation].Apply(0);
              2015-02-26  [Irrigation].Apply(0);
            Operations Med
              2014-11-18  [Irrigation].Apply(0);
              2014-11-26  [Irrigation].Apply(0);
              2014-11-27  [Irrigation].Apply(0);
              2014-12-02  [Irrigation].Apply(71);
              2014-12-10  [Irrigation].Apply(0);
              2014-12-16  [Irrigation].Apply(0);
              2014-12-23  [Irrigation].Apply(0);
              2014-12-30  [Irrigation].Apply(76);
              2015-01-06  [Irrigation].Apply(0);
              2015-02-12  [Irrigation].Apply(0);
              2015-02-12  [Irrigation].Apply(0);
              2015-02-16  [Irrigation].Apply(80);
              2015-02-19  [Irrigation].Apply(0);
              2015-02-23  [Irrigation].Apply(0);
              2015-02-26  [Irrigation].Apply(0);
            Operations High
              2014-11-18  [Irrigation].Apply(40);
              2014-11-26  [Irrigation].Apply(45);
              2014-11-27  [Irrigation].Apply(45);
              2014-12-02  [Irrigation].Apply(36.7);
              2014-12-10  [Irrigation].Apply(36);
              2014-12-16  [Irrigation].Apply(32);
              2014-12-23  [Irrigation].Apply(43);
              2014-12-30  [Irrigation].Apply(40);
              2015-01-06  [Irrigation].Apply(60);
              2015-02-12  [Irrigation].Apply(40);
              2015-02-12  [Irrigation].Apply(40);
              2015-02-16  [Irrigation].Apply(40);
              2015-02-19  [Irrigation].Apply(40);
              2015-02-23  [Irrigation].Apply(40);
              2015-02-26  [Irrigation].Apply(40);
          Factor Omaka
            Specifications:
              [Sowing].Script.CropToSow = Omaka
              [IrrigationEvents]
            Operations Low: same as New Zealand RainShelter Trials.RS2014_15.Factors._.Dash.Low
            Operations Med: same as New Zealand RainShelter Trials.RS2014_15.Factors._.Dash.Med
            Operations High: same as New Zealand RainShelter Trials.RS2014_15.Factors._.Dash.High
      Simulation Omaka
        Weather: FileName=Weather\lincoln.met
        Clock: StartDate=2014-09-15; EndDate=2015-05-30
        Summary summaryfile
        SoilArbitrator Soil Arbitrator
        Zone Paddock: Area=1; Slope=0
          Manager DAS: same as New Zealand CPT.Boss.Boss.DAS
          Soil: same as New Zealand RainShelter Trials.RS1995_96.Rainfed.Paddock.Soil
          Plant Barley: CropType=Wheat
          SurfaceOrganicMatter Surface Organic Matter: same as New Zealand CPT.Boss.Boss.Paddock.Surface Organic Matter
          MicroClimate: a_interception=0; b_interception=1; c_interception=0; d_interception=0; soil_albedo=0.3; sun_angle=15; soil_heat_flux_fraction=0.4; night_interception_fraction=0.5; refheight=2; albedo=0.293662; emissivity=0.96; RadIntTotal=0
          Irrigation
          Fertiliser
          Folder Manager folder
            Manager Sowing
              CropToSow = Dash
              InitialRootDepth = 40
              SowingDate = 2014-10-14
```csharp
using System;
using Models.Core;
using System.Collections.Generic;
using System.Text;
using Models.PMF;
using Models;
using System.Xml.Serialization;
using APSIM.Shared.Utilities;
using System.Data;
using Models.PMF.Interfaces;
using Models.SurfaceOM;

namespace Models
{
	[Serializable] 
	//[System.Xml.Serialization.XmlInclude(typeof(Model))]
	public class Script : Model
	{
		[Link] Plant Barley;
		[Link] Clock Clock;
		[Link] Zone zone;
		[Link] Simulation Simulation;
		[Link] SurfaceOrganicMatter SurfOM;
		
				
		[Description("Initial Root Depth")]
		public double InitialRootDepth { get; set; }
		[Description("Sown Crop")]
		public string CropToSow { get; set; }
		[Description("Sowing Date")]
		public DateTime SowingDate { get; set; }

		
		
		[EventSubscribe("DoManagement")]
		private void OnDoManagement(object sender, EventArgs e)
		{
			if (Clock.Today.Date == SowingDate)
			{
				Barley.Sow(cultivar: CropToSow, population: 250, depth: InitialRootDepth, rowSpacing: 150);
				
			}

		}
	}
}
```
            Operations IrrigationEvents: same as New Zealand RainShelter Trials.RS2014_15.Factors._.Dash.High
            Operations FertiliserEvents
              2014-09-16  [Fertiliser].Apply(30, Fertiliser.Types.NO3N,0);
              2014-10-10  [Fertiliser].Apply(30, Fertiliser.Types.NO3N,0);
              2014-12-02  [Fertiliser].Apply(50, Fertiliser.Types.NO3N,0);
          Manager ClimateControl
            StartDate = 1995-10-15
            EndDate = 1996-04-01
            CCOnOff = True
            script: same as in New Zealand RainShelter Trials.RS1995_96.Factors._.Fullirrigation.ClimateControl
          Manager Harvesting: same as New Zealand RainShelter Trials.RS1995_96.Rainfed.Paddock.Harvesting
          Report DailyReport: same as New Zealand RainShelter Trials.RS1995_96.Rainfed.Paddock.DailyReport
          Report EndTrialReport: EventNames=[Clock].EndOfSimulation
            VariableNames:
              [Barley].Structure.LeafTipsAppeared
              [Barley].Structure.MainStemFinalNodeNumber
              [Barley].Phenology.FlagLeafDAS
              [Barley].Phenology.FloweringDAS
              [Barley].Phenology.MaturityDAS
              [Script].CalcVals.SowMonth
          SoluteManager
  Folder New Zealand Field Trials
    Folder UniBlock15_16
      Experiment Field2015_16
        Memo Experiment
          This is the mineral nitrogen (N) validation trial conducted at the Lincoln University Dairy Farm on a deep well-drained Templeton silt loam soil. The trial ran from September 2015 to February 2016. Five N fertiliser treatments were evaluated:
          1. Nil N - the crop did not get any fertiliser N
          2. 50% N - the crop recieved 50% of the required fertiliser N
          3. 75% N - the crop recieved 75% of the required fertiliser N
          4. 100% N - the crop recieved the required fertiliser N as estimated by the fertiliser calculator
          5. 125% N - the crop recieved 25% fertiliser N above the requirement.
        Factors
          Factor _
            Factor 0N: Specifications=[FertiliserEvents]
              Operations FertiliserEvents
                2015-11-10  [Fertiliser].Apply(0, Fertiliser.Types.NO3N,0);
                2015-11-29  [Fertiliser].Apply(0, Fertiliser.Types.NO3N,0);
                2015-12-16  [Fertiliser].Apply(0, Fertiliser.Types.NO3N,0);
                2015-12-16  [Fertiliser].Apply(0, Fertiliser.Types.NO3N,0);
            Factor 50N: Specifications=[FertiliserEvents]
              Operations FertiliserEvents
                2015-11-10  [Fertiliser].Apply(23, Fertiliser.Types.NO3N,0);
                2015-11-29  [Fertiliser].Apply(23, Fertiliser.Types.NO3N,0);
                2015-12-16  [Fertiliser].Apply(23, Fertiliser.Types.NO3N,0);
                2015-12-16  [Fertiliser].Apply(23, Fertiliser.Types.NO3N,0);
            Factor 75N: Specifications=[FertiliserEvents]
              Operations FertiliserEvents
                2015-11-10  [Fertiliser].Apply(34, Fertiliser.Types.NO3N,0);
                2015-11-29  [Fertiliser].Apply(34, Fertiliser.Types.NO3N,0);
                2015-12-16  [Fertiliser].Apply(34, Fertiliser.Types.NO3N,0);
                2015-12-16  [Fertiliser].Apply(34, Fertiliser.Types.NO3N,0);
            Factor 100N: Specifications=[FertiliserEvents]
              Operations FertiliserEvents
                2015-11-10  [Fertiliser].Apply(45, Fertiliser.Types.NO3N,0);
                2015-11-29  [Fertiliser].Apply(45, Fertiliser.Types.NO3N,0);
                2015-12-16  [Fertiliser].Apply(45, Fertiliser.Types.NO3N,0);
                2015-12-16  [Fertiliser].Apply(45, Fertiliser.Types.NO3N,0);
            Factor 125N: Specifications=[FertiliserEvents]
              Operations FertiliserEvents
                2015-11-10  [Fertiliser].Apply(56, Fertiliser.Types.NO3N,0);
                2015-11-29  [Fertiliser].Apply(56, Fertiliser.Types.NO3N,0);
                2015-12-16  [Fertiliser].Apply(56, Fertiliser.Types.NO3N,0);
                2015-12-16  [Fertiliser].Apply(56, Fertiliser.Types.NO3N,0);
        Simulation Base_ZeroN
          Weather: FileName=Weather\Lincoln15-17.met
          Clock: StartDate=2015-09-11; EndDate=2016-03-31
          Summary summaryfile
          SoilArbitrator Soil Arbitrator
          Zone Paddock: Area=1; Slope=0
            Manager DAS: same as New Zealand CPT.Boss.Boss.DAS
            Soil: SoilType=NZ_sedementary; Region=Plains; State=Canterbury; Country=New Zealnd; Latitude=0; Longitude=0
              Analysis: Thickness=[150, 150, 300, 300, 300, 300]; PH=[6.6, 6.2, 5.7, 5.5, 5.5, 5.5]; PHUnits=Water; BoronUnits=HotWater
              Water
                Thickness  BD    AirDry  LL15  DUL   SAT   KS
                150        1.23  0.05    0.14  0.33  0.48  4832.039
                150        1.23  0.05    0.14  0.33  0.48  389.229
                300        1.59  0.16    0.16  0.29  0.4   16.362
                300        1.57  0.17    0.17  0.28  0.38  97.995
                300        1.57  0.17    0.17  0.3   0.37  97.995
                300        1.6   0.17    0.17  0.3   0.36  97.995
                SoilCrop BarleySoil: LL=[0.1, 0.1, 0.157, 0.173, 0.173, 0.165]; KL=[0.1, 0.1, 0.1, 0.1, 0.1, 0.1]; XF=[1, 1, 1, 1, 1, 1]
              SoilWater: SummerDate=1-Nov; SummerU=6; SummerCona=2; WinterDate=1-Apr; WinterU=9; WinterCona=4.4; DiffusConst=0; DiffusSlope=0; Salb=0.18; CN2Bare=68; CNRed=20; CNCov=0.8; slope=0; discharge_width=0; catchment_area=0; max_pond=0; residueinterception=0
                Thickness  SWCON  KLAT
                150        0.9    0
                150        0.6    0
                300        0.4    0
                300        0.4    0
                300        0.4    0
                300        0.9    0
              SoilNitrogen: same as New Zealand CPT.Boss.Boss.Paddock.Soil.SoilNitrogen
              SoilOrganicMatter: RootCN=31.5; RootWt=1500; SoilCN=11; EnrACoeff=7.4; EnrBCoeff=0.2; OCUnits=Total
                Thickness  OC    FBiom  FInert
                150        2.68  0.025  0.45
                150        2.78  0.025  0.6
                300        1.45  0.015  0.75
                300        0.38  0.01   0.9
                300        0.24  0.01   0.96
                300        0.24  0.01   0.96
              Sample InitialN: NO3Units=kgha; NH4Units=kgha; SWUnits=Volumetric; OCUnits=Total; PHUnits=Water
                Thickness  NO3   NH4  SW
                150        8.4   2    0.31
                150        11.6  0.6  0.31
                300        10    0.8  0.16
                300        11    0.3  0.15
                300        9     0.2  0.2
                300        3     0.4  0.2
              CERESSoilTemperature
              Sample Initial water: Thickness=[150, 150, 300, 300, 300, 300]; SW=[0.31, 0.31, 0.16, 0.15, 0.2, 0.2]; NO3Units=kgha; NH4Units=kgha; SWUnits=Volumetric; OCUnits=Total; PHUnits=Water
            Plant Barley: CropType=Wheat
            SurfaceOrganicMatter Surface Organic Matter: same as New Zealand CPT.Boss.Boss.Paddock.Surface Organic Matter
            MicroClimate: a_interception=0; b_interception=1; c_interception=0; d_interception=0; soil_albedo=0.3; sun_angle=15; soil_heat_flux_fraction=0.4; night_interception_fraction=0.5; refheight=2; albedo=0.293662; emissivity=0.96; RadIntTotal=0
            Irrigation
            Fertiliser
            Folder Manager folder
              Operations SowingEvent
                2015-09-28  [Barley].Sow(population:280, cultivar:"Valetta", depth:40, rowSpacing:150);
              Operations IrrigationEvents
                2015-10-19  [Irrigation].Apply(30);
                2015-11-26  [Irrigation].Apply(30);
                2015-12-01  [Irrigation].Apply(30);
                2015-12-10  [Irrigation].Apply(30);
              Operations FertiliserEvents
                2015-11-10  [Fertiliser].Apply(0, Fertiliser.Types.NO3N,0);
                2015-11-29  [Fertiliser].Apply(0, Fertiliser.Types.NO3N,0);
                2015-12-16  [Fertiliser].Apply(0, Fertiliser.Types.NO3N,0);
                2015-12-16  [Fertiliser].Apply(0, Fertiliser.Types.NO3N,0);
              Manager Harvesting: same as New Zealand CPT.Boss.Boss.Paddock.Harvesting
            Report DailyReport: same as New Zealand CPT.Boss.Boss.Paddock.DailyReport
            Report EndTrialReport: EventNames=[Clock].EndOfSimulation
              VariableNames:
                [Barley].Structure.LeafTipsAppeared
                [Barley].Structure.MainStemFinalNodeNumber
                [Barley].Phenology.FlagLeafDAS
                [Barley].Phenology.FloweringDAS
                [Barley].Phenology.MaturityDAS
                [Script].CalcVals.SowMonth
            SoluteManager
    Folder MCPD09_10
      Experiment Dash2009_10
        Memo Experiment
          This was a “cultivar*nitrogen*irrigation trial conducted at Lincoln. Crops were sown in spring (Oct 2009). Treatments were:
          •	Four cultivars (Booma, Dash, Omaka, Sherwood);
          •	Two water treatments; Rainfed (nil irrigation) and irrigated (310 mm);
          •	Two fertiliser N treatments; 0N (no fertiliser) and 150N (150 kg N/ha).
        Factors
          Factor _N
            Factor 0: Specifications=[FertiliserEvents]
              Operations FertiliserEvents
                2009-11-23  [Fertiliser].Apply(0, Fertiliser.Types.NO3N,10);
            Factor 150: Specifications=[FertiliserEvents]
              Operations FertiliserEvents
                2009-11-23  [Fertiliser].Apply(150, Fertiliser.Types.NO3N,10);
          Factor _
            Factor Dry: Specifications=[IrrigationEvents]
              Operations IrrigationEvents
                2009-11-11  [Irrigation].Apply(0);
                2009-11-19  [Irrigation].Apply(0);
                2009-11-26  [Irrigation].Apply(0);
                2009-12-11  [Irrigation].Apply(0);
                2009-12-21  [Irrigation].Apply(0);
                2009-12-29  [Irrigation].Apply(0);
                2010-01-05  [Irrigation].Apply(0);
                2010-01-13  [Irrigation].Apply(0);
                2010-03-02  [Irrigation].Apply(0);
                2010-03-03  [Irrigation].Apply(0);
            Factor Irrig: Specifications=[IrrigationEvents]
              Operations Irrigtion Events
                2009-11-11  [Irrigation].Apply(20);
                2009-11-19  [Irrigation].Apply(25);
                2009-11-26  [Irrigation].Apply(25);
                2009-12-11  [Irrigation].Apply(20);
                2009-12-21  [Irrigation].Apply(35);
                2009-12-29  [Irrigation].Apply(40);
                2010-01-05  [Irrigation].Apply(35);
                2010-01-13  [Irrigation].Apply(30);
                2010-03-02  [Irrigation].Apply(40);
                2010-03-03  [Irrigation].Apply(40);
        Simulation d09_10
          Weather: FileName=Weather\lincoln.met
          Clock: StartDate=2009-09-01; EndDate=2010-06-30
          Summary summaryfile
          SoilArbitrator Soil Arbitrator
          Zone Paddock: Area=1; Slope=0
            Manager DAS: same as New Zealand CPT.Boss.Boss.DAS
            Soil: SoilType=NZ_sedementary; Region=Plains; State=Canterbury; Country=New Zealnd; Latitude=0; Longitude=0
              Analysis: Thickness=[150, 150, 300, 300, 300, 300]; PH=[6.6, 6.2, 5.7, 5.5, 5.5, 5.5]; PHUnits=Water; BoronUnits=HotWater
              Water: same as New Zealand Field Trials.UniBlock15_16.Field2015_16.Base_ZeroN.Paddock.Soil.Water
              SoilWater: same as New Zealand Field Trials.UniBlock15_16.Field2015_16.Base_ZeroN.Paddock.Soil.SoilWater
              SoilNitrogen: same as New Zealand CPT.Boss.Boss.Paddock.Soil.SoilNitrogen
              SoilOrganicMatter: same as New Zealand Field Trials.UniBlock15_16.Field2015_16.Base_ZeroN.Paddock.Soil.SoilOrganicMatter
              Sample InitialN: NO3Units=kgha; NH4Units=kgha; SWUnits=Volumetric; OCUnits=Total; PHUnits=Water
                Thickness  NO3    NH4  SW
                150        108.4  2    0.31
                150        11.6   0.6  0.31
                300        10     0.8  0.16
                300        11     0.3  0.15
                300        9      0.2  0.2
                300        3      0.4  0.2
              CERESSoilTemperature
              Sample Initial water: Thickness=[150, 150, 300, 300, 300, 300]; SW=[0.31, 0.31, 0.16, 0.15, 0.2, 0.2]; NO3Units=kgha; NH4Units=kgha; SWUnits=Volumetric; OCUnits=Total; PHUnits=Water
            Plant Barley: CropType=Wheat
            SurfaceOrganicMatter Surface Organic Matter: same as New Zealand CPT.Boss.Boss.Paddock.Surface Organic Matter
            MicroClimate: a_interception=0; b_interception=1; c_interception=0; d_interception=0; soil_albedo=0.3; sun_angle=15; soil_heat_flux_fraction=0.4; night_interception_fraction=0.5; refheight=2; albedo=0.293662; emissivity=0.96; RadIntTotal=0
            Irrigation
            Fertiliser
            Folder Manager folder
              Manager Sowing
                Cultivar = Dash
                SowingDate = 2009-10-01
                InitialRootDepth = 40
```csharp
using System;
using Models.Core;
using System.Collections.Generic;
using System.Text;
using Models.PMF;
using Models;
using System.Xml.Serialization;
using APSIM.Shared.Utilities;
using System.Data;
using Models.PMF.Interfaces;
using Models.SurfaceOM;

namespace Models
{
	[Serializable] 
	//[System.Xml.Serialization.XmlInclude(typeof(Model))]
	public class Script : Model
	{
		[Link] Plant Barley;
		[Link] Clock Clock;
		[Link] Zone zone;
		[Link] Simulation Simulation;
		[Link] SurfaceOrganicMatter SurfOM;
		
				
		[Description("Initial Root Depth")]
		public double InitialRootDepth { get; set; }
		[Description("Cultivar name")]
		public string Cultivar { get; set; }
		[Description("Sowing Date")]
		public DateTime SowingDate { get; set; }
		
		
		[EventSubscribe("DoManagement")]
		private void OnDoManagement(object sender, EventArgs e)
		{
			if (Clock.Today.Date == SowingDate)
			{
				Barley.Sow(cultivar: Cultivar, population: 280, depth: InitialRootDepth, rowSpacing: 150);
				
			}
					
			
		}
	}
}
```
              Manager Harvesting: same as New Zealand CPT.Boss.Boss.Paddock.Harvesting
              Operations IrrigationEvents: same as New Zealand Field Trials.MCPD09_10.Dash2009_10.Factors._.Irrig.Irrigtion Events
              Operations FertiliserEvents
                2009-11-23  [Fertiliser].Apply(150, Fertiliser.Types.NO3N,10);
            Manager Harvesting: same as New Zealand CPT.Boss.Boss.Paddock.Harvesting
            Report DailyReport: same as New Zealand CPT.Boss.Boss.Paddock.DailyReport
            Report EndTrialReport: EventNames=[Clock].EndOfSimulation
              VariableNames:
                [Barley].Structure.LeafTipsAppeared
                [Barley].Structure.MainStemFinalNodeNumber
                [Barley].Phenology.FlagLeafDAS
                [Barley].Phenology.FloweringDAS
                [Barley].Phenology.MaturityDAS
                [Script].CalcVals.SowMonth
            SoluteManager
      Experiment Booma2009_10
        Memo Experiment
          This was a “cultivar*nitrogen*irrigation trial conducted at Lincoln. Crops were sown in spring (Oct 2009). Treatments were:
          •	Four cultivars (Booma, Dash, Omaka, Sherwood);
          •	Two water treatments; Rainfed (nil irrigation) and irrigated (310 mm);
          •	Two fertiliser N treatments; 0N (no fertiliser) and 150N (150 kg N/ha).
        Factors: same as New Zealand Field Trials.MCPD09_10.Dash2009_10.Factors
        Simulation b09_10
          Weather: FileName=Weather\lincoln.met
          Clock: StartDate=2009-09-01; EndDate=2010-06-30
          Summary summaryfile
          SoilArbitrator Soil Arbitrator
          Zone Paddock: Area=1; Slope=0
            Manager DAS: same as New Zealand CPT.Boss.Boss.DAS
            Soil: same as New Zealand Field Trials.UniBlock15_16.Field2015_16.Base_ZeroN.Paddock.Soil
            Plant Barley: CropType=Wheat
            SurfaceOrganicMatter Surface Organic Matter: same as New Zealand CPT.Boss.Boss.Paddock.Surface Organic Matter
            MicroClimate: a_interception=0; b_interception=1; c_interception=0; d_interception=0; soil_albedo=0.3; sun_angle=15; soil_heat_flux_fraction=0.4; night_interception_fraction=0.5; refheight=2; albedo=0.293662; emissivity=0.96; RadIntTotal=0
            Irrigation
            Fertiliser
            Folder Manager folder
              Manager Sowing
                Cultivar = Booma
                SowingDate = 2009-10-01
                InitialRootDepth = 40
                script: same as in New Zealand Field Trials.MCPD09_10.Dash2009_10.d09_10.Paddock.Manager folder.Sowing
              Manager Harvesting: same as New Zealand CPT.Boss.Boss.Paddock.Harvesting
              Operations IrrigationEvents: same as New Zealand Field Trials.MCPD09_10.Dash2009_10.Factors._.Irrig.Irrigtion Events
              Operations FertiliserEvents
                2009-11-23  [Fertiliser].Apply(150, Fertiliser.Types.NO3N,10);
            Manager Harvesting: same as New Zealand CPT.Boss.Boss.Paddock.Harvesting
            Report DailyReport: same as New Zealand CPT.Boss.Boss.Paddock.DailyReport
            Report EndTrialReport: EventNames=[Clock].EndOfSimulation
              VariableNames:
                [Barley].Structure.LeafTipsAppeared
                [Barley].Structure.MainStemFinalNodeNumber
                [Barley].Phenology.FlagLeafDAS
                [Barley].Phenology.FloweringDAS
                [Barley].Phenology.MaturityDAS
                [Script].CalcVals.SowMonth
            SoluteManager
      Experiment Omaka2009_10
        Memo Experiment
          This was a “cultivar*nitrogen*irrigation trial conducted at Lincoln. Crops were sown in spring (Oct 2009). Treatments were:
          •	Four cultivars (Booma, Dash, Omaka, Sherwood);
          •	Two water treatments; Rainfed (nil irrigation) and irrigated (310 mm);
          •	Two fertiliser N treatments; 0N (no fertiliser) and 150N (150 kg N/ha).
        Factors: same as New Zealand Field Trials.MCPD09_10.Dash2009_10.Factors
        Simulation o09_10
          Weather: FileName=Weather\lincoln.met
          Clock: StartDate=2009-09-01; EndDate=2010-06-30
          Summary summaryfile
          SoilArbitrator Soil Arbitrator
          Zone Paddock: Area=1; Slope=0
            Manager DAS: same as New Zealand CPT.Boss.Boss.DAS
            Soil: same as New Zealand Field Trials.UniBlock15_16.Field2015_16.Base_ZeroN.Paddock.Soil
            Plant Barley: CropType=Wheat
            SurfaceOrganicMatter Surface Organic Matter: same as New Zealand CPT.Boss.Boss.Paddock.Surface Organic Matter
            MicroClimate: a_interception=0; b_interception=1; c_interception=0; d_interception=0; soil_albedo=0.3; sun_angle=15; soil_heat_flux_fraction=0.4; night_interception_fraction=0.5; refheight=2; albedo=0.293662; emissivity=0.96; RadIntTotal=0
            Irrigation
            Fertiliser
            Folder Manager folder
              Manager Sowing
                Cultivar = Omaka
                SowingDate = 2009-10-01
                InitialRootDepth = 40
                script: same as in New Zealand Field Trials.MCPD09_10.Dash2009_10.d09_10.Paddock.Manager folder.Sowing
              Manager Harvesting: same as New Zealand CPT.Boss.Boss.Paddock.Harvesting
              Operations IrrigationEvents: same as New Zealand Field Trials.MCPD09_10.Dash2009_10.Factors._.Irrig.Irrigtion Events
              Operations FertiliserEvents
                2009-11-23  [Fertiliser].Apply(150, Fertiliser.Types.NO3N,10);
            Manager Harvesting: same as New Zealand CPT.Boss.Boss.Paddock.Harvesting
            Report DailyReport: same as New Zealand CPT.Boss.Boss.Paddock.DailyReport
            Report EndTrialReport: EventNames=[Clock].EndOfSimulation
              VariableNames:
                [Barley].Structure.LeafTipsAppeared
                [Barley].Structure.MainStemFinalNodeNumber
                [Barley].Phenology.FlagLeafDAS
                [Barley].Phenology.FloweringDAS
                [Barley].Phenology.MaturityDAS
                [Script].CalcVals.SowMonth
            SoluteManager
      Experiment Sherwood2009_10
        Memo Experiment
          This was a “cultivar*nitrogen*irrigation trial conducted at Lincoln. Crops were sown in spring (Oct 2009). Treatments were:
          •	Four cultivars (Booma, Dash, Omaka, Sherwood);
          •	Two water treatments; Rainfed (nil irrigation) and irrigated (310 mm);
          •	Two fertiliser N treatments; 0N (no fertiliser) and 150N (150 kg N/ha).
        Factors: same as New Zealand Field Trials.MCPD09_10.Dash2009_10.Factors
        Simulation Field09_10
          Weather: FileName=Weather\lincoln.met
          Clock: StartDate=2009-09-01; EndDate=2010-06-30
          Summary summaryfile
          SoilArbitrator Soil Arbitrator
          Zone Paddock: Area=1; Slope=0
            Manager DAS: same as New Zealand CPT.Boss.Boss.DAS
            Soil: same as New Zealand Field Trials.UniBlock15_16.Field2015_16.Base_ZeroN.Paddock.Soil
            Plant Barley: CropType=Wheat
            SurfaceOrganicMatter Surface Organic Matter: same as New Zealand CPT.Boss.Boss.Paddock.Surface Organic Matter
            MicroClimate: a_interception=0; b_interception=1; c_interception=0; d_interception=0; soil_albedo=0.3; sun_angle=15; soil_heat_flux_fraction=0.4; night_interception_fraction=0.5; refheight=2; albedo=0.293662; emissivity=0.96; RadIntTotal=0
            Irrigation
            Fertiliser
            Folder Manager folder
              Manager Sowing
                Cultivar = Sherwood
                SowingDate = 2009-10-01
                InitialRootDepth = 40
                script: same as in New Zealand Field Trials.MCPD09_10.Dash2009_10.d09_10.Paddock.Manager folder.Sowing
              Manager Harvesting: same as New Zealand CPT.Boss.Boss.Paddock.Harvesting
              Operations IrrigationEvents: same as New Zealand Field Trials.MCPD09_10.Dash2009_10.Factors._.Irrig.Irrigtion Events
              Operations FertiliserEvents
                2009-11-23  [Fertiliser].Apply(150, Fertiliser.Types.NO3N,10);
            Manager Harvesting: same as New Zealand CPT.Boss.Boss.Paddock.Harvesting
            Report DailyReport: same as New Zealand CPT.Boss.Boss.Paddock.DailyReport
            Report EndTrialReport: EventNames=[Clock].EndOfSimulation
              VariableNames:
                [Barley].Structure.LeafTipsAppeared
                [Barley].Structure.MainStemFinalNodeNumber
                [Barley].Phenology.FlagLeafDAS
                [Barley].Phenology.FloweringDAS
                [Barley].Phenology.MaturityDAS
                [Script].CalcVals.SowMonth
            SoluteManager
    Folder MCPD10_11
      Experiment 2010_11
        Memo Experiment
          This was a cultivar evaluation trial conducted in Lincoln. Eight cultivars were evaluated.
        Factors
          Factor _
            Factor Booma: Specifications=[Sowing].Script.Cultivar = Optic
            Factor County: Specifications=[Sowing].Script.Cultivar = County
            Factor Dash: Specifications=[Sowing].Script.Cultivar = Dash
            Factor Hooded: Specifications=[Sowing].Script.Cultivar = Sherwood
            Factor Omaka: Specifications=[Sowing].Script.Cultivar = Omaka
            Factor Optic: Specifications=[Sowing].Script.Cultivar = Optic
            Factor Quencher: Specifications=[Sowing].Script.Cultivar = Optic
            Factor Retriever: Specifications=[Sowing].Script.Cultivar = Optic
        Simulation Field10_11
          Weather: FileName=Weather\lincoln.met
          Clock: StartDate=2010-08-01; EndDate=2011-06-30
          Summary summaryfile
          SoilArbitrator Soil Arbitrator
          Zone Paddock: Area=1; Slope=0
            Manager DAS: same as New Zealand CPT.Boss.Boss.DAS
            Soil: same as New Zealand Field Trials.UniBlock15_16.Field2015_16.Base_ZeroN.Paddock.Soil
            Plant Barley: CropType=Wheat
            SurfaceOrganicMatter Surface Organic Matter: same as New Zealand CPT.Boss.Boss.Paddock.Surface Organic Matter
            MicroClimate: a_interception=0; b_interception=1; c_interception=0; d_interception=0; soil_albedo=0.3; sun_angle=15; soil_heat_flux_fraction=0.4; night_interception_fraction=0.5; refheight=2; albedo=0.293662; emissivity=0.96; RadIntTotal=0
            Irrigation
            Fertiliser
            Folder Manager folder
              Manager Sowing
                Cultivar = Dash
                SowingDate = 2010-08-26
                InitialRootDepth = 40
                script: same as in New Zealand Field Trials.MCPD09_10.Dash2009_10.d09_10.Paddock.Manager folder.Sowing
              Manager Harvesting: same as New Zealand CPT.Boss.Boss.Paddock.Harvesting
              Operations IrrigationEvents
                2010-10-28  [Irrigation].Apply(20);
                2010-11-03  [Irrigation].Apply(10);
                2010-11-18  [Irrigation].Apply(20);
                2010-12-03  [Irrigation].Apply(20);
              Operations FertiliserEvents
                2010-08-25  [Fertiliser].Apply(22.5, Fertiliser.Types.NO3N,10);
                2010-10-20  [Fertiliser].Apply(50, Fertiliser.Types.NO3N,10);
                2010-11-03  [Fertiliser].Apply(50, Fertiliser.Types.NO3N,10);
            Report DailyReport: same as New Zealand CPT.Boss.Boss.Paddock.DailyReport
            Report EndTrialReport: EventNames=[Clock].EndOfSimulation
              VariableNames:
                [Barley].Structure.LeafTipsAppeared
                [Barley].Structure.MainStemFinalNodeNumber
                [Barley].Phenology.FlagLeafDAS
                [Barley].Phenology.FloweringDAS
                [Barley].Phenology.MaturityDAS
                [Script].CalcVals.SowMonth
            SoluteManager
    Folder MCPD11_12
      Experiment 2011_12
        Memo Experiment
          This was a nitrogen*irrigation trial conducted at Lincoln
          •	Two water treatments; Rainfed (nil irrigation) and irrigated (310 mm)
          •	Two fertiliser N treatments; 0N (no fertiliser) and 150N (150 kg N/ha)
        Factors
          Factor _
            Factor Dash: Specifications=[Sowing].Script.Cultivar = Dash
            Factor Omaka: Specifications=[Sowing].Script.Cultivar = Omaka
          Factor _SD
            Factor 1
              Specifications:
                [Sowing].Script.SowingDate = 2011-07-13
                [FertiliserEvents]
              Operations FertiliserEvents
                2011-09-09  [Fertiliser].Apply(32, Fertiliser.Types.NO3N,10);
                2011-10-24  [Fertiliser].Apply(70, Fertiliser.Types.NO3N,10);
                2011-11-07  [Fertiliser].Apply(70, Fertiliser.Types.NO3N,10);
            Factor 2
              Specifications:
                [Sowing].Script.SowingDate = 2011-09-09
                [FertiliserEvents]
              Operations FertiliserEvents
                2011-07-08  [Fertiliser].Apply(32, Fertiliser.Types.NO3N,10);
                2011-09-23  [Fertiliser].Apply(70, Fertiliser.Types.NO3N,10);
                2011-10-18  [Fertiliser].Apply(70, Fertiliser.Types.NO3N,10);
            Factor 3
              Specifications:
                [Sowing].Script.SowingDate = 2011-11-15
                [FertiliserEvents]
              Operations FertiliserEvents
                2011-11-15  [Fertiliser].Apply(32, Fertiliser.Types.NO3N,10);
                2011-12-05  [Fertiliser].Apply(70, Fertiliser.Types.NO3N,10);
                2011-12-15  [Fertiliser].Apply(70, Fertiliser.Types.NO3N,10);
        Simulation Field11_12
          Weather: FileName=Weather\lincoln.met
          Clock: StartDate=2011-07-01; EndDate=2012-06-30
          Summary summaryfile
          SoilArbitrator Soil Arbitrator
          Zone Paddock: Area=1; Slope=0
            Manager DAS: same as New Zealand CPT.Boss.Boss.DAS
            Soil: same as New Zealand Field Trials.UniBlock15_16.Field2015_16.Base_ZeroN.Paddock.Soil
            Plant Barley: CropType=Wheat
            SurfaceOrganicMatter Surface Organic Matter: same as New Zealand CPT.Boss.Boss.Paddock.Surface Organic Matter
            MicroClimate: a_interception=0; b_interception=1; c_interception=0; d_interception=0; soil_albedo=0.3; sun_angle=15; soil_heat_flux_fraction=0.4; night_interception_fraction=0.5; refheight=2; albedo=0.293662; emissivity=0.96; RadIntTotal=0
            Irrigation
            Fertiliser
            Folder Manager folder
              Manager Sowing
                Cultivar = Dash
                SowingDate = 2011-07-13
                InitialRootDepth = 40
                script: same as in New Zealand Field Trials.MCPD09_10.Dash2009_10.d09_10.Paddock.Manager folder.Sowing
              Manager Harvesting: same as New Zealand CPT.Boss.Boss.Paddock.Harvesting
              Operations IrrigationEvents
                2011-11-07  [Irrigation].Apply(25);
                2011-11-28  [Irrigation].Apply(25);
                2011-12-14  [Irrigation].Apply(25);
                2011-12-29  [Irrigation].Apply(30);
                2012-01-04  [Irrigation].Apply(30);
                2012-01-19  [Irrigation].Apply(25);
              Operations FertiliserEvents
                2011-07-08  [Fertiliser].Apply(32, Fertiliser.Types.NO3N,10);
                2011-09-23  [Fertiliser].Apply(70, Fertiliser.Types.NO3N,10);
                2011-10-18  [Fertiliser].Apply(70, Fertiliser.Types.NO3N,10);
            Report DailyReport: same as New Zealand CPT.Boss.Boss.Paddock.DailyReport
            Report EndTrialReport: EventNames=[Clock].EndOfSimulation
              VariableNames:
                [Barley].Structure.LeafTipsAppeared
                [Barley].Structure.MainStemFinalNodeNumber
                [Barley].Phenology.FlagLeafDAS
                [Barley].Phenology.FloweringDAS
                [Barley].Phenology.MaturityDAS
                [Script].CalcVals.SowMonth
            SoluteManager
  Folder Australia
    Simulation Barley_HB90Sow1_3
      Clock: StartDate=1990-04-26; EndDate=1990-10-23
      Weather: FileName=Weather\HB90Sow1.met
      Summary summaryfile
      SoilArbitrator Soil Arbitrator
      Manager DAS: same as New Zealand CPT.Boss.Boss.DAS
      Zone paddock: Area=1; Slope=0
        Soil M Block90: SoilType=HMM90; Site=HRS; NearestTown=Unknown; Region=Warwick; NaturalVegetation=Unknown; Latitude=0; Longitude=0
          Water
            Thickness  BD    AirDry  LL15  DUL   SAT
            100        0.93  0.08    0.2   0.42  0.45
            100        0.97  0.19    0.2   0.42  0.45
            200        1     0.23    0.23  0.46  0.48
            200        1.01  0.26    0.26  0.46  0.48
            200        1.03  0.26    0.26  0.43  0.45
            200        1.06  0.28    0.28  0.4   0.41
            200        1.11  0.25    0.25  0.37  0.38
            200        1.15  0.28    0.28  0.33  0.37
            200        1.2   0.3     0.3   0.32  0.37
            200        1.25  0.31    0.31  0.33  0.37
            SoilCrop BarleySoil
              LL=[0.2, 0.2, 0.23, 0.26, 0.26, 0.28, 0.25, 0.28, 0.3, 0.31]
              KL=[0.09, 0.09, 0.09, 0.09, 0.08, 0.07, 0.06, 0.05, 0.05, 0.04]
              XF=[1, 1, 1, 1, 1, 1, 1, 1, 1, 1]
          SoilWater: SummerDate=1-Nov; SummerU=2; SummerCona=6.5; WinterDate=1-Apr; WinterU=2; WinterCona=6.5; DiffusConst=88; DiffusSlope=35; Salb=0.2; CN2Bare=85; CNRed=20; CNCov=0.8; max_pond=0; Thickness=[100, 100, 200, 200, 200, 200, 200, 200, 200, 200]; SWCON=[0.3, 0.3, 0.3, 0.3, 0.3, 0.3, 0.3, 0.3, 0.3, 0.3]; residueinterception=0
          SoilNitrogen: fom_type=[default, manure, mucuna, lablab, shemp, stable]; fract_carb=[0.2, 0.3, 0.54, 0.57, 0.45, 0]; fract_cell=[0.7, 0.3, 0.37, 0.37, 0.47, 0.1]; fract_lign=[0.1, 0.4, 0.09, 0.06, 0.08, 0.9]; wfpsN2N2O_x=[22, 88]; wfpsN2N2O_y=[0.1, 1]
          SoilOrganicMatter: RootCN=50; RootWt=1000; SoilCN=12.5; EnrACoeff=7.4; EnrBCoeff=0.2; OCUnits=Total
            Thickness  OC    FBiom  FInert
            100        1.19  0.05   0.45
            100        0.59  0.02   0.6
            200        0.45  0.01   0.75
            200        0.3   0.01   0.9
            200        0.2   0.01   0.9
            200        0.16  0.01   0.9
            200        0.17  0.01   0.9
            200        0.17  0.05   0.9
            200        0.17  0.02   0.9
            200        0.17  0.01   0.9
          Analysis: Thickness=[100, 100, 200, 200, 200, 200, 200, 200, 200, 200]; PH=[6.3, 6.4, 6.5, 6.6, 6.6, 6.5, 6.5, 6.5, 6.5, 6.5]; PHUnits=Water; BoronUnits=HotWater
          Sample Initial nitrogen: NO3Units=kgha; NH4Units=kgha; SWUnits=Volumetric; OCUnits=Total; PHUnits=Water
            Thickness  NO3      NH4
            100        3.99249  0.55428
            100        4.16421  0.09603
            200        3.434    0.198
            200        1.73518  0.19998
            200        1.76954  0.20394
            200        1.82108  0.20988
            200        1.90698  0.21978
            200        1.9757   0.2277
            200        2.0616   0.2376
            200        2.1475   0.2475
          Sample Initial water: Thickness=[100, 100, 200, 200, 200, 200, 200, 200, 200, 200]; SW=[0.42, 0.42, 0.46, 0.46, 0.43, 0.4, 0.37, 0.33, 0.32, 0.33]; NO3Units=ppm; NH4Units=ppm; SWUnits=Volumetric; OCUnits=Total; PHUnits=Water
          CERESSoilTemperature
        Folder Management
          Manager ApplyN_at_sowing: same as New Zealand CPT.Boss.Boss.Paddock.ApplyN_at_sowing
          Manager Sow_n_Harvest
            SowingDate = 1990-04-26
            Cultivar = Grimmett
```csharp
using System;
using Models.Core;
using Models.PMF;
using APSIM.Shared.Utilities;
using System.Xml.Serialization;
        
namespace Models
{
	[Serializable] 
	[System.Xml.Serialization.XmlInclude(typeof(Model))]
	public class Script : Model
	{
		[Link] Plant Barley;
		[Link] Clock Clock;
		[Link] Simulation sim;
		[Link] Summary Summary;
		
		[Description("Sowing Date")]
		public DateTime SowingDate { get; set; }
		[Description("Cultivar")]
		public string Cultivar { get; set; }
		
		
		[XmlIgnore] public bool Harvested { get; set; }
		[XmlIgnore] public bool EndSet { get; set; }
		
		[EventSubscribe("Commencing")]
		private void OnSimulationCommencing(object sender, EventArgs e)
		{
			Harvested = false;
			EndSet = false;
		}
		
		[EventSubscribe("DoManagement")]
		private void OnDoManagement(object sender, EventArgs e)
		{
			if (Clock.Today.Date == SowingDate)
			{
				Barley.Sow(population: 280, cultivar: Cultivar, depth: 40, rowSpacing: 150, budNumber: 1);
				
			}
			
			if (Barley.Phenology.CurrentPhaseName == "ReadyForHarvesting")
			{
				Barley.Harvest();
				Barley.EndCrop();
				Harvested = true;
				Summary.WriteMessage(this, "Flowering reached so setting end date to stop simulation");
			}
			
			if ((Harvested == true) && (EndSet == false))
			{
				sim.Set("Clock.EndDate", Clock.Today.AddDays(1));
				EndSet = true;
			}
		}
	}
}
```
          Manager Auto_Irrigation: same as New Zealand CPT.Boss.Boss.Paddock.Auto_Irrigation
        Plant Barley: CropType=Wheat
        SurfaceOrganicMatter: PoolName=wheat_stubble; type=wheat; mass=0; standing_fraction=0; cpr=0; cnr=80; CriticalResidueWeight=2000; OptimumDecompTemp=20; MaxCumulativeEOS=20; CNRatioDecompCoeff=0.277; CNRatioDecompThreshold=25; TotalLeachRain=25; MinRainToLeach=10; CriticalMinimumOrganicC=0.004; DefaultCPRatio=0; DefaultStandingFraction=0; StandingExtinctCoeff=0.5; FractionFaecesAdded=0.5
          Pools:
            {PoolName=wheat_stubble, ResidueType=wheat, Mass=0, CNRatio=80, CPRatio=0, StandingFraction=0}
          ResidueTypes ResidueTypesList: LoadFromResource=ResidueTypes
        MicroClimate: a_interception=0; b_interception=1; c_interception=0; d_interception=0; soil_albedo=0.23; sun_angle=15; soil_heat_flux_fraction=0.4; night_interception_fraction=0.5; refheight=2; albedo=0.15; emissivity=0.96; RadIntTotal=0
        SoluteManager
        Irrigation
        Fertiliser
        Report DailyReport: same as New Zealand CPT.Boss.Boss.Paddock.DailyReport
        Report EndTrialReport: EventNames=[Clock].EndOfSimulation
          VariableNames:
            [Barley].Structure.LeafTipsAppeared
            [Barley].Structure.MainStemFinalNodeNumber
            [Barley].Phenology.FlagLeafDAS
            [Barley].Phenology.FloweringDAS
            [Barley].Phenology.MaturityDAS
            [Script].CalcVals.SowMonth
    Simulation Barley_HB90Sow2_3
      Clock: StartDate=1990-06-05; EndDate=1990-11-14
      Summary summaryfile
      Weather: FileName=Weather\HB90Sow2.met
      SoilArbitrator Soil Arbitrator
      Manager DAS: same as New Zealand CPT.Boss.Boss.DAS
      Zone paddock: Area=1; Slope=0
        Soil M Block90: SoilType=HMM90; Site=HRS; NearestTown=Unknown; Region=Warwick; NaturalVegetation=Unknown; Latitude=0; Longitude=0
          Water: same as Australia.Barley_HB90Sow1_3.paddock.M Block90.Water
          SoilWater: same as Australia.Barley_HB90Sow1_3.paddock.M Block90.SoilWater
          SoilNitrogen: fom_type=[default, manure, mucuna, lablab, shemp, stable]; fract_carb=[0.2, 0.3, 0.54, 0.57, 0.45, 0]; fract_cell=[0.7, 0.3, 0.37, 0.37, 0.47, 0.1]; fract_lign=[0.1, 0.4, 0.09, 0.06, 0.08, 0.9]; wfpsN2N2O_x=[22, 88]; wfpsN2N2O_y=[0.1, 1]
          SoilOrganicMatter: same as Australia.Barley_HB90Sow1_3.paddock.M Block90.SoilOrganicMatter
          Analysis: Thickness=[100, 100, 200, 200, 200, 200, 200, 200, 200, 200]; PH=[6.3, 6.4, 6.5, 6.6, 6.6, 6.5, 6.5, 6.5, 6.5, 6.5]; PHUnits=Water; BoronUnits=HotWater
          Sample Initial nitrogen: NO3Units=kgha; NH4Units=kgha; SWUnits=Volumetric; OCUnits=Total; PHUnits=Water
            Thickness  NO3      NH4
            100        2.49984  0.55428
            100        2.49969  0.09603
            200        2.5      0.198
            200        2.50076  0.19998
            200        2.50084  0.20394
            200        2.49948  0.20988
            200        2.49972  0.21978
            200        2.5001   0.2277
            200        2.5008   0.2376
            200        2.5      0.2475
          Sample Initial water: Thickness=[100, 100, 200, 200, 200, 200, 200, 200, 200, 200]; SW=[0.42, 0.42, 0.46, 0.46, 0.43, 0.4, 0.37, 0.33, 0.32, 0.33]; NO3Units=ppm; NH4Units=ppm; SWUnits=Volumetric; OCUnits=Total; PHUnits=Water
          CERESSoilTemperature
        Plant Barley: CropType=barley
        SurfaceOrganicMatter: same as Australia.Barley_HB90Sow1_3.paddock.SurfaceOrganicMatter
        MicroClimate: a_interception=0; b_interception=1; c_interception=0; d_interception=0; soil_albedo=0.23; sun_angle=15; soil_heat_flux_fraction=0.4; night_interception_fraction=0.5; refheight=2; albedo=0.15; emissivity=0.96; RadIntTotal=0
        SoluteManager
        Irrigation
        Fertiliser
        Folder Management
          Manager Sow_n_Harvest
            SowingDate = 1990-06-05
            Cultivar = Grimmett
            script: same as in Australia.Barley_HB90Sow1_3.paddock.Management.Sow_n_Harvest
          Manager ApplyN_at_sowing: same as New Zealand CPT.Boss.Boss.Paddock.ApplyN_at_sowing
          Manager Auto_Irrigation: same as New Zealand CPT.Boss.Boss.Paddock.Auto_Irrigation
        Report DailyReport: same as New Zealand CPT.Boss.Boss.Paddock.DailyReport
    Simulation Barley_HB90Sow3_3
      Clock: StartDate=1990-08-07; EndDate=1990-12-03
      Summary summaryfile
      Weather: FileName=Weather\HB90Sow3.met
      SoilArbitrator Soil Arbitrator
      Manager DAS: same as New Zealand CPT.Boss.Boss.DAS
      Zone paddock: Area=1; Slope=0
        Soil M Block90: SoilType=HMM90; Site=HRS; NearestTown=Unknown; Region=Warwick; NaturalVegetation=Unknown; Latitude=0; Longitude=0
          Water: same as Australia.Barley_HB90Sow1_3.paddock.M Block90.Water
          SoilWater: same as Australia.Barley_HB90Sow1_3.paddock.M Block90.SoilWater
          SoilNitrogen: fom_type=[default, manure, mucuna, lablab, shemp, stable]; fract_carb=[0.2, 0.3, 0.54, 0.57, 0.45, 0]; fract_cell=[0.7, 0.3, 0.37, 0.37, 0.47, 0.1]; fract_lign=[0.1, 0.4, 0.09, 0.06, 0.08, 0.9]; wfpsN2N2O_x=[22, 88]; wfpsN2N2O_y=[0.1, 1]
          SoilOrganicMatter: same as Australia.Barley_HB90Sow1_3.paddock.M Block90.SoilOrganicMatter
          Analysis: Thickness=[100, 100, 200, 200, 200, 200, 200, 200, 200, 200]; PH=[6.3, 6.4, 6.5, 6.6, 6.6, 6.5, 6.5, 6.5, 6.5, 6.5]; PHUnits=Water; BoronUnits=HotWater
          Sample Initial nitrogen: NO3Units=kgha; NH4Units=kgha; SWUnits=Volumetric; OCUnits=Total; PHUnits=Water
            Thickness  NO3      NH4
            100        3.00018  0.55428
            100        3.00021  0.09603
            200        3        0.198
            200        2.9997   0.19998
            200        2.99936  0.20394
            200        2.9998   0.20988
            200        2.99922  0.21978
            200        2.9992   0.2277
            200        3        0.2376
            200        3        0.2475
          Sample Initial water: Thickness=[100, 100, 200, 200, 200, 200, 200, 200, 200, 200]; SW=[0.42, 0.42, 0.46, 0.46, 0.43, 0.4, 0.37, 0.33, 0.32, 0.33]; NO3Units=ppm; NH4Units=ppm; SWUnits=Volumetric; OCUnits=Total; PHUnits=Water
          CERESSoilTemperature
        Plant Barley: CropType=barley
        SurfaceOrganicMatter: same as Australia.Barley_HB90Sow1_3.paddock.SurfaceOrganicMatter
        MicroClimate: a_interception=0; b_interception=1; c_interception=0; d_interception=0; soil_albedo=0.23; sun_angle=15; soil_heat_flux_fraction=0.4; night_interception_fraction=0.5; refheight=2; albedo=0.15; emissivity=0.96; RadIntTotal=0
        SoluteManager
        Folder Management
          Manager Sow_n_Harvest
            SowingDate = 1990-08-07
            Cultivar = Grimmett
            script: same as in Australia.Barley_HB90Sow1_3.paddock.Management.Sow_n_Harvest
          Manager Auto_Irrigation: same as New Zealand CPT.Boss.Boss.Paddock.Auto_Irrigation
          Manager ApplyN_at_sowing: same as New Zealand CPT.Boss.Boss.Paddock.ApplyN_at_sowing
        Report DailyReport: same as New Zealand CPT.Boss.Boss.Paddock.DailyReport
        Irrigation
        Fertiliser
    Simulation Barley_HRS87-2MP_1
      Clock: StartDate=1987-04-02; EndDate=1987-09-19
      Summary summaryfile
      Weather: FileName=Weather\HRS87-2MP.met
      SoilArbitrator Soil Arbitrator
      Manager DAS: same as New Zealand CPT.Boss.Boss.DAS
      Zone paddock: Area=1; Slope=0
        Soil M Block87: SoilType=HMM87; Site=HRS; NearestTown=Unknown; Region=Warwick; NaturalVegetation=Unknown; Latitude=0; Longitude=0
          Water
            Thickness  BD    AirDry  LL15  DUL   SAT
            100        1.3   0.16    0.18  0.4   0.45
            100        1.3   0.22    0.22  0.45  0.46
            100        1.29  0.26    0.26  0.47  0.48
            100        1.31  0.27    0.27  0.48  0.49
            100        1.35  0.3     0.3   0.49  0.49
            100        1.36  0.3     0.3   0.48  0.486
            200        1.36  0.27    0.27  0.43  0.44
            200        1.35  0.23    0.23  0.38  0.39
            200        1.36  0.24    0.24  0.37  0.38
            200        1.36  0.23    0.23  0.38  0.39
            SoilCrop BarleySoil
              LL=[0.18, 0.22, 0.26, 0.27, 0.3, 0.3, 0.27, 0.23, 0.24, 0.23]
              KL=[0.09, 0.09, 0.09, 0.09, 0.09, 0.08, 0.07, 0.06, 0.05, 0.04]
              XF=[1, 1, 1, 1, 1, 1, 1, 1, 1, 1]
          SoilWater: SummerDate=1-Nov; SummerU=6; SummerCona=3.5; WinterDate=1-Apr; WinterU=6; WinterCona=3.5; DiffusConst=88; DiffusSlope=35.4; Salb=0.13; CN2Bare=85; CNRed=20; CNCov=0.8; max_pond=0; Thickness=[100, 100, 100, 100, 100, 100, 200, 200, 200, 200]; SWCON=[0.1, 0.1, 0.1, 0.1, 0.1, 0.1, 0.1, 0.1, 0.1, 0.1]; residueinterception=0
          SoilNitrogen: fom_type=[default, manure, mucuna, lablab, shemp, stable]; fract_carb=[0.2, 0.3, 0.54, 0.57, 0.45, 0]; fract_cell=[0.7, 0.3, 0.37, 0.37, 0.47, 0.1]; fract_lign=[0.1, 0.4, 0.09, 0.06, 0.08, 0.9]; wfpsN2N2O_x=[22, 88]; wfpsN2N2O_y=[0.1, 1]
          SoilOrganicMatter: RootCN=50; RootWt=1000; SoilCN=12.5; EnrACoeff=7.4; EnrBCoeff=0.2; OCUnits=Total
            Thickness  OC    FBiom  FInert
            100        1.03  0.05   0.39
            100        0.86  0.02   0.47
            100        0.77  0.01   0.52
            100        0.65  0.01   0.62
            100        0.54  0.01   0.74
            100        0.48  0.01   0.83
            200        0.04  0.01   0.93
            200        0.54  0.01   0.93
            200        0.48  0.01   0.93
            200        0.43  0.01   0.93
          Analysis: Thickness=[100, 100, 100, 100, 100, 100, 200, 200, 200, 200]; PH=[8.2, 8.5, 8.6, 8.6, 7.4, 5.3, 5, 7.4, 5.3, 5]; PHUnits=Water; BoronUnits=HotWater
          Sample Initial nitrogen: NO3Units=kgha; NH4Units=kgha; SWUnits=Volumetric; OCUnits=Total; PHUnits=Water
            Thickness  NO3      NH4
            100        21.7802  1.6874
            100        3.1616   1.2987
            100        3.13728  1.28871
            100        2.30036  1.04669
            100        2.0061   1.07865
            100        2.94032  0.67864
            200        3.67472  1.35728
            200        3.6477   1.3473
            200        3.67472  1.35728
            200        3.67472  1.35728
          Sample Initial water: Thickness=[100, 100, 100, 100, 100, 100, 200, 200, 200, 200]; NO3Units=ppm; NH4Units=ppm; SWUnits=Volumetric; OCUnits=Total; PHUnits=Water
            SW=[0.371, 0.418, 0.442, 0.455, 0.438, 0.435, 0.366, 0.32, 0.335, 0.337]
          CERESSoilTemperature
        Plant Barley: CropType=barley
        SurfaceOrganicMatter: same as Australia.Barley_HB90Sow1_3.paddock.SurfaceOrganicMatter
        MicroClimate: a_interception=0; b_interception=1; c_interception=0; d_interception=0; soil_albedo=0.23; sun_angle=15; soil_heat_flux_fraction=0.4; night_interception_fraction=0.5; refheight=2; albedo=0.15; emissivity=0.96; RadIntTotal=0
        SoluteManager
        Folder Management
          Manager Sow_n_Harvest
            SowingDate = 1987-04-02
            Cultivar = Grimmett
            script: same as in Australia.Barley_HB90Sow1_3.paddock.Management.Sow_n_Harvest
          Manager Auto_Irrigation: same as New Zealand CPT.Boss.Boss.Paddock.Auto_Irrigation
          Manager ApplyN_at_sowing: same as New Zealand CPT.Boss.Boss.Paddock.ApplyN_at_sowing
        Report DailyReport: same as New Zealand CPT.Boss.Boss.Paddock.DailyReport
        Irrigation
        Fertiliser
    Simulation Barley_HRS87-3MP_1
      Clock: StartDate=1987-05-26; EndDate=1987-10-31
      Summary summaryfile
      Weather: FileName=Weather\HRS87-3MP.met
      SoilArbitrator Soil Arbitrator
      Manager DAS: same as New Zealand CPT.Boss.Boss.DAS
      Zone paddock: Area=1; Slope=0
        Soil M Block87: same as Australia.Barley_HRS87-2MP_1.paddock.M Block87
        Plant Barley: CropType=barley
        SurfaceOrganicMatter: same as Australia.Barley_HB90Sow1_3.paddock.SurfaceOrganicMatter
        MicroClimate: a_interception=0; b_interception=1; c_interception=0; d_interception=0; soil_albedo=0.23; sun_angle=15; soil_heat_flux_fraction=0.4; night_interception_fraction=0.5; refheight=2; albedo=0.15; emissivity=0.96; RadIntTotal=0
        SoluteManager
        Folder Management
          Manager Sow_n_Harvest
            SowingDate = 1987-05-26
            Cultivar = Grimmett
            script: same as in Australia.Barley_HB90Sow1_3.paddock.Management.Sow_n_Harvest
          Manager Auto_Irrigation: same as New Zealand CPT.Boss.Boss.Paddock.Auto_Irrigation
          Manager ApplyN_at_sowing: same as New Zealand CPT.Boss.Boss.Paddock.ApplyN_at_sowing
        Report DailyReport: same as New Zealand CPT.Boss.Boss.Paddock.DailyReport
        Irrigation
        Fertiliser
    Simulation Barley_HRSRO-DD_1
      Clock: StartDate=1991-06-24; EndDate=1991-11-20
      Summary summaryfile
      Weather: FileName=Weather\HRSRO - DD.met
      SoilArbitrator Soil Arbitrator
      Zone paddock: Area=1; Slope=0
        Soil M Block92: SoilType=HMM92; Site=HRS; NearestTown=Unknown; Region=Warwick; NaturalVegetation=Unknown; Latitude=0; Longitude=0
          Water
            Thickness  BD    AirDry  LL15  DUL   SAT
            100        0.93  0.08    0.2   0.42  0.45
            100        0.97  0.19    0.25  0.42  0.45
            200        1     0.23    0.25  0.46  0.48
            200        1.01  0.3     0.3   0.46  0.48
            200        1.03  0.32    0.32  0.43  0.45
            200        1.06  0.33    0.33  0.4   0.41
            200        1.11  0.28    0.28  0.37  0.38
            200        1.15  0.29    0.29  0.33  0.37
            200        1.2   0.29    0.29  0.32  0.37
            200        1.25  0.32    0.32  0.33  0.37
            SoilCrop BarleySoil
              LL=[0.2, 0.25, 0.25, 0.3, 0.32, 0.33, 0.28, 0.29, 0.29, 0.32]
              KL=[0.09, 0.09, 0.09, 0.09, 0.08, 0.07, 0.06, 0.05, 0.05, 0.04]
              XF=[1, 1, 1, 1, 1, 1, 1, 1, 1, 1]
          SoilWater: same as Australia.Barley_HB90Sow1_3.paddock.M Block90.SoilWater
          SoilNitrogen: fom_type=[default, manure, mucuna, lablab, shemp, stable]; fract_carb=[0.2, 0.3, 0.54, 0.57, 0.45, 0]; fract_cell=[0.7, 0.3, 0.37, 0.37, 0.47, 0.1]; fract_lign=[0.1, 0.4, 0.09, 0.06, 0.08, 0.9]; wfpsN2N2O_x=[22, 88]; wfpsN2N2O_y=[0.1, 1]
          SoilOrganicMatter: same as Australia.Barley_HB90Sow1_3.paddock.M Block90.SoilOrganicMatter
          Analysis: Thickness=[100, 100, 200, 200, 200, 200, 200, 200, 200, 200]; PH=[6.3, 6.4, 6.5, 6.6, 6.6, 6.5, 6.5, 6.5, 6.5, 6.5]; PHUnits=Water; BoronUnits=HotWater
          Sample Initial nitrogen: NO3Units=kgha; NH4Units=kgha; SWUnits=Volumetric; OCUnits=Total; PHUnits=Water
            Thickness  NO3      NH4
            100        1.59681  0.69285
            100        1.66549  0.12028
            200        1.374    0.248
            200        0.69286  0.25048
            200        0.70658  0.25544
            200        0.72716  0.26288
            200        0.76146  0.27528
            200        0.7889   0.2852
            200        0.8232   0.2976
            200        0.8575   0.31
          Sample Initial water: Thickness=[100, 100, 200, 200, 200, 200, 200, 200, 200, 200]; NO3Units=ppm; NH4Units=ppm; SWUnits=Volumetric; OCUnits=Total; PHUnits=Water
            SW=[0.32, 0.405, 0.47, 0.45, 0.4, 0.37, 0.339, 0.31, 0.291, 0.321]
          CERESSoilTemperature
        Plant Barley: CropType=barley
        SurfaceOrganicMatter: same as Australia.Barley_HB90Sow1_3.paddock.SurfaceOrganicMatter
        MicroClimate: a_interception=0; b_interception=1; c_interception=0; d_interception=0; soil_albedo=0.23; sun_angle=15; soil_heat_flux_fraction=0.4; night_interception_fraction=0.5; refheight=2; albedo=0.15; emissivity=0.96; RadIntTotal=0
        SoluteManager
        Folder Management
          Manager Sow_n_Harvest
            SowingDate = 1991-07-15
            Cultivar = Grimmett
            script: same as in Australia.Barley_HB90Sow1_3.paddock.Management.Sow_n_Harvest
          Manager Auto_Irrigation: same as New Zealand CPT.Boss.Boss.Paddock.Auto_Irrigation
          Manager ApplyN_at_sowing: same as New Zealand CPT.Boss.Boss.Paddock.ApplyN_at_sowing
        Report DailyReport: same as New Zealand CPT.Boss.Boss.Paddock.DailyReport
        Irrigation
        Fertiliser
      Manager DAS: same as New Zealand CPT.Boss.Boss.DAS
    Simulation Barley_HRSRO-DI_1
      Clock: StartDate=1991-06-24; EndDate=1991-11-20
      Summary summaryfile
      Weather: FileName=Weather\HRSRO - DI.met
      SoilArbitrator Soil Arbitrator
      Zone paddock: Area=1; Slope=0
        Plant Barley: CropType=barley
        Soil M Block92: SoilType=HMM92; Site=HRS; NearestTown=Unknown; Region=Warwick; NaturalVegetation=Unknown; Latitude=0; Longitude=0
          Water: same as Australia.Barley_HRSRO-DD_1.paddock.M Block92.Water
          SoilWater: same as Australia.Barley_HB90Sow1_3.paddock.M Block90.SoilWater
          SoilNitrogen: fom_type=[default, manure, mucuna, lablab, shemp, stable]; fract_carb=[0.2, 0.3, 0.54, 0.57, 0.45, 0]; fract_cell=[0.7, 0.3, 0.37, 0.37, 0.47, 0.1]; fract_lign=[0.1, 0.4, 0.09, 0.06, 0.08, 0.9]; wfpsN2N2O_x=[22, 88]; wfpsN2N2O_y=[0.1, 1]
          SoilOrganicMatter: same as Australia.Barley_HB90Sow1_3.paddock.M Block90.SoilOrganicMatter
          Analysis: Thickness=[100, 100, 200, 200, 200, 200, 200, 200, 200, 200]; PH=[6.3, 6.4, 6.5, 6.6, 6.6, 6.5, 6.5, 6.5, 6.5, 6.5]; PHUnits=Water; BoronUnits=HotWater
          Sample Initial nitrogen: same as Australia.Barley_HRSRO-DD_1.paddock.M Block92.Initial nitrogen
          Sample Initial water: Thickness=[100, 100, 200, 200, 200, 200, 200, 200, 200, 200]; NO3Units=ppm; NH4Units=ppm; SWUnits=Volumetric; OCUnits=Total; PHUnits=Water
            SW=[0.33, 0.4, 0.42, 0.4, 0.35, 0.35, 0.343, 0.324, 0.31, 0.321]
          CERESSoilTemperature
        SurfaceOrganicMatter: same as Australia.Barley_HB90Sow1_3.paddock.SurfaceOrganicMatter
        MicroClimate: a_interception=0; b_interception=1; c_interception=0; d_interception=0; soil_albedo=0.23; sun_angle=15; soil_heat_flux_fraction=0.4; night_interception_fraction=0.5; refheight=2; albedo=0.15; emissivity=0.96; RadIntTotal=0
        SoluteManager
        Folder Management
          Manager Sow_n_Harvest
            SowingDate = 1991-06-30
            Cultivar = Grimmett
            script: same as in Australia.Barley_HB90Sow1_3.paddock.Management.Sow_n_Harvest
          Manager Auto_Irrigation: same as New Zealand CPT.Boss.Boss.Paddock.Auto_Irrigation
          Manager ApplyN_at_sowing: same as New Zealand CPT.Boss.Boss.Paddock.ApplyN_at_sowing
        Report DailyReport: same as New Zealand CPT.Boss.Boss.Paddock.DailyReport
        Irrigation
        Fertiliser
      Manager DAS: same as New Zealand CPT.Boss.Boss.DAS
    Simulation Barley_HRSRO-II_1
      Clock: StartDate=1991-06-24; EndDate=1991-11-20
      Summary summaryfile
      Weather: FileName=Weather\HRSRO - II.met
      SoilArbitrator Soil Arbitrator
      Zone paddock: Area=1; Slope=0
        Plant Barley: CropType=barley
        Soil M Block92: SoilType=HMM92; Site=HRS; NearestTown=Unknown; Region=Warwick; NaturalVegetation=Unknown; Latitude=0; Longitude=0
          Water: same as Australia.Barley_HRSRO-DD_1.paddock.M Block92.Water
          SoilWater: same as Australia.Barley_HB90Sow1_3.paddock.M Block90.SoilWater
          SoilNitrogen: fom_type=[default, manure, mucuna, lablab, shemp, stable]; fract_carb=[0.2, 0.3, 0.54, 0.57, 0.45, 0]; fract_cell=[0.7, 0.3, 0.37, 0.37, 0.47, 0.1]; fract_lign=[0.1, 0.4, 0.09, 0.06, 0.08, 0.9]; wfpsN2N2O_x=[22, 88]; wfpsN2N2O_y=[0.1, 1]
          SoilOrganicMatter: same as Australia.Barley_HB90Sow1_3.paddock.M Block90.SoilOrganicMatter
          Analysis: Thickness=[100, 100, 200, 200, 200, 200, 200, 200, 200, 200]; PH=[6.3, 6.4, 6.5, 6.6, 6.6, 6.5, 6.5, 6.5, 6.5, 6.5]; PHUnits=Water; BoronUnits=HotWater
          Sample Initial nitrogen: same as Australia.Barley_HRSRO-DD_1.paddock.M Block92.Initial nitrogen
          Sample Initial water: Thickness=[100, 100, 200, 200, 200, 200, 200, 200, 200, 200]; NO3Units=ppm; NH4Units=ppm; SWUnits=Volumetric; OCUnits=Total; PHUnits=Water
            SW=[0.3, 0.37, 0.44, 0.45, 0.32, 0.33, 0.31, 0.324, 0.31, 0.321]
          CERESSoilTemperature
        SurfaceOrganicMatter: same as Australia.Barley_HB90Sow1_3.paddock.SurfaceOrganicMatter
        MicroClimate: a_interception=0; b_interception=1; c_interception=0; d_interception=0; soil_albedo=0.23; sun_angle=15; soil_heat_flux_fraction=0.4; night_interception_fraction=0.5; refheight=2; albedo=0.15; emissivity=0.96; RadIntTotal=0
        SoluteManager
        Folder Management: same as Australia.Barley_HRSRO-DI_1.paddock.Management
        Report DailyReport: same as New Zealand CPT.Boss.Boss.Paddock.DailyReport
        Irrigation
        Fertiliser
      Manager DAS: same as New Zealand CPT.Boss.Boss.DAS
    Simulation Barley_KthpeRain05_5
      Clock: StartDate=2005-07-11; EndDate=2005-11-29
      Summary summaryfile
      Weather: FileName=Weather\KthpeRain05.met
      SoilArbitrator Soil Arbitrator
      Zone paddock: Area=1; Slope=0
        Soil Bay 0: SoilType=Waco-R; Site=Kingsthorpe; NearestTown=Unknown; Region=Jondaryan; NaturalVegetation=Unknown; Latitude=0; Longitude=0
          Water
            Thickness  BD    AirDry  LL15  DUL   SAT
            100        1.08  0.22    0.34  0.52  0.57
            200        1.08  0.34    0.35  0.53  0.58
            200        1.06  0.36    0.36  0.53  0.57
            200        1.06  0.34    0.34  0.53  0.58
            200        1.09  0.34    0.34  0.54  0.54
            200        1.09  0.35    0.35  0.52  0.54
            200        1.09  0.36    0.36  0.51  0.55
            200        1.09  0.35    0.35  0.51  0.53
            200        1.13  0.37    0.37  0.46  0.53
            200        1.13  0.37    0.37  0.46  0.53
            SoilCrop BarleySoil
              LL=[0.34, 0.35, 0.36, 0.34, 0.34, 0.35, 0.36, 0.35, 0.37, 0.37]
              KL=[0.09, 0.09, 0.09, 0.08, 0.08, 0.07, 0.06, 0.05, 0.04, 0.03]
              XF=[1, 1, 1, 1, 1, 1, 1, 1, 1, 1]
          SoilWater: SummerDate=1-Nov; SummerU=6; SummerCona=3.5; WinterDate=1-Apr; WinterU=6; WinterCona=3.5; DiffusConst=40; DiffusSlope=16; Salb=0.13; CN2Bare=73; CNRed=20; CNCov=0.8; max_pond=0; Thickness=[100, 200, 200, 200, 200, 200, 200, 200, 200, 200]; SWCON=[0.3, 0.3, 0.3, 0.3, 0.3, 0.3, 0.3, 0.3, 0.3, 0.3]; residueinterception=0
          SoilNitrogen: fom_type=[default, manure, mucuna, lablab, shemp, stable]; fract_carb=[0.2, 0.3, 0.54, 0.57, 0.45, 0]; fract_cell=[0.7, 0.3, 0.37, 0.37, 0.47, 0.1]; fract_lign=[0.1, 0.4, 0.09, 0.06, 0.08, 0.9]; wfpsN2N2O_x=[22, 88]; wfpsN2N2O_y=[0.1, 1]
          SoilOrganicMatter: RootCN=40; RootWt=200; SoilCN=12.5; EnrACoeff=7.4; EnrBCoeff=0.2; OCUnits=Total
            Thickness  OC   FBiom  FInert
            100        1    0.03   0.4
            200        0.9  0.03   0.4
            200        0.9  0.02   0.6
            200        0.9  0.02   0.6
            200        0.9  0.01   0.8
            200        0.8  0.01   0.9
            200        0.8  0.01   0.95
            200        0.4  0.01   0.95
            200        0.3  0.01   0.95
            200        0.3  0.01   0.95
          Analysis: Thickness=[100, 200, 200, 200, 200, 200, 200, 200, 200, 200]; PH=[7, 7, 8.5, 8.5, 8.5, 8.5, 8.5, 8.5, 8.5, 8.5]; PHUnits=Water; BoronUnits=HotWater
          Sample Initial nitrogen: NO3Units=kgha; NH4Units=kgha; SWUnits=Volumetric; OCUnits=Total; PHUnits=Water
            Thickness  NO3     NH4
            100        40.068  0.30024
            200        80.136  0.30024
            200        41.764  0.30104
            200        41.764  0.30104
            200        36.624  0.30084
            200        36.624  0.30084
            200        34.662  0.30084
            200        34.662  0.30084
            200        38.646  0.30058
            200        38.646  0.30058
          Sample Initial water: Thickness=[100, 200, 200, 200, 200, 200, 200, 200, 200, 200]; SW=[0.38, 0.5, 0.53, 0.52, 0.5, 0.49, 0.51, 0.5, 0.46, 0.46]; NO3Units=ppm; NH4Units=ppm; SWUnits=Volumetric; OCUnits=Total; PHUnits=Water
          CERESSoilTemperature
        Plant Barley: CropType=barley
        SurfaceOrganicMatter: same as Australia.Barley_HB90Sow1_3.paddock.SurfaceOrganicMatter
        MicroClimate: a_interception=0; b_interception=1; c_interception=0; d_interception=0; soil_albedo=0.23; sun_angle=15; soil_heat_flux_fraction=0.4; night_interception_fraction=0.5; refheight=2; albedo=0.15; emissivity=0.96; RadIntTotal=0
        SoluteManager
        Folder Management
          Manager Sow_n_Harvest
            SowingDate = 2005-07-11
            Cultivar = Grimmett
            script: same as in Australia.Barley_HB90Sow1_3.paddock.Management.Sow_n_Harvest
          Manager Auto_Irrigation: same as New Zealand CPT.Boss.Boss.Paddock.Auto_Irrigation
          Manager ApplyN_at_sowing: same as New Zealand CPT.Boss.Boss.Paddock.ApplyN_at_sowing
        Report DailyReport: same as New Zealand CPT.Boss.Boss.Paddock.DailyReport
        Irrigation
        Fertiliser
      Manager DAS: same as New Zealand CPT.Boss.Boss.DAS
    Simulation Barley_Well360_1
      Clock: StartDate=1993-06-29; EndDate=1993-12-21
      Summary summaryfile
      Weather: FileName=Weather\Well360.met
      SoilArbitrator Soil Arbitrator
      Zone paddock: Area=1; Slope=0
        Soil Bay 4: SoilType=Wellcamp93; Site=Wellcamp; NearestTown=Unknown; Region=Jondaryan; NaturalVegetation=Unknown; Latitude=0; Longitude=0
          Water
            Thickness  BD    AirDry  LL15  DUL   SAT
            150        0.9   0.11    0.22  0.52  0.59
            150        1.01  0.306   0.34  0.53  0.59
            300        1.02  0.38    0.38  0.54  0.59
            300        1     0.36    0.36  0.54  0.59
            300        1.06  0.4     0.4   0.52  0.57
            300        1.14  0.36    0.36  0.49  0.54
            300        1.23  0.38    0.38  0.46  0.51
            SoilCrop BarleySoil: LL=[0.22, 0.34, 0.38, 0.36, 0.4, 0.36, 0.38]; KL=[0.9, 0.9, 0.9, 0.8, 0.7, 0.6, 0.5]; XF=[1, 1, 1, 1, 1, 1, 1]
          SoilWater: SummerDate=1-Nov; SummerU=6; SummerCona=3.5; WinterDate=1-Apr; WinterU=6; WinterCona=3.5; DiffusConst=88; DiffusSlope=35.4; Salb=0.13; CN2Bare=60; CNRed=20; CNCov=0.8; max_pond=0; Thickness=[150, 150, 300, 300, 300, 300, 300]; SWCON=[0.4, 0.4, 0.4, 0.4, 0.4, 0.4, 0.4]; residueinterception=0
          SoilNitrogen: fom_type=[default, manure, mucuna, lablab, shemp, stable]; fract_carb=[0.2, 0.3, 0.54, 0.57, 0.45, 0]; fract_cell=[0.7, 0.3, 0.37, 0.37, 0.47, 0.1]; fract_lign=[0.1, 0.4, 0.09, 0.06, 0.08, 0.9]; wfpsN2N2O_x=[22, 88]; wfpsN2N2O_y=[0.1, 1]
          SoilOrganicMatter: RootCN=40; RootWt=200; SoilCN=12.5; EnrACoeff=7.4; EnrBCoeff=0.2; OCUnits=Total
            Thickness  OC   FBiom  FInert
            150        1    0.03   0.4
            150        0.9  0.03   0.4
            300        0.8  0.02   0.6
            300        0.8  0.02   0.6
            300        0.4  0.01   0.8
            300        0.3  0.01   0.9
            300        0.3  0.01   0.95
          Analysis: Thickness=[150, 150, 300, 300, 300, 300, 300]; PH=[7, 7, 8.5, 8.5, 8.5, 8.5, 8.5]; PHUnits=Water; BoronUnits=HotWater
          Sample Initial nitrogen: NO3Units=kgha; NH4Units=kgha; SWUnits=Volumetric; OCUnits=Total; PHUnits=Water
            Thickness  NO3       NH4
            150        14.2857   0.42795
            150        14.2864   0.428745
            300        14.2871   0.4284
            300        13.35     0.402
            300        13.16838  0.39432
            300        12.2436   0.36594
            300        13.01463  0.39114
          Sample Initial water: Thickness=[150, 150, 300, 300, 300, 300, 300]; SW=[0.52, 0.53, 0.53, 0.48, 0.48, 0.48, 0.48]; NO3Units=ppm; NH4Units=ppm; SWUnits=Volumetric; OCUnits=Total; PHUnits=Water
          CERESSoilTemperature
        Plant Barley: CropType=barley
        SurfaceOrganicMatter: same as Australia.Barley_HB90Sow1_3.paddock.SurfaceOrganicMatter
        MicroClimate: a_interception=0; b_interception=1; c_interception=0; d_interception=0; soil_albedo=0.23; sun_angle=15; soil_heat_flux_fraction=0.4; night_interception_fraction=0.5; refheight=2; albedo=0.15; emissivity=0.96; RadIntTotal=0
        SoluteManager
        Folder Management
          Manager Sow_n_Harvest
            SowingDate = 1993-06-29
            Cultivar = Grimmett
            script: same as in Australia.Barley_HB90Sow1_3.paddock.Management.Sow_n_Harvest
          Manager Auto_Irrigation: same as New Zealand CPT.Boss.Boss.Paddock.Auto_Irrigation
          Manager ApplyN_at_sowing: same as New Zealand CPT.Boss.Boss.Paddock.ApplyN_at_sowing
        Report DailyReport: same as New Zealand CPT.Boss.Boss.Paddock.DailyReport
        Irrigation
        Fertiliser
      Manager DAS: same as New Zealand CPT.Boss.Boss.DAS
    Simulation Barley_R88-1HP_1
      Clock: StartDate=1988-03-12; EndDate=1988-09-01
      Summary summaryfile
      Weather: FileName=Weather\R88-1HP.met
      SoilArbitrator Soil Arbitrator
      Zone paddock: Area=1; Slope=0
        Soil Bay 0: SoilType=R88; Site=Roma; NearestTown=Unknown; Region=Roma; NaturalVegetation=Unknown; Latitude=0; Longitude=0
          Water
            Thickness  BD    AirDry  LL15  DUL   SAT
            100        1.3   0.1     0.13  0.38  0.41
            100        1.3   0.15    0.19  0.41  0.46
            100        1.29  0.19    0.19  0.41  0.46
            100        1.31  0.22    0.22  0.43  0.48
            100        1.35  0.25    0.25  0.42  0.47
            100        1.36  0.25    0.25  0.42  0.47
            200        1.36  0.28    0.28  0.41  0.46
            200        1.35  0.28    0.28  0.4   0.45
            400        1.36  0.26    0.26  0.36  0.41
            200        1.36  0.25    0.25  0.34  0.39
            SoilCrop BarleySoil
              LL=[0.13, 0.19, 0.19, 0.22, 0.25, 0.25, 0.28, 0.28, 0.26, 0.25]
              KL=[0.09, 0.09, 0.09, 0.09, 0.08, 0.08, 0.07, 0.06, 0.03, 0.01]
              XF=[1, 1, 1, 1, 1, 1, 1, 1, 1, 1]
          SoilWater: SummerDate=1-Nov; SummerU=6; SummerCona=3.5; WinterDate=1-Apr; WinterU=6; WinterCona=3.5; DiffusConst=88; DiffusSlope=35.4; Salb=0.13; CN2Bare=73; CNRed=20; CNCov=0.8; max_pond=0; Thickness=[100, 100, 100, 100, 100, 100, 200, 200, 400, 200]; SWCON=[0.1, 0.1, 0.1, 0.1, 0.1, 0.1, 0.1, 0.1, 0.1, 0.1]; residueinterception=0
          SoilNitrogen: fom_type=[default, manure, mucuna, lablab, shemp, stable]; fract_carb=[0.2, 0.3, 0.54, 0.57, 0.45, 0]; fract_cell=[0.7, 0.3, 0.37, 0.37, 0.47, 0.1]; fract_lign=[0.1, 0.4, 0.09, 0.06, 0.08, 0.9]; wfpsN2N2O_x=[22, 88]; wfpsN2N2O_y=[0.1, 1]
          SoilOrganicMatter: RootCN=40; RootWt=6; SoilCN=14.5; EnrACoeff=7.4; EnrBCoeff=0.2; OCUnits=Total
            Thickness  OC    FBiom  FInert
            100        1.03  0.05   0.39
            100        0.86  0.02   0.47
            100        0.77  0.01   0.52
            100        0.65  0.01   0.62
            100        0.54  0.01   0.74
            100        0.48  0.01   0.83
            200        0.43  0.01   0.93
            200        0.54  0.01   0.93
            400        0.48  0.01   0.93
            200        0.43  0.01   0.93
          Analysis: Thickness=[100, 100, 100, 100, 100, 100, 200, 200, 400, 200]; PH=[8.2, 8.5, 8.6, 8.6, 7.4, 5.3, 5, 7.4, 5.3, 5]; PHUnits=Water; BoronUnits=HotWater
          Sample Initial nitrogen: NO3Units=kgha; NH4Units=kgha; SWUnits=Volumetric; OCUnits=Total; PHUnits=Water
            Thickness  NO3      NH4
            100        10.1439  1.69
            100        1.4729   1.3
            100        1.46157  1.29
            100        1.07158  1.048
            100        0.9342   1.08
            100        1.36952  0.68
            200        1.71088  1.36
            200        1.6983   1.35
            400        3.42176  2.72
            200        1.71088  1.36
          Sample Initial water: Thickness=[100, 100, 100, 100, 100, 100, 200, 200, 400, 200]; NO3Units=ppm; NH4Units=ppm; SWUnits=Volumetric; OCUnits=Total; PHUnits=Water
            SW=[0.376, 0.431, 0.407, 0.444, 0.403, 0.402, 0.341, 0.325, 0.295, 0.26]
          CERESSoilTemperature
        Plant Barley: CropType=barley
        SurfaceOrganicMatter: same as Australia.Barley_HB90Sow1_3.paddock.SurfaceOrganicMatter
        MicroClimate: a_interception=0; b_interception=1; c_interception=0; d_interception=0; soil_albedo=0.23; sun_angle=15; soil_heat_flux_fraction=0.4; night_interception_fraction=0.5; refheight=2; albedo=0.15; emissivity=0.96; RadIntTotal=0
        SoluteManager
        Folder Management
          Manager Sow_n_Harvest
            SowingDate = 1988-03-12
            Cultivar = Grimmett
            script: same as in Australia.Barley_HB90Sow1_3.paddock.Management.Sow_n_Harvest
          Manager Auto_Irrigation: same as New Zealand CPT.Boss.Boss.Paddock.Auto_Irrigation
          Manager ApplyN_at_sowing: same as New Zealand CPT.Boss.Boss.Paddock.ApplyN_at_sowing
        Report DailyReport: same as New Zealand CPT.Boss.Boss.Paddock.DailyReport
        Irrigation
        Fertiliser
      Manager DAS: same as New Zealand CPT.Boss.Boss.DAS
    Simulation Barley_R88-1MP_1
      Clock: StartDate=1988-03-12; EndDate=1988-09-01
      Summary summaryfile
      Weather: FileName=Weather\R88-1MP.met
      SoilArbitrator Soil Arbitrator
      Zone paddock: Area=1; Slope=0
        Plant Barley: CropType=barley
        Soil Bay 0: same as Australia.Barley_R88-1HP_1.paddock.Bay 0
        SurfaceOrganicMatter: same as Australia.Barley_HB90Sow1_3.paddock.SurfaceOrganicMatter
        MicroClimate: a_interception=0; b_interception=1; c_interception=0; d_interception=0; soil_albedo=0.23; sun_angle=15; soil_heat_flux_fraction=0.4; night_interception_fraction=0.5; refheight=2; albedo=0.15; emissivity=0.96; RadIntTotal=0
        SoluteManager
        Folder Management: same as Australia.Barley_R88-1HP_1.paddock.Management
        Report DailyReport: same as New Zealand CPT.Boss.Boss.Paddock.DailyReport
        Irrigation
        Fertiliser
      Manager DAS: same as New Zealand CPT.Boss.Boss.DAS
    Simulation Barley_R88-2HP_1
      Clock: StartDate=1988-04-21; EndDate=1988-09-20
      Summary summaryfile
      Weather: FileName=Weather\R88-2HP.met
      SoilArbitrator Soil Arbitrator
      Zone paddock: Area=1; Slope=0
        Plant Barley: CropType=barley
        Soil Bay 0: SoilType=R88; Site=Roma; NearestTown=Unknown; Region=Roma; NaturalVegetation=Unknown; Latitude=0; Longitude=0
          Water: same as Australia.Barley_R88-1HP_1.paddock.Bay 0.Water
          SoilWater: same as Australia.Barley_R88-1HP_1.paddock.Bay 0.SoilWater
          SoilNitrogen: fom_type=[default, manure, mucuna, lablab, shemp, stable]; fract_carb=[0.2, 0.3, 0.54, 0.57, 0.45, 0]; fract_cell=[0.7, 0.3, 0.37, 0.37, 0.47, 0.1]; fract_lign=[0.1, 0.4, 0.09, 0.06, 0.08, 0.9]; wfpsN2N2O_x=[22, 88]; wfpsN2N2O_y=[0.1, 1]
          SoilOrganicMatter: same as Australia.Barley_R88-1HP_1.paddock.Bay 0.SoilOrganicMatter
          Analysis: Thickness=[100, 100, 100, 100, 100, 100, 200, 200, 400, 200]; PH=[8.2, 8.5, 8.6, 8.6, 7.4, 5.3, 5, 7.4, 5.3, 5]; PHUnits=Water; BoronUnits=HotWater
          Sample Initial nitrogen: same as Australia.Barley_R88-1HP_1.paddock.Bay 0.Initial nitrogen
          Sample Initial water: Thickness=[100, 100, 100, 100, 100, 100, 200, 200, 400, 200]; NO3Units=ppm; NH4Units=ppm; SWUnits=Volumetric; OCUnits=Total; PHUnits=Water
            SW=[0.395, 0.45, 0.414, 0.451, 0.406, 0.405, 0.322, 0.305, 0.295, 0.258]
          CERESSoilTemperature
        SurfaceOrganicMatter: same as Australia.Barley_HB90Sow1_3.paddock.SurfaceOrganicMatter
        MicroClimate: a_interception=0; b_interception=1; c_interception=0; d_interception=0; soil_albedo=0.23; sun_angle=15; soil_heat_flux_fraction=0.4; night_interception_fraction=0.5; refheight=2; albedo=0.15; emissivity=0.96; RadIntTotal=0
        SoluteManager
        Folder Management
          Manager Sow_n_Harvest
            SowingDate = 1988-04-21
            Cultivar = Grimmett
            script: same as in Australia.Barley_HB90Sow1_3.paddock.Management.Sow_n_Harvest
          Manager Auto_Irrigation: same as New Zealand CPT.Boss.Boss.Paddock.Auto_Irrigation
          Manager ApplyN_at_sowing: same as New Zealand CPT.Boss.Boss.Paddock.ApplyN_at_sowing
        Report DailyReport: same as New Zealand CPT.Boss.Boss.Paddock.DailyReport
        Irrigation
        Fertiliser
      Manager DAS: same as New Zealand CPT.Boss.Boss.DAS
    Simulation Barley_R88-2MP_1
      Clock: StartDate=1988-04-21; EndDate=1988-09-20
      Summary summaryfile
      Weather: FileName=Weather\R88-2MP.met
      SoilArbitrator Soil Arbitrator
      Zone paddock: same as Australia.Barley_R88-2HP_1.paddock
      Manager DAS: same as New Zealand CPT.Boss.Boss.DAS
    Simulation Barley_R88-3HP_1
      Clock: StartDate=1988-05-11; EndDate=1988-10-04
      Summary summaryfile
      Weather: FileName=Weather\R88-3HP.met
      SoilArbitrator Soil Arbitrator
      Zone paddock: Area=1; Slope=0
        Plant Barley: CropType=barley
        Soil Bay 0: SoilType=R88; Site=Roma; NearestTown=Unknown; Region=Roma; NaturalVegetation=Unknown; Latitude=0; Longitude=0
          Water: same as Australia.Barley_R88-1HP_1.paddock.Bay 0.Water
          SoilWater: same as Australia.Barley_R88-1HP_1.paddock.Bay 0.SoilWater
          SoilNitrogen: fom_type=[default, manure, mucuna, lablab, shemp, stable]; fract_carb=[0.2, 0.3, 0.54, 0.57, 0.45, 0]; fract_cell=[0.7, 0.3, 0.37, 0.37, 0.47, 0.1]; fract_lign=[0.1, 0.4, 0.09, 0.06, 0.08, 0.9]; wfpsN2N2O_x=[22, 88]; wfpsN2N2O_y=[0.1, 1]
          SoilOrganicMatter: same as Australia.Barley_R88-1HP_1.paddock.Bay 0.SoilOrganicMatter
          Analysis: Thickness=[100, 100, 100, 100, 100, 100, 200, 200, 400, 200]; PH=[8.2, 8.5, 8.6, 8.6, 7.4, 5.3, 5, 7.4, 5.3, 5]; PHUnits=Water; BoronUnits=HotWater
          Sample Initial nitrogen: same as Australia.Barley_R88-1HP_1.paddock.Bay 0.Initial nitrogen
          Sample Initial water: Thickness=[100, 100, 100, 100, 100, 100, 200, 200, 400, 200]; NO3Units=ppm; NH4Units=ppm; SWUnits=Volumetric; OCUnits=Total; PHUnits=Water
            SW=[0.377, 0.432, 0.411, 0.448, 0.408, 0.407, 0.362, 0.354, 0.295, 0.258]
          CERESSoilTemperature
        SurfaceOrganicMatter: same as Australia.Barley_HB90Sow1_3.paddock.SurfaceOrganicMatter
        MicroClimate: a_interception=0; b_interception=1; c_interception=0; d_interception=0; soil_albedo=0.23; sun_angle=15; soil_heat_flux_fraction=0.4; night_interception_fraction=0.5; refheight=2; albedo=0.15; emissivity=0.96; RadIntTotal=0
        SoluteManager
        Folder Management
          Manager Sow_n_Harvest
            SowingDate = 1988-05-11
            Cultivar = Grimmett
            script: same as in Australia.Barley_HB90Sow1_3.paddock.Management.Sow_n_Harvest
          Manager Auto_Irrigation: same as New Zealand CPT.Boss.Boss.Paddock.Auto_Irrigation
          Manager ApplyN_at_sowing: same as New Zealand CPT.Boss.Boss.Paddock.ApplyN_at_sowing
        Irrigation
        Report DailyReport: same as New Zealand CPT.Boss.Boss.Paddock.DailyReport
        Fertiliser
      Manager DAS: same as New Zealand CPT.Boss.Boss.DAS
    Simulation Barley_R88-3MP_1
      Clock: StartDate=1988-05-11; EndDate=1988-10-04
      Summary summaryfile
      Weather: FileName=Weather\R88-3MP.met
      SoilArbitrator Soil Arbitrator
      Zone paddock: Area=1; Slope=0
        Plant Barley: CropType=barley
        Soil Bay 0: same as Australia.Barley_R88-3HP_1.paddock.Bay 0
        SurfaceOrganicMatter: same as Australia.Barley_HB90Sow1_3.paddock.SurfaceOrganicMatter
        MicroClimate: a_interception=0; b_interception=1; c_interception=0; d_interception=0; soil_albedo=0.23; sun_angle=15; soil_heat_flux_fraction=0.4; night_interception_fraction=0.5; refheight=2; albedo=0.15; emissivity=0.96; RadIntTotal=0
        SoluteManager
        Report DailyReport: same as New Zealand CPT.Boss.Boss.Paddock.DailyReport
        Irrigation
        Fertiliser
        Folder Management: same as Australia.Barley_R88-3HP_1.paddock.Management
      Manager DAS: same as New Zealand CPT.Boss.Boss.DAS
    Simulation Barley_R88-4HP_1
      Clock: StartDate=1988-06-08; EndDate=1988-10-19
      Summary summaryfile
      Weather: FileName=Weather\R88-4HP.met
      SoilArbitrator Soil Arbitrator
      Zone paddock: Area=1; Slope=0
        Plant Barley: CropType=barley
        Soil Bay 0: SoilType=R88; Site=Roma; NearestTown=Unknown; Region=Roma; NaturalVegetation=Unknown; Latitude=0; Longitude=0
          Water: same as Australia.Barley_R88-1HP_1.paddock.Bay 0.Water
          SoilWater: same as Australia.Barley_R88-1HP_1.paddock.Bay 0.SoilWater
          SoilNitrogen: fom_type=[default, manure, mucuna, lablab, shemp, stable]; fract_carb=[0.2, 0.3, 0.54, 0.57, 0.45, 0]; fract_cell=[0.7, 0.3, 0.37, 0.37, 0.47, 0.1]; fract_lign=[0.1, 0.4, 0.09, 0.06, 0.08, 0.9]; wfpsN2N2O_x=[22, 88]; wfpsN2N2O_y=[0.1, 1]
          SoilOrganicMatter: same as Australia.Barley_R88-1HP_1.paddock.Bay 0.SoilOrganicMatter
          Analysis: Thickness=[100, 100, 100, 100, 100, 100, 200, 200, 400, 200]; PH=[8.2, 8.5, 8.6, 8.6, 7.4, 5.3, 5, 7.4, 5.3, 5]; PHUnits=Water; BoronUnits=HotWater
          Sample Initial nitrogen: same as Australia.Barley_R88-1HP_1.paddock.Bay 0.Initial nitrogen
          Sample Initial water: Thickness=[100, 100, 100, 100, 100, 100, 200, 200, 400, 200]; NO3Units=ppm; NH4Units=ppm; SWUnits=Volumetric; OCUnits=Total; PHUnits=Water
            SW=[0.355, 0.41, 0.397, 0.434, 0.396, 0.395, 0.329, 0.317, 0.295, 0.258]
          CERESSoilTemperature
        SurfaceOrganicMatter: same as Australia.Barley_HB90Sow1_3.paddock.SurfaceOrganicMatter
        MicroClimate: a_interception=0; b_interception=1; c_interception=0; d_interception=0; soil_albedo=0.23; sun_angle=15; soil_heat_flux_fraction=0.4; night_interception_fraction=0.5; refheight=2; albedo=0.15; emissivity=0.96; RadIntTotal=0
        SoluteManager
        Folder Management
          Manager Sow_n_Harvest
            SowingDate = 1988-06-08
            Cultivar = Grimmett
            script: same as in Australia.Barley_HB90Sow1_3.paddock.Management.Sow_n_Harvest
          Manager Auto_Irrigation: same as New Zealand CPT.Boss.Boss.Paddock.Auto_Irrigation
          Manager ApplyN_at_sowing: same as New Zealand CPT.Boss.Boss.Paddock.ApplyN_at_sowing
        Report DailyReport: same as New Zealand CPT.Boss.Boss.Paddock.DailyReport
        Irrigation
        Fertiliser
      Manager DAS: same as New Zealand CPT.Boss.Boss.DAS
    Simulation Barley_R88-4MP_1
      Clock: StartDate=1988-06-08; EndDate=1988-10-19
      Summary summaryfile
      Weather: FileName=Weather\R88-4MP.met
      SoilArbitrator Soil Arbitrator
      Manager DAS: same as New Zealand CPT.Boss.Boss.DAS
      Zone paddock: same as Australia.Barley_R88-4HP_1.paddock
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