Simulations: Version=47
  DataStore
  Simulation GrowCrop
    Clock: StartDate=1995-01-01; EndDate=2009-12-31
    Summary summaryfile
    ZoneCLEM CLEM: RandomSeed=1; ClimateRegion=0; EcologicalIndicatorsCalculationMonth=12; Area=0; Slope=0
      ResourcesHolder Resources
        Land: UnitsOfArea=Hectares; UnitsOfAreaToHaConversion=1
          LandType Field: LandArea=100; UnusablePortion=0; ProportionOfTotalArea=1; SoilType=3
        AnimalFoodStore
          AnimalFoodStoreType Maize: DryMatter=0; DMD=0; Nitrogen=0; StartingAmount=0
          AnimalFoodStoreType Maize stover: DryMatter=0; DMD=0; Nitrogen=0; StartingAmount=0
      ActivitiesHolder Activities
        CropActivityManageCrop Manage maize: LandItemNameToUse=Field; AreaRequested=1; UseAreaAvailable=true; OnPartialResourcesAvailableAction=0
          CropActivityManageProduct Manage grain: ModelNameFileCrop=FileCrop; CropName=Maize_local; Store=1; StoreItemName=Maize; PercentKept=100; TreesPerHa=0; UnitsToHaConverter=0; OnPartialResourcesAvailableAction=0
          CropActivityManageProduct Manage residue: ModelNameFileCrop=FileCropResidue; CropName=Maize_local_Stover; Store=1; StoreItemName=Maize stover; PercentKept=100; TreesPerHa=0; UnitsToHaConverter=0; OnPartialResourcesAvailableAction=0
      Folder Reports
        Report ResourceShortfallLedger: EventNames=[Activities].ResourceShortfallOccurred
          VariableNames:
            [Clock].Today as Date
            [Activities].LastShortfallResourceRequest.ResourceTypeName as Resource
            [Activities].LastShortfallResourceRequest.ActivityModel.Name as Activity
            [Activities].LastShortfallResourceRequest.Reason as Reason
            [Activities].LastShortfallResourceRequest.Required as Required
            [Activities].LastShortfallResourceRequest.Available as Available
        Report AnimalFoodStoreLedger: EventNames=[Resources].AnimalFoodStore.TransactionOccurred
          VariableNames:
            [Clock].Today as Date
            [Resources].AnimalFoodStore.LastTransaction.Credit as Credit
            [Resources].AnimalFoodStore.LastTransaction.Debit as Debit
            [Resources].AnimalFoodStore.LastTransaction.ResourceType as Resource
            [Resources].AnimalFoodStore.LastTransaction.Activity as Activity
            [Resources].AnimalFoodStore.LastTransaction.Reason as Reason
        Report LandLedger: EventNames=[Resources].Land.TransactionOccurred
          VariableNames:
            [Clock].Today as Date
            [Resources].Land.LastTransaction.Credit as Credit
            [Resources].Land.LastTransaction.Debit as Debit
            [Resources].Land.LastTransaction.ResourceType as Resource
            [Resources].Land.LastTransaction.Activity as Activity
            [Resources].Land.LastTransaction.Reason as Reason
        Report ActivityLedger: EventNames=[Activities].ActivityPerformed
          VariableNames:
            [Clock].Today as Date
            [Activities].LastActivityPerformed.Name as Name
            [Activities].LastActivityPerformed.Status as Status
    FileCrop: FileName=Crop_new_format(Burkina 20130222).prn
    FileCrop FileCropResidue: FileName=CropResidue_new_format(Burkina 20130222).prn
  Simulation GrowCropWithSales
    Clock: StartDate=1995-01-01; EndDate=2009-12-31
    Summary summaryfile
    ZoneCLEM CLEM: RandomSeed=1; ClimateRegion=0; EcologicalIndicatorsCalculationMonth=12; Area=0; Slope=0
      ResourcesHolder Resources
        Land: UnitsOfArea=Hectares; UnitsOfAreaToHaConversion=1
          LandType Field: LandArea=100; UnusablePortion=0; ProportionOfTotalArea=1; SoilType=3
        Finance Finances
          FinanceType General account: OpeningBalance=10000000; EnforceWithdrawalLimit=false; WithdrawalLimit=0; InterestRateCharged=7.5; InterestRatePaid=2
        AnimalFoodStore
          AnimalFoodStoreType Maize: DryMatter=0; DMD=0; Nitrogen=0; StartingAmount=0
          AnimalFoodStoreType Maize stover: DryMatter=0; DMD=0; Nitrogen=0; StartingAmount=0
      ActivitiesHolder Activities
        CropActivityManageCrop Manage maize: LandItemNameToUse=Field; AreaRequested=1; UseAreaAvailable=true; OnPartialResourcesAvailableAction=0
          CropActivityManageProduct Manage grain: ModelNameFileCrop=FileCrop; CropName=Maize_local; Store=1; StoreItemName=Maize; PercentKept=100; TreesPerHa=0; UnitsToHaConverter=0; OnPartialResourcesAvailableAction=0
          CropActivityManageProduct Manage residue: ModelNameFileCrop=FileCropResidue; CropName=Maize_local_Stover; Store=1; StoreItemName=Maize stover; PercentKept=100; TreesPerHa=0; UnitsToHaConverter=0; OnPartialResourcesAvailableAction=0
            ActivityTimerCropHarvest Perfrom at harvest: MonthsBeforeHarvestStart=0; MonthsBeforeHarvestStop=0
        ResourceActivitySell Sell maize: AccountName=General account; ResourceGroupName=AnimalFoodStore; ResourceTypeName=Maize; SellWholeUnitsOnly=true; AmountReserved=0; UnitSize=1000; UnitPrice=800; OnPartialResourcesAvailableAction=0
      Folder Reports
        Report FinancesLedger: EventNames=[Resources].Finances.TransactionOccurred
          VariableNames:
            [Clock].Today as Date
            [Resources].Finances.LastTransaction.Credit as Credit
            [Resources].Finances.LastTransaction.Debit as Debit
            [Resources].Finances.LastTransaction.ResourceType as Resource
            [Resources].Finances.LastTransaction.Activity as Activity
            [Resources].Finances.LastTransaction.Reason as Reason
        Report ResourceShortfallLedger: same as GrowCrop.CLEM.Reports.ResourceShortfallLedger
        Report AnimalFoodStoreLedger: same as GrowCrop.CLEM.Reports.AnimalFoodStoreLedger
        Report LandLedger: same as GrowCrop.CLEM.Reports.LandLedger
        Report ActivityLedger: EventNames=[Activities].ActivityPerformed
          VariableNames:
            [Clock].Today as Date
            [Activities].LastActivityPerformed.Name as Name
            [Activities].LastActivityPerformed.Status.ToString() as Status
    FileCrop: FileName=Crop_new_format(Burkina 20130222).prn
    FileCrop FileCropResidue: FileName=CropResidue_new_format(Burkina 20130222).prn
  Simulation GrowCropWithTasks
    Clock: StartDate=1995-01-01; EndDate=2009-12-31
    Summary summaryfile
    ZoneCLEM CLEM: RandomSeed=1; ClimateRegion=0; EcologicalIndicatorsCalculationMonth=12; Area=0; Slope=0
      ResourcesHolder Resources
        Land: UnitsOfArea=Hectares; UnitsOfAreaToHaConversion=1
          LandType Field: LandArea=100; UnusablePortion=0; ProportionOfTotalArea=1; SoilType=3
        Finance Finances
          FinanceType General account: OpeningBalance=10000000; EnforceWithdrawalLimit=false; WithdrawalLimit=0; InterestRateCharged=7.5; InterestRatePaid=2
        AnimalFoodStore
          AnimalFoodStoreType Maize: DryMatter=0; DMD=0; Nitrogen=0; StartingAmount=0
          AnimalFoodStoreType Maize stover: DryMatter=0; DMD=0; Nitrogen=0; StartingAmount=0
        Labour: AllowAging=true
          LabourType Joe B: InitialAge=42; Gender=0; MaxLabourSupply=[24, 24, 24, 24, 24, 24, 24, 24, 24, 24, 24, 24]; Individuals=1
      ActivitiesHolder Activities
        CropActivityManageCrop Manage maize: LandItemNameToUse=Field; AreaRequested=1; UseAreaAvailable=true; OnPartialResourcesAvailableAction=0
          CropActivityManageProduct Manage grain: ModelNameFileCrop=FileCrop; CropName=Maize_local; Store=1; StoreItemName=Maize; PercentKept=100; TreesPerHa=0; UnitsToHaConverter=0; OnPartialResourcesAvailableAction=0
            CropActivityTask Prepare field: OnPartialResourcesAvailableAction=2
              ActivityTimerCropHarvest 7 mths before harvest: MonthsBeforeHarvestStart=7; MonthsBeforeHarvestStop=7
              LabourFilterGroupSpecified Define labour: LabourPerUnit=1; UnitSize=0; UnitType=0
                LabourFilter Filter[Name=Joe B]: Parameter=0; Operator=0; Value=Joe B
            CropActivityTask Sow seeds: OnPartialResourcesAvailableAction=2
              ActivityTimerCropHarvest 6 mths before harvest: MonthsBeforeHarvestStart=6; MonthsBeforeHarvestStop=6
              CropActivityFee Purchase seeds: PaymentStyle=1; Amount=100
              LabourFilterGroupSpecified Define labour: LabourPerUnit=0.1; UnitSize=1; UnitType=1
                LabourFilter Filter[Name=Joe B]: Parameter=0; Operator=0; Value=Joe B
            CropActivityTask Perform irrigation: OnPartialResourcesAvailableAction=2
              ActivityTimerCropHarvest From plant to harvest: MonthsBeforeHarvestStart=5; MonthsBeforeHarvestStop=1
              LabourFilterGroupSpecified Define labour: LabourPerUnit=0.1; UnitSize=1; UnitType=1
                LabourFilter Filter[Name=Joe B]: Parameter=0; Operator=0; Value=Joe B
            CropActivityTask Harvest: OnPartialResourcesAvailableAction=2
              ActivityTimerCropHarvest At harvest: MonthsBeforeHarvestStart=0; MonthsBeforeHarvestStop=0
              LabourFilterGroupSpecified Define labour: LabourPerUnit=0.1; UnitSize=1; UnitType=1
                LabourFilter Filter[Name=Joe B]: Parameter=0; Operator=0; Value=Joe B
          CropActivityManageProduct Manage residue: ModelNameFileCrop=FileCropResidue; CropName=Maize_local_Stover; Store=1; StoreItemName=Maize stover; PercentKept=100; TreesPerHa=0; UnitsToHaConverter=0; OnPartialResourcesAvailableAction=0
            CropActivityTask Cut and carry: same as GrowCropWithTasks.CLEM.Activities.Manage maize.Manage grain.Harvest
        ResourceActivitySell Sell maize: AccountName=General account; ResourceGroupName=AnimalFoodStore; ResourceTypeName=Maize; SellWholeUnitsOnly=true; AmountReserved=0; UnitSize=1000; UnitPrice=800; OnPartialResourcesAvailableAction=2
          LabourFilterGroupSpecified Define labour: LabourPerUnit=1; UnitSize=1; UnitType=6
            LabourFilter Filter[Name=Joe B]: Parameter=0; Operator=0; Value=Joe B
      Folder Reports
        Report FinancesLedger: same as GrowCropWithSales.CLEM.Reports.FinancesLedger
        Report ResourceShortfallLedger: same as GrowCrop.CLEM.Reports.ResourceShortfallLedger
        Report AnimalFoodStoreLedger: same as GrowCrop.CLEM.Reports.AnimalFoodStoreLedger
        Report LandLedger: same as GrowCrop.CLEM.Reports.LandLedger
        Report ActivityLedger: EventNames=[Activities].ActivityPerformed
          VariableNames:
            [Clock].Today as Date
            [Activities].LastActivityPerformed.Name as Name
            [Activities].LastActivityPerformed.Status.ToString() as Status
        Report ExcessLabour: EventNames=[Clock].EndOfMonth
          VariableNames:
            [Clock].Today as Date
            [Resources].Labour.Available as Excess
    FileCrop: FileName=Crop_new_format(Burkina 20130222).prn
    FileCrop FileCropResidue: FileName=CropResidue_new_format(Burkina 20130222).prn
  Simulation GrowCropWithDateLimited
    Clock: StartDate=1995-01-01; EndDate=2009-12-31
    Summary summaryfile
    ZoneCLEM CLEM: RandomSeed=1; ClimateRegion=0; EcologicalIndicatorsCalculationMonth=12; Area=0; Slope=0
      ResourcesHolder Resources: same as GrowCropWithTasks.CLEM.Resources
      ActivitiesHolder Activities
        CropActivityManageCrop Manage maize: same as GrowCropWithTasks.CLEM.Activities.Manage maize
        ResourceActivitySell Sell maize: same as GrowCropWithTasks.CLEM.Activities.Sell maize
        ActivityTimerDateRange: StartDate=2007-01-01; EndDate=2100-01-01; Invert=false
      Folder Reports: same as GrowCropWithSales.CLEM.Reports
    FileCrop: FileName=Crop_new_format(Burkina 20130222).prn
    FileCrop FileCropResidue: FileName=CropResidue_new_format(Burkina 20130222).prn
  Simulation NewReports
    Clock: StartDate=1995-01-01; EndDate=2009-12-31
    Summary summaryfile
    ZoneCLEM CLEM: RandomSeed=1; ClimateRegion=0; EcologicalIndicatorsCalculationMonth=12; Area=0; Slope=0
      ResourcesHolder Resources: same as GrowCrop.CLEM.Resources
      ActivitiesHolder Activities: same as GrowCrop.CLEM.Activities
      Folder Reports
        Report ResourceShortfallLedger: same as GrowCrop.CLEM.Reports.ResourceShortfallLedger
        Report AnimalFoodStoreLedger: same as GrowCrop.CLEM.Reports.AnimalFoodStoreLedger
        Report LandLedger: same as GrowCrop.CLEM.Reports.LandLedger
        ReportActivitiesPerformed
        ReportResourceBalances: EventNames=[Clock].CLEMEndOfTimeStep
          VariableNames:
            [Clock].Today
            Land
            AnimalFoodStore
        ReportResourceShortfalls
    FileCrop: FileName=Crop_new_format(Burkina 20130222).prn
    FileCrop FileCropResidue: FileName=CropResidue_new_format(Burkina 20130222).prn
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