Simulations: Version=2
  Replacements
    Plant Chickpea: CropType=Chickpea
      Memo Introduction
        The APSIM Chickpea model has been developed from the original APSIM Chickpea model described by Robertson et al(2002) using the Plant Modelling Framework of Brown et al (2014).
      OrganArbitrator Arbitrator: NArbitrationOption=RelativeAllocation; DMArbitrationOption=RelativeAllocation
      Phenology
        AirTemperatureFunction ThermalTime
          Memo
            The cardinal temperatures for calculating thermal time have been taken from Singh and Virmani (1996) as used by Robertson et al (2002).
          XYPairs: X=[0, 30, 40]; Y=[0, 30, 0]
        PhotoperiodFunction Photoperiod: Twilight=-6
        GerminatingPhase Germinating: Start=Sowing; End=Germination
        EmergingPhase Emerging: Start=Germination; End=Emergence; ShootLag=15; ShootRate=2
          VariableReference ThermalTime: VariableName=[Phenology].ThermalTime.Value
        NodeNumberPhase Vegetative: Start=Emergence; End=StartFlowering
          Memo
            Robertson et al (2002) described early post-emergent chickpea development in terms of juvenile and inductive phases. In this model we describe a vegetative growth phase, which is photoperiod dependant.
          LinearInterpolationFunction CompletionNodeNumber: XProperty=[Phenology].Photoperiod.Value
            XYPairs: X=[10.7, 17]; Y=[21.6, 11.91]
        NodeNumberPhase Flowering: Start=StartFlowering; End=EndFlowering
          AddFunction CompletionNodeNumber
            VariableReference VegetativeNodes: VariableName=[Phenology].NFF.Value
            LinearInterpolationFunction FloweringNodes: XProperty=[Phenology].Photoperiod.Value
              XYPairs: X=[13, 16]; Y=[9.8, 9.8]
          MultiplyFunction Target
            VariableReference NodeNumberDuration
              VariableName=[Phenology].Flowering.CompletionNodeNumber.FloweringNodes.Value
            VariableReference Phyllochron: VariableName=[Structure].MainStemNodeAppearanceRate.Value
        GenericPhase GrainFilling: Start=EndFlowering; End=EndGrainFill
          Memo
            The duration of the grain filling phase has been taken from the model of Robertson et al (2002).
          Constant Target: Value=690
          VariableReference ThermalTime: VariableName=[Phenology].ThermalTime.Value
        GenericPhase Maturing: Start=EndGrainFill; End=Maturity
          Memo
            The duration of the Maturing phase has been taken from the model of Robertson et al (2002).
          Constant Target: Value=60
          VariableReference ThermalTime: VariableName=[Phenology].ThermalTime.Value
        GenericPhase Ripening: Start=Maturity; End=HarvestRipe
          Constant Target: Value=1
          VariableReference ThermalTime: VariableName=[Phenology].ThermalTime.Value
        EndPhase ReadyForHarvesting: Start=HarvestRipe; End=Unused
          VariableReference ThermalTime: VariableName=[Phenology].ThermalTime.Value
        OnEventFunction NFF: SetEvent=StartFlowering; ReSetEvent=never
          Constant PreEventValue: Value=0
          VariableReference PostEventValue: VariableName=[Phenology].Vegetative.CompletionNodeNumber.Value
        OnEventFunction FN: SetEvent=EndFlowering; ReSetEvent=never
          Constant PreEventValue: Value=0
          SubtractFunction PostEventValue
            VariableReference PostEventValue: VariableName=[Structure].MainStemNodeNo
            VariableReference PostEventValue1: VariableName=[Phenology].NFF.Value
        OnEventFunction FloweringDAS: SetEvent=StartFlowering; ReSetEvent=never
          Memo
            A function is used to provide flowering date as days after sowing(DAS).
          Constant PreEventValue: Value=0
          VariableReference PostEventValue: VariableName=[Phenology].DaysAfterSowing
        OnEventFunction MaturityDAS: SetEvent=Maturity; ReSetEvent=never
          Memo
            A function is used to provide maturity date as days after sowing(DAS).
          Constant PreEventValue: Value=0
          VariableReference PostEventValue: VariableName=[Phenology].DaysAfterSowing
      Structure: InitialiseStage=Emergence; PrimaryBudNo=0
        VariableReference ThermalTime: VariableName=[Phenology].ThermalTime.Value
        PhaseLookupValue MainStemPrimordiaInitiationRate: Start=Emergence; End=EndFlowering
          Constant Function: Value=46
        Constant DroughtInducedBranchMortality: Value=0
        Constant HeightModel: Value=1
        Constant MainStemFinalNodeNumber: Value=40
        LinearInterpolationFunction Height: XProperty=[Stem].Live.Wt
          XYPairs: X=[0, 300]; Y=[10, 750]
        MultiplyFunction BranchingRate
          LinearInterpolationFunction Potential_Branching_Rate: XProperty=[Structure].MainStemNodeNo
            XYPairs: X=[0, 7, 8, 30, 31]; Y=[0, 0, 1, 2, 0]
          LinearInterpolationFunction Cover_response: XProperty=[leaf].CoverGreen
            XYPairs: X=[0, 0.17, 0.25]; Y=[1, 1, 1]
          LinearInterpolationFunction CHO_response: XProperty=[Stem].Live.NonStructuralWt
            XYPairs: X=[0, 1, 10]; Y=[1, 1, 1]
        Constant ShadeInducedBranchMortality: Value=0
        PhaseLookup MainStemNodeAppearanceRate
          PhaseLookupValue Vegetative: Start=Emergence; End=StartFlowering
            Constant Function: Value=46
          PhaseLookupValue Flowering: Start=StartFlowering; End=EndFlowering
            Constant Function: Value=46
          Memo
            Robertson et al (2002) used a constant phyllochron of 46 degree days.
      ReproductiveOrgan Grain: FractionRemoved=0; FractionToResidue=0
        Constant MaximumPotentialGrainSize: Value=0.15
        PhaseLookup DMDemandFunction
          PhaseLookupValue GrainFilling: Start=StartFlowering; End=EndGrainFill
            FillingRateFunction
              VariableReference NumberFunction: VariableName=[Grain].NumberFunction.Value
              AddFunction FillingDuration
                VariableReference FillingDuration: VariableName=[Phenology].GrainFilling.Target.Value
                VariableReference FillingDuration: VariableName=[Phenology].GrainFilling.Target.Value
              VariableReference ThermalTime: VariableName=[Phenology].ThermalTime.Value
              VariableReference PotentialSizeIncrement: VariableName=[Grain].MaximumPotentialGrainSize.Value
        Biomass Live
        Biomass Dead
        Constant MinimumNConc: Value=0.02
        Constant MaximumNConc: Value=0.037
        Constant WaterContent: Value=0.12
        PhaseLookup NFillingRate
          PhaseLookupValue GrainFilling: Start=StartFlowering; End=EndGrainFill
            FillingRateFunction
              VariableReference NumberFunction: VariableName=[Grain].NumberFunction.Value
              AddFunction FillingDuration
                VariableReference FillingDuration: VariableName=[Phenology].Flowering.Target.Value
                VariableReference FillingDuration: VariableName=[Phenology].GrainFilling.Target.Value
              VariableReference ThermalTime: VariableName=[Phenology].ThermalTime.Value
              MultiplyFunction PotentialSizeIncrement
                Constant MaximumFinalNConc: Value=0.037
                VariableReference MaximumSize: VariableName=[Grain].MaximumPotentialGrainSize.Value
        MultiplyFunction NumberFunction
          Constant PeasPerPod: Value=3
          VariableReference PodNumber: VariableName=[Shell].PodNumber.Value
      Root: FractionRemoved=0; FractionToResidue=0; InitialDM=0.2; SpecificRootLength=40000; KNO3_yProperty=[0.02, 0.02]; KNO3_xRootLength=[0, 0.003]; KNH4_yProperty=[0, 0]; KNH4_xRootLength=[0, 0.003]; NuptakeSupply=0
        CompositeBiomass Live: Propertys=[[Root].LayerLive]
        CompositeBiomass Dead: Propertys=[[Root].LayerDead]
        LinearInterpolationFunction KLModifier: XProperty=[Leaf].LAI
          XYPairs: X=[0, 3]; Y=[1, 1]
        AirTemperatureFunction TemperatureEffect
          XYPairs: X=[0, 26, 35]; Y=[1, 1, 1]
        Constant MaxDailyNUptake: Value=6
        Constant SenescenceRate: Value=0.005
        PhaseLookup RootFrontVelocity
          PhaseLookupValue PreEmergence: Start=Germination; End=Emergence
            Constant Function: Value=3
          PhaseLookupValue early: Start=Emergence; End=StartFlowering
            Constant Function: Value=15
          PhaseLookupValue late: Start=StartFlowering; End=Maturity
            Constant Function: Value=17
        PhaseLookup PartitionFraction
          PhaseLookupValue Early: Start=Emergence; End=StartFlowering
            Constant Function: Value=0.1
          PhaseLookupValue Middle: Start=StartFlowering; End=EndFlowering
            Constant Function: Value=0.08
          PhaseLookupValue Late: Start=EndFlowering; End=Maturity
            Constant Function: Value=0
        Constant MaximumNConc: Value=0.01
        Constant MinimumNConc: Value=0.005
        PhaseBasedSwitch NitrogenDemandSwitch: Start=Emergence; End=EndGrainFill
      Nodule: FractionRemoved=0; FractionToResidue=0
        Biomass Live
        Biomass Dead
        Constant SpecificNitrogenaseActivity: Value=4.5
        Constant FixationMetabolicCost: Value=7
        AirTemperatureFunction FT
          XYPairs: X=[0, 20, 30, 40]; Y=[0, 1, 1, 0]
        LinearInterpolationFunction FW: XProperty=[Leaf].Fw
          XYPairs: X=[0, 1, 1.5]; Y=[0, 1, 1]
        LinearInterpolationFunction FWlog: XProperty=[Leaf].Fw
          XYPairs: X=[0, 1, 1.5]; Y=[1, 1, 1]
        PartitionFractionDemandFunction DMDemandFunction
          PhaseLookup PartitionFraction
            PhaseLookupValue Early: Start=Emergence; End=StartFlowering
              Constant Function: Value=0.03
            PhaseLookupValue Middle: Start=StartFlowering; End=EndFlowering
              Constant Function: Value=0.02
            PhaseLookupValue Late: Start=EndFlowering; End=Maturity
              Constant Function: Value=0
        Constant MaximumNConc: Value=0.02
        Constant MinimumNConc: Value=0.01
        Constant SenescenceRate: Value=0
        PhaseBasedSwitch NitrogenDemandSwitch: Start=Emergence; End=EndGrainFill
      GenericAboveGroundOrgan Shell: FractionRemoved=0; FractionToResidue=0
        Biomass Live
        Biomass Dead
        Constant NReallocationFactor: Value=0
        Constant NRetranslocationFactor: Value=0.1
        Constant StructuralFraction: Value=0.7
        Constant MaximumNConc: Value=0.03
        Constant MinimumNConc: Value=0.01
        Constant DMRetranslocationFactor: Value=0.1
        PhaseBasedSwitch NitrogenDemandSwitch: Start=Germination; End=Maturity
        PopulationBasedDemandFunction DMDemandFunction
          VariableReference ThermalTime: VariableName=[Phenology].ThermalTime.Value
          VariableReference OrganPopulation: VariableName=[Shell].PodNumber.Value
          Constant ExpansionStress: Value=1
          AddFunction GrowthDuration
            VariableReference FloweringGrowthPeriod: VariableName=[Phenology].Flowering.Target.Value
            Constant PostFloweringGrowthPeriod: Value=60
          Constant StartStage: Value=4
          Constant MaximumOrganWt: Value=0.5
        MultiplyFunction PodNumber
          Constant PodsPerNode: Value=1
          VariableReference StemPopulation: VariableName=[Structure].TotalStemPopn
          PhaseLookupValue FloweringNodes: Start=StartFlowering; End=HarvestRipe
            SubtractFunction FloweringNodes
              VariableReference TotalNodes: VariableName=[Structure].MainStemNodeNo
              VariableReference VegetativeNodes: VariableName=[Phenology].NFF.Value
      Leaf: MaxCover=1; R50=200; KDead=0.3
        zero: FractionRemoved, FractionToResidue, CurrentExpandingLeaf, StartFractionExpanded, FractionNextleafExpanded, _ExpandedNodeNo, DeadNodesYesterday, Albedo, Gsmax, FRGR, PotentialEP, FractionDied
        CompositeBiomass Live: Propertys=[[Leaf].CohortLive]
        CompositeBiomass Dead: Propertys=[[Leaf].CohortDead]
        ArrayBiomass CohortArrayLive: Propertys=[[Leaf].Live]; ArraySize=[Leaf].MaxNodeNo
        ArrayBiomass CohortArrayDead: Propertys=[[Leaf].Dead]; ArraySize=[Leaf].MaxNodeNo
        LeafCohort InitialLeaf1: Rank=1; Area=300
        LeafCohort InitialLeaf2: Rank=2; Area=150
        LeafCohort InitialLeaf3: Rank=3; Area=0
        VariableReference ThermalTime: VariableName=[Phenology].ThermalTime.Value
        LeafCohortParameters
          LinearInterpolationFunction GrowthDuration: XProperty=[Phenology].Stage
            XYPairs: X=[1, 4.5, 6]; Y=[46, 46, 46]
          LinearInterpolationFunction MaxArea: XProperty=[Structure].MainStemNodeNo
            Memo
              Robertson et al (2002) used a maximum leaf size of 300 mm2 for the first 9 leaves and 600 mm2 thereafter.
            XYPairs: X=[1, 12, 16, 19]; Y=[300, 300, 450, 850]
          LinearInterpolationFunction LagDuration: XProperty=[Phenology].Stage
            XYPairs: X=[1, 4.5, 4.75, 5, 6]; Y=[460, 460, 460, 460, 460]
          LinearInterpolationFunction SenescenceDuration: XProperty=[Phenology].Stage
            XYPairs: X=[1, 5, 5.5, 6]; Y=[80, 80, 40, 10]
          Constant DetachmentLagDuration: Value=46
          Constant DetachmentDuration: Value=46
          LinearInterpolationFunction SpecificLeafAreaMax: XProperty=[Leaf].LAI
            Memo
              Maximum specific leaf area has been taken from Robertson et al (2002).
            XYPairs: X=[0, 4, 6, 8]; Y=[60000, 18000, 10000, 5500]
          Constant StructuralFraction: Value=0.7
          LinearInterpolationFunction SpecificLeafAreaMin: XProperty=[Leaf].LAI
            XYPairs: X=[0, 4, 6, 8]; Y=[10000, 10000, 10000, 10000]
          LinearInterpolationFunction ExpansionStress: XProperty=[Chickpea].WaterSupplyDemandRatio
            XYPairs: X=[0, 1]; Y=[0, 1]
          Constant MinimumNConc: Value=0.03
          Constant CriticalNConc: Value=0.05
          Constant MaximumNConc: Value=0.08
          Constant NReallocationFactor: Value=1
          Constant NRetranslocationFactor: Value=0
          Constant DMRetranslocationFactor: Value=0.5
          LinearInterpolationFunction ShadeInducedSenescenceRate: XProperty=[Leaf].CohortCurrentRankCoverAbove
            XYPairs: X=[0, 0.9, 0.90001, 0.99]; Y=[0, 0, 0.2, 0.2]
          Constant InitialNConc: Value=0
          Constant NonStructuralFraction: Value=0
        LinearInterpolationFunction ExtinctionCoeff: XProperty=[Leaf].LAI
          XYPairs: X=[0, 0.5]; Y=[0.7, 0.7]
        RUEModel Photosynthesis
          Constant RUE: Value=1
          WeightedTemperatureFunction FT: MaximumTemperatureWeighting=0.5
            XYPairs: X=[0, 15, 30, 40]; Y=[0, 1, 1, 0]
          LinearInterpolationFunction FVPD: XProperty=[Leaf].Photosynthesis.VPD
            XYPairs: X=[0, 10, 50]; Y=[1, 1, 1]
          LinearInterpolationFunction FN: XProperty=[Leaf].Fn
            XYPairs: X=[0, 1, 1.5]; Y=[1, 1, 1]
          LinearInterpolationFunction FW: XProperty=[Leaf].Fw
            XYPairs: X=[0, 1, 1.5]; Y=[1, 1, 1]
          RUECO2Function FCO2: PhotosyntheticPathway=C3
          Memo
            Ayaz eta 2004 presented a RUE of 1.6 g/MJ PAR during non-limiting temperature conditions for field pea.  Halving this to make it total radiation gives 0.8 g/MJ and adding 20% to account for root and  nodule production and N fixiation costs gives 1.0 g/MJ
          VariableReference RadnInt: VariableName=[Leaf].RadIntTot
        LinearInterpolationFunction FrostFraction: XProperty=[Weather].MinT
          XYPairs: X=[-1, 0]; Y=[0, 0]
        MinimumFunction FRGRFunction
          VariableReference RUE_FT: VariableName=[Leaf].Photosynthesis.FT.Value
          MinimumFunction Others
            VariableReference RUE_FN: VariableName=[Leaf].Photosynthesis.FN.Value
            VariableReference RUE_FVPD: VariableName=[Leaf].Photosynthesis.FVPD.Value
      GenericAboveGroundOrgan Stem: FractionRemoved=0; FractionToResidue=0
        Biomass Live
        Biomass Dead
        Constant NReallocationFactor: Value=0
        Constant NRetranslocationFactor: Value=0.1
        Constant DMRetranslocationFactor: Value=0.1
        InternodeDemandFunction DMDemandFunction
          Constant InterNodeWt: Value=0.02
        Constant MaximumNConc: Value=0.03
        Constant MinimumNConc: Value=0.01
        PhaseBasedSwitch NitrogenDemandSwitch: Start=Emergence; End=EndGrainFill
        Constant StructuralFraction: Value=0.7
      CompositeBiomass AboveGround
        Propertys=[[Leaf].Live, [Leaf].Dead, [Stem].Live, [Stem].Dead, [Grain].Live, [Grain].Dead, [Shell].Live, [Shell].Dead]
      CompositeBiomass BelowGround: Propertys=[[Root].Live, [Root].Dead, [Nodule].Live, [Nodule].Dead]
      CompositeBiomass Total
        Propertys=[[Leaf].Live, [Leaf].Dead, [Stem].Live, [Stem].Dead, [Grain].Live, [Grain].Dead, [Shell].Live, [Shell].Dead, [Root].Live, [Root].Dead, [Nodule].Live, [Nodule].Dead]
      CompositeBiomass TotalLive
        Propertys=[[Leaf].Live, [Stem].Live, [Grain].Live, [Shell].Live, [Root].Live, [Nodule].Live]
      CompositeBiomass TotalDead
        Propertys=[[Leaf].Dead, [Stem].Dead, [Grain].Dead, [Shell].Dead, [Root].Dead, [Nodule].Dead]
      CompositeBiomass Pod: Propertys=[[Shell].Live, [Shell].Dead, [Grain].Live, [Grain].Dead]
      Cultivar Amethyst
      Memo References
        References

        Brown, H.E., Huth, N.I., Holzworth, D.P., Teixeira, E.I., Zyskowski, R.F., Hargreaves, J.N., Moot, D.J., 2014\. Plant modelling framework: software for building and running crop models on the APSIM platform. Environmental Modelling & Software 62 385-398.

        Robertson, M.J., Carberry, P.S., Huth, N.I., Turpin, J.E., Probert, M.E., Poulton, P.L., Bell, M., Wright, G.C., Yeates, S.J., Brinsmead, R.B., 2002\. Simulation of growth and development of diverse legume species in APSIM. Australian Journal of Agricultural Research 53 429-446.

        Singh P, Virmani SM (1996) Modeling growth and yield of chickpea (Cicer arietinum L.). Field Crops Research , 46, 41-59.
  DataStore
    ExcelInput Observed: FileName=Observed.xlsx; SheetNames=[ObservedHarvestData]
    ExcelInput ObservedTimeseries: FileName=Observed.xlsx; SheetNames=[ObservedTimeseriesData]
    PredictedObserved: PredictedTableName=HarvestReport; ObservedTableName=ObservedHarvestData; FieldNameUsedForMatch=Stage
      Tests: POName=PredictedObserved
        AcceptedStats:
          Name          n   Slope     Intercept  SEslope   SEintercept  R2          RMSE     NSE        ME        MAE      RSR
          FloweringDAS  35  0.679117  4.06978    0.113398  10.0602      0.520806    27.4686  -1.08083   -23.7343  23.8486  1.42175
          GrainWt       23  0.038307  221.702    0.114708  26.1227      0.00528259  84.9475  -0.241608  15.3301   72.0058  1.08978
        AcceptedStatsName=Name n Slope Intercept SEslope SEintercept R2 RMSE NSE ME MAE RSR
  Folder SE Queensland
    Memo
      A selection of data from Kenya has been included from the work of Keating et al (1992).  These include the trial originally labelled JMW2 by the original authors and was labelled Experiment 6 in Keating et al (1992).  This trial includes maize (cultivar Katumani Composite B) sown at 5 populations (1.1, 2.2, 4.4, 6.6 and 8.8 plants/m2) under low (0 kg N/ha applied) and high (120 kgN/ha) fertiliser conditions during the Long Rains of 1988.  This same experimental design was conducted at two locations, Katumani (1o 35' S, 37o 14' E) and Kiboko (2o 13' S, 37o 43' E). The trial was rainfed at Katumani but fully irrigated at Kiboko.  Yields ranged from 2000 to 5400 kg/ha at Katumani and 1000 to 6000 kg/ha at Kiboko.  There were strong population x nitrogen interactions at both sites.  A second trial refered to as BMW1 or Experiment 1 in Keating et al(1992).  A range of populations (2.0-6.5 plants/m2) and irrigation treatments (6-176 mm) where planted under high (80 kgN/ha) and low (0kgN/ha) fertiliser conditions at Katumani. Individual replicates are modelled separately due to variability in soil (depth to rock), establishment and irrigation application.  Grain yields varied from 1600 to 8000 kg/ha.
    Experiment Lawes1990
      Factors
        Factor Sowing: Specifications=[Sowing]
          Operations 1
            1990-05-20  [Chickpea].Sow(population:33.4, cultivar:"Amethyst", depth:50, rowSpacing:350);
            1990-07-29  [Irrigation].Apply(amount:100, depth:0,efficiency:1, willRunoff:false);
            1990-08-28  [Irrigation].Apply(amount:100, depth:0,efficiency:1, willRunoff:false);
            1990-09-27  [Irrigation].Apply(amount:100, depth:0,efficiency:1, willRunoff:false);
          Operations 2
            1990-08-06  [Chickpea].Sow(population:43, cultivar:"Amethyst", depth:50, rowSpacing:750);
            1990-09-17  [Irrigation].Apply(amount:100, depth:0,efficiency:1, willRunoff:false);
            1990-10-07  [Irrigation].Apply(amount:100, depth:0,efficiency:1, willRunoff:false);
            1990-10-27  [Irrigation].Apply(amount:100, depth:0,efficiency:1, willRunoff:false);
            1990-11-16  [Irrigation].Apply(amount:100, depth:0,efficiency:1, willRunoff:false);
            1990-11-26  [Irrigation].Apply(amount:100, depth:0,efficiency:1, willRunoff:false);
      Simulation Lawes1990: Area=0; Slope=0
        Weather: FileName=cooper.met
        Clock: StartDate=1990-01-01; EndDate=1990-12-31
        Summary summaryfile
        SoilArbitrator Soil Arbitrator
        Zone Field: Area=1; Slope=0
          MicroClimate: a_interception=0; b_interception=1; c_interception=0; d_interception=0; soil_albedo=0.23; air_pressure=1010; soil_emissivity=0.96; sun_angle=15; soil_heat_flux_fraction=0.4; night_interception_fraction=0.5; windspeed_default=3; refheight=2; albedo=0.15; emissivity=0.96; gsmax=0.01; r50=200
          Irrigation
          Fertiliser
          SurfaceOrganicMatter: PoolName=maize; type=maize; mass=500; standing_fraction=0; cnr=65; CriticalResidueWeight=2000; OptimumDecompTemp=20; MaxCumulativeEOS=20; CNRatioDecompCoeff=0.277; CNRatioDecompThreshold=25; TotalLeachRain=25; MinRainToLeach=10; CriticalMinimumOrganicC=0.004; DefaultCPRatio=0; DefaultStandingFraction=0; StandingExtinctCoeff=0.5; FractionFaecesAdded=0.5
            Pools:
              {PoolName=maize, ResidueType=maize, Mass=500, CNRatio=65, StandingFraction=0}
            ResidueTypes ResidueTypesList: LoadFromResource=ResidueTypes
          Operations Sowing
          Operations NRate
            1985-11-08  [Fertiliser].Apply(50, Fertiliser.Types.NH4NO3N, 10);
            1985-11-29  [Fertiliser].Apply(30, Fertiliser.Types.NH4NO3N, 10);
          Arbitrator: ArbitrationMethod=Old; NutrientUptakeMethod=2
          Report: EventNames=[Clock].DoReport
            VariableNames:
              [Clock].Today
              [Soil].SoilWater.SW
              [Soil].SoilWater.Eo
              [Soil].SoilWater.Es
              [Soil].SoilWater.Drainage
              [Soil].SoilWater.Runoff
              [Soil].SoilWater.pond
              sum([Soil].SoilWater.SWmm) as ProfileWater
              [Soil].NO3N
              [MicroClimate].net_radn
              [MicroClimate].peta
              [MicroClimate].petr
          Soil: Latitude=0; Longitude=0
            Water
              Thickness  BD    AirDry  LL15   DUL    SAT
              150        1.32  0.1     0.31   0.413  0.453
              150        1.32  0.1     0.31   0.413  0.453
              150        1.38  0.26    0.313  0.454  0.479
              300        1.33  0.32    0.376  0.495  0.498
              300        1.33  0.3     0.356  0.495  0.498
              300        1.42  0.27    0.3    0.418  0.464
              300        1.33  0.24    0.303  0.4    0.457
              300        1.35  0.31    0.31   0.37   0.435
              400        1.4   0.16    0.16   0.29   0.38
              SoilCrop ChickpeaSoil: LL=[0.25, 0.25, 0.26, 0.32, 0.3, 0.27, 0.303, 0.31, 0.16]; KL=[0.06, 0.06, 0.06, 0.06, 0.05, 0.04, 0.02, 0.02, 0.01]; XF=[1, 1, 1, 1, 1, 1, 1, 1, 1]
            SoilWater: residueinterception=0; SummerDate=1-Nov; SummerU=9; SummerCona=3; WinterDate=1-Apr; WinterU=9; WinterCona=3; DiffusConst=88; DiffusSlope=35.4; Salb=0.13; CN2Bare=50; CNRed=20; CNCov=0.8; max_pond=0; Thickness=[100, 100, 100, 200, 200, 200, 200, 200, 200]; SWCON=[0.5, 0.5, 0.5, 0.5, 0.5, 0.5, 0.5, 0.5, 0.5]
            SoilNitrogen: fom_type=[default, manure, mucuna, lablab, shemp, stable]; fract_carb=[0.2, 0.3, 0.54, 0.57, 0.45, 0]; fract_cell=[0.7, 0.3, 0.37, 0.37, 0.47, 0.1]; fract_lign=[0.1, 0.4, 0.09, 0.06, 0.08, 0.9]; wfpsN2N2O_x=[22, 88]; wfpsN2N2O_y=[0.1, 1]
            SoilOrganicMatter: RootCN=45; RootWt=1000; SoilCN=14.5; EnrACoeff=7.4; EnrBCoeff=0.2; OCUnits=Total
              Thickness  OC    FBiom  FInert
              100        1.2   0.02   0.42
              100        1     0.01   0.5
              100        0.86  0.01   0.58
              200        0.83  0.01   0.55
              200        0.58  0.01   0.86
              200        0.54  0.01   0.9
              200        0.47  0.01   0.95
              200        0.5   0.01   0.95
              200        0.5   0.01   0.95
            Analysis: Thickness=[100, 100, 100, 200, 200, 200, 200, 200, 200]; PH=[6, 6, 6, 6.2, 6.5, 6.7, 6.8, 6.8, 6.8]; PHUnits=Water; BoronUnits=HotWater
            Sample InitialN: NO3Units=ppm; NH4Units=ppm; SWUnits=Volumetric; OCUnits=Total; PHUnits=Water
              Thickness  NO3   NH4
              150        14.4  0.6
              150        6.58  0.1
              300        2.45  0.1
              300        1.08  0.1
              300        0.15  0.1
              300        0.83  0.1
              300        2.3   0.1
            Sample InitialSW: Thickness=[150, 150, 300, 300, 300, 300, 300]; SW=[0.413, 0.456, 0.408, 0.374, 0.327, 0.325, 0.371]; NO3Units=ppm; NH4Units=ppm; SWUnits=Volumetric; OCUnits=Total; PHUnits=Water
          Report HarvestReport: EventNames=[Chickpea].Harvesting
            VariableNames:
              [Clock].Today
              [Chickpea].Phenology.CurrentStageName as Stage
              [Chickpea].Phenology.FloweringDAS.Value as FloweringDAS
              [Chickpea].Phenology.MaturityDAS.Value as MaturityDAS
              [Chickpea].Grain.Live.Wt as GrainWt
          Manager Harvesting
```csharp
using System;
using Models.Core;
using System.Collections.Generic;
using System.Text;
using Models.Soils;
using Models.PMF;
using Models;
using System.Xml.Serialization;
using APSIM.Shared.Utilities;

namespace Models
{
	[Serializable] 
	public class Script : Model
	{      
		[Link] Plant Chickpea;          
		[Link] Zone zone;			
					
        
        [EventSubscribe("Commencing")]
        private void OnSimulationCommencing(object sender, EventArgs e)
        {
		}	   
		
		[EventSubscribe("DoManagement")]
		private void OnDoManagement(object sender, EventArgs e)
		{
        if (Chickpea.Phenology.CurrentPhaseName=="ReadyForHarvesting")
           {
           Chickpea.Harvest();
           Chickpea.EndCrop();
           }
		}
		
		[EventSubscribe("DoManagementCalculations")]
		private void OnDoManagementCalculations(object sender, EventArgs e)
		{
			
		}
	}
}
```
          Plant Chickpea: CropType=Chickpea
    Experiment Lawes1991
      Factors Factors2
        Factor Sowing: Specifications=[Sowing]
          Operations 1
            1991-05-29  [Chickpea].Sow(population:28, cultivar:"Amethyst", depth:50, rowSpacing:750);
            1991-05-29  [Irrigation].Apply(amount:40, depth:0,efficiency:1, willRunoff:false);
            1991-06-20  [Irrigation].Apply(amount:40, depth:0,efficiency:1, willRunoff:false);
            1991-07-10  [Irrigation].Apply(amount:40, depth:0,efficiency:1, willRunoff:false);
            1991-07-30  [Irrigation].Apply(amount:40, depth:0,efficiency:1, willRunoff:false);
            1991-08-19  [Irrigation].Apply(amount:40, depth:0,efficiency:1, willRunoff:false);
            1991-09-08  [Irrigation].Apply(amount:40, depth:0,efficiency:1, willRunoff:false);
            1991-09-28  [Irrigation].Apply(amount:40, depth:0,efficiency:1, willRunoff:false);
            1991-10-18  [Irrigation].Apply(amount:40, depth:0,efficiency:1, willRunoff:false);
            1991-11-07  [Irrigation].Apply(amount:40, depth:0,efficiency:1, willRunoff:false);
          Operations 2
            1991-07-30  [Chickpea].Sow(population:28, cultivar:"Amethyst", depth:50, rowSpacing:350);
            1991-05-29  [Irrigation].Apply(amount:40, depth:0,efficiency:1, willRunoff:false);
            1991-06-20  [Irrigation].Apply(amount:40, depth:0,efficiency:1, willRunoff:false);
            1991-07-10  [Irrigation].Apply(amount:40, depth:0,efficiency:1, willRunoff:false);
            1991-07-30  [Irrigation].Apply(amount:40, depth:0,efficiency:1, willRunoff:false);
            1991-08-19  [Irrigation].Apply(amount:40, depth:0,efficiency:1, willRunoff:false);
            1991-09-08  [Irrigation].Apply(amount:40, depth:0,efficiency:1, willRunoff:false);
            1991-09-28  [Irrigation].Apply(amount:40, depth:0,efficiency:1, willRunoff:false);
            1991-10-18  [Irrigation].Apply(amount:40, depth:0,efficiency:1, willRunoff:false);
            1991-11-07  [Irrigation].Apply(amount:40, depth:0,efficiency:1, willRunoff:false);
      Simulation Lawes1991: Area=0; Slope=0
        Weather: FileName=cooper.met
        Clock: StartDate=1991-01-01; EndDate=1991-12-31
        Summary summaryfile
        SoilArbitrator Soil Arbitrator
        Zone Field: Area=1; Slope=0
          MicroClimate: same as SE Queensland.Lawes1990.Lawes1990.Field.MicroClimate
          Irrigation
          Fertiliser
          SurfaceOrganicMatter: same as SE Queensland.Lawes1990.Lawes1990.Field.SurfaceOrganicMatter
          Operations Sowing
          Operations NRate
            1985-11-08  [Fertiliser].Apply(50, Fertiliser.Types.NH4NO3N, 10);
            1985-11-29  [Fertiliser].Apply(30, Fertiliser.Types.NH4NO3N, 10);
          Arbitrator: ArbitrationMethod=Old; NutrientUptakeMethod=2
          Report: EventNames=[Clock].DoReport
            VariableNames:
              [Clock].Today
              [Soil].SoilWater.SW
              [Soil].SoilWater.Eo
              [Soil].SoilWater.Es
              [Soil].SoilWater.Drainage
              [Soil].SoilWater.Runoff
              [Soil].SoilWater.pond
              sum([Soil].SoilWater.SWmm) as ProfileWater
              [Soil].NO3N
              [MicroClimate].net_radn
              [MicroClimate].peta
              [MicroClimate].petr
              [Chickpea].Leaf.LAI
              [Chickpea].Structure.MainStemNodeNo
              [Chickpea].Structure.PlantTotalNodeNo
              [Chickpea].Leaf.DeadCohortNo
              [Chickpea].Structure.TotalStemPopn
              [Chickpea].AboveGround.Wt
              [Chickpea].Leaf.Live.Wt
              [Chickpea].Stem.Live.Wt
          Soil: Latitude=0; Longitude=0
            Water
              Thickness  BD    AirDry  LL15  DUL    SAT
              150        1.38  0.05    0.18  0.384  0.434
              150        1.38  0.19    0.19  0.381  0.431
              300        1.32  0.2     0.2   0.44   0.49
              300        1.46  0.22    0.22  0.424  0.448
              300        1.51  0.19    0.19  0.419  0.43
              300        1.49  0.17    0.17  0.376  0.426
              300        1.47  0.17    0.17  0.377  0.427
              SoilCrop ChickpeaSoil: LL=[0.25, 0.25, 0.23, 0.25, 0.2, 0.2, 0.2]; KL=[0.06, 0.06, 0.06, 0.05, 0.04, 0.02, 0.02]; XF=[1, 1, 1, 1, 1, 1, 1]
            SoilWater: same as SE Queensland.Lawes1990.Lawes1990.Field.soil.SoilWater
            SoilNitrogen: fom_type=[default, manure, mucuna, lablab, shemp, stable]; fract_carb=[0.2, 0.3, 0.54, 0.57, 0.45, 0]; fract_cell=[0.7, 0.3, 0.37, 0.37, 0.47, 0.1]; fract_lign=[0.1, 0.4, 0.09, 0.06, 0.08, 0.9]; wfpsN2N2O_x=[22, 88]; wfpsN2N2O_y=[0.1, 1]
            SoilOrganicMatter: same as SE Queensland.Lawes1990.Lawes1990.Field.soil.SoilOrganicMatter
            Analysis: Thickness=[100, 100, 100, 200, 200, 200, 200, 200, 200]; PH=[6, 6, 6, 6.2, 6.5, 6.7, 6.8, 6.8, 6.8]; PHUnits=Water; BoronUnits=HotWater
            Sample InitialN: NO3Units=ppm; NH4Units=ppm; SWUnits=Volumetric; OCUnits=Total; PHUnits=Water
              Thickness  NO3   NH4
              150        14.3  0
              150        5.9   0
              300        1.8   0
              300        0.9   0
              300        1     0
              300        0.2   0
              300        0.1   0
            Sample InitialSW: Thickness=[150, 150, 300, 300, 300, 300, 300]; SW=[0.384, 0.381, 0.44, 0.424, 0.419, 0.376, 0.377]; NO3Units=ppm; NH4Units=ppm; SWUnits=Volumetric; OCUnits=Total; PHUnits=Water
          Report HarvestReport: EventNames=[Chickpea].Harvesting
            VariableNames:
              [Clock].Today
              [Chickpea].Phenology.CurrentStageName as Stage
              [Chickpea].Phenology.FloweringDAS.Value as FloweringDAS
              [Chickpea].Phenology.MaturityDAS.Value as MaturityDAS
              [Chickpea].Grain.Live.Wt as GrainWt
          Manager Harvesting: same as SE Queensland.Lawes1990.Lawes1990.Field.Harvesting
          Plant Chickpea: CropType=Chickpea
    Experiment Lawes1993
      Factors
        Factor Sowing: Specifications=[Sowing]
          Operations P1T1
            1993-05-25  [Chickpea].Sow(population:41, cultivar:"Amethyst", depth:50, rowSpacing:700);
            1993-07-05  [Irrigation].Apply(amount:52, depth:0,efficiency:1, willRunoff:false);
          Operations P1T2
            1993-05-25  [Chickpea].Sow(population:35, cultivar:"Amethyst", depth:50, rowSpacing:350);
            1993-07-05  [Irrigation].Apply(amount:52, depth:0,efficiency:1, willRunoff:false);
          Operations P1T3
            1993-05-25  [Chickpea].Sow(population:20, cultivar:"Amethyst", depth:50, rowSpacing:170);
            1993-07-05  [Irrigation].Apply(amount:52, depth:0,efficiency:1, willRunoff:false);
          Operations P1T4
            1993-05-25  [Chickpea].Sow(population:18, cultivar:"Amethyst", depth:50, rowSpacing:350);
            1993-07-05  [Irrigation].Apply(amount:52, depth:0,efficiency:1, willRunoff:false);
          Operations P1T5
            1993-05-25  [Chickpea].Sow(population:33, cultivar:"Amethyst", depth:50, rowSpacing:170);
            1993-07-05  [Irrigation].Apply(amount:52, depth:0,efficiency:1, willRunoff:false);
          Operations P1T6
            1993-05-25  [Chickpea].Sow(population:79, cultivar:"Amethyst", depth:50, rowSpacing:350);
            1993-07-05  [Irrigation].Apply(amount:52, depth:0,efficiency:1, willRunoff:false);
          Operations P1T7
            1993-05-25  [Chickpea].Sow(population:69, cultivar:"Amethyst", depth:50, rowSpacing:700);
            1993-07-05  [Irrigation].Apply(amount:52, depth:0,efficiency:1, willRunoff:false);
          Operations P1T8
            1993-05-25  [Chickpea].Sow(population:17, cultivar:"Amethyst", depth:50, rowSpacing:700);
            1993-07-05  [Irrigation].Apply(amount:52, depth:0,efficiency:1, willRunoff:false);
          Operations P2T1
            1993-07-21  [Chickpea].Sow(population:37, cultivar:"Amethyst", depth:50, rowSpacing:700);
          Operations P2T2
            1993-07-21  [Chickpea].Sow(population:41, cultivar:"Amethyst", depth:50, rowSpacing:350);
          Operations P2T4
            1993-07-21  [Chickpea].Sow(population:18, cultivar:"Amethyst", depth:50, rowSpacing:350);
          Operations P2T5
            1993-07-21  [Chickpea].Sow(population:50, cultivar:"Amethyst", depth:50, rowSpacing:170);
      Simulation Lawes1993: Area=0; Slope=0
        Weather: FileName=cooper.met
        Clock: StartDate=1993-05-24; EndDate=1993-12-31
        Summary summaryfile
        SoilArbitrator Soil Arbitrator
        Zone Field: Area=1; Slope=0
          MicroClimate: same as SE Queensland.Lawes1990.Lawes1990.Field.MicroClimate
          Irrigation
          Fertiliser
          SurfaceOrganicMatter: same as SE Queensland.Lawes1990.Lawes1990.Field.SurfaceOrganicMatter
          Operations Sowing
          Operations NRate
            1985-11-08  [Fertiliser].Apply(50, Fertiliser.Types.NH4NO3N, 10);
            1985-11-29  [Fertiliser].Apply(30, Fertiliser.Types.NH4NO3N, 10);
          Arbitrator: ArbitrationMethod=Old; NutrientUptakeMethod=2
          Report: EventNames=[Clock].DoReport
            VariableNames:
              [Clock].Today
              [Soil].SoilWater.SW
              [Soil].SoilWater.Eo
              [Soil].SoilWater.Es
              [Soil].SoilWater.Drainage
              [Soil].SoilWater.Runoff
              [Soil].SoilWater.pond
              sum([Soil].SoilWater.SWmm) as ProfileWater
              [Soil].NO3N
              [MicroClimate].net_radn
              [MicroClimate].peta
              [MicroClimate].petr
          Soil: same as SE Queensland.Lawes1991.Lawes1991.Field.soil
          Report HarvestReport: EventNames=[Chickpea].Harvesting
            VariableNames:
              [Clock].Today
              [Chickpea].Phenology.CurrentStageName as Stage
              [Chickpea].Phenology.FloweringDAS.Value as FloweringDAS
              [Chickpea].Phenology.MaturityDAS.Value as MaturityDAS
              [Chickpea].Grain.Live.Wt as GrainWt
          Manager Harvesting: same as SE Queensland.Lawes1990.Lawes1990.Field.Harvesting
          Plant Chickpea: CropType=Chickpea
    Experiment Lawes1995
      Factors
        Factor Sowing: Specifications=[Sowing]
          Operations 1
            1995-06-15  [Chickpea].Sow(population:37.3, cultivar:"Amethyst", depth:50, rowSpacing:350);
            1995-06-05  [Irrigation].Apply(amount:175, depth:0,efficiency:1, willRunoff:false);
            1995-06-23  [Irrigation].Apply(amount:12, depth:0,efficiency:1, willRunoff:false);
            1995-07-05  [Irrigation].Apply(amount:7, depth:0,efficiency:1, willRunoff:false);
            1995-07-13  [Irrigation].Apply(amount:24, depth:0,efficiency:1, willRunoff:false);
            1995-07-21  [Irrigation].Apply(amount:13.5, depth:0,efficiency:1, willRunoff:false);
            1995-08-01  [Irrigation].Apply(amount:28, depth:0,efficiency:1, willRunoff:false);
            1995-08-11  [Irrigation].Apply(amount:32, depth:0,efficiency:1, willRunoff:false);
            1995-08-25  [Irrigation].Apply(amount:15, depth:0,efficiency:1, willRunoff:false);
            1995-09-01  [Irrigation].Apply(amount:14, depth:0,efficiency:1, willRunoff:false);
            1995-09-04  [Irrigation].Apply(amount:15, depth:0,efficiency:1, willRunoff:false);
            1995-09-15  [Irrigation].Apply(amount:25, depth:0,efficiency:1, willRunoff:false);
            1995-09-22  [Irrigation].Apply(amount:20, depth:0,efficiency:1, willRunoff:false);
            1995-09-29  [Irrigation].Apply(amount:9, depth:0,efficiency:1, willRunoff:false);
            1995-10-02  [Irrigation].Apply(amount:11, depth:0,efficiency:1, willRunoff:false);
          Operations 2
            1995-06-14  [Chickpea].Sow(population:39.5, cultivar:"Amethyst", depth:50, rowSpacing:350);
            1995-06-05  [Irrigation].Apply(amount:175, depth:0,efficiency:1, willRunoff:false);
            1995-06-23  [Irrigation].Apply(amount:12, depth:0,efficiency:1, willRunoff:false);
            1995-07-05  [Irrigation].Apply(amount:7, depth:0,efficiency:1, willRunoff:false);
            1995-07-13  [Irrigation].Apply(amount:24, depth:0,efficiency:1, willRunoff:false);
      Simulation Lawes1995: Area=0; Slope=0
        Weather: FileName=cooper.met
        Clock: StartDate=1995-01-01; EndDate=1995-12-31
        Summary summaryfile
        SoilArbitrator Soil Arbitrator
        Zone Field: same as SE Queensland.Lawes1993.Lawes1993.Field
    Experiment Hermitage1988
      Factors
        Factor Sowing: Specifications=[Sowing]
          Operations c3p1
            1988-05-26  [Chickpea].Sow(population:67.2, cultivar:"Amethyst", depth:50, rowSpacing:350);
            1988-10-03  [Irrigation].Apply(amount:50, depth:0,efficiency:1, willRunoff:false);
          Operations c3p2
            1988-06-22  [Chickpea].Sow(population:49.9, cultivar:"Amethyst", depth:50, rowSpacing:350);
            1988-10-03  [Irrigation].Apply(amount:50, depth:0,efficiency:1, willRunoff:false);
            1988-10-03  [Irrigation].Apply(amount:50, depth:0,efficiency:1, willRunoff:false);
            1988-10-23  [Irrigation].Apply(amount:50, depth:0,efficiency:1, willRunoff:false);
          Operations c3p3
            1988-07-27  [Chickpea].Sow(population:49.9, cultivar:"Amethyst", depth:50, rowSpacing:350);
            1988-10-15  [Irrigation].Apply(amount:50, depth:0,efficiency:1, willRunoff:false);
            1988-10-23  [Irrigation].Apply(amount:50, depth:0,efficiency:1, willRunoff:false);
          Operations c3p4
            1988-09-04  [Chickpea].Sow(population:48.5, cultivar:"Amethyst", depth:50, rowSpacing:350);
            1988-10-23  [Irrigation].Apply(amount:50, depth:0,efficiency:1, willRunoff:false);
            1988-11-16  [Irrigation].Apply(amount:50, depth:0,efficiency:1, willRunoff:false);
            1988-11-30  [Irrigation].Apply(amount:50, depth:0,efficiency:1, willRunoff:false);
          Operations c3p5
            1988-10-19  [Chickpea].Sow(population:46.6, cultivar:"Amethyst", depth:50, rowSpacing:350);
            1988-10-23  [Irrigation].Apply(amount:50, depth:0,efficiency:1, willRunoff:false);
          Operations c3p6
            1988-12-14  [Chickpea].Sow(population:38.5, cultivar:"Amethyst", depth:50, rowSpacing:350);
            1989-02-22  [Irrigation].Apply(amount:50, depth:0,efficiency:1, willRunoff:false);
      Simulation Hermitage1988: Area=0; Slope=0
        Weather: FileName=Herm8889.met
        Clock: StartDate=1988-01-01; EndDate=1988-12-31
        Summary summaryfile
        SoilArbitrator Soil Arbitrator
        Zone Field: Area=1; Slope=0
          MicroClimate: same as SE Queensland.Lawes1990.Lawes1990.Field.MicroClimate
          Irrigation
          Fertiliser
          SurfaceOrganicMatter: same as SE Queensland.Lawes1990.Lawes1990.Field.SurfaceOrganicMatter
          Operations Sowing
          Operations NRate
            1985-11-08  [Fertiliser].Apply(50, Fertiliser.Types.NH4NO3N, 10);
            1985-11-29  [Fertiliser].Apply(30, Fertiliser.Types.NH4NO3N, 10);
          Arbitrator: ArbitrationMethod=Old; NutrientUptakeMethod=2
          Report: EventNames=[Clock].DoReport
            VariableNames:
              [Clock].Today
              [Soil].SoilWater.SW
              [Soil].SoilWater.Eo
              [Soil].SoilWater.Es
              [Soil].SoilWater.Drainage
              [Soil].SoilWater.Runoff
              [Soil].SoilWater.pond
              sum([Soil].SoilWater.SWmm) as ProfileWater
              [Soil].NO3N
              [MicroClimate].net_radn
              [MicroClimate].peta
              [MicroClimate].petr
          Soil: Latitude=0; Longitude=0
            Water
              Thickness  BD    AirDry  LL15  DUL   SAT
              150        1.03  0.1     0.2   0.38  0.45
              150        1.06  0.2     0.2   0.38  0.45
              300        1.06  0.2     0.2   0.38  0.45
              300        1.08  0.21    0.21  0.38  0.43
              300        1.11  0.23    0.23  0.38  0.43
              300        1.14  0.25    0.25  0.38  0.43
              300        1.14  0.28    0.28  0.35  0.4
              SoilCrop ChickpeaSoil: LL=[0.2, 0.2, 0.2, 0.22, 0.25, 0.26, 0.28]; KL=[0.06, 0.06, 0.06, 0.05, 0.04, 0.02, 0.02]; XF=[1, 1, 1, 1, 1, 1, 1]
            SoilWater: same as SE Queensland.Lawes1990.Lawes1990.Field.soil.SoilWater
            SoilNitrogen: fom_type=[default, manure, mucuna, lablab, shemp, stable]; fract_carb=[0.2, 0.3, 0.54, 0.57, 0.45, 0]; fract_cell=[0.7, 0.3, 0.37, 0.37, 0.47, 0.1]; fract_lign=[0.1, 0.4, 0.09, 0.06, 0.08, 0.9]; wfpsN2N2O_x=[22, 88]; wfpsN2N2O_y=[0.1, 1]
            SoilOrganicMatter: same as SE Queensland.Lawes1990.Lawes1990.Field.soil.SoilOrganicMatter
            Analysis: Thickness=[100, 100, 100, 200, 200, 200, 200, 200, 200]; PH=[6, 6, 6, 6.2, 6.5, 6.7, 6.8, 6.8, 6.8]; PHUnits=Water; BoronUnits=HotWater
            Sample InitialN: NO3Units=ppm; NH4Units=ppm; SWUnits=Volumetric; OCUnits=Total; PHUnits=Water
              Thickness  NO3   NH4
              150        14.4  4.8
              150        6.58  4.2
              300        2.45  3.9
              300        1.08  3.9
              300        0.15  3.8
              300        0.83  4.1
              300        0.83  4.1
            Sample InitialSW: Thickness=[150, 150, 300, 300, 300, 300, 300]; SW=[0.3, 0.3, 0.3, 0.31, 0.54, 0.37, 0.37]; NO3Units=ppm; NH4Units=ppm; SWUnits=Volumetric; OCUnits=Total; PHUnits=Water
          Report HarvestReport: EventNames=[Chickpea].Harvesting
            VariableNames:
              [Clock].Today
              [Chickpea].Phenology.CurrentStageName as Stage
              [Chickpea].Phenology.FloweringDAS.Value as FloweringDAS
              [Chickpea].Phenology.MaturityDAS.Value as MaturityDAS
              [Chickpea].Grain.Live.Wt as GrainWt
          Manager Harvesting: same as SE Queensland.Lawes1990.Lawes1990.Field.Harvesting
          Plant Chickpea: CropType=Chickpea
    Experiment Hermitage1989
      Factors
        Factor Sowing: Specifications=[Sowing]
          Operations c3p1
            1989-02-12  [Chickpea].Sow(population:33.4, cultivar:"Amethyst", depth:50, rowSpacing:350);
          Operations c3p2
            1989-04-23  [Chickpea].Sow(population:33.4, cultivar:"Amethyst", depth:50, rowSpacing:350);
          Operations c3p3
            1989-05-14  [Chickpea].Sow(population:33.4, cultivar:"Amethyst", depth:50, rowSpacing:350);
          Operations c3p4
            1989-06-18  [Chickpea].Sow(population:33.4, cultivar:"Amethyst", depth:50, rowSpacing:350);
          Operations c3p5
            1989-07-13  [Chickpea].Sow(population:33.4, cultivar:"Amethyst", depth:50, rowSpacing:350);
          Operations c3p6
            1989-08-27  [Chickpea].Sow(population:33.4, cultivar:"Amethyst", depth:50, rowSpacing:350);
          Operations c3p7
            1989-10-15  [Chickpea].Sow(population:33.4, cultivar:"Amethyst", depth:50, rowSpacing:350);
          Operations c3p8
            1989-11-12  [Chickpea].Sow(population:33.4, cultivar:"Amethyst", depth:50, rowSpacing:350);
      Simulation Hermitage1989: Area=0; Slope=0
        Weather: FileName=Herm8889.met
        Clock: StartDate=1989-01-01; EndDate=1989-12-31
        Summary summaryfile
        SoilArbitrator Soil Arbitrator
        Zone Field: Area=1; Slope=0
          MicroClimate: same as SE Queensland.Lawes1990.Lawes1990.Field.MicroClimate
          Irrigation
          Fertiliser
          SurfaceOrganicMatter: same as SE Queensland.Lawes1990.Lawes1990.Field.SurfaceOrganicMatter
          Operations Sowing
          Operations NRate
            1985-11-08  [Fertiliser].Apply(50, Fertiliser.Types.NH4NO3N, 10);
            1985-11-29  [Fertiliser].Apply(30, Fertiliser.Types.NH4NO3N, 10);
          Arbitrator: ArbitrationMethod=Old; NutrientUptakeMethod=2
          Report: EventNames=[Clock].DoReport
            VariableNames:
              [Clock].Today
              [Soil].SoilWater.SW
              [Soil].SoilWater.Eo
              [Soil].SoilWater.Es
              [Soil].SoilWater.Drainage
              [Soil].SoilWater.Runoff
              [Soil].SoilWater.pond
              sum([Soil].SoilWater.SWmm) as ProfileWater
              [Soil].NO3N
              [MicroClimate].net_radn
              [MicroClimate].peta
              [MicroClimate].petr
          Soil: Latitude=0; Longitude=0
            Water: same as SE Queensland.Hermitage1988.Hermitage1988.Field.soil.Water
            SoilWater: same as SE Queensland.Lawes1990.Lawes1990.Field.soil.SoilWater
            SoilNitrogen: fom_type=[default, manure, mucuna, lablab, shemp, stable]; fract_carb=[0.2, 0.3, 0.54, 0.57, 0.45, 0]; fract_cell=[0.7, 0.3, 0.37, 0.37, 0.47, 0.1]; fract_lign=[0.1, 0.4, 0.09, 0.06, 0.08, 0.9]; wfpsN2N2O_x=[22, 88]; wfpsN2N2O_y=[0.1, 1]
            SoilOrganicMatter: same as SE Queensland.Lawes1990.Lawes1990.Field.soil.SoilOrganicMatter
            Analysis: Thickness=[100, 100, 100, 200, 200, 200, 200, 200, 200]; PH=[6, 6, 6, 6.2, 6.5, 6.7, 6.8, 6.8, 6.8]; PHUnits=Water; BoronUnits=HotWater
            Sample InitialN: NO3Units=ppm; NH4Units=ppm; SWUnits=Volumetric; OCUnits=Total; PHUnits=Water
              Thickness  NO3   NH4
              150        14.4  4.8
              150        6.58  4.2
              300        2.45  3.9
              300        1.08  3.9
              300        0.15  3.8
              300        0.83  4.1
              300        0.83  4.1
            Sample InitialSW: Thickness=[150, 150, 300, 300, 300, 300, 300]; SW=[0.413, 0.456, 0.408, 0.374, 0.34, 0.37, 0.37]; NO3Units=ppm; NH4Units=ppm; SWUnits=Volumetric; OCUnits=Total; PHUnits=Water
          Report HarvestReport: EventNames=[Chickpea].Harvesting
            VariableNames:
              [Clock].Today
              [Chickpea].Phenology.CurrentStageName as Stage
              [Chickpea].Phenology.FloweringDAS.Value as FloweringDAS
              [Chickpea].Phenology.MaturityDAS.Value as MaturityDAS
              [Chickpea].Grain.Live.Wt as GrainWt
          Manager Harvesting: same as SE Queensland.Lawes1990.Lawes1990.Field.Harvesting
          Plant Chickpea: CropType=Chickpea
    Experiment Hermitage1990
      Factors
        Factor Sowing: Specifications=[Sowing]
          Operations c3p1
            1990-06-14  [Chickpea].Sow(population:45.4, cultivar:"Amethyst", depth:50, rowSpacing:350);
            1990-09-28  [Irrigation].Apply(amount:40, depth:0,efficiency:1, willRunoff:false);
          Operations c3p2
            1990-08-19  [Chickpea].Sow(population:36.7, cultivar:"Amethyst", depth:50, rowSpacing:350);
            1990-09-28  [Irrigation].Apply(amount:40, depth:0,efficiency:1, willRunoff:false);
      Simulation Hermitage1990: Area=0; Slope=0
        Weather: FileName=Herm90.met
        Clock: StartDate=1990-04-11; EndDate=1990-12-31
        Summary summaryfile
        SoilArbitrator Soil Arbitrator
        Zone Field: same as SE Queensland.Hermitage1989.Hermitage1989.Field
  Folder Central Queensland
    Memo
      The data presented for the trials done in Emerald and Biloela were obtained from R Brinsmead (unpublished), as reported by Robertson et al. (2002). The two trials were sowed in four dates. The Emerald experiment was sowed at March 5th, April 13th, June 18th and September 13th. The experiment in Biloela was sowed on March 12th, April 26th, June 18th and Septemebr 13th.
    Experiment Emerald
      Factors
        Factor Sowing: Specifications=[Sowing]
          Operations 1
            1989-03-05  [Chickpea].Sow(population:13.7, cultivar:"Amethyst", depth:50, rowSpacing:350);
            1989-07-13  [Irrigation].Apply(amount:50, depth:0, efficiency:1, willRunoff:false);
            1989-08-17  [Irrigation].Apply(amount:100, depth:0, efficiency:1, willRunoff:false);
            1989-10-29  [Irrigation].Apply(amount:100, depth:0, efficiency:1, willRunoff:false);
          Operations 2
            1989-04-13  [Chickpea].Sow(population:18.6, cultivar:"Amethyst", depth:50, rowSpacing:350);
            1989-07-13  [Irrigation].Apply(amount:50, depth:0, efficiency:1, willRunoff:false);
            1989-08-17  [Irrigation].Apply(amount:100, depth:0, efficiency:1, willRunoff:false);
            1989-10-29  [Irrigation].Apply(amount:100, depth:0, efficiency:1, willRunoff:false);
          Operations 3
            1989-06-18  [Chickpea].Sow(population:18.7, cultivar:"Amethyst", depth:50, rowSpacing:350);
            1989-07-13  [Irrigation].Apply(amount:50, depth:0, efficiency:1, willRunoff:false);
            1989-08-17  [Irrigation].Apply(amount:100, depth:0, efficiency:1, willRunoff:false);
            1989-10-29  [Irrigation].Apply(amount:100, depth:0, efficiency:1, willRunoff:false);
          Operations 4
            1989-07-13  [Chickpea].Sow(population:18.8, cultivar:"Amethyst", depth:50, rowSpacing:350);
            1989-07-13  [Irrigation].Apply(amount:50, depth:0, efficiency:1, willRunoff:false);
            1989-08-17  [Irrigation].Apply(amount:100, depth:0, efficiency:1, willRunoff:false);
            1989-10-29  [Irrigation].Apply(amount:100, depth:0, efficiency:1, willRunoff:false);
      Simulation Emerald: Area=0; Slope=0
        Weather: FileName=Emer89.met
        Clock: StartDate=1989-01-01; EndDate=1989-12-31
        Summary summaryfile
        SoilArbitrator Soil Arbitrator
        Zone Field: Area=1; Slope=0
          MicroClimate: same as SE Queensland.Lawes1990.Lawes1990.Field.MicroClimate
          Irrigation
          Fertiliser
          SurfaceOrganicMatter: PoolName=unknown; type=wheat; mass=0; standing_fraction=0; cnr=10; CriticalResidueWeight=2000; OptimumDecompTemp=20; MaxCumulativeEOS=20; CNRatioDecompCoeff=0.277; CNRatioDecompThreshold=25; TotalLeachRain=25; MinRainToLeach=10; CriticalMinimumOrganicC=0.004; DefaultCPRatio=0; DefaultStandingFraction=0; StandingExtinctCoeff=0.5; FractionFaecesAdded=0.5
            Pools:
              {PoolName=unknown, ResidueType=wheat, Mass=0, CNRatio=10, StandingFraction=0}
            ResidueTypes ResidueTypesList: LoadFromResource=ResidueTypes
          Operations Sowing
          Operations NRate
          Report: EventNames=[Clock].DoReport
            VariableNames:
              [Clock].Today
              [Soil].SoilWater.SW
              [Soil].SoilWater.Eo
              [Soil].SoilWater.Es
              [Soil].SoilWater.Drainage
              [Soil].SoilWater.Runoff
              [Soil].SoilWater.pond
              sum([Soil].SoilWater.SWmm) as ProfileWater
              [Soil].NO3N
              [MicroClimate].net_radn
              [MicroClimate].peta
              [MicroClimate].petr
          Soil: Latitude=0; Longitude=0
            Water
              Thickness  BD    AirDry  LL15  DUL   SAT
              150        1.35  0.04    0.14  0.25  0.35
              150        1.35  0.14    0.14  0.25  0.35
              300        1.35  0.14    0.14  0.29  0.37
              300        1.4   0.15    0.15  0.29  0.37
              SoilCrop ChickpeaSoil: LL=[0.14, 0.14, 0.14, 0.15]; KL=[0.08, 0.08, 0.08, 0.08]; XF=[1, 1, 1, 1]
            SoilWater: residueinterception=0; SummerDate=1-Nov; SummerU=6; SummerCona=2; WinterDate=1-Apr; WinterU=6; WinterCona=2; DiffusConst=40; DiffusSlope=16; Salb=0.13; CN2Bare=75; CNRed=20; CNCov=0.8; max_pond=0; Thickness=[150, 150, 300, 300]; SWCON=[0.1, 0.1, 0.1, 0.1]
            SoilNitrogen: fom_type=[default, manure, mucuna, lablab, shemp, stable]; fract_carb=[0.2, 0.3, 0.54, 0.57, 0.45, 0]; fract_cell=[0.7, 0.3, 0.37, 0.37, 0.47, 0.1]; fract_lign=[0.1, 0.4, 0.09, 0.06, 0.08, 0.9]; wfpsN2N2O_x=[22, 88]; wfpsN2N2O_y=[0.1, 1]
            SoilOrganicMatter: RootCN=80; RootWt=500; SoilCN=14.5; EnrACoeff=7.4; EnrBCoeff=0.2; OCUnits=Total
              Thickness  OC   FBiom  FInert
              150        0.8  0.05   0.39
              150        0.4  0.02   0.47
              300        0.2  0.015  0.52
              300        0.2  0.015  0.52
            Analysis: Thickness=[150, 150, 300, 300]; PH=[7.5, 8, 8, 8]; PHUnits=Water; BoronUnits=HotWater
            Sample InitialN: NO3Units=ppm; NH4Units=ppm; SWUnits=Volumetric; OCUnits=Total; PHUnits=Water
              Thickness  NO3  NH4
              150        3.9  0.6
              150        1.3  0.1
              300        1.5  0.1
              300        0.1  0.1
            Sample InitialSW: Thickness=[150, 150, 300, 300]; SW=[0.48, 0.46, 0.48, 0.48]; NO3Units=ppm; NH4Units=ppm; SWUnits=Volumetric; OCUnits=Total; PHUnits=Water
          Report HarvestReport: EventNames=[Chickpea].Harvesting
            VariableNames:
              [Clock].Today
              [Chickpea].Phenology.CurrentStageName as Stage
              [Chickpea].Phenology.FloweringDAS.Value as FloweringDAS
              [Chickpea].Phenology.MaturityDAS.Value as MaturityDAS
              [Chickpea].Grain.Live.Wt as GrainWt
          Manager Harvesting: same as SE Queensland.Lawes1990.Lawes1990.Field.Harvesting
          Plant Chickpea: CropType=Chickpea
    Experiment Biloela
      Factors
        Factor Sowing: Specifications=[Sowing]
          Operations 1
            1990-03-12  [Chickpea].Sow(population:24.79, cultivar:"Amethyst", depth:50, rowSpacing:350);
            1990-03-08  [Irrigation].Apply(amount:100, depth:0, efficiency:1, willRunoff:false);
          Operations 2
            1990-04-26  [Chickpea].Sow(population:21.35, cultivar:"Amethyst", depth:50, rowSpacing:350);
            1990-03-08  [Irrigation].Apply(amount:100, depth:0, efficiency:1, willRunoff:false);
          Operations 3
            1990-06-18  [Chickpea].Sow(population:24.43, cultivar:"Amethyst", depth:50, rowSpacing:750);
            1990-09-14  [Irrigation].Apply(amount:100, depth:0, efficiency:1, willRunoff:false);
          Operations 4
            1990-09-13  [Chickpea].Sow(population:19.18, cultivar:"Amethyst", depth:50, rowSpacing:750);
            1990-09-14  [Irrigation].Apply(amount:100, depth:0, efficiency:1, willRunoff:false);
      Simulation Biloela: Area=0; Slope=0
        Weather: FileName=biloela.met
        Clock: StartDate=1990-03-07; EndDate=1990-12-31
        Summary summaryfile
        SoilArbitrator Soil Arbitrator
        Zone Field: Area=1; Slope=0
          MicroClimate: same as SE Queensland.Lawes1990.Lawes1990.Field.MicroClimate
          Irrigation
          Fertiliser
          SurfaceOrganicMatter: same as Central Queensland.Emerald.Emerald.Field.SurfaceOrganicMatter
          Operations Sowing
          Operations NRate
          Report: EventNames=[Clock].DoReport
            VariableNames:
              [Clock].Today
              [Soil].SoilWater.SW
              [Soil].SoilWater.Eo
              [Soil].SoilWater.Es
              [Soil].SoilWater.Drainage
              [Soil].SoilWater.Runoff
              [Soil].SoilWater.pond
              sum([Soil].SoilWater.SWmm) as ProfileWater
              [Soil].NO3N
              [MicroClimate].net_radn
              [MicroClimate].peta
              [MicroClimate].petr
          Soil: Latitude=0; Longitude=0
            Water
              Thickness  BD    AirDry  LL15   DUL    SAT
              150        1.09  0.1     0.167  0.4    0.41
              150        1.27  0.167   0.167  0.42   0.43
              300        1.3   0.213   0.213  0.447  0.455
              300        1.3   0.22    0.22   0.46   0.47
              SoilCrop ChickpeaSoil: LL=[0.167, 0.167, 0.25, 0.37]; KL=[0.08, 0.06, 0.04, 0.02]; XF=[1, 1, 1, 1]
            SoilWater: same as Central Queensland.Emerald.Emerald.Field.soil.SoilWater
            SoilNitrogen: fom_type=[default, manure, mucuna, lablab, shemp, stable]; fract_carb=[0.2, 0.3, 0.54, 0.57, 0.45, 0]; fract_cell=[0.7, 0.3, 0.37, 0.37, 0.47, 0.1]; fract_lign=[0.1, 0.4, 0.09, 0.06, 0.08, 0.9]; wfpsN2N2O_x=[22, 88]; wfpsN2N2O_y=[0.1, 1]
            SoilOrganicMatter: RootCN=80; RootWt=500; SoilCN=14.5; EnrACoeff=7.4; EnrBCoeff=0.2; OCUnits=Total
              Thickness  OC   FBiom  FInert
              150        0.8  0.05   0.39
              150        0.4  0.02   0.47
              300        0.2  0.015  0.52
              300        0.2  0.015  0.52
            Analysis: Thickness=[150, 150, 300, 300]; PH=[7.5, 8, 8, 8]; PHUnits=Water; BoronUnits=HotWater
            Sample InitialN: NO3Units=ppm; NH4Units=ppm; SWUnits=Volumetric; OCUnits=Total; PHUnits=Water
              Thickness  NO3  NH4
              150        3.9  0.6
              150        1.3  0.1
              300        1.5  0.1
              300        1.5  0.1
            Sample InitialSW: Thickness=[150, 150, 300, 300]; SW=[0.4, 0.42, 0.447, 0.46]; NO3Units=ppm; NH4Units=ppm; SWUnits=Volumetric; OCUnits=Total; PHUnits=Water
          Report HarvestReport: EventNames=[Chickpea].Harvesting
            VariableNames:
              [Clock].Today
              [Chickpea].Phenology.CurrentStageName as Stage
              [Chickpea].Phenology.FloweringDAS.Value as FloweringDAS
              [Chickpea].Phenology.MaturityDAS.Value as MaturityDAS
              [Chickpea].Grain.Live.Wt as GrainWt
          Manager Harvesting: same as SE Queensland.Lawes1990.Lawes1990.Field.Harvesting
          Plant Chickpea: CropType=Chickpea
  Folder Phenology Only
    Memo
      Several minimal datasets are available with only flowering dates for a ranges of planting dates.  These are assembled here for testing of the phenology model for a range of latitudes, temperatures and sowing dates. Local soil data may not be available, but it is assumed that this is necessary when comparing only preditions of time to flowering.
    Experiment Beverley1989
      Factors
        Factor Sowing: Specifications=[Sowing]
          Operations 1
            1989-05-29  [Chickpea].Sow(population:33, cultivar:"Amethyst", depth:50, rowSpacing:350);
          Operations 2
            1989-06-16  [Chickpea].Sow(population:33, cultivar:"Amethyst", depth:50, rowSpacing:350);
          Operations 3
            1989-07-10  [Chickpea].Sow(population:33, cultivar:"Amethyst", depth:50, rowSpacing:350);
          Operations 4
            1989-07-31  [Chickpea].Sow(population:33, cultivar:"Amethyst", depth:50, rowSpacing:350);
          Operations 5
            1989-08-22  [Chickpea].Sow(population:33, cultivar:"Amethyst", depth:50, rowSpacing:350);
      Simulation Beverley: Area=0; Slope=0
        Weather: FileName=Beverley.met
        Clock: StartDate=1989-01-01; EndDate=1990-12-30
        Summary summaryfile
        SoilArbitrator Soil Arbitrator
        Zone Field: Area=1; Slope=0
          MicroClimate: same as SE Queensland.Lawes1990.Lawes1990.Field.MicroClimate
          Irrigation
          Fertiliser
          SurfaceOrganicMatter: same as SE Queensland.Lawes1990.Lawes1990.Field.SurfaceOrganicMatter
          Operations Sowing
          Operations NRate
            1985-11-08  [Fertiliser].Apply(50, Fertiliser.Types.NH4NO3N, 10);
            1985-11-29  [Fertiliser].Apply(30, Fertiliser.Types.NH4NO3N, 10);
          Report: EventNames=[Clock].DoReport
            VariableNames:
              [Clock].Today
              [Soil].SoilWater.SW
              [Soil].SoilWater.Eo
              [Soil].SoilWater.Es
              [Soil].SoilWater.Drainage
              [Soil].SoilWater.Runoff
              [Soil].SoilWater.pond
              sum([Soil].SoilWater.SWmm) as ProfileWater
              [Soil].NO3N
              [MicroClimate].net_radn
              [MicroClimate].peta
              [MicroClimate].petr
          Report HarvestReport: EventNames=[Chickpea].Harvesting
            VariableNames:
              [Clock].Today
              [Chickpea].Phenology.CurrentStageName as Stage
              [Chickpea].Phenology.FloweringDAS.Value as FloweringDAS
              [Chickpea].Phenology.MaturityDAS.Value as MaturityDAS
              [Chickpea].Grain.Live.Wt as GrainWt
          Manager Harvesting: same as SE Queensland.Lawes1990.Lawes1990.Field.Harvesting
          Plant Chickpea: CropType=Chickpea
          Soil: SoilType=sand; Site=Beverley; NearestTown=Unknown; Region=WA; NaturalVegetation=Unknown; Latitude=0; Longitude=0
            Water
              Thickness  BD    AirDry  LL15  DUL   SAT
              100        1.7   0.03    0.05  0.16  0.29
              100        1.75  0.03    0.04  0.21  0.29
              100        1.8   0.04    0.06  0.21  0.29
              100        1.85  0.04    0.1   0.22  0.29
              100        1.85  0.04    0.13  0.22  0.28
              100        1.85  0.04    0.14  0.22  0.24
              100        1.85  0.04    0.17  0.22  0.24
              200        1.85  0.04    0.17  0.22  0.24
              200        1.85  0.04    0.17  0.21  0.24
              200        1.85  0.04    0.17  0.19  0.24
              SoilCrop ChickpeaSoil
                LL=[0.05, 0.04, 0.06, 0.06, 0.13, 0.14, 0.17, 0.17, 0.17, 0.17]
                KL=[0.06, 0.06, 0.06, 0.06, 0.06, 0.06, 0.06, 0.06, 0.06, 0.06]
                XF=[0.2, 0.2, 0.4, 0.4, 0.4, 0.2, 0.2, 0.2, 0.2, 0]
            SoilWater: residueinterception=0; SummerDate=1-Nov; SummerU=6; SummerCona=2; WinterDate=1-Apr; WinterU=6; WinterCona=2; DiffusConst=88; DiffusSlope=35; Salb=0.13; CN2Bare=60; CNRed=20; CNCov=0.8; max_pond=0; Thickness=[100, 100, 100, 100, 100, 100, 100, 200, 200, 200]; SWCON=[1, 1, 1, 1, 0.11, 1, 1, 1, 1, 1]
            SoilNitrogen: fom_type=[default, manure, mucuna, lablab, shemp, stable]; fract_carb=[0.2, 0.3, 0.54, 0.57, 0.45, 0]; fract_cell=[0.7, 0.3, 0.37, 0.37, 0.47, 0.1]; fract_lign=[0.1, 0.4, 0.09, 0.06, 0.08, 0.9]; wfpsN2N2O_x=[22, 88]; wfpsN2N2O_y=[0.1, 1]
            SoilOrganicMatter: RootCN=20; RootWt=1500; SoilCN=13; EnrACoeff=1; EnrBCoeff=1; OCUnits=Total
              Thickness  OC    FBiom  FInert
              100        0.81  0.04   0.1
              100        0.26  0.03   0.1
              100        0.1   0.02   0.2
              100        0.1   0.01   0.8
              100        0.1   0.01   0.9
              100        0.1   0.01   0.9
              100        0.1   0.01   0.9
              200        0.1   0.01   0.9
              200        0.1   0.01   0.9
              200        0.1   0.01   0.9
            Analysis: Thickness=[100, 100, 100, 100, 100, 100, 100, 200, 200, 200]; PH=[4.7, 4.7, 4.7, 6, 6, 6, 6, 6, 6, 6]; PHUnits=Water; BoronUnits=HotWater
            Sample Initial nitrogen: NO3Units=ppm; NH4Units=ppm; SWUnits=Volumetric; OCUnits=Total; PHUnits=Water
              Thickness  NO3  NH4
              100        4    4
              100        1    0
              100        1    0
              100        0.5  0
              100        0.5  0
              100        0.5  0
              100        0.5  0
              200        0.5  0
              200        0.5  0
              200        0.5  0
            Sample Initial water: Thickness=[100, 100, 100, 100, 100, 100, 100, 200, 200, 200]; SW=[0.12, 0.15, 0.18, 0.2, 0.2, 0.21, 0.22, 0.22, 0.21, 0.19]; NO3Units=ppm; NH4Units=ppm; SWUnits=Volumetric; OCUnits=Total; PHUnits=Water
    Experiment Kununurra1989
      Factors
        Factor Sowing: Specifications=[Sowing]
          Operations 1
            1989-05-09  [Chickpea].Sow(population:33, cultivar:"Amethyst", depth:50, rowSpacing:350);
          Operations 2
            1989-05-25  [Chickpea].Sow(population:33, cultivar:"Amethyst", depth:50, rowSpacing:350);
          Operations 3
            1989-06-12  [Chickpea].Sow(population:33, cultivar:"Amethyst", depth:50, rowSpacing:350);
          Operations 4
            1989-07-03  [Chickpea].Sow(population:33, cultivar:"Amethyst", depth:50, rowSpacing:350);
          Operations 5
            1989-07-24  [Chickpea].Sow(population:33, cultivar:"Amethyst", depth:50, rowSpacing:350);
      Simulation Kununurra: Area=0; Slope=0
        Weather: FileName=Kununurra.met
        Clock: StartDate=1989-01-01; EndDate=1990-12-30
        Summary summaryfile
        SoilArbitrator Soil Arbitrator
        Zone Field: same as Phenology Only.Beverley1989.Beverley.Field
    Experiment Ayr1989
      Factors
        Factor Sowing: Specifications=[Sowing]
          Operations 1
            1989-05-05  [Chickpea].Sow(population:33, cultivar:"Amethyst", depth:50, rowSpacing:350);
          Operations 2
            1989-06-08  [Chickpea].Sow(population:33, cultivar:"Amethyst", depth:50, rowSpacing:350);
          Operations 3
            1989-07-06  [Chickpea].Sow(population:33, cultivar:"Amethyst", depth:50, rowSpacing:350);
          Operations 4
            1989-08-08  [Chickpea].Sow(population:33, cultivar:"Amethyst", depth:50, rowSpacing:350);
      Simulation Ayr: Area=0; Slope=0
        Weather: FileName=Ayr.met
        Clock: StartDate=1989-01-01; EndDate=1990-12-30
        Summary summaryfile
        SoilArbitrator Soil Arbitrator
        Zone Field: same as Phenology Only.Beverley1989.Beverley.Field
    Experiment Tamworth1989
      Factors
        Factor Sowing: Specifications=[Sowing]
          Operations 1
            1989-05-15  [Chickpea].Sow(population:33, cultivar:"Amethyst", depth:50, rowSpacing:350);
          Operations 2
            1989-06-14  [Chickpea].Sow(population:33, cultivar:"Amethyst", depth:50, rowSpacing:350);
          Operations 3
            1989-07-17  [Chickpea].Sow(population:33, cultivar:"Amethyst", depth:50, rowSpacing:350);
          Operations 4
            1989-08-15  [Chickpea].Sow(population:33, cultivar:"Amethyst", depth:50, rowSpacing:350);
      Simulation Tamworth: Area=0; Slope=0
        Weather: FileName=Tamworth.met
        Clock: StartDate=1989-01-01; EndDate=1990-12-30
        Summary summaryfile
        SoilArbitrator Soil Arbitrator
        Zone Field: same as Phenology Only.Beverley1989.Beverley.Field
  Memo Combined Results
    ### Combined Results

    Simulation results for the combined datasets from the various growing regions are shown in the following graphs. The model is able to adequately capture the influence of growing conditions (e.g. soil, climate) and management (e.g. population, irrigation, sowing date).
  Folder NewZealand
    Experiment Lincoln98
      Factors
        Factor Sowing: Specifications=[Sowing]
          Operations 1
            1998-11-03  [Chickpea].Sow(population:50, cultivar:"Amethyst", depth:50, rowSpacing:150);
          Operations 2
            1998-12-07  [Chickpea].Sow(population:50, cultivar:"Amethyst", depth:50, rowSpacing:150);
        Factor Irrigation: Specifications=[IrrigationSchedule]
          Operations Nill
          Operations Full
      Simulation Lincoln 98: Area=0; Slope=0
        Weather: FileName=Lincoln.met
        Clock: StartDate=1998-11-01; EndDate=1999-09-30
        Summary summaryfile
        SoilArbitrator Soil Arbitrator
        Zone Field: Area=1; Slope=0
          MicroClimate: same as SE Queensland.Lawes1990.Lawes1990.Field.MicroClimate
          Irrigation
          Fertiliser
          SurfaceOrganicMatter: same as SE Queensland.Lawes1990.Lawes1990.Field.SurfaceOrganicMatter
          Operations Sowing
          Operations IrrigationSchedule
          Report: EventNames=[Clock].DoReport
            VariableNames:
              [Clock].Today
              [Soil].SoilWater.SW
              [Soil].SoilWater.Eo
              [Soil].SoilWater.Es
              [Soil].SoilWater.Drainage
              [Soil].SoilWater.Runoff
              [Soil].SoilWater.pond
              sum([Soil].SoilWater.SWmm) as ProfileWater
              [Soil].NO3N
              [MicroClimate].net_radn
              [MicroClimate].peta
              [MicroClimate].petr
              [Chickpea].AboveGround.Wt
              [Chickpea].Leaf.LAI
          Report HarvestReport: EventNames=[Chickpea].Harvesting
            VariableNames:
              [Clock].Today
              [Chickpea].Phenology.CurrentStageName as Stage
              [Chickpea].Phenology.FloweringDAS.Value as FloweringDAS
              [Chickpea].Phenology.MaturityDAS.Value as MaturityDAS
              [Chickpea].Grain.Live.Wt as GrainWt
          Manager Harvesting: same as SE Queensland.Lawes1990.Lawes1990.Field.Harvesting
          Plant Chickpea: CropType=Chickpea
          Soil Iversen 12: SoilType=Aquic Haplustept (US), Mottled Inmature Pallic (NZ); Site=Lincoln University: Iversen Field Paddock 12; NearestTown=Lincoln; Region=South East Queensland; NaturalVegetation=Grassland, mainly Qld bluegrass; Latitude=0; Longitude=0
            InitialWater Initial water: PercentMethod=FilledFromTop; FractionFull=0.87
            Water
              Thickness  BD    AirDry  LL15   DUL    SAT
              200        1.2   0.08    0.165  0.348  0.37
              100        1.3   0.169   0.169  0.358  0.37
              100        1.4   0.173   0.173  0.335  0.37
              100        1.4   0.14    0.14   0.317  0.37
              100        1.4   0.114   0.114  0.318  0.37
              100        1.45  0.107   0.107  0.329  0.37
              100        1.45  0.106   0.106  0.336  0.37
              100        1.45  0.119   0.119  0.356  0.37
              100        1.5   0.181   0.181  0.362  0.37
              100        1.5   0.176   0.176  0.352  0.37
              100        1.5   0.167   0.167  0.333  0.37
              100        1.55  0.152   0.152  0.303  0.37
              100        1.55  0.164   0.164  0.328  0.37
              100        1.55  0.177   0.177  0.353  0.37
              SoilCrop ChickpeaSoil
                LL=[0.165, 0.169, 0.173, 0.14, 0.114, 0.107, 0.106, 0.119, 0.181, 0.176, 0.167, 0.152, 0.164, 0.177]
                KL=[0.1, 0.1, 0.08, 0.06, 0.04, 0.02, 0.01, 0, 0, 0, 0, 0, 0, 0]
                XF=[1, 1, 1, 1, 1, 1, 1, 0, 0, 0, 0, 0, 0, 0]
            SoilWater: residueinterception=0; SummerDate=21-Sep; SummerU=6; SummerCona=3.5; WinterDate=23-Mar; WinterU=6; WinterCona=2.5; DiffusConst=88; DiffusSlope=35; Salb=0.13; CN2Bare=73; CNRed=20; CNCov=0.8; max_pond=0
              Thickness=[200, 100, 100, 100, 100, 100, 100, 100, 100, 100, 100, 100, 100, 100]
              SWCON=[0.7, 0.7, 0.7, 0.7, 0.7, 0.7, 0.7, 0.7, 0.7, 0.7, 0.7, 0.7, 0.7, 0.7]
            SoilNitrogen: fom_type=[default, manure, mucuna, lablab, shemp, stable]; fract_carb=[0.2, 0.3, 0.54, 0.57, 0.45, 0]; fract_cell=[0.7, 0.3, 0.37, 0.37, 0.47, 0.1]; fract_lign=[0.1, 0.4, 0.09, 0.06, 0.08, 0.9]; wfpsN2N2O_x=[22, 88]; wfpsN2N2O_y=[0.1, 1]
            SoilOrganicMatter: RootCN=40; RootWt=1000; SoilCN=11; EnrACoeff=7.4; EnrBCoeff=0.2; OCUnits=Total
              Thickness  OC    FBiom  FInert
              200        2.7   0.03   0.4
              100        1     0.02   0.6
              100        0.45  0.01   0.7
              100        0.3   0.01   0.8
              100        0.2   0.01   0.9
              100        0.2   0.01   0.9
              100        0.2   0.01   0.9
              100        0.2   0.01   0.9
              100        0.2   0.01   1
              100        0.2   0.01   1
              100        0.2   0.01   1
              100        0.2   0.01   1
              100        0.2   0.01   1
              100        0.2   0.01   1
            Analysis: PH=[6, -, -, -, -, -, -, -, -, -, -, -, -, -]; PHUnits=Water; BoronUnits=HotWater
              Thickness=[200, 100, 100, 100, 100, 100, 100, 100, 100, 100, 100, 100, 100, 100]
            Sample Initial nitrogen: NO3Units=ppm; NH4Units=ppm; SWUnits=Volumetric; OCUnits=Total; PHUnits=Water
              Thickness  NO3     NH4
              200        15.491  0.093
              100        15.491  0.093
              100        15.491  0.093
              100        15.491  0.093
              100        15.491  0.093
              100        15.491  0.093
              100        15.491  0.093
              100        15.491  0.093
              100        15.491  0.093
              100        15.491  0.093
              100        15.491  0.093
              100        15.491  0.093
              100        15.491  0.093
              100        15.491  0.093
    Experiment Lincoln99
      Factors
        Factor Sowing: Specifications=[Sowing]
          Operations 1
            1999-10-18  [Chickpea].Sow(population:50, cultivar:"Amethyst", depth:50, rowSpacing:150);
          Operations 2
            1999-11-22  [Chickpea].Sow(population:50, cultivar:"Amethyst", depth:50, rowSpacing:150);
        Factor Irrigation: Specifications=[IrrigationSchedule]
          Operations Nill
          Operations Full
      Simulation Lincoln 99: Area=0; Slope=0
        Weather: FileName=Lincoln.met
        Clock: StartDate=1999-10-01; EndDate=2000-11-30
        Summary summaryfile
        SoilArbitrator Soil Arbitrator
        Zone Field: same as NewZealand.Lincoln98.Lincoln 98.Field
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