Simulations: Version=2
  Memo TitlePage
    # The APSim Chicory Model
  Replacements
    Plant Chicory: CropType=Chicory
      Memo TitlePage
        # Forage chicory

        _Rogerio Cichota and Russel McAuliffe, AgResearch, New Zealand_

        This model has been built using the Plant Modelling Framework (PMF) of [brown_plant_2014] to simulate a forage chicory crop.

        ##Inclusion in APSIM simulations
        A scum crop is included in a simulation the same as any other APSIM crop
         * The SCUM object needs to be dragged or copied from the Crop folder in the tool box into the field of your simulation.
         * It is then planted with a sowing rule
        <pre><code class='language-cs'>
        SCUM.Sow(cultivar: Wheat_Autumn, population: 1, depth: 10, rowSpacing: 150);
        </code></pre>
          * Note that SCUM has no notion of population or rowSpacing but these parameters are required by the Sow method so filler values are provided
          * To specify an expected Expected Yield that differs to the defalt value provided, included the following code in a manager script to be executed on the day of sowing.
        <pre><code class='language-cs'>
         zone.Set("[SCUM].Product.ExpectedYield.Value", ResetValue);
        </code></pre>
        * SCUM can be Harvested, Cut, Grazed and Pruned like other crops.  Defalt proportions of the biomass in each organ are removed from the sysem and/or added to the fields residue pools.  Note that defalt removal fraction for product on harvest is 0 (becaue it is represented with a generic organ) so more appropriate removal fractions should be sepcified in a manager script as follows:
        <pre><code class='language-cs'>
        [EventSubscribe("Commencing")]
        private void OnSimulationCommencing(object sender, EventArgs e)
        {
          Remove = new RemovalFractions(SCUM.Organs);
        }
        [EventSubscribe("DoManagement")]
        private void OnDoManagement(object sender, EventArgs e)
        {
          if (Clock.Today.Date == HarvestDate2)
          {
            Remove.SetFractionRemoved("Product", 1.0);
            Remove.SetFractionRemoved("Stover", 0.05);
            Remove.SetFractionToResidue("Stover",0.95)
            SCUM.Harvest(Remove);
            SCUM.EndCrop();
          }
        }
         </code></pre>
        * A Remove class as shown above can be sent with Harvest, Cut, Graze and Prune events to specificy the proportions of removals.
         * Once a crop has been ended the field is open to plant another crop using another APSIM crop model or sowing another SCUM crop.
      Phenology
        Memo Description
          As ThermalTime accumulates the crop progresses through the following phases:
        AirTemperatureFunction ThermalTime
          Memo Description
            Progression through each of the phenological stages is driven by thermal time.  As temperature increases from zero to 30 degrees, development acelerates and then slows down again above 30 degress
          XYPairs: X=[5, 25, 35]; Y=[0, 30, 0]
        PhotoperiodFunction Photoperiod: Twilight=-6
        VernalisationC Vernalisation: StartStage=Emergence; EndStage=Bolting; ResetStage=Ripening
          AirTemperatureFunction VernalisingDays
            Memo Description
              Vernalisation
            XYPairs: X=[0, 4, 6, 12]; Y=[0, 1, 1, 0]
          AirTemperatureFunction DevernalisingDays
            Memo Description
              Devernalisation
            XYPairs: X=[0, 20, 30, 40]; Y=[0, 0, 1, 1]
          Constant DaysToStabilise: Value=5
        GerminatingPhase Germinating: Start=Sowing; End=Germination
        EmergingPhase Emerging: Start=Germination; End=Emergence; ShootLag=75; ShootRate=10
          VariableReference ThermalTime: VariableName=[Phenology].ThermalTime.Value
          Memo Description
            Currently the duration of the Emergence phase is set to zero because the period of zero cover and biomass production following sowing is accounted for in the cover and biomass accumulation functions.  However this phase is included if parameterisations of other crops in the future wish to give this phase a duration.
        GenericPhase Vegetative: Start=Emergence; End=Vernalised
          Memo Description
            During this phase the plant only partitions biomass to leaf and root+taproot organs.
          Constant Target: Value=10; Units=<sup>o</sup>Cd
          VariableReference ThermalTime: VariableName=[Phenology].Vernalisation.TodaysVernalisation
        GenericPhase Inductive: Start=Vernalised; End=Bolting
          Constant Target: Value=10; Units=<sup>o</sup>Cd
          LinearInterpolationFunction ThermalTime: XProperty=[Phenology].Photoperiod.Value
            XYPairs: X=[10, 12, 13.5, 15]; Y=[0, 0, 1, 1]
        GenericPhase StemElongation: Start=Bolting; End=Flowering
          Memo Description
            During this phase the plant is partitioning biomass to root+taproot, leaf, and stem organs.
          Constant Target: Value=1000; Units=<sup>o</sup>Cd
          VariableReference ThermalTime: VariableName=[Phenology].ThermalTime.Value
        GenericPhase Reproductive: Start=Flowering; End=Ripening
          Memo Description
            During this phase the plant is partitioning biomass to root+taproot, stem, leaves and reproductive organs.
          Constant Target: Value=800; Units=<sup>o</sup>Cd
          VariableReference ThermalTime: VariableName=[Phenology].ThermalTime.Value
        GotoPhase: Start=Ripening; End=Ripening; FractionComplete=0; PhaseNameToGoto=Vegetative
      OrganArbitrator Arbitrator: NArbitrationOption=RelativeAllocation; DMArbitrationOption=RelativeAllocation
      PhaseLookup TargetShootRootRatio
        PhaseLookupValue Vegetative: Start=Emergence; End=Vernalised
          Constant TargetSR: Value=1.5
        PhaseLookupValue InductiveElongation: Start=Vernalised; End=Flowering
          AddFunction TargetSR
            VariableReference MinTargetSR: VariableName=[TargetShootRootRatio].Vegetative.TargetSR.Value
            MultiplyFunction PlusTarget
              Constant MaxTargetIncrease: Value=1.5
              LinearInterpolationFunction VernalisationEffect: XProperty=[Phenology].Vernalisation.DaysVernalised
                XYPairs: X=[0, 10, 20, 30, 35, 40]; Y=[0.15, 0.15, 0.3, 0.65, 1, 1]
              LinearInterpolationFunction StageEffect: XProperty=[Phenology].Stage
                XYPairs: X=[4, 4.5, 5, 6]; Y=[0, 0.5, 1, 1]
        PhaseLookupValue Reproductive: Start=Flowering; End=Ripening
          AddFunction TargetSR
            VariableReference MinTargetSR: VariableName=[TargetShootRootRatio].Vegetative.TargetSR.Value
            MultiplyFunction PlusTarget
              SubtractFunction DeltaTarget
                VariableReference MaxTargetSR: VariableName=[TargetShootRootRatio].InductiveElongation.TargetSR.Value
                VariableReference MinTargetSR: VariableName=[TargetShootRootRatio].Vegetative.TargetSR.Value
              LinearInterpolationFunction StageEffect: XProperty=[Phenology].Stage
                XYPairs: X=[6, 6.5, 6.9, 7]; Y=[1, 0.5, 0, 0]
      PhaseLookup AdjustedShootRootRatio
        PhaseLookupValue AllPhases: Start=Emergence; End=Ripening
          MultiplyFunction AdjustedSR
            VariableReference TargetSR: VariableName=[TargetShootRootRatio].Value
            DivideFunction SRfactor
              VariableReference TargetSR: VariableName=[TargetShootRootRatio].Value
              DivideFunction CurrentSR
                VariableReference ShootDM: VariableName=[AboveGround].Wt
                VariableReference RootsDM: VariableName=[BelowGround].Wt
      SimpleLeaf Leaf: CohortsInitialised=false; Albedo=0.18; Gsmax=0.015; R50=150
        zero: BiomassYesterday, PlantAppearedLeafNo, LAI, Height, FRGR, PotentialEP, K, KDead, DeltaBiomass, LAIDead, WaterAllocation
        Memo Description
          Represents all leaves in the plant.
        Constant InitialDM: Value=0.005; Units=g/plant
        RUEModel Photosynthesis
          Constant RUE: Value=1.2; Units=g/MJ
          RUECO2Function FCO2: PhotosyntheticPathway=C3
          LinearInterpolationFunction FN: XProperty=[Leaf].Fn
            XYPairs: X=[0, 0.4, 0.8, 1.5]; Y=[0, 0.5, 1, 1]
          WeightedTemperatureFunction FT: MaximumTemperatureWeighting=0.75
            XYPairs: X=[4, 18, 26, 35]; Y=[0, 1, 1, 0]
          LinearInterpolationFunction FW: XProperty=[Leaf].Fw
            XYPairs: X=[0, 0.8, 1, 1.5]; Y=[0, 1, 1, 1]
          LinearInterpolationFunction FVPD: XProperty=[Leaf].Photosynthesis.VPD
            XYPairs: X=[0, 10, 50]; Y=[1, 1, 1]
          VariableReference RadnInt: VariableName=[Leaf].RadIntTot
        Constant ExtinctionCoefficientFunction: Value=0.8
          Memo Description
            The extinction coefficient is used to calculate a LAI value (needed by MicroClimate) from the canopy cover
        PartitionFractionDemandFunction DMDemandFunction
          Memo Description
            DM demand is based on ...
          PhaseLookup PartitionFraction
            PhaseLookupValue VegetativeAndInductive: Start=Emergence; End=Bolting
              DivideFunction LeafFraction
                VariableReference ShootRootRatio: VariableName=[AdjustedShootRootRatio].Value
                AddFunction ShootRootRatioPlusOne
                  VariableReference ShootRootRatio: VariableName=[AdjustedShootRootRatio].Value
                  Constant One: Value=1
            PhaseLookupValue StemElongationAndReproductive: Start=Bolting; End=Ripening
              DivideFunction LeafFraction
                Constant One: Value=1
                AddFunction ShootRootRatioPlusOne
                  VariableReference ShootRootRatio: VariableName=[AdjustedShootRootRatio].Value
                  Constant One: Value=1
        DivideFunction FRGRFunction
          VariableReference Photosynthesis: VariableName=[Leaf].Photosynthesis.Value
          MultiplyFunction PotentialPhotosynthesis
            VariableReference PotentialRUE: VariableName=[Leaf].Photosynthesis.RUE.Value
            MaximumFunction Maximum
              VariableReference RadnInt: VariableName=[Leaf].RadIntTot
              Constant MinRadn: Value=1E-05
        AddFunction LAIFunction
          Constant BaseLAI: Value=0.1
          MultiplyFunction LAIFunction
            Constant SpecificLeafArea: Value=0.04; Units=m^2/g
            VariableReference LeafWeight: VariableName=[Leaf].Live.Wt
        LinearInterpolationFunction HeightFunction: XProperty=[Phenology].Stage
          XYPairs: X=[3, 5, 6]; Y=[100, 800, 1200]
        Constant MaximumNConc: Value=0.045; Units=gN/gDM
        Constant MinimumNConc: Value=0.02; Units=gN/gDM
        PhaseBasedSwitch NitrogenDemandSwitch: Start=Emergence; End=Ripening
        MultiplyFunction SenescenceRateFunction
          Constant MaxRate: Value=0.1
          LinearInterpolationFunction DMFactor: XProperty=[Leaf].Live.Wt
            XYPairs: X=[0, 300, 700, 1000]; Y=[0, 0.1, 1, 1]
        MultiplyFunction DetachmentRateFunction
          Constant MaxRate: Value=0.25
          LinearInterpolationFunction DMFactor: XProperty=[Leaf].Dead.Wt
            XYPairs: X=[0, 100, 500, 1000]; Y=[0.1, 0.15, 0.4, 1]
        Biomass Live
        Biomass Dead
        Folder BiomassRemovalDefaults
          OrganBiomassRemovalType Harvest: FractionRemoved=0; FractionToResidue=0.3
          OrganBiomassRemovalType Cut: FractionRemoved=0.8; FractionToResidue=0
          OrganBiomassRemovalType Prune: FractionRemoved=0; FractionToResidue=0.6
          OrganBiomassRemovalType Graze: FractionRemoved=0.6; FractionToResidue=0.1
      GenericAboveGroundOrgan Stem
        Memo Description
          Represents all the stems in the plant.
        Constant MaximumNConc: Value=0.02; Units=gN/gDM
        LinearInterpolationFunction MinimumNConc: XProperty=[Phenology].Stage
          XYPairs: X=[5, 5.5, 6]; Y=[0.01, 0.01, 0.007]
        PhaseBasedSwitch NitrogenDemandSwitch: Start=Emergence; End=Ripening
        PartitionFractionDemandFunction DMDemandFunction
          PhaseLookup PartitionFraction
            PhaseLookupValue StemElongation: Start=Bolting; End=Flowering
              DivideFunction StemFraction
                SubtractFunction ShootRootRatioMinusOne
                  VariableReference ShootRootRatio: VariableName=[AdjustedShootRootRatio].Value
                  Constant One: Value=1
                AddFunction ShootRootRatioPlusOne
                  VariableReference ShootRootRatio: VariableName=[AdjustedShootRootRatio].Value
                  Constant One: Value=1
            PhaseLookupValue Reproductive: Start=Flowering; End=Ripening
              MultiplyFunction StemFraction
                DivideFunction BasePartition: same as Replacements.Chicory.Stem.DMDemandFunction.PartitionFraction.StemElongation.StemFraction
                LinearInterpolationFunction StageEffect: XProperty=[Phenology].Stage
                  XYPairs: X=[6, 6.25, 6.5, 6.75, 7]; Y=[0.5, 0.25, 0, 0, 0]
        MultiplyFunction SenescenceRateFunction
          Constant MaxRate: Value=1
          LinearInterpolationFunction StageFactor: XProperty=[Phenology].Stage
            XYPairs: X=[5, 5.5, 6, 6.5, 7]; Y=[0, 0.05, 0.1, 0.2, 1]
        MultiplyFunction DetachmentRateFunction
          Constant MaxRate: Value=0.25
          LinearInterpolationFunction DMFactor: XProperty=[Stem].Dead.Wt
            XYPairs: X=[0, 100, 500, 1000]; Y=[0.1, 0.15, 0.4, 1]
        Biomass Live
        Biomass Dead
        Folder BiomassRemovalDefaults
          OrganBiomassRemovalType Harvest: FractionRemoved=0.5; FractionToResidue=0.1
          OrganBiomassRemovalType Cut: FractionRemoved=0.8; FractionToResidue=0
          OrganBiomassRemovalType Prune: FractionRemoved=0; FractionToResidue=0.6
          OrganBiomassRemovalType Graze: FractionRemoved=0.6; FractionToResidue=0.2
      GenericAboveGroundOrgan Inflorescence
        Memo Description
          Represents the reporductive parts of the plant (flowers + seed, etc.
        Constant MaximumNConc: Value=0.075; Units=gN/gDM
        Constant MinimumNConc: Value=0.02; Units=gN/gDM
        PartitionFractionDemandFunction DMDemandFunction
          PhaseLookup PartitionFraction
            PhaseLookupValue Reproductive: Start=Flowering; End=Ripening
              MultiplyFunction FlowerFraction
                DivideFunction BasePartition: same as Replacements.Chicory.Stem.DMDemandFunction.PartitionFraction.StemElongation.StemFraction
                LinearInterpolationFunction StageEffect: XProperty=[Phenology].Stage
                  XYPairs: X=[6, 6.25, 6.5, 6.75, 7]; Y=[0.5, 0.75, 1, 1, 1]
        MultiplyFunction SenescenceRateFunction
          Constant MaxRate: Value=1
          LinearInterpolationFunction StageFactor: XProperty=[Phenology].Stage
            XYPairs: X=[6, 6.25, 6.5, 6.75, 7]; Y=[0, 0.05, 0.1, 0.3, 1]
        MultiplyFunction DetachmentRateFunction
          Constant MaxRate: Value=0.25
          LinearInterpolationFunction DMFactor: XProperty=[Inflorescence].Dead.Wt
            XYPairs: X=[0, 100, 500, 1000]; Y=[0.1, 0.15, 0.4, 1]
        Biomass Live
        Biomass Dead
        Folder BiomassRemovalDefaults: same as Replacements.Chicory.Stem.BiomassRemovalDefaults
      Root: InitialDM=0.01; SpecificRootLength=40000; NuptakeSupply=0
        Memo Description
          This represents all the fine roots of the plant
          The root organ demands and is partitioned N and DM and its depth increases through time to provide a water uptake supply
        Constant InitialDM: Value=0.01; Units=g/plant
        Constant MaximumNConc: Value=0.017; Units=gN/gDM
        Constant MinimumNConc: Value=0.015; Units=gN/gDM
        PhaseBasedSwitch NitrogenDemandSwitch: Start=Germination; End=Ripening
        Constant MaxDailyNUptake: Value=12; Units=kgN/ha
        Constant TemperatureEffect: Value=1
          Memo
            No effect of temperature on root growth is currently captured in the model.
        Constant SoilWaterEffect: Value=1
          Memo
            No effect of soil water content on root growth is currently captured in the model.
        Constant MaximumRootDepth: Value=1500; Units=mm
        PhaseLookup RootFrontVelocity
          PhaseLookupValue PreEmergence: Start=Germination; End=Emergence
            Constant Value: Value=1; Units=mm/day
          PhaseLookupValue Vegetative: Start=Emergence; End=Bolting
            Constant Value: Value=3; Units=mm/day
          PhaseLookupValue Reproductive: Start=Bolting; End=Ripening
            Constant Value: Value=2; Units=mm/day
        Constant SpecificRootLength: Value=40000; Units=mm/g
        MultiplyFunction SenescenceRateFunction
          Constant MaxRate: Value=0.1
          LinearInterpolationFunction DMFactor: XProperty=[Root].Live.Wt
            XYPairs: X=[0, 300, 700, 1000]; Y=[0, 0.1, 1, 1]
        PhaseLookup PartitionFraction
          PhaseLookupValue AllPhases: Start=Emergence; End=Ripening
            MultiplyFunction RootFraction
              DivideFunction PartitionToRoots: same as Replacements.Chicory.Leaf.DMDemandFunction.PartitionFraction.StemElongationAndReproductive.LeafFraction
              LinearInterpolationFunction FineRootsProportion: XProperty=[BelowGround].Wt
                XYPairs: X=[0, 10, 20, 30, 100]; Y=[0.9, 0.75, 0.51, 0.49, 0.4]
        Constant KLModifier: Value=1
        LinearInterpolationFunction KNO3: XProperty=[Root].RootLengthDensity
          XYPairs: X=[0, 0.003]; Y=[0.02, 0.02]
        LinearInterpolationFunction KNH4: XProperty=[Root].RootLengthDensity
          XYPairs: X=[0, 0.003]; Y=[0.02, 0.02]
        LinearInterpolationFunction NUptakeSWFactor: XProperty=[Root].RWC
          XYPairs: X=[0, 1]; Y=[0, 1]
        CompositeBiomass Live: Propertys=[[Root].LayerLive]
        CompositeBiomass Dead: Propertys=[[Root].LayerDead]
        Folder BiomassRemovalDefaults
          OrganBiomassRemovalType Harvest: FractionRemoved=0; FractionToResidue=0.2
          OrganBiomassRemovalType Cut: FractionRemoved=0; FractionToResidue=0.3
          OrganBiomassRemovalType Prune: FractionRemoved=0; FractionToResidue=0.1
          OrganBiomassRemovalType Graze: FractionRemoved=0; FractionToResidue=0.15
      GenericBelowGroundOrgan Taproot
        Memo Description
          This represents all the taproots of the plant (as storage organ)
        Constant MaximumNConc: Value=0.015; Units=gN/gDM
        Constant MinimumNConc: Value=0.01; Units=gN/gDM
        PartitionFractionDemandFunction DMDemandFunction
          PhaseLookup PartitionFraction
            PhaseLookupValue AllPhases: Start=Emergence; End=Ripening
              SubtractFunction TaprootFraction
                DivideFunction PartitionToRoots: same as Replacements.Chicory.Leaf.DMDemandFunction.PartitionFraction.StemElongationAndReproductive.LeafFraction
                VariableReference FineRootFraction: VariableName=[Root].PartitionFraction.Value
        Constant StructuralFraction: Value=1
        Constant DMRetranslocationFactor: Value=0
        MultiplyFunction SenescenceRateFunction
          Constant MaxRate: Value=0.1
          LinearInterpolationFunction DMFactor: XProperty=[Taproot].Live.Wt
            XYPairs: X=[0, 500, 750, 1000]; Y=[0, 0.1, 1, 1]
        MultiplyFunction DetachmentRateFunction
          Constant MaxRate: Value=0.25
          LinearInterpolationFunction DMFactor: XProperty=[Taproot].Dead.Wt
            XYPairs: X=[0, 100, 500, 1000]; Y=[0.1, 0.15, 0.4, 1]
        Biomass Live
        Biomass Dead
        Folder BiomassRemovalDefaults
          OrganBiomassRemovalType Harvest: FractionRemoved=0; FractionToResidue=0
          OrganBiomassRemovalType Cut: FractionRemoved=0; FractionToResidue=0
          OrganBiomassRemovalType Prune: FractionRemoved=0; FractionToResidue=0
          OrganBiomassRemovalType Graze: FractionRemoved=0; FractionToResidue=0
      CompositeBiomass AboveGround
        Propertys=[[Leaf].Live, [Leaf].Dead, [Stem].Live, [Stem].Dead, [Inflorescence].Live, [Inflorescence].Dead]
      CompositeBiomass BelowGround: Propertys=[[Root].Live, [Root].Dead, [Taproot].Live, [Taproot].Dead]
      CompositeBiomass Total
        Propertys=[[Leaf].Live, [Leaf].Dead, [Stem].Live, [Stem].Dead, [Inflorescence].Live, [Inflorescence].Dead, [Root].Live, [Root].Dead, [Taproot].Live, [Taproot].Dead]
      Cultivar Puna
      Cultivar Choice
  DataStore
    ExcelInput Classic: FileName=ClassicObserved.xlsx; SheetNames=[ClassicObserved]
    PredictedObserved POClassic: PredictedTableName=Report; ObservedTableName=ClassicObserved; FieldNameUsedForMatch=Date
    ExcelInput Iversen: FileName=IversenObserved.xlsx; SheetNames=[IversenDM, IversenNContent]
    PredictedObserved POIversen: PredictedTableName=Report; ObservedTableName=IversenDM; FieldNameUsedForMatch=Date
    ExcelInput ScottFarm: FileName=ScottFarmObserved.xlsx
      SheetNames=[C17aObserved, ScottFarmEstablishment, D9aObserved, C38Observed, FD902Observed, FD902Density, FD902LeafArea, FD902LightInterception]
  Folder Validation
    Folder ScottFarm
      Simulation C17a: Area=0; Slope=0
        Memo
          Observed data from
        Weather: FileName=Ruakura.met
        Clock: StartDate=2008-07-01; EndDate=2010-05-30
        Summary
        SoilArbitrator Soil Arbitrator
        Zone Field: Area=1; Slope=0
          Soil SoilHorotiu: SoilType=0; Site=Horotiu; State=New Zealand; NaturalVegetation=0; ApsoilNumber=0; Latitude=0; Longitude=0; LocationAccuracy=0; DataSource=published soil profile description (as an example)
            InitialWater Initial water: PercentMethod=EvenlyDistributed; FractionFull=0.5
            Water
              Thickness  BD   AirDry  LL15  DUL   SAT
              100        1.1  0.16    0.26  0.42  0.43
              90         1.1  0.16    0.26  0.42  0.43
              60         1.1  0.15    0.2   0.42  0.51
              110        1.1  0.12    0.16  0.37  0.47
              240        1.1  0.12    0.17  0.34  0.43
              110        1.1  0.12    0.16  0.32  0.39
              290        1.1  0.12    0.17  0.32  0.38
              200        1.1  0.12    0.17  0.32  0.38
              300        1.1  0.12    0.17  0.34  0.4
              SoilCrop ChicorySoil: LL=[0.26, 0.26, 0.2, 0.16, 0.17, 0.16, 0.17, 0.17, 0.17]; KL=[0.06, 0.06, 0.06, 0.04, 0.02, 0.01, 0, 0, 0]; XF=[1, 1, 1, 1, 1, 1, 0, 0, 0]
            SoilWater: residueinterception=0; SummerDate=1-Nov; SummerU=6; SummerCona=3.5; WinterDate=1-apr; WinterU=2; WinterCona=2; DiffusConst=88; DiffusSlope=35; Salb=0.13; CN2Bare=73; CNRed=20; CNCov=0.8; max_pond=0; Thickness=[100, 90, 60, 110, 240, 100, 300, 200, 300]; SWCON=[0.5, 0.5, 0.5, 0.5, 0.8, 0.8, 0.8, 0.9, 0.9]
            SoilNitrogen: fom_type=[default, manure, mucuna, lablab, shemp, stable]; fract_carb=[0.2, 0.3, 0.54, 0.57, 0.45, 0]; fract_cell=[0.7, 0.3, 0.37, 0.37, 0.47, 0.1]; fract_lign=[0.1, 0.4, 0.09, 0.06, 0.08, 0.9]; wfpsN2N2O_x=[22, 88]; wfpsN2N2O_y=[0.1, 1]
            SoilOrganicMatter: RootCN=40; RootWt=800; SoilCN=11.3; EnrACoeff=7.4; EnrBCoeff=0.2; OCUnits=Total
              Thickness  OC   FBiom  FInert
              100        8.2  0.08   0.3
              90         8.2  0.06   0.4
              60         5.5  0.04   0.5
              110        3.3  0.02   0.5
              240        1.7  0.02   0.8
              110        1.7  0.01   0.9
              290        1.2  0.01   1
              200        0.7  0      1
              300        0.1  0      1
            Analysis: Thickness=[100, 200, 300, 300, 300, 300, 300]; PH=[5.9, 6, 6, 6, 6, 6, 6]; PHUnits=Water; BoronUnits=HotWater
            Sample Initial nitrogen: NO3Units=ppm; NH4Units=ppm; SWUnits=Volumetric; OCUnits=Total; PHUnits=Water
              Thickness  NO3      NH4
              100        7.61905  0.132451
              200        7.27008  0.132451
              300        3.87147  0.132451
              300        3.84025  0.132451
              300        3.80952  0.132451
              300        3.77929  0.132451
              300        3.6914   0.132451
          SurfaceOrganicMatter surface organic matter: PondActive=no; ReportAdditions=no; ReportRemovals=no; PoolName=maize; type=maize; mass=500; standing_fraction=0; cnr=65; CriticalResidueWeight=2000; OptimumDecompTemp=20; MaxCumulativeEOS=20; CNRatioDecompCoeff=0.277; CNRatioDecompThreshold=25; TotalLeachRain=25; MinRainToLeach=10; CriticalMinimumOrganicC=0.004; DefaultCPRatio=0; DefaultStandingFraction=0; StandingExtinctCoeff=0.5; FractionFaecesAdded=0.5
            Pools:
              {PoolName=maize, ResidueType=maize, Mass=500, CNRatio=65, StandingFraction=0}
            ResidueTypes: LoadFromResource=ResidueTypes
            TillageTypes TillageTypesList
          Operations Sowing
            2008-10-23  [Chicory].Sow(population:200, cultivar:"Choice", depth:10, rowSpacing:150);
          MicroClimate: a_interception=0; b_interception=1; c_interception=0; d_interception=0; soil_albedo=0.23; air_pressure=1010; soil_emissivity=0.96; sun_angle=15; soil_heat_flux_fraction=0.4; night_interception_fraction=0.5; windspeed_default=3; refheight=2; albedo=0.26; emissivity=0.96; gsmax=0.01; r50=200
          Plant Chicory: ResourceName=SCUM; CropType=SCUM
          Irrigation
          Manager AutomaticIrrigation
            Irrigation_Yes_No = yes
            Season_Start = 1-Oct
            Season_End = 30-Jul
            Season_Allocation = 10000
            Refull_Frac = 0.9
            Trigger_Frac = 0.75
            Return_days = 3
            Maximum_Irrigation_Amount = 30
            Top_Depth = 300
```csharp
using System;
using Models.Core;
using Models.PMF;
using Models.Soils;
using System.Xml.Serialization;
using Models.PMF;
using APSIM.Shared.Utilities;

        
namespace Models
{
	[Serializable] 
	[System.Xml.Serialization.XmlInclude(typeof(Model))]
	public class Script : Model
	{
		//Communication to other modules
		[Link] ISummary summary = null;
		[Link] Irrigation Irrigation;
		[Link] Clock Clock;
		[Link] Soil Soil;
		[Link] Plant SCUM;
	   
		//User inputs from properties tab
		[Description("Irrigation on (yes or no)")]
		public string Irrigation_Yes_No { get; set; }
		[Description("SeasonStart (dd-MMM)")]
		public string Season_Start { get; set; }
		[Description("SeasonEnd (dd-MMM)")]
		public string Season_End { get; set; }
		[Description("Season Allocation (mm)")]
		public double Season_Allocation { get; set; }
		[Description("% PAWC to refill soil to (0-1)")]
		public double Refull_Frac { get; set; }
		[Description("% PAWC to trigger irrigation (0-1)")]
		public double Trigger_Frac { get; set; }
		[Description("Minimum days for irrigation to return")]
		public double Return_days { get; set; }
		[Description("Maximum irrigation application (mm)")]
		public double Maximum_Irrigation_Amount { get; set; }
		[Description("Depth to calculate PAWC (mm)")]
		public double Top_Depth { get; set; }
	   
		//Class members
		[XmlIgnore] private bool IrrigationIsAvailable { get; set; }
		[XmlIgnore] public bool SeasonIsOpen { get; set; }
		[XmlIgnore] private bool CropIsActive { get; set; }
		[XmlIgnore] private bool IrrigatorIsAvailable { get; set; }
		[XmlIgnore] private bool SoilIsDry { get; set; }
		[XmlIgnore] public double Top_DUL { get; set; }
		[XmlIgnore] public double Top_Refull { get; set; }
		[XmlIgnore] public double Top_Trigger { get; set; }
		[XmlIgnore] public double Top_LL { get; set; }
		[XmlIgnore] public double Top_SW { get; set; }
		[XmlIgnore] public double Accumulated_depth { get; set; }
		[XmlIgnore] public double Days_since_irrigation { get; set; }
		[XmlIgnore] public double Amount_to_apply { get; set; }
		[XmlIgnore] public double Season_Application { get; set; }
		
		//Variables for date logic testing
		[XmlIgnore] public string StartString { get; set; }
		[XmlIgnore] public string EndString { get; set; }
		[XmlIgnore] public DateTime StartDate { get; set; }
		[XmlIgnore] public DateTime EndDate { get; set; }
		[XmlIgnore] public int TodayYear { get; set; }
		[XmlIgnore] public int TodayMonth { get; set; }
		[XmlIgnore] public int StartMonth { get; set; }
		[XmlIgnore] public int EndMonth { get; set; }
		[XmlIgnore] public int TodayDay { get; set; }
		[XmlIgnore] public int StartDay { get; set; }
		[XmlIgnore] public int EndDay { get; set; }
	   
	
		//Calculate static soil variables
		[EventSubscribe("StartOfSimulation")]
		private void OnStartOfSimulation(object sender, EventArgs e)
		{   
			//Calculated soil water variables
			Accumulated_depth = 0;
			for (int layer = 0; Accumulated_depth < Top_Depth; layer++)
			{
				Top_LL += Soil.SoilWater.LL15mm[layer];
				Top_DUL += Soil.SoilWater.DULmm[layer];
				Accumulated_depth += Soil.SoilWater.Thickness[layer];
			}
			Top_Refull = Top_LL + (Top_DUL - Top_LL) * Refull_Frac;
		}
	   
	  
		//Determine daily requirement for irrigation
		[EventSubscribe("StartOfDay")]
		private void OnStartOfDay(object sender, EventArgs e)
		{ 
			//Can we irrigate?
			IrrigationIsAvailable = false; 
			if (Irrigation_Yes_No == "yes")
				IrrigationIsAvailable = true; 
	
			//Are we Allowed to Irrigate?
			TodayYear = Clock.Today.Year;
			StartString = Season_Start + "-" + TodayYear.ToString();
			EndString = Season_End + "-" + TodayYear.ToString();
			StartDate = DateTime.Parse(StartString);
			EndDate = DateTime.Parse(EndString);
			TodayMonth = Clock.Today.Month;
			TodayDay = Clock.Today.Day;
			StartDay = StartDate.Day;
			StartMonth = StartDate.Month;
			EndDay = EndDate.Day;
			EndMonth = EndDate.Month;
		  
			SeasonIsOpen = false;
			//if we are in the spring and after the start date then yes
			if ((Clock.Today.Month > 6) && (Clock.Today >= StartDate))
				SeasonIsOpen = true;
			//if we are in the autumn and before the end date then yes
			if ((Clock.Today.Month <= 6) && (Clock.Today <= EndDate))
				SeasonIsOpen = true;
		  
			//Is there a crop in the ground that needs irrigation?
			CropIsActive = false;
			if ((SCUM.Phenology.Stage >= 3.0) && (SCUM.Phenology.Stage < 6.0))
				CropIsActive = true;
	      
			//Is the irrigator available?
			IrrigatorIsAvailable = false;
			Days_since_irrigation += 1;
			if (Days_since_irrigation >= Return_days)
				IrrigatorIsAvailable = true;
	      
			//Is the soil dry enough to require irrigation?
			SoilIsDry = false;
			double CurrentRootDepth = 0;
			double RootDepth = SCUM.Root.Depth;
			CurrentRootDepth = Math.Max(RootDepth, CurrentRootDepth);
	      
			double RelativeRootDepth = Math.Min(1.0, CurrentRootDepth / Top_Depth);
			Top_Trigger = Math.Min(Top_Refull, Top_DUL - (Top_DUL - Top_LL) * RelativeRootDepth * (1 - Trigger_Frac)); 
	      
			Accumulated_depth = 0;
			Top_SW = 0;
			for (int layer = 0; Accumulated_depth < Top_Depth; layer++)
			{
				Top_SW += Soil.SoilWater.SWmm[layer];
				Accumulated_depth += Soil.SoilWater.Thickness[layer];
			}
			if (Top_SW <= Top_Trigger)
				SoilIsDry = true;
	            
			//Lets bloody well irrigate then!!!!
			if ((IrrigationIsAvailable) && (SeasonIsOpen) && (CropIsActive) && (IrrigatorIsAvailable) && (SoilIsDry)) //The conditions are rife for irrigation
			{
				Amount_to_apply = Math.Min(Top_Refull - Top_SW, Maximum_Irrigation_Amount);
				Amount_to_apply = Math.Min(Amount_to_apply, Season_Allocation - Season_Application); 
				Amount_to_apply = Math.Max(Amount_to_apply, 0.0);
				Irrigation.Apply(Amount_to_apply);
				Days_since_irrigation = 0;
				Season_Application += Amount_to_apply;
				summary.WriteMessage(this, "Automatic Irrigation");
            
			}
		}
	}
}
```
          Fertiliser
          Manager ExtraVariables
```csharp
using System;
using Models.Core;
using System.Collections.Generic;
using System.Text;
using Models.Soils;
using Models.PMF;
using Models;
using System.Xml.Serialization;
using APSIM.Shared.Utilities;

namespace Models
{
	[Serializable] 
	public class Script : Model
	{
		[Link] Clock Clock;
		[Link] Soils.Soil Soil;
		[Link] Models.SurfaceOM.SurfaceOrganicMatter SOM;
		[Link] Weather Met;
		[Link] Fertiliser Fert;
		[Link] Irrigation Irrig;
		[Link] Plant Chicory;
		[Link] Zone zone;
					
		[XmlIgnore] public bool InitialDay { get; set; }
		
		[XmlIgnore] public double AccumPlantN { get; set; }
		[XmlIgnore] public double AccumMineralisation { get; set; }
		[XmlIgnore] public double AccumDenit { get; set; }
		[XmlIgnore] public double AccumFert { get; set; }
		[XmlIgnore] public double AccumLeach { get; set; }
		[XmlIgnore] public double AccumDetach { get; set; }
		[XmlIgnore] public double DeltaSoilOMN { get; set; }
		[XmlIgnore] public double DeltaSurfaceOMN { get; set; }
		[XmlIgnore] public double DeltaSoilMineralN { get; set; }
		[XmlIgnore] public double SoilNitrogenContent { get; set; }
		
		[XmlIgnore] public double AccumEO { get; set; }
		[XmlIgnore] public double AccumEP { get; set; }
		[XmlIgnore] public double AccumES { get; set; }
		[XmlIgnore] public double AccumDrainage { get; set; }
		[XmlIgnore] public double AccumRunoff { get; set; }
		[XmlIgnore] public double AccumOutflowLat { get; set; }
		[XmlIgnore] public double AccumIrrigation { get; set; }
		[XmlIgnore] public double AccumRainfall { get; set; }
		[XmlIgnore] public double SoilWaterDeficit { get; set; }
	
		[XmlIgnore] public double  InitialSoilOMN { get; set; }
		[XmlIgnore] public double  InitialSurfaceOMN { get; set; }
		[XmlIgnore] public double  InitialMineralN { get; set; }
		
		[XmlIgnore] public double SWC { get; set; }
		[XmlIgnore] public double DUL { get; set; }
		[XmlIgnore] public double OutFlowLat { get; set; }

		[XmlIgnore] public double FomN { get; set; }
		[XmlIgnore] public double BiomN { get; set; }
		[XmlIgnore] public double HumN { get; set; }
		[XmlIgnore] public double OrganicN { get; set; }
		[XmlIgnore] public double NO3N { get; set; }
		[XmlIgnore] public double NH4N { get; set; }
		[XmlIgnore] public double UreaN { get; set; }
		[XmlIgnore] public double MineralN { get; set; }
		[XmlIgnore] public double DltNMinRes { get; set; }
		[XmlIgnore] public double DltNMinTot { get; set; }
		
		[EventSubscribe("Commencing")]
		private void OnSimulationCommencing(object sender, EventArgs e)
		{
			InitialDay = true;
		}
		
		[EventSubscribe("DoManagement")]
		private void OnDoManagement(object sender, EventArgs e)
		{
			//!!!!!! Nitrogen balance components !!!!!!
			//!!!!!!^^^^^^^^^^^^^^^^^^^^^^^^^^^^^!!!!!!
			FomN = MathUtilities.Sum(Soil.SoilNitrogen.FOMN);
			HumN = MathUtilities.Sum(Soil.SoilNitrogen.HumicN);
			BiomN = MathUtilities.Sum(Soil.SoilNitrogen.MicrobialN);
			OrganicN = FomN + HumN + BiomN;
			NO3N = MathUtilities.Sum(Soil.NO3N);
			NH4N = MathUtilities.Sum(Soil.NH4N);
			UreaN = MathUtilities.Sum(Soil.SoilNitrogen.urea);
			MineralN = NO3N + NH4N + UreaN; 
			DltNMinRes = MathUtilities.Sum(Soil.SoilNitrogen.dlt_n_min_res);
			DltNMinTot = MathUtilities.Sum(Soil.SoilNitrogen.MineralisedN);
			int layers = Soil.Thickness.Length;
			if (InitialDay == true)
			{
				InitialSurfaceOMN = SOM.N;
				InitialSoilOMN = OrganicN;
				InitialMineralN = MineralN;
				InitialDay = false;
			}
			DeltaSurfaceOMN = SOM.N - InitialSurfaceOMN;
			AccumLeach = AccumLeach - Soil.SoilWater.LeachNH4 - Soil.SoilWater.LeachNO3 - Soil.SoilWater.LeachUrea; //Fails
			AccumMineralisation += MathUtilities.Sum(Soil.SoilNitrogen.MineralisedN);
			AccumDenit -= MathUtilities.Sum(Soil.SoilNitrogen.Denitrification);
			AccumPlantN -= (double)zone.Get("Chicory.Root.NUptake");
			DeltaSoilOMN = OrganicN - InitialSoilOMN;
			DeltaSoilMineralN = MineralN - InitialMineralN;
			SoilNitrogenContent = MineralN;
			
			//!!!!!! Water balance components !!!!!!
			//!!!!!!^^^^^^^^^^^^^^^^^^^^^^^^^^!!!!!!

			AccumRainfall += Met.Rain;
			//AccumEP -= (double)zone.Get("[Chicory].Leaf.Transpiration");
			AccumEP -= (double)zone.Get("Chicory.Root.WaterUptake");
			SoilWaterDeficit = (SWC - DUL);
			double OutFlowLat = MathUtilities.Sum(Soil.SoilWater.outflow_lat);
			AccumOutflowLat -= OutFlowLat;
		}
		
		[EventSubscribe("DoManagementCalculations")]
		private void OnDoManagementCalculations(object sender, EventArgs e)
		{
			FomN = MathUtilities.Sum(Soil.SoilNitrogen.FOMN);
			HumN = MathUtilities.Sum(Soil.SoilNitrogen.HumicN);
			BiomN = MathUtilities.Sum(Soil.SoilNitrogen.MicrobialN);
			AccumFert += Fert.NitrogenApplied;
			AccumIrrigation += Irrig.IrrigationApplied;
			
			
			AccumEO -= Soil.SoilWater.Eo;
			AccumES -= Soil.SoilWater.Es; 
			AccumDrainage -= Soil.SoilWater.Drainage;
			AccumRunoff -= Soil.SoilWater.Runoff;
			SWC = MathUtilities.Sum(Soil.SoilWater.SWmm);
			DUL = MathUtilities.Sum(Soil.SoilWater.DULmm);
		}
	}
}
```
          Report: EventNames=[Clock].DoReport
          Operations DefoliationSchedule
            2009-01-22  [Defoliate].Script.addDefoliation(7,3274)
            2009-02-23  [Defoliate].Script.addDefoliation(7,3684)
            2009-03-29  [Defoliate].Script.addDefoliation(7,1908)
            2009-05-08  [Defoliate].Script.addDefoliation(7,2075)
            2009-09-16  [Defoliate].Script.addDefoliation(7,2994)
            2009-10-25  [Defoliate].Script.addDefoliation(7,2869)
            2009-11-28  [Defoliate].Script.addDefoliation(7,1043)
            2009-12-26  [Defoliate].Script.addDefoliation(7,771)
            2010-01-19  [Defoliate].Script.addDefoliation(7,1421)
            2010-02-14  [Defoliate].Script.addDefoliation(7,1138)
          Manager Defoliate
            cutPasture_StartDate = 2016-06-10
            cutPasture_EndDate = 2016-06-10
            interval2Cut = 21
            duration = 3
            defoliationType = Graze
            herbageAmount = 112
            herbageDigest = 0.2
            leafResidueFrac = 0.05
            stemResidueFrac = 0.2
            fracN2Remove = 0.15
            urineDepth = 300
            fracN2Dung = 0.4
            fracPopDecline = 0.05
```csharp
// Defoliates on a regular cycle or one-off via a schedule
// currenty defoliates by the amount specified spread evenly over the specified period

using System;
using Models.Core;
using System.Collections.Generic;
using System.Text;
using Models.Soils;
using Models.PMF;
using Models;
using System.Xml.Serialization;
using APSIM.Shared.Utilities;

namespace Models
{


	public class Defoliation
	{
		public DateTime startDate { set; get; }
		public DateTime endDate { set; get; }
		public double herbageAmount { set; get; }
	}
	

	[Serializable] 
	public class Script : Model
	{
		[Link] Plant Chicory;
		[Link] Fertiliser fert;
		[Link] Zone zone;
		[Link] ISummary summary = null;
		[Link] Clock Clock;
		
		List<Defoliation> defoliations = new List<Defoliation>();

		public event BiomassRemovedDelegate BiomassRemoved;

		//defoliations = new List<Defoliation>();
		
		//Outputs
		[XmlIgnore] private RemovalFractions removalFractions { get; set; }
		[XmlIgnore] public double leafWt { get; set; }
		[XmlIgnore] public double stemWt { get; set; }
		
		
		[XmlIgnore] public double leafToDefoliate { get; set; }
		[XmlIgnore] public double stemToDefoliate { get; set; }

		
		//Whether today is a harvesting day
		[XmlIgnore] public string Can_Cut{ get; set; }
		//Whether today's harvest was done
		[XmlIgnore] public string Has_Cut{ get; set; }
		//Pasture DM harvested today (kg/ha)
		[XmlIgnore] public double harvested_dm{ get; set; }
		//N harvested today
		[XmlIgnore] public double harvested_n{ get; set; }
		//DM removed from the paddock
		[XmlIgnore] public double removed_dm{ get; set; }
		//N removed from the paddock
		[XmlIgnore] public double removed_n{ get; set; }
		//DM returned to the paddock
		[XmlIgnore] public double returned_dm{ get; set; }
		//N returned to the paddock
		[XmlIgnore] public double returned_n{ get; set; }
		//N returned as dung (SurfaceOM)
		[XmlIgnore] public double NReturnedInDung{ get; set; }
		//N returned as urine (urea)
		[XmlIgnore] public double NReturnedInUrine{ get; set; }
		//Average growth rate for this cut
		[XmlIgnore] public double GrowthRateCalc{ get; set; }
		//Number of days after last harvest
		[XmlIgnore] public int DaysAfterCut{ get; set; }
		//Total standing DM (Leaf + Stem/Sheath) before cut
		[XmlIgnore] public double PreHarvestDM{ get; set; }
		//Total standing DM (Leaf + Stem/Sheath) after cut
		[XmlIgnore] public double PostHarvestDM{ get; set; }
		
		
		//Internal variables
		//The fraction of DM to be removed from the simulation (0-1)
		private double FracDM2Remove;
		//Whether cutting are allowed
		private bool CutIsAllowed;
		//The fraction of urine to be applied in each layer
		private double[] FracLayer;
		
		
	

		public enum defoliationTypes
		{
			/// <summary>Cut</summary>
			Cut,
			/// <summary>Graze</summary>
			Graze
		}

		[Description("Enter the date to start the rotation (dd/mm/yyyy):")]
		public DateTime cutPasture_StartDate { get; set; }

		[Description("Enter the date to end the rotation (dd/mm/yyyy):")]
		public DateTime cutPasture_EndDate { get; set; }

		[Description("Enter the interval between harvests (days):")]
		public int interval2Cut { get; set; }

		[Description("Enter the number of days to defoliate over (days):")]
		public int duration { get; set; }

		[Description("Select type of defoliation:")]
		public defoliationTypes defoliationType { get; set; }

		[Description("Enter amount to defoliate (kgDM/ha):")]
		public double herbageAmount { get; set; }

		[Description("Enter fraction digestibility(0-1):")]
		public double herbageDigest { get; set; }

		[Description("Enter fraction of leaf returned as residue(0-1):")]
		public double leafResidueFrac { get; set; }

		[Description("Enter fraction of stem returned as residue(0-1):")]
		public double stemResidueFrac { get; set; }

		[Description("Enter fraction of N that is removed from the field (0-1):")]
		public double fracN2Remove { get; set; }

		[Description("Enter the depth down to which urine will applied (mm):")]
		public double urineDepth { get; set; }

		[Description("Enter the proportion of N returned in dung (0-1):")]
		public double fracN2Dung { get; set; }

		[Description("Enter the fraction of population decline due to defoliation (0-1):")]
		public double fracPopDecline { get; set; }

		private void defoliate(int listNumber)
		{
			double numDays = (defoliations[listNumber].endDate - defoliations[listNumber].startDate).TotalDays;			
			double herbageToRemove = (defoliations[listNumber].herbageAmount / 10) / numDays; // total herbage to remove in g/m2 per day
			
			summary.WriteMessage(this, "Defoliating (" + listNumber + "). " + defoliations[listNumber].herbageAmount + "kg/ha (" + defoliations[listNumber].herbageAmount / 10 + " g/m^2) over " + numDays + " days (" + herbageToRemove + " per day)");
			
			leafWt = (double)zone.Get("Chicory.Leaf.Wt");
			stemWt = (double)zone.Get("Chicory.Stem.Wt");			
			
			if (leafWt + stemWt > 0)
			{
			
				
				if (herbageToRemove > (leafWt + stemWt) * 0.9) // limit to 90% of existing herbage
				{
					herbageToRemove = (leafWt + stemWt) * 0.9;
				}			
							
				leafToDefoliate = herbageToRemove * leafWt / (leafWt + stemWt);			
				stemToDefoliate = herbageToRemove * stemWt / (leafWt + stemWt);

				summary.WriteMessage(this, "Current herbage (g/m2): leaf=" + leafWt + ",stem=" + stemWt);
				summary.WriteMessage(this, "Herbage to remove today (g/m2): " + herbageToRemove + " (leaf=" + leafToDefoliate + ",stem=" + stemToDefoliate + ")");

				double leafFracToRemove = leafToDefoliate / (leafWt + stemWt);
				double stemFracToRemove = stemToDefoliate / (leafWt + stemWt);				

				// calculate residue				
				double leafFracToResidue = leafResidueFrac * leafFracToRemove;
				double stemFracToResidue = stemResidueFrac * stemFracToRemove;
				
				// subtract residue from amount to remove
				leafFracToRemove = leafFracToRemove - leafFracToResidue;
				stemFracToRemove = stemFracToRemove - stemFracToResidue;
				
				removalFractions.SetFractionRemoved("Leaf", leafFracToRemove);
				removalFractions.SetFractionToResidue("Leaf", leafFracToResidue);
				removalFractions.SetFractionRemoved("Stem", stemFracToRemove);
				removalFractions.SetFractionToResidue("Stem", stemFracToResidue);  
				
				removalFractions.SetFractionRemoved("Root", 0.0);
				removalFractions.SetFractionToResidue("Root", 0.0);
				
			
				if (defoliationType == defoliationTypes.Cut)
				{			
					Chicory.RemoveBiomass("Cut", removalFractions);  
				}
				else
				{
					Chicory.RemoveBiomass("Graze", removalFractions); 
				}
				
				// The amount of N to return to the field is the amount of N in the removed biomass * fracN2Remove
				// This amount to return is divided up into urine and dung by fracN2Dung								
				double NReturned = (((double)zone.Get("Chicory.Leaf.N") * leafFracToRemove) + ((double)zone.Get("Chicory.Stem.N")) * stemFracToRemove) * (1 - fracN2Remove);
				double NReturnedDung = NReturned * fracN2Dung;
				double NReturnedUrine = NReturned - NReturnedDung;
				
				
				summary.WriteMessage(this, "N in defoliated stem and leaf=" + NReturned + ". Returned as urine=" + (NReturnedUrine * 10) + " (kg/ha).");
				
				fert.Apply(NReturnedUrine * 10, Fertiliser.Types.UreaN, urineDepth);				
				
				double amountDMReturned = (leafWt * leafFracToRemove) + (stemWt * stemFracToRemove) * herbageDigest;

				summary.WriteMessage(this, "N returned from dung=" + NReturnedDung + ", DM Returned as dung=" + amountDMReturned + " (g/m2).");

				PMF.BiomassRemovedType BR = new PMF.BiomassRemovedType();
				String[] type = new String[] { "RuminantDung_PastureFed" }; 
				Single[] dltdm = new Single[] { (Single)amountDMReturned };
				Single[] dltn = new Single[] { (Single)NReturnedDung };
				Single[] dltp = new Single[] { 0 };         // P not considered here
				Single[] fraction = new Single[] { 1 };     // fraction is always 1.0 here

				BR.crop_type = "RuminantDung_PastureFed";
				BR.dm_type = type;
				BR.dlt_crop_dm = dltdm;
				BR.dlt_dm_n = dltn;
				BR.dlt_dm_p = dltp;
				BR.fraction_to_residue = fraction;
				BiomassRemoved.Invoke(BR);

				// Population decline spread over the defoliation period
				double popDeclineToday = fracPopDecline / numDays;
				Chicory.Population = Chicory.Population * (1.0 - popDeclineToday);						
			
			}
		}

		public void addDefoliation(int numDays, double amount)
		{			
			
			Defoliation defoliation = new Defoliation();
			defoliation.startDate = Clock.Today;
			defoliation.endDate = Clock.Today.AddDays(numDays);
			defoliation.herbageAmount = amount;
			
			defoliations.Add(defoliation);
			
			summary.WriteMessage(this, "Added defoliation for " + numDays + " days");			
		}

					  
		[EventSubscribe("Commencing")]
		private void OnSimulationCommencing(object sender, EventArgs e)
		{
			removalFractions = new RemovalFractions();
		}
		
		[EventSubscribe("DoManagement")]
		private void OnDoManagement(object sender, EventArgs e)
		{			
			// Add any regular defoliations to the defoliation list if they begin today
			if ((Clock.Today >= cutPasture_StartDate) && (Clock.Today <= cutPasture_EndDate))
			{
				double daysSinceStart = (Clock.Today - cutPasture_StartDate).TotalDays;
				if (daysSinceStart % interval2Cut == 0)
				{
					summary.WriteMessage(this, "Added regular defoliation starting at " + Clock.Today.ToString());
					addDefoliation(duration, herbageAmount);
				}
			}
			
			// Check the list of defoliations to see if any need running
			for (var i = defoliations.Count - 1; i >= 0; i--)
			{
				if ((defoliations[i].startDate <= Clock.Today) && (defoliations[i].endDate > Clock.Today))
				{									
					defoliate(i);
				}
			}
		}
								
		
		[EventSubscribe("DoManagementCalculations")]
		private void OnDoManagementCalculations(object sender, EventArgs e)
		{
			
		}
	}
}
```
        Memo Caption
          # SCUM: the Simple Crop Uptake Model

          _Hamish Brown and Rob Zyskowski, Plant and Food Research, New Zealand_

          This model has been built to simulate a range of different crops in simulations where water and nitrogen balance are of interest but a fully mechanistic plant model is not needed. It is a daily time step implementation of the crop model that is used on the Overseer nutrient balance model (Cichota_etal_2010).  It uses simple sigmoidal functions for estimating daily cover and biomass deltas to give realistic water and nitrogen demands. It does not simulate potential yield, this is specified as an input. Yield will be reduced below the specified potential yield if N or water supplies from the soil are insufficient to meet demand. The model has been paramaterised for simulating water and nitrogen balances of cropping rotations in New Zealand (where over 50 different crop types are grown and it is not feasible to produce full crop models for each of these). It may be adapted for other purposes and other crop types may be added but the user will need to keep in mind that it is empirical and the parameters might need changing for crops from different locations.
      Simulation ScottFarmEstablishment: Area=0; Slope=0
        Memo
          Observed data from
        Weather: FileName=Ruakura.met
        Clock: StartDate=2009-11-01; EndDate=2010-06-30
        Summary
        SoilArbitrator Soil Arbitrator
        Zone Field: Area=1; Slope=0
          Soil SoilHorotiu: same as Validation.ScottFarm.C17a.Field.SoilHorotiu
          SurfaceOrganicMatter surface organic matter: same as Validation.ScottFarm.C17a.Field.surface organic matter
          Operations Sowing
            2009-11-14  [Chicory].Sow(population:200, cultivar:"Choice", depth:10, rowSpacing:150);
          MicroClimate: same as Validation.ScottFarm.C17a.Field.MicroClimate
          Plant Chicory: ResourceName=SCUM; CropType=SCUM
          Irrigation
          Manager AutomaticIrrigation
            Irrigation_Yes_No = yes
            Season_Start = 1-Oct
            Season_End = 30-Jul
            Season_Allocation = 10000
            Refull_Frac = 0.9
            Trigger_Frac = 0.26
            Return_days = 3
            Maximum_Irrigation_Amount = 30
            Top_Depth = 120
            script: same as in Validation.ScottFarm.C17a.Field.AutomaticIrrigation
          Fertiliser
          Manager ExtraVariables: same as Validation.ScottFarm.C17a.Field.ExtraVariables
          Report: EventNames=[Clock].DoReport
          Operations DefoliationSchedule
          Manager Defoliate: same as Validation.ScottFarm.C17a.Field.Defoliate
        Memo Caption: same as Validation.ScottFarm.C17a.Caption
      Simulation D9a: Area=0; Slope=0
        Memo
          Observed data from
        Weather: FileName=Ruakura.met
        Clock: StartDate=2010-10-01; EndDate=2011-04-30
        Summary
        SoilArbitrator Soil Arbitrator
        Zone Field: Area=1; Slope=0
          Soil SoilHorotiu: same as Validation.ScottFarm.C17a.Field.SoilHorotiu
          SurfaceOrganicMatter surface organic matter: same as Validation.ScottFarm.C17a.Field.surface organic matter
          Operations Sowing
            2010-10-30  [Chicory].Sow(population:200, cultivar:"Choice", depth:10, rowSpacing:150);
          MicroClimate: same as Validation.ScottFarm.C17a.Field.MicroClimate
          Plant Chicory: ResourceName=SCUM; CropType=SCUM
          Irrigation
          Manager AutomaticIrrigation: same as Validation.ScottFarm.ScottFarmEstablishment.Field.AutomaticIrrigation
          Fertiliser
          Manager ExtraVariables: same as Validation.ScottFarm.C17a.Field.ExtraVariables
          Report: EventNames=[Clock].DoReport
          Operations DefoliationSchedule
          Manager Defoliate: same as Validation.ScottFarm.C17a.Field.Defoliate
        Memo Caption: same as Validation.ScottFarm.C17a.Caption
      Experiment FD902
        Memo
          Observed data from Scott farm, Ruakura. Justine Lee unpublished.
        Folder Unused Bits
          Manager AutomaticIrrigation
            Irrigation_Yes_No = yes
            irrigation_StartDate = 1900-01-01
            irrigation_EndDate = 2011-10-13
            Season_Start = 1-Oct
            Season_End = 30-Jul
            Season_Allocation = 10000
            Refull_Frac = 0.9
            Trigger_Frac = 0.26
            Return_days = 3
            Maximum_Irrigation_Amount = 30
            Top_Depth = 120
```csharp
using System;
using Models.Core;
using Models.PMF;
using Models.Soils;
using System.Xml.Serialization;
using Models.PMF;
using APSIM.Shared.Utilities;

        
namespace Models
{
	[Serializable] 
	[System.Xml.Serialization.XmlInclude(typeof(Model))]
	public class Script : Model
	{
		//Communication to other modules
		[Link] ISummary summary = null;
		[Link] Irrigation Irrigation;
		[Link] Clock Clock;
		[Link] Soil Soil;
		[Link] Plant SCUM;
	   
		//User inputs from properties tab
		[Description("Irrigation on (yes or no)")]
		public string Irrigation_Yes_No { get; set; }

		[Description("Enter the date to start irrigation (dd/mm/yyyy):")]
		public DateTime irrigation_StartDate { get; set; }

		[Description("Enter the date to end irrigation (dd/mm/yyyy):")]
		public DateTime irrigation_EndDate { get; set; }

		[Description("SeasonStart (dd-MMM)")]
		public string Season_Start { get; set; }
		[Description("SeasonEnd (dd-MMM)")]
		public string Season_End { get; set; }
		[Description("Season Allocation (mm)")]
		public double Season_Allocation { get; set; }
		[Description("% PAWC to refill soil to (0-1)")]
		public double Refull_Frac { get; set; }
		[Description("% PAWC to trigger irrigation (0-1)")]
		public double Trigger_Frac { get; set; }
		[Description("Minimum days for irrigation to return")]
		public double Return_days { get; set; }
		[Description("Maximum irrigation application (mm)")]
		public double Maximum_Irrigation_Amount { get; set; }
		[Description("Depth to calculate PAWC (mm)")]
		public double Top_Depth { get; set; }
	   
		//Class members
		[XmlIgnore] private bool IrrigationIsAvailable { get; set; }
		[XmlIgnore] public bool SeasonIsOpen { get; set; }
		[XmlIgnore] private bool CropIsActive { get; set; }
		[XmlIgnore] private bool IrrigatorIsAvailable { get; set; }
		[XmlIgnore] private bool SoilIsDry { get; set; }
		[XmlIgnore] public double Top_DUL { get; set; }
		[XmlIgnore] public double Top_Refull { get; set; }
		[XmlIgnore] public double Top_Trigger { get; set; }
		[XmlIgnore] public double Top_LL { get; set; }
		[XmlIgnore] public double Top_SW { get; set; }
		[XmlIgnore] public double Accumulated_depth { get; set; }
		[XmlIgnore] public double Days_since_irrigation { get; set; }
		[XmlIgnore] public double Amount_to_apply { get; set; }
		[XmlIgnore] public double Season_Application { get; set; }
		
		//Variables for date logic testing
		[XmlIgnore] public string StartString { get; set; }
		[XmlIgnore] public string EndString { get; set; }
		[XmlIgnore] public DateTime StartDate { get; set; }
		[XmlIgnore] public DateTime EndDate { get; set; }
		[XmlIgnore] public int TodayYear { get; set; }
		[XmlIgnore] public int TodayMonth { get; set; }
		[XmlIgnore] public int StartMonth { get; set; }
		[XmlIgnore] public int EndMonth { get; set; }
		[XmlIgnore] public int TodayDay { get; set; }
		[XmlIgnore] public int StartDay { get; set; }
		[XmlIgnore] public int EndDay { get; set; }
	   
	
		//Calculate static soil variables
		[EventSubscribe("StartOfSimulation")]
		private void OnStartOfSimulation(object sender, EventArgs e)
		{   
			//Calculated soil water variables
			Accumulated_depth = 0;
			for (int layer = 0; Accumulated_depth < Top_Depth; layer++)
			{
				Top_LL += Soil.SoilWater.LL15mm[layer];
				Top_DUL += Soil.SoilWater.DULmm[layer];
				Accumulated_depth += Soil.SoilWater.Thickness[layer];
			}
			Top_Refull = Top_LL + (Top_DUL - Top_LL) * Refull_Frac;
		}
	   
	  
		//Determine daily requirement for irrigation
		[EventSubscribe("StartOfDay")]
		private void OnStartOfDay(object sender, EventArgs e)
		{ 
			//Can we irrigate?
			IrrigationIsAvailable = false; 
			if (Irrigation_Yes_No == "yes")
				IrrigationIsAvailable = true; 
	
			//Are we Allowed to Irrigate?
			TodayYear = Clock.Today.Year;
			StartString = Season_Start + "-" + TodayYear.ToString();
			EndString = Season_End + "-" + TodayYear.ToString();
			StartDate = DateTime.Parse(StartString);
			EndDate = DateTime.Parse(EndString);
			TodayMonth = Clock.Today.Month;
			TodayDay = Clock.Today.Day;
			StartDay = StartDate.Day;
			StartMonth = StartDate.Month;
			EndDay = EndDate.Day;
			EndMonth = EndDate.Month;
		  
			SeasonIsOpen = false;
			//if we are in the spring and after the start date then yes
			if ((Clock.Today.Month > 6) && (Clock.Today >= StartDate))
				SeasonIsOpen = true;
			//if we are in the autumn and before the end date then yes
			if ((Clock.Today.Month <= 6) && (Clock.Today <= EndDate))
				SeasonIsOpen = true;
		  
			//Is there a crop in the ground that needs irrigation?
			CropIsActive = false;
			if ((SCUM.Phenology.Stage >= 3.0) && (SCUM.Phenology.Stage < 6.0))
				CropIsActive = true;
	      
			//Is the irrigator available?
			IrrigatorIsAvailable = false;
			Days_since_irrigation += 1;
			if (Days_since_irrigation >= Return_days)
				IrrigatorIsAvailable = true;
	      
			//Is the soil dry enough to require irrigation?
			SoilIsDry = false;
			double CurrentRootDepth = 0;
			double RootDepth = SCUM.Root.Depth;
			CurrentRootDepth = Math.Max(RootDepth, CurrentRootDepth);
	      
			double RelativeRootDepth = Math.Min(1.0, CurrentRootDepth / Top_Depth);
			Top_Trigger = Math.Min(Top_Refull, Top_DUL - (Top_DUL - Top_LL) * RelativeRootDepth * (1 - Trigger_Frac)); 
	      
			Accumulated_depth = 0;
			Top_SW = 0;
			for (int layer = 0; Accumulated_depth < Top_Depth; layer++)
			{
				Top_SW += Soil.SoilWater.SWmm[layer];
				Accumulated_depth += Soil.SoilWater.Thickness[layer];
			}
			if (Top_SW <= Top_Trigger)
				SoilIsDry = true;
	            
			if ((Clock.Today >= irrigation_StartDate) && (Clock.Today <= irrigation_EndDate))
			{
				//Lets bloody well irrigate then!!!!
				if ((IrrigationIsAvailable) && (SeasonIsOpen) && (CropIsActive) && (IrrigatorIsAvailable) && (SoilIsDry)) //The conditions are rife for irrigation
				{
					Amount_to_apply = Math.Min(Top_Refull - Top_SW, Maximum_Irrigation_Amount);
					Amount_to_apply = Math.Min(Amount_to_apply, Season_Allocation - Season_Application); 
					Amount_to_apply = Math.Max(Amount_to_apply, 0.0);
					Irrigation.Apply(Amount_to_apply);
					Days_since_irrigation = 0;
					Season_Application += Amount_to_apply;
					summary.WriteMessage(this, "Automatic Irrigation");
	            
				}
			}
		}
	}
}
```
        Factors
          Factor Defoliation: Specifications=[DefoliationSchedule]
            Operations 15To4
              2010-12-20  [Defoliate].Script.addDefoliation(1,2650)
              2011-01-13  [Defoliate].Script.addDefoliation(1,2584)
              2011-01-20  [Defoliate].Script.addDefoliation(1,225)
              2011-01-27  [Defoliate].Script.addDefoliation(1,102)
              2011-02-10  [Defoliate].Script.addDefoliation(1,905)
              2011-02-16  [Defoliate].Script.addDefoliation(1,229)
              2011-03-03  [Defoliate].Script.addDefoliation(1,543)
              2011-03-17  [Defoliate].Script.addDefoliation(1,305)
              2011-03-24  [Defoliate].Script.addDefoliation(1,136)
              2011-04-07  [Defoliate].Script.addDefoliation(1,51)
              2011-04-21  [Defoliate].Script.addDefoliation(1,137)
              2011-05-05  [Defoliate].Script.addDefoliation(1,129)
              2011-05-18  [Defoliate].Script.addDefoliation(1,109)
              2011-10-06  [Defoliate].Script.addDefoliation(1,1260)
              2011-10-20  [Defoliate].Script.addDefoliation(1,545)
              2011-11-03  [Defoliate].Script.addDefoliation(1,646)
              2011-11-17  [Defoliate].Script.addDefoliation(1,1021)
              2011-12-08  [Defoliate].Script.addDefoliation(1,1143)
              2011-12-22  [Defoliate].Script.addDefoliation(1,423)
              2012-01-12  [Defoliate].Script.addDefoliation(1,2060)
              2012-01-26  [Defoliate].Script.addDefoliation(1,280)
              2012-02-16  [Defoliate].Script.addDefoliation(1,1119)
              2012-03-09  [Defoliate].Script.addDefoliation(1,983)
              2012-03-29  [Defoliate].Script.addDefoliation(1,680)
              2012-04-19  [Defoliate].Script.addDefoliation(1,669)
              2012-05-17  [Defoliate].Script.addDefoliation(1,256)
            Operations 15To7
              2010-12-20  [Defoliate].Script.addDefoliation(1,2298)
              2011-01-13  [Defoliate].Script.addDefoliation(1,2226)
              2011-01-20  [Defoliate].Script.addDefoliation(1,209)
              2011-01-27  [Defoliate].Script.addDefoliation(1,298)
              2011-02-03  [Defoliate].Script.addDefoliation(1,254)
              2011-02-10  [Defoliate].Script.addDefoliation(1,339)
              2011-02-16  [Defoliate].Script.addDefoliation(1,312)
              2011-03-03  [Defoliate].Script.addDefoliation(1,705)
              2011-03-17  [Defoliate].Script.addDefoliation(1,327)
              2011-03-24  [Defoliate].Script.addDefoliation(1,176)
              2011-04-07  [Defoliate].Script.addDefoliation(1,155)
              2011-04-21  [Defoliate].Script.addDefoliation(1,224)
              2011-05-05  [Defoliate].Script.addDefoliation(1,213)
              2011-05-18  [Defoliate].Script.addDefoliation(1,173)
              2011-10-06  [Defoliate].Script.addDefoliation(1,672)
              2011-10-20  [Defoliate].Script.addDefoliation(1,712)
              2011-11-03  [Defoliate].Script.addDefoliation(1,743)
              2011-11-17  [Defoliate].Script.addDefoliation(1,1001)
              2011-12-08  [Defoliate].Script.addDefoliation(1,977)
              2011-12-22  [Defoliate].Script.addDefoliation(1,351)
              2012-01-12  [Defoliate].Script.addDefoliation(1,1906)
              2012-01-26  [Defoliate].Script.addDefoliation(1,244)
              2012-02-16  [Defoliate].Script.addDefoliation(1,973)
              2012-03-09  [Defoliate].Script.addDefoliation(1,872)
              2012-03-29  [Defoliate].Script.addDefoliation(1,511)
              2012-04-19  [Defoliate].Script.addDefoliation(1,693)
              2012-05-17  [Defoliate].Script.addDefoliation(1,89)
            Operations 25To4
              2010-12-20  [Defoliate].Script.addDefoliation(1,2414)
              2011-01-13  [Defoliate].Script.addDefoliation(1,2677)
              2011-01-27  [Defoliate].Script.addDefoliation(1,611)
              2011-02-10  [Defoliate].Script.addDefoliation(1,949)
              2011-02-24  [Defoliate].Script.addDefoliation(1,597)
              2011-03-10  [Defoliate].Script.addDefoliation(1,479)
              2011-03-24  [Defoliate].Script.addDefoliation(1,437)
              2011-04-14  [Defoliate].Script.addDefoliation(1,620)
              2011-05-18  [Defoliate].Script.addDefoliation(1,866)
              2011-10-13  [Defoliate].Script.addDefoliation(1,1492)
              2011-10-27  [Defoliate].Script.addDefoliation(1,696)
              2011-11-10  [Defoliate].Script.addDefoliation(1,610)
              2011-12-08  [Defoliate].Script.addDefoliation(1,1403)
              2012-01-05  [Defoliate].Script.addDefoliation(1,2177)
              2012-01-26  [Defoliate].Script.addDefoliation(1,588)
              2012-02-16  [Defoliate].Script.addDefoliation(1,958)
              2012-03-09  [Defoliate].Script.addDefoliation(1,831)
              2012-03-29  [Defoliate].Script.addDefoliation(1,551)
              2012-05-03  [Defoliate].Script.addDefoliation(1,898)
              2012-05-24  [Defoliate].Script.addDefoliation(1,29)
            Operations 25To7
              2010-12-20  [Defoliate].Script.addDefoliation(1,2400)
              2011-01-13  [Defoliate].Script.addDefoliation(1,2428)
              2011-01-27  [Defoliate].Script.addDefoliation(1,684)
              2011-02-10  [Defoliate].Script.addDefoliation(1,747)
              2011-02-24  [Defoliate].Script.addDefoliation(1,630)
              2011-03-10  [Defoliate].Script.addDefoliation(1,499)
              2011-03-24  [Defoliate].Script.addDefoliation(1,476)
              2011-04-14  [Defoliate].Script.addDefoliation(1,586)
              2011-05-18  [Defoliate].Script.addDefoliation(1,936)
              2011-10-13  [Defoliate].Script.addDefoliation(1,1529)
              2011-10-27  [Defoliate].Script.addDefoliation(1,740)
              2011-11-10  [Defoliate].Script.addDefoliation(1,714)
              2011-12-08  [Defoliate].Script.addDefoliation(1,2092)
              2012-01-05  [Defoliate].Script.addDefoliation(1,2327)
              2012-01-26  [Defoliate].Script.addDefoliation(1,724)
              2012-02-16  [Defoliate].Script.addDefoliation(1,970)
              2012-03-09  [Defoliate].Script.addDefoliation(1,871)
              2012-03-29  [Defoliate].Script.addDefoliation(1,539)
              2012-05-03  [Defoliate].Script.addDefoliation(1,987)
              2012-05-24  [Defoliate].Script.addDefoliation(1,33)
            Operations 35To4
              2010-12-20  [Defoliate].Script.addDefoliation(1,2680)
              2011-01-13  [Defoliate].Script.addDefoliation(1,2727)
              2011-02-03  [Defoliate].Script.addDefoliation(1,1180)
              2011-02-24  [Defoliate].Script.addDefoliation(1,1373)
              2011-03-17  [Defoliate].Script.addDefoliation(1,930)
              2011-04-14  [Defoliate].Script.addDefoliation(1,1126)
              2011-05-18  [Defoliate].Script.addDefoliation(1,1166)
              2011-10-20  [Defoliate].Script.addDefoliation(1,2400)
              2011-11-10  [Defoliate].Script.addDefoliation(1,1285)
              2011-12-15  [Defoliate].Script.addDefoliation(1,2007)
              2012-01-19  [Defoliate].Script.addDefoliation(1,2664)
              2012-02-24  [Defoliate].Script.addDefoliation(1,1669)
              2012-04-05  [Defoliate].Script.addDefoliation(1,1052)
              2012-05-24  [Defoliate].Script.addDefoliation(1,479)
            Operations 35To7
              2010-12-20  [Defoliate].Script.addDefoliation(1,2599)
              2011-01-13  [Defoliate].Script.addDefoliation(1,2518)
              2011-02-03  [Defoliate].Script.addDefoliation(1,1305)
              2011-02-24  [Defoliate].Script.addDefoliation(1,1419)
              2011-03-17  [Defoliate].Script.addDefoliation(1,935)
              2011-04-14  [Defoliate].Script.addDefoliation(1,982)
              2011-05-18  [Defoliate].Script.addDefoliation(1,1011)
              2011-10-20  [Defoliate].Script.addDefoliation(1,2182)
              2011-11-10  [Defoliate].Script.addDefoliation(1,1554)
              2011-12-15  [Defoliate].Script.addDefoliation(1,2250)
              2012-01-19  [Defoliate].Script.addDefoliation(1,2530)
              2012-02-24  [Defoliate].Script.addDefoliation(1,1467)
              2012-04-05  [Defoliate].Script.addDefoliation(1,1036)
              2012-05-24  [Defoliate].Script.addDefoliation(1,585)
            Operations 55To4
              2010-12-20  [Defoliate].Script.addDefoliation(1,2227)
              2011-01-13  [Defoliate].Script.addDefoliation(1,2892)
              2011-02-16  [Defoliate].Script.addDefoliation(1,2157)
              2011-03-31  [Defoliate].Script.addDefoliation(1,2378)
              2011-05-18  [Defoliate].Script.addDefoliation(1,1304)
              2011-10-27  [Defoliate].Script.addDefoliation(1,3069)
              2011-12-15  [Defoliate].Script.addDefoliation(1,4639)
              2012-01-19  [Defoliate].Script.addDefoliation(1,2015)
              2012-02-24  [Defoliate].Script.addDefoliation(1,1580)
              2012-04-12  [Defoliate].Script.addDefoliation(1,1095)
              2012-05-24  [Defoliate].Script.addDefoliation(1,186)
            Operations 55To7
              2010-12-20  [Defoliate].Script.addDefoliation(1,2333)
              2011-01-13  [Defoliate].Script.addDefoliation(1,2544)
              2011-02-16  [Defoliate].Script.addDefoliation(1,2022)
              2011-03-31  [Defoliate].Script.addDefoliation(1,2005)
              2011-05-18  [Defoliate].Script.addDefoliation(1,1350)
              2011-10-27  [Defoliate].Script.addDefoliation(1,3035)
              2011-12-15  [Defoliate].Script.addDefoliation(1,4359)
              2012-01-19  [Defoliate].Script.addDefoliation(1,1909)
              2012-02-24  [Defoliate].Script.addDefoliation(1,1356)
              2012-04-12  [Defoliate].Script.addDefoliation(1,1006)
              2012-05-24  [Defoliate].Script.addDefoliation(1,195)
        Simulation FD902: Area=0; Slope=0
          Memo
            Scott Farm defoliation experiment. Julia Lee, unpublished.
          Weather: FileName=Ruakura.met
          Clock: StartDate=2010-10-01; EndDate=2012-06-30
          Summary summaryfile
          SoilArbitrator Soil Arbitrator
          Zone Field: Area=1; Slope=0
            MicroClimate: a_interception=0; b_interception=1; c_interception=0; d_interception=0; soil_albedo=0.23; air_pressure=1010; soil_emissivity=0.96; sun_angle=15; soil_heat_flux_fraction=0.4; night_interception_fraction=0.5; windspeed_default=3; refheight=2; albedo=0.15; emissivity=0.96; gsmax=0.01; r50=200
            Irrigation
            Fertiliser
            SurfaceOrganicMatter: PoolName=maize; type=maize; mass=500; standing_fraction=0; cnr=65; CriticalResidueWeight=2000; OptimumDecompTemp=20; MaxCumulativeEOS=20; CNRatioDecompCoeff=0.277; CNRatioDecompThreshold=25; TotalLeachRain=25; MinRainToLeach=10; CriticalMinimumOrganicC=0.004; DefaultCPRatio=0; DefaultStandingFraction=0; StandingExtinctCoeff=0.5; FractionFaecesAdded=0.5
              Pools:
                {PoolName=maize, ResidueType=maize, Mass=500, CNRatio=65, StandingFraction=0}
              ResidueTypes ResidueTypesList: LoadFromResource=ResidueTypes
            Operations Sowing
              2010-10-13  [Chicory].Sow(population:200, cultivar:"Puna", depth:10, rowSpacing:150);
            Manager ExtraVariables
```csharp
using System;
using Models.Core;
using System.Collections.Generic;
using System.Text;
using Models.Soils;
using Models.PMF;
using Models;
using System.Xml.Serialization;
using APSIM.Shared.Utilities;

namespace Models
{
	[Serializable] 
	public class Script : Model
	{
		[Link] Clock Clock;
		[Link] Soils.Soil Soil;
		[Link] Models.SurfaceOM.SurfaceOrganicMatter SOM;
		[Link] Weather Met;
		[Link] Fertiliser Fert;
		[Link] Irrigation Irrig;
		[Link] Plant Chicory;
		[Link] Zone zone;
					
		[XmlIgnore] public bool InitialDay { get; set; }
		
		[XmlIgnore] public double AccumPlantN { get; set; }
		[XmlIgnore] public double AccumMineralisation { get; set; }
		[XmlIgnore] public double AccumDenit { get; set; }
		[XmlIgnore] public double AccumFert { get; set; }
		[XmlIgnore] public double AccumLeach { get; set; }
		[XmlIgnore] public double AccumDetach { get; set; }
		[XmlIgnore] public double DeltaSoilOMN { get; set; }
		[XmlIgnore] public double DeltaSurfaceOMN { get; set; }
		[XmlIgnore] public double DeltaSoilMineralN { get; set; }
		[XmlIgnore] public double SoilNitrogenContent { get; set; }
		
		[XmlIgnore] public double AccumEO { get; set; }
		[XmlIgnore] public double AccumEP { get; set; }
		[XmlIgnore] public double AccumES { get; set; }
		[XmlIgnore] public double AccumDrainage { get; set; }
		[XmlIgnore] public double AccumRunoff { get; set; }
		[XmlIgnore] public double AccumOutflowLat { get; set; }
		[XmlIgnore] public double AccumIrrigation { get; set; }
		[XmlIgnore] public double AccumRainfall { get; set; }
		[XmlIgnore] public double SoilWaterDeficit { get; set; }
	
		[XmlIgnore] public double  InitialSoilOMN { get; set; }
		[XmlIgnore] public double  InitialSurfaceOMN { get; set; }
		[XmlIgnore] public double  InitialMineralN { get; set; }
		
		[XmlIgnore] public double SWC { get; set; }
		[XmlIgnore] public double DUL { get; set; }
		[XmlIgnore] public double OutFlowLat { get; set; }

		[XmlIgnore] public double FomN { get; set; }
		[XmlIgnore] public double BiomN { get; set; }
		[XmlIgnore] public double HumN { get; set; }
		[XmlIgnore] public double OrganicN { get; set; }
		[XmlIgnore] public double NO3N { get; set; }
		[XmlIgnore] public double NH4N { get; set; }
		[XmlIgnore] public double UreaN { get; set; }
		[XmlIgnore] public double MineralN { get; set; }
		[XmlIgnore] public double DltNMinRes { get; set; }
		[XmlIgnore] public double DltNMinTot { get; set; }
		
		[XmlIgnore] public double LeafFraction { get; set; }
		[XmlIgnore] public double StemFraction { get; set; }
		
		[EventSubscribe("Commencing")]
		private void OnSimulationCommencing(object sender, EventArgs e)
		{
			InitialDay = true;
		}
		
		[EventSubscribe("DoManagement")]
		private void OnDoManagement(object sender, EventArgs e)
		{
			//!!!!!! Nitrogen balance components !!!!!!
			//!!!!!!^^^^^^^^^^^^^^^^^^^^^^^^^^^^^!!!!!!
			FomN = MathUtilities.Sum(Soil.SoilNitrogen.FOMN);
			HumN = MathUtilities.Sum(Soil.SoilNitrogen.HumicN);
			BiomN = MathUtilities.Sum(Soil.SoilNitrogen.MicrobialN);
			OrganicN = FomN + HumN + BiomN;
			NO3N = MathUtilities.Sum(Soil.NO3N);
			NH4N = MathUtilities.Sum(Soil.NH4N);
			UreaN = MathUtilities.Sum(Soil.SoilNitrogen.urea);
			MineralN = NO3N + NH4N + UreaN; 
			DltNMinRes = MathUtilities.Sum(Soil.SoilNitrogen.dlt_n_min_res);
			DltNMinTot = MathUtilities.Sum(Soil.SoilNitrogen.MineralisedN);
			int layers = Soil.Thickness.Length;
			if (InitialDay == true)
			{
				InitialSurfaceOMN = SOM.N;
				InitialSoilOMN = OrganicN;
				InitialMineralN = MineralN;
				InitialDay = false;
			}
			DeltaSurfaceOMN = SOM.N - InitialSurfaceOMN;
			AccumLeach = AccumLeach - Soil.SoilWater.LeachNH4 - Soil.SoilWater.LeachNO3 - Soil.SoilWater.LeachUrea; //Fails
			AccumMineralisation += MathUtilities.Sum(Soil.SoilNitrogen.MineralisedN);
			AccumDenit -= MathUtilities.Sum(Soil.SoilNitrogen.Denitrification);
			AccumPlantN -= (double)zone.Get("Chicory.Root.NUptake");
			DeltaSoilOMN = OrganicN - InitialSoilOMN;
			DeltaSoilMineralN = MineralN - InitialMineralN;
			SoilNitrogenContent = MineralN;
			
			//!!!!!! Water balance components !!!!!!
			//!!!!!!^^^^^^^^^^^^^^^^^^^^^^^^^^!!!!!!

			AccumRainfall += Met.Rain;
			//AccumEP -= (double)zone.Get("[Chicory].Stover.Transpiration");
			AccumEP -= (double)zone.Get("Chicory.Root.WaterUptake");
			SoilWaterDeficit = (SWC - DUL);
			double OutFlowLat = MathUtilities.Sum(Soil.SoilWater.outflow_lat);
			AccumOutflowLat -= OutFlowLat;
						
			if ((double)zone.Get("Chicory.AboveGround.Wt") > 0)
			{
				LeafFraction = (double)zone.Get("Chicory.Leaf.Wt") / (double)zone.Get("Chicory.AboveGround.Wt");
				StemFraction = (double)zone.Get("Chicory.Stem.Wt") / (double)zone.Get("Chicory.AboveGround.Wt");
			}
			else
			{
				LeafFraction = 0;
				StemFraction = 0;
			}

		}
		
		[EventSubscribe("DoManagementCalculations")]
		private void OnDoManagementCalculations(object sender, EventArgs e)
		{
			FomN = MathUtilities.Sum(Soil.SoilNitrogen.FOMN);
			HumN = MathUtilities.Sum(Soil.SoilNitrogen.HumicN);
			BiomN = MathUtilities.Sum(Soil.SoilNitrogen.MicrobialN);
			AccumFert += Fert.NitrogenApplied;
			AccumIrrigation += Irrig.IrrigationApplied;
			
			
			AccumEO -= Soil.SoilWater.Eo;
			AccumES -= Soil.SoilWater.Es; 
			AccumDrainage -= Soil.SoilWater.Drainage;
			AccumRunoff -= Soil.SoilWater.Runoff;
			SWC = MathUtilities.Sum(Soil.SoilWater.SWmm);
			DUL = MathUtilities.Sum(Soil.SoilWater.DULmm);
		}
	}
}
```
            Report: EventNames=[Clock].DoReport
            Plant Chicory: ResourceName=SCUM; CropType=SCUM
            Soil SoilHorotiu: SoilType=0; Site=Horotiu; State=New Zealand; NaturalVegetation=0; ApsoilNumber=0; Latitude=0; Longitude=0; LocationAccuracy=0; DataSource=published soil profile description (as an example)
              InitialWater Initial water: PercentMethod=EvenlyDistributed; FractionFull=0.5
              Water
                Thickness  BD   AirDry  LL15  DUL   SAT
                100        1.1  0.16    0.26  0.42  0.43
                90         1.1  0.16    0.26  0.42  0.43
                60         1.1  0.15    0.2   0.42  0.51
                110        1.1  0.12    0.16  0.37  0.47
                240        1.1  0.12    0.17  0.34  0.43
                110        1.1  0.12    0.16  0.32  0.39
                290        1.1  0.12    0.17  0.32  0.38
                200        1.1  0.12    0.17  0.32  0.38
                300        1.1  0.12    0.17  0.34  0.4
                SoilCrop chicorySoil: LL=[0.26, 0.26, 0.2, 0.16, 0.17, 0.16, 0.17, 0.17, 0.17]; KL=[0.06, 0.06, 0.06, 0.04, 0.02, 0.01, 0, 0, 0]; XF=[1, 1, 1, 1, 1, 1, 0, 0, 0]
              SoilWater: same as Validation.ScottFarm.C17a.Field.SoilHorotiu.SoilWater
              SoilNitrogen: fom_type=[default, manure, mucuna, lablab, shemp, stable]; fract_carb=[0.2, 0.3, 0.54, 0.57, 0.45, 0]; fract_cell=[0.7, 0.3, 0.37, 0.37, 0.47, 0.1]; fract_lign=[0.1, 0.4, 0.09, 0.06, 0.08, 0.9]; wfpsN2N2O_x=[22, 88]; wfpsN2N2O_y=[0.1, 1]
              SoilOrganicMatter: same as Validation.ScottFarm.C17a.Field.SoilHorotiu.SoilOrganicMatter
              Analysis: Thickness=[100, 200, 300, 300, 300, 300, 300]; PH=[5.9, 6, 6, 6, 6, 6, 6]; PHUnits=Water; BoronUnits=HotWater
              Sample Initial nitrogen: same as Validation.ScottFarm.C17a.Field.SoilHorotiu.Initial nitrogen
            Operations DefoliationSchedule
            Operations FertiliserSchedule
              2010-10-05  [Fertiliser].Apply(50, Fertiliser.Types.UreaN, 30)
              2011-09-15  [Fertiliser].Apply(50, Fertiliser.Types.CalciteCA, 600)
              2011-12-15  [Fertiliser].Apply(50, Fertiliser.Types.UreaN, 39)
              2012-01-19  [Fertiliser].Apply(50, Fertiliser.Types.UreaN, 39)
              2012-02-23  [Fertiliser].Apply(50, Fertiliser.Types.UreaN, 39)
              2012-03-29  [Fertiliser].Apply(50, Fertiliser.Types.UreaN, 39)
              2012-05-03  [Fertiliser].Apply(50, Fertiliser.Types.UreaN, 39)
              2012-11-15  [Fertiliser].Apply(50, Fertiliser.Types.UreaN, 28)
              2012-12-20  [Fertiliser].Apply(50, Fertiliser.Types.UreaN, 28)
              2013-01-24  [Fertiliser].Apply(50, Fertiliser.Types.UreaN, 28)
              2013-02-28  [Fertiliser].Apply(50, Fertiliser.Types.UreaN, 28)
            Manager Defoliate: same as Validation.ScottFarm.C17a.Field.Defoliate
            Operations IrrigationSchedule
              2010-11-30  [Irrigation].Apply(25.4)
              2010-12-10  [Irrigation].Apply(25.2)
              2010-12-14  [Irrigation].Apply(9.2)
              2010-12-15  [Irrigation].Apply(29.8)
              2011-01-05  [Irrigation].Apply(41.2)
              2011-02-01  [Irrigation].Apply(55)
              2011-02-04  [Irrigation].Apply(13.7)
              2011-02-11  [Irrigation].Apply(36.6)
              2011-02-23  [Irrigation].Apply(18.3)
              2011-03-04  [Irrigation].Apply(36.6)
              2011-03-13  [Irrigation].Apply(4.6)
              2011-03-17  [Irrigation].Apply(36.6)
              2011-11-30  [Irrigation].Apply(36.6)
    Experiment Iversen
      Memo
        Observed data from Brown, H. E. (2004). Understanding yield and water use of dryland forage crops in New Zealand. Lincoln, NZ, Lincoln University. PhD: 288.
      Factors
        Factor Irrigation: Specifications=[IrrigationSchedule]
          Operations Full
            1998-11-27  [Irrigation].Apply(104);
            1996-10-21  [Irrigation].Apply(40);
            1996-12-04  [Irrigation].Apply(40);
            1997-10-31  [Irrigation].Apply(30);
            1997-12-03  [Irrigation].Apply(50);
            1997-12-17  [Irrigation].Apply(40);
            1998-01-16  [Irrigation].Apply(30);
            1998-01-23  [Irrigation].Apply(26);
            1998-02-19  [Irrigation].Apply(62);
            1998-03-06  [Irrigation].Apply(23);
            1998-03-31  [Irrigation].Apply(31);
            1998-09-12  [Irrigation].Apply(90);
            1998-11-16  [Irrigation].Apply(150);
            1999-01-23  [Irrigation].Apply(127);
            1999-02-27  [Irrigation].Apply(70);
            1999-12-12  [Irrigation].Apply(30);
            2000-01-23  [Irrigation].Apply(50);
            2000-12-29  [Irrigation].Apply(75);
            2001-02-03  [Irrigation].Apply(95);
            2001-03-21  [Irrigation].Apply(65);
            2001-04-27  [Irrigation].Apply(45);
            2001-12-21  [Irrigation].Apply(65);
          Operations Nil
            1998-09-15  [Irrigation].Apply(150);
      Simulation Iversen: Area=0; Slope=0
        Memo
          Iversen data from Brown, H. E. (2004). Understanding yield and water use of dryland forage crops in New Zealand. Lincoln, NZ, Lincoln University. PhD: 288.
        Weather: FileName=Ruakura.met
        Clock: StartDate=1996-09-20; EndDate=2002-06-30
        Summary summaryfile
        SoilArbitrator Soil Arbitrator
        Zone Field: Area=1; Slope=0
          MicroClimate: same as Validation.ScottFarm.FD902.FD902.Field.MicroClimate
          Irrigation
          Fertiliser
          SurfaceOrganicMatter: same as Validation.ScottFarm.FD902.FD902.Field.SurfaceOrganicMatter
          Operations Sowing
            1996-11-01  [Chicory].Sow(population:200, cultivar:"Puna", depth:10, rowSpacing:150);
          Manager ExtraVariables
```csharp
using System;
using Models.Core;
using System.Collections.Generic;
using System.Text;
using Models.Soils;
using Models.PMF;
using Models;
using System.Xml.Serialization;
using APSIM.Shared.Utilities;

namespace Models
{
	[Serializable] 
	public class Script : Model
	{
		[Link] Clock Clock;
		[Link] Soils.Soil Soil;
		[Link] Models.SurfaceOM.SurfaceOrganicMatter SOM;
		[Link] Weather Met;
		[Link] Fertiliser Fert;
		[Link] Irrigation Irrig;
		[Link] Plant Chicory;
		[Link] Zone zone;
					
		[XmlIgnore] public bool InitialDay { get; set; }
		
		[XmlIgnore] public double AccumPlantN { get; set; }
		[XmlIgnore] public double AccumMineralisation { get; set; }
		[XmlIgnore] public double AccumDenit { get; set; }
		[XmlIgnore] public double AccumFert { get; set; }
		[XmlIgnore] public double AccumLeach { get; set; }
		[XmlIgnore] public double AccumDetach { get; set; }
		[XmlIgnore] public double DeltaSoilOMN { get; set; }
		[XmlIgnore] public double DeltaSurfaceOMN { get; set; }
		[XmlIgnore] public double DeltaSoilMineralN { get; set; }
		[XmlIgnore] public double SoilNitrogenContent { get; set; }
		
		[XmlIgnore] public double AccumEO { get; set; }
		[XmlIgnore] public double AccumEP { get; set; }
		[XmlIgnore] public double AccumES { get; set; }
		[XmlIgnore] public double AccumDrainage { get; set; }
		[XmlIgnore] public double AccumRunoff { get; set; }
		[XmlIgnore] public double AccumOutflowLat { get; set; }
		[XmlIgnore] public double AccumIrrigation { get; set; }
		[XmlIgnore] public double AccumRainfall { get; set; }
		[XmlIgnore] public double SoilWaterDeficit { get; set; }
	
		[XmlIgnore] public double  InitialSoilOMN { get; set; }
		[XmlIgnore] public double  InitialSurfaceOMN { get; set; }
		[XmlIgnore] public double  InitialMineralN { get; set; }
		
		[XmlIgnore] public double SWC { get; set; }
		[XmlIgnore] public double DUL { get; set; }
		[XmlIgnore] public double OutFlowLat { get; set; }

		[XmlIgnore] public double FomN { get; set; }
		[XmlIgnore] public double BiomN { get; set; }
		[XmlIgnore] public double HumN { get; set; }
		[XmlIgnore] public double OrganicN { get; set; }
		[XmlIgnore] public double NO3N { get; set; }
		[XmlIgnore] public double NH4N { get; set; }
		[XmlIgnore] public double UreaN { get; set; }
		[XmlIgnore] public double MineralN { get; set; }
		[XmlIgnore] public double DltNMinRes { get; set; }
		[XmlIgnore] public double DltNMinTot { get; set; }
		
		[EventSubscribe("Commencing")]
		private void OnSimulationCommencing(object sender, EventArgs e)
		{
			InitialDay = true;
		}
		
		[EventSubscribe("DoManagement")]
		private void OnDoManagement(object sender, EventArgs e)
		{
			//!!!!!! Nitrogen balance components !!!!!!
			//!!!!!!^^^^^^^^^^^^^^^^^^^^^^^^^^^^^!!!!!!
			FomN = MathUtilities.Sum(Soil.SoilNitrogen.FOMN);
			HumN = MathUtilities.Sum(Soil.SoilNitrogen.HumicN);
			BiomN = MathUtilities.Sum(Soil.SoilNitrogen.MicrobialN);
			OrganicN = FomN + HumN + BiomN;
			NO3N = MathUtilities.Sum(Soil.NO3N);
			NH4N = MathUtilities.Sum(Soil.NH4N);
			UreaN = MathUtilities.Sum(Soil.SoilNitrogen.urea);
			MineralN = NO3N + NH4N + UreaN; 
			DltNMinRes = MathUtilities.Sum(Soil.SoilNitrogen.dlt_n_min_res);
			DltNMinTot = MathUtilities.Sum(Soil.SoilNitrogen.MineralisedN);
			int layers = Soil.Thickness.Length;
			if (InitialDay == true)
			{
				InitialSurfaceOMN = SOM.N;
				InitialSoilOMN = OrganicN;
				InitialMineralN = MineralN;
				InitialDay = false;
			}
			DeltaSurfaceOMN = SOM.N - InitialSurfaceOMN;
			AccumLeach = AccumLeach - Soil.SoilWater.LeachNH4 - Soil.SoilWater.LeachNO3 - Soil.SoilWater.LeachUrea; //Fails
			AccumMineralisation += MathUtilities.Sum(Soil.SoilNitrogen.MineralisedN);
			AccumDenit -= MathUtilities.Sum(Soil.SoilNitrogen.Denitrification);
			AccumPlantN -= (double)zone.Get("Chicory.Root.NUptake");
			DeltaSoilOMN = OrganicN - InitialSoilOMN;
			DeltaSoilMineralN = MineralN - InitialMineralN;
			SoilNitrogenContent = MineralN;
			
			//!!!!!! Water balance components !!!!!!
			//!!!!!!^^^^^^^^^^^^^^^^^^^^^^^^^^!!!!!!

			AccumRainfall += Met.Rain;
			//AccumEP -= (double)zone.Get("[Chicory].Stover.Transpiration");
			AccumEP -= (double)zone.Get("Chicory.Root.WaterUptake");
			SoilWaterDeficit = (SWC - DUL);
			double OutFlowLat = MathUtilities.Sum(Soil.SoilWater.outflow_lat);
			AccumOutflowLat -= OutFlowLat;
		}
		
		[EventSubscribe("DoManagementCalculations")]
		private void OnDoManagementCalculations(object sender, EventArgs e)
		{
			FomN = MathUtilities.Sum(Soil.SoilNitrogen.FOMN);
			HumN = MathUtilities.Sum(Soil.SoilNitrogen.HumicN);
			BiomN = MathUtilities.Sum(Soil.SoilNitrogen.MicrobialN);
			AccumFert += Fert.NitrogenApplied;
			AccumIrrigation += Irrig.IrrigationApplied;
			
			
			AccumEO -= Soil.SoilWater.Eo;
			AccumES -= Soil.SoilWater.Es; 
			AccumDrainage -= Soil.SoilWater.Drainage;
			AccumRunoff -= Soil.SoilWater.Runoff;
			SWC = MathUtilities.Sum(Soil.SoilWater.SWmm);
			DUL = MathUtilities.Sum(Soil.SoilWater.DULmm);
		}
	}
}
```
          Report: EventNames=[Clock].DoReport
          Plant Chicory: ResourceName=SCUM; CropType=SCUM
          Operations IrrigationSchedule
          Operations DefoliationSchedule
            1997-02-21  [Defoliate].Script.addDefoliation(9,112)
            1997-06-05  [Defoliate].Script.addDefoliation(5,95)
            1997-10-06  [Defoliate].Script.addDefoliation(7,118)
            1997-11-19  [Defoliate].Script.addDefoliation(5,37)
            1997-12-23  [Defoliate].Script.addDefoliation(7,29)
            1998-02-03  [Defoliate].Script.addDefoliation(14,35)
            1998-03-12  [Defoliate].Script.addDefoliation(3,23)
            1998-05-29  [Defoliate].Script.addDefoliation(7,75)
            1998-09-29  [Defoliate].Script.addDefoliation(10,116)
            1998-11-11  [Defoliate].Script.addDefoliation(5,33)
            1998-12-15  [Defoliate].Script.addDefoliation(7,29)
            1999-01-11  [Defoliate].Script.addDefoliation(0,20)
            1999-02-17  [Defoliate].Script.addDefoliation(7,37)
            1999-04-09  [Defoliate].Script.addDefoliation(13,44)
            1999-06-24  [Defoliate].Script.addDefoliation(3,63)
            1999-09-29  [Defoliate].Script.addDefoliation(7,94)
            1999-11-09  [Defoliate].Script.addDefoliation(8,34)
            1999-12-20  [Defoliate].Script.addDefoliation(6,33)
            2000-01-21  [Defoliate].Script.addDefoliation(5,26)
            2000-03-13  [Defoliate].Script.addDefoliation(5,47)
            2000-05-25  [Defoliate].Script.addDefoliation(4,68)
            2000-09-22  [Defoliate].Script.addDefoliation(9,116)
            2000-11-10  [Defoliate].Script.addDefoliation(6,40)
            2000-12-19  [Defoliate].Script.addDefoliation(8,33)
            2001-01-24  [Defoliate].Script.addDefoliation(6,28)
            2001-03-11  [Defoliate].Script.addDefoliation(6,40)
            2001-05-02  [Defoliate].Script.addDefoliation(4,46)
            2001-06-24  [Defoliate].Script.addDefoliation(10,49)
            2001-10-03  [Defoliate].Script.addDefoliation(7,91)
            2001-11-21  [Defoliate].Script.addDefoliation(5,42)
            2001-12-22  [Defoliate].Script.addDefoliation(8,26)
            2002-02-06  [Defoliate].Script.addDefoliation(9,38)
            2002-04-03  [Defoliate].Script.addDefoliation(14,47)
            2002-06-24  [Defoliate].Script.addDefoliation(11,68)
          Manager Defoliate: same as Validation.ScottFarm.C17a.Field.Defoliate
          Soil Wakanui-Iverseen: SoilType=Udic Ustochrept (US),  Immature Pallic Soil (NZ); LocalName=Wakanui Silt Loam; Site=Iverseen field; NearestTown=Lincoln; Region=Canterbury; Country=New Zealand; Latitude=0; Longitude=0; DataSource=Hamish Brown PhD Thesis
            Comments=The physical properties are averages from Hamish's Thesis, Ks and biochemical data from similar soils (from NZ-NSD), texture is a rough estimate only
            Analysis: Thickness=[150, 150, 400, 200, 150, 450, 150, 350, 300]; PH=[6, 6, 6, 6, 6, 6, 6, 6, 6]; PHUnits=Water; BoronUnits=HotWater
            Water
              Thickness  BD     AirDry  LL15   DUL    SAT
              150        1.327  0.117   0.293  0.4    0.496
              150        1.375  0.221   0.246  0.375  0.481
              400        1.47   0.152   0.152  0.324  0.452
              200        1.442  0.131   0.131  0.363  0.466
              150        1.313  0.134   0.134  0.352  0.513
              450        1.518  0.247   0.247  0.384  0.437
              150        1.643  0.327   0.327  0.363  0.391
              350        1.635  0.3     0.3    0.362  0.394
              300        1.705  0.283   0.283  0.336  0.368
              SoilCrop AgPastureSoil
                LL=[0.293, 0.246, 0.152, 0.131, 0.134, 0.247, 0.327, 0.3, 0.283]
                KL=[0.12, 0.12, 0.09, 0.04, 0.01, 0.01, 0, 0, 0]
                XF=[1, 1, 0.8, 0.7, 0.85, 0.3, 0, 0, 0]
              SoilCrop ChicorySoil
                LL=[0.293, 0.246, 0.152, 0.131, 0.134, 0.247, 0.327, 0.3, 0.283]
                KL=[0.12, 0.12, 0.09, 0.04, 0.01, 0.01, 0, 0, 0]
                XF=[1, 1, 0.8, 0.7, 0.85, 0.3, 0, 0, 0]
              SoilCrop WheatSoil
                LL=[0.293, 0.246, 0.152, 0.131, 0.134, 0.247, 0.327, 0.3, 0.283]
                KL=[0.12, 0.12, 0.09, 0.04, 0.01, 0.01, 0, 0, 0]
                XF=[1, 1, 0.8, 0.7, 0.85, 0.3, 0, 0, 0]
              SoilCrop SlurpSoil
                LL=[0.293, 0.246, 0.152, 0.131, 0.134, 0.247, 0.327, 0.3, 0.283]
                KL=[0.12, 0.12, 0.09, 0.04, 0.01, 0.01, 0, 0, 0]
                XF=[1, 1, 0.8, 0.7, 0.85, 0.3, 0, 0, 0]
            SoilWater: residueinterception=0; SummerDate=1-Nov; SummerU=6; SummerCona=3.5; WinterDate=1-apr; WinterU=2; WinterCona=2; DiffusConst=88; DiffusSlope=35; Salb=0.13; CN2Bare=73; CNRed=20; CNCov=0.8; max_pond=0; Thickness=[150, 150, 400, 200, 150, 450, 150, 350, 300]; SWCON=[0.5, 0.45, 0.25, 0.25, 0.4, 0.1, 0.15, 0.1, 0.1]
            SoilNitrogen: fom_type=[default, manure, mucuna, lablab, shemp, stable]; fract_carb=[0.2, 0.3, 0.54, 0.57, 0.45, 0]; fract_cell=[0.7, 0.3, 0.37, 0.37, 0.47, 0.1]; fract_lign=[0.1, 0.4, 0.09, 0.06, 0.08, 0.9]; wfpsN2N2O_x=[22, 88]; wfpsN2N2O_y=[0.1, 1]
            SoilOrganicMatter: RootCN=40; RootWt=1000; SoilCN=11.3; EnrACoeff=7.4; EnrBCoeff=0.2; OCUnits=Total
              Thickness  OC    FBiom  FInert
              150        4.25  0.105  0.6
              150        3.13  0.25   0.7
              400        0.88  0.02   0.8
              200        0.32  0.01   0.9
              150        0.25  0.008  0.95
              450        0.17  0.005  0.99
              800        0.1   0.005  0.99
            InitialWater Initial water: PercentMethod=FilledFromTop; FractionFull=0.99
            Sample Initial nitrogen: NO3Units=kgha; NH4Units=kgha; SWUnits=Volumetric; OCUnits=Total; PHUnits=Water
              Thickness  NO3  NH4
              150        15   1
              150        15   1
              400        20   1
              300        10   1
              1300       10   1
    Simulation Classic: Area=0; Slope=0
      Memo
        Observed data used in the APSim classic chicory model for the purpose of comparing results from classic and X.
      Weather: FileName=Ruakura.met
      Clock: StartDate=2008-07-01; EndDate=2010-05-30
      Summary
      SoilArbitrator Soil Arbitrator
      Zone Field: Area=1; Slope=0
        SurfaceOrganicMatter surface organic matter: same as Validation.ScottFarm.C17a.Field.surface organic matter
        Operations Sowing
          2008-10-23  [Chicory].Sow(population:200, cultivar:"Puna", depth:10, rowSpacing:150);
        MicroClimate: same as Validation.ScottFarm.C17a.Field.MicroClimate
        Plant Chicory: ResourceName=SCUM; CropType=SCUM
        Irrigation
        Fertiliser
        Manager ExtraVariables: same as Validation.Iversen.Iversen.Field.ExtraVariables
        Manager FertiliseTopupOnCriticalNO3Level
          fertCriteria = 200
          fertCritical = 100
          fertMinDays = 0
```csharp
// Auto fertilise per Lee model in Apsim classic

using System;
using Models.Core;
using Models.PMF;
using Models.Soils;
using APSIM.Shared.Utilities;
namespace Models
{
	[Serializable]
	public class Script : Model
	{
		[Link] Clock Clock;
		[Link] Fertiliser fertiliser;
		[Link] ISummary summary = null;
		[Link] Soil soil;

		private DateTime lastApplicationDate;

		[Description("Maximum Amount of NO3 required in top 3 layers (kg/ha)")]
		public double fertCriteria { get; set; }

		[Description("Critical Amount of NO3 in top 3 layers (kg/ha)")]
		public double fertCritical { get; set; }

		[Description("Minimum period between applications (days)")]
		public double fertMinDays { get; set; }

		
		[EventSubscribe("DoManagement")]
		private void OnDoManagement(object sender, EventArgs e)
		{						
			double NO3_available = soil.SoilNitrogen.NO3[0] + soil.SoilNitrogen.NO3[1] + soil.SoilNitrogen.NO3[2];
						
			double daysSinceLastApplication = (Clock.Today - lastApplicationDate).TotalDays;
			
			if (daysSinceLastApplication >= fertMinDays)
			{			
				if (NO3_available <= fertCritical)
				{
					double nDeficit = fertCriteria - NO3_available;				
					fertiliser.Apply(nDeficit, Fertiliser.Types.UreaN, 50);	// 50mm per LEE
					lastApplicationDate = Clock.Today;
					//summary.WriteMessage(this, "Applied " + nDeficit + " (was " + NO3_available.ToString() + ")");
					
				}
			}
		}
	}
}
```
        Report: EventNames=[Clock].DoReport
        Operations DefoliationSchedule
          2009-01-19  [Defoliate].Script.Defoliate();
          2009-02-23  [Defoliate].Script.Defoliate();
          2009-04-01  [Defoliate].Script.Defoliate();
          2009-05-08  [Defoliate].Script.Defoliate();
          2009-09-14  [Defoliate].Script.Defoliate();
          2009-10-22  [Defoliate].Script.Defoliate();
          2009-11-25  [Defoliate].Script.Defoliate();
          2009-12-21  [Defoliate].Script.Defoliate();
          2010-01-15  [Defoliate].Script.Defoliate();
          2010-02-12  [Defoliate].Script.Defoliate();
          2010-03-22  [Defoliate].Script.Defoliate();
        Manager Defoliate
          LeafRemoved = 0.95
          LeafResidue = 0.01
          StemRemoved = 0.5
          StemResidue = 0.05
          popDecline = 0.2
          popStartDate = 2009-02-01
          popEndDate = 2010-04-01
```csharp
// This script is only intended to duplicate the management in the Ruakura Chicory trial by Frank Lee

using System;
using Models.Core;
using System.Collections.Generic;
using System.Text;
using Models.Soils;
using Models.PMF;
using Models;
using System.Xml.Serialization;
using APSIM.Shared.Utilities;

namespace Models
{
	[Serializable] 
	public class Script : Model
	{
		[Link] Plant Chicory;
		[Link] Zone zone;
		[Link] ISummary summary = null;
		[Link] Clock Clock;

		[Description("Fraction of leaves removed by defoliation (0-1)")]
		public double LeafRemoved { get; set; }

		[Description("Fraction of leaves to residue (0-1)")]
		public double LeafResidue { get; set; }


		[Description("Fraction of stem removed by defoliation (0-1)")]
		public double StemRemoved { get; set; }

		[Description("Fraction of stem to residue (0-1)")]
		public double StemResidue { get; set; }


		[Description("Population decline due to defoliation (0-1)")]
		public double popDecline { get; set; }

		[Description("Population decline starting date (d/mm/yyyy)")]
		public DateTime popStartDate { get; set; }

		[Description("Population decline ending date (d/mm/yyyy)")]
		public DateTime popEndDate { get; set; }

		[XmlIgnore] private RemovalFractions removalFractions { get; set; }
		[XmlIgnore] public double LeafWt { get; set; }
		[XmlIgnore] public double LeafHarvested { get; set; }
		[XmlIgnore] public double StemWt { get; set; }
		[XmlIgnore] public double StemHarvested { get; set; }
					        
		[EventSubscribe("Commencing")]
		private void OnSimulationCommencing(object sender, EventArgs e)
		{
			removalFractions = new RemovalFractions();
		}
		
		[EventSubscribe("DoManagement")]
		private void OnDoManagement(object sender, EventArgs e)
		{
		
		}
		
		public void Defoliate()
		{			
			
			
			//removalFractions.SetPhenologyStage = 3.5;
			
			LeafWt = (double)zone.Get("Chicory.Leaf.Wt");
			StemWt = (double)zone.Get("Chicory.Stem.Wt");
			
			LeafHarvested = LeafWt * LeafRemoved;
			StemHarvested = StemWt * StemRemoved;

			removalFractions.SetFractionRemoved("Leaf", LeafRemoved);
			removalFractions.SetFractionToResidue("Leaf", LeafResidue);

			removalFractions.SetFractionRemoved("Stem", StemRemoved);
			removalFractions.SetFractionToResidue("Stem", StemResidue);  
			
			removalFractions.SetFractionRemoved("Root", 0.0);
			removalFractions.SetFractionToResidue("Root", 0.0);
			
			Chicory.RemoveBiomass("Cut", removalFractions);
						
			
			
			// Reduce population
			if ((Clock.Today > popStartDate) && (Clock.Today < popEndDate))
			{
				Chicory.Population = Chicory.Population * (1 - popDecline);
			}			
		}
		
		[EventSubscribe("DoManagementCalculations")]
		private void OnDoManagementCalculations(object sender, EventArgs e)
		{
			
		}
	}
}
```
        Soil SoilHorotiu: same as Validation.ScottFarm.C17a.Field.SoilHorotiu
        Operations IrrigationSchedule
          2010-04-07  [Irrigation].Apply(13.59)
          2010-03-30  [Irrigation].Apply(14.259)
          2010-03-18  [Irrigation].Apply(14.819)
          2010-03-13  [Irrigation].Apply(13.709)
          2010-03-09  [Irrigation].Apply(17.081)
          2010-03-05  [Irrigation].Apply(13.666)
          2010-03-01  [Irrigation].Apply(15.381)
          2010-02-23  [Irrigation].Apply(13.578)
          2010-02-20  [Irrigation].Apply(14.767)
          2010-02-11  [Irrigation].Apply(16.424)
          2010-02-06  [Irrigation].Apply(15.428)
          2010-01-16  [Irrigation].Apply(15.533)
          2010-01-13  [Irrigation].Apply(13.834)
          2010-01-08  [Irrigation].Apply(16.152)
          2010-01-03  [Irrigation].Apply(13.616)
          2009-12-31  [Irrigation].Apply(14.804)
          2009-12-26  [Irrigation].Apply(14.012)
          2009-12-22  [Irrigation].Apply(13.626)
          2009-12-19  [Irrigation].Apply(16.333)
          2009-12-11  [Irrigation].Apply(16.976)
          2009-11-26  [Irrigation].Apply(14.886)
          2009-11-15  [Irrigation].Apply(14.86)
          2009-11-09  [Irrigation].Apply(14.768)
          2009-04-17  [Irrigation].Apply(15.455)
          2009-04-03  [Irrigation].Apply(15.5)
          2009-03-29  [Irrigation].Apply(14.707)
          2009-03-25  [Irrigation].Apply(15.091)
          2009-03-21  [Irrigation].Apply(15.491)
          2009-03-15  [Irrigation].Apply(13.734)
          2009-02-09  [Irrigation].Apply(15.271)
          2009-02-06  [Irrigation].Apply(14.836)
          2009-02-03  [Irrigation].Apply(15.199)
          2009-01-31  [Irrigation].Apply(15.181)
          2009-01-28  [Irrigation].Apply(15.497)
          2009-01-25  [Irrigation].Apply(15.809)
          2009-01-22  [Irrigation].Apply(14.565)
          2009-01-16  [Irrigation].Apply(15.158)
          2009-01-09  [Irrigation].Apply(14.99)
          2009-01-06  [Irrigation].Apply(14.389)
          2008-12-29  [Irrigation].Apply(15.256)
          2008-12-15  [Irrigation].Apply(15.229)
          2008-12-07  [Irrigation].Apply(16.41)
          2008-11-29  [Irrigation].Apply(14.072)
          2008-11-24  [Irrigation].Apply(14.055)
          2008-11-21  [Irrigation].Apply(13.848)
          2008-11-15  [Irrigation].Apply(14.109)
          2008-07-10  [Irrigation].Apply(15.441)
          2008-07-01  [Irrigation].Apply(27.05)
      Memo Caption: same as Validation.ScottFarm.C17a.Caption
  Folder Sensibility
    Simulation Base: Area=0; Slope=0
      Clock: StartDate=2008-07-01; EndDate=2010-06-30
      Weather: FileName=%root%\Prototypes\Chicory\Ruakura.met
      Summary
      SoilArbitrator Soil Arbitrator
      Zone Field: Area=1; Slope=0
        Folder Management
          Manager AutomaticFertiliser
            allowFertiliser = yes
            fertTarget = 100
            fertCritical = 20
            depthN = 500
            fertMinDays = 30
```csharp
using System;
using Models.Core;
using Models.PMF;
using Models.Soils;
using APSIM.Shared.Utilities;
using System.Xml.Serialization;

namespace Models
{
	[Serializable]
	public class Script : Model
	{
		[Link] Clock Clock;
		[Link] Fertiliser fertiliser;
		[Link] ISummary summary = null;
		[Link] Soil Soil;

		//User inputs from properties tab
		[Description("Turn ferliser applications on?")]
		public answerType allowFertiliser { get; set; }

		[Description("Target amount of NO3 in top soil (kgN/ha)")]
		public double fertTarget { get; set; }

		[Description("Minimal amount of NO3 in top soil (kgN/ha)")]
		public double fertCritical { get; set; }
		
		[Description("Depth to calculate available N (mm)")]
		public double depthN { get; set; }

		[Description("Minimum period between applications (days)")]
		public double fertMinDays { get; set; }
	   
		public enum answerType
		{
			/// <summary>a positive answer</summary>
			yes,
			/// <summary>a negative answer</summary>
			no
		}

		[XmlIgnore] public double TopMineralN { get; set; }
		
		private DateTime lastApplicationDate;
		private bool fertiliserIsAllowed;
		private int nLayers;

		[EventSubscribe("StartOfSimulation")]
		private void OnStartOfSimulation(object sender, EventArgs e)
		{
			fertiliserIsAllowed = (allowFertiliser == answerType.yes);
			nLayers = Soil.SoilWater.Thickness.Length;
		}

		[EventSubscribe("DoManagement")]
		private void OnDoManagement(object sender, EventArgs e)
		{
			double daysSinceLastApplication = (Clock.Today - lastApplicationDate).TotalDays;
			double depthFromSurface = 0.0;
			double fracLayer = 0.0;
			TopMineralN = 0.0;
			for (int layer = 0; layer < nLayers; layer++)
			{
				fracLayer = Math.Min(1.0, (depthN - depthFromSurface) / Soil.SoilWater.Thickness[layer]);
				TopMineralN += (Soil.SoilNitrogen.NO3[layer] + Soil.SoilNitrogen.NH4[layer]) * fracLayer;
				depthFromSurface += Soil.SoilWater.Thickness[layer];
				if (depthFromSurface >= depthN)
					layer = nLayers;
			}

			
			if (fertiliserIsAllowed && (daysSinceLastApplication >= fertMinDays))
			{			
				if (TopMineralN < fertCritical)
				{
					double nDeficit = fertTarget - TopMineralN;				
					fertiliser.Apply(nDeficit, Fertiliser.Types.UreaN, 1);
					lastApplicationDate = Clock.Today;
					//summary.WriteMessage(this, "Applied " + nDeficit + " (was " + NO3_available.ToString() + ")");
				}
			}
		}
	}
}
```
          Manager AutomaticIrrigation
            allowIrrigation = yes
            seasonStart = 15-Sep
            seasonEnd = 30-May
            seasonsAllocation = 10000
            triggerDeficit = 90
            targetDeficit = 99
            returndays = 1
            maximumAmount = 30
            depthPAWC = 300
```csharp
using System;
using Models.Core;
using Models.PMF;
using Models.Soils;
using System.Xml.Serialization;
using Models.PMF;
using APSIM.Shared.Utilities;

        
namespace Models
{
	[Serializable] 
	[System.Xml.Serialization.XmlInclude(typeof(Model))]
	public class Script : Model
	{
		//Communication to other modules
		[Link] ISummary summary = null;
		[Link] Irrigation Irrigation;
		[Link] Clock Clock;
		[Link] Soil Soil;
		[Link(IsOptional = true)] Plant existingCrop;
	   
		//User inputs from properties tab
		[Description("Turn irrigation on?")]
		public answerType allowIrrigation { get; set; }
		[Description("Start of irrigation season (dd-MMM)")]
		public string seasonStart { get; set; }
		[Description("End of irrigation season (dd-MMM)")]
		public string seasonEnd { get; set; }
		[Description("Season allocation (mm)")]
		public double seasonsAllocation { get; set; }
		[Description("Deficit to trigger irrigation (% PAWC)")]
		public double triggerDeficit { get; set; }
		[Description("Deficit to stop irrigaton (% PAWC)")]
		public double targetDeficit { get; set; }
		[Description("Minimum days for irrigation to return")]
		public double returndays { get; set; }
		[Description("Maximum irrigation application (mm/day)")]
		public double maximumAmount { get; set; }
		[Description("Depth to calculate PAWC (mm)")]
		public double depthPAWC { get; set; }
	   
		public enum answerType
		{
			/// <summary>a positive answer</summary>
			yes,
			/// <summary>a negative answer</summary>
			no
		}

		//Class members
		[XmlIgnore] public double TopSWdeficit { get; set; }
		[XmlIgnore] public double TopSWC { get; set; }
		[XmlIgnore] public double DaysSinceIrrigation { get; set; }
		[XmlIgnore] public double AmountToApply { get; set; }
		[XmlIgnore] public double SeasonAppliedAmount { get; set; }
		
		private bool IrrigationIsAllowed { get; set; }
		private bool SeasonIsOpen { get; set; }
		private bool CropIsActive { get; set; }
		private bool IrrigatorIsAvailable { get; set; }
		private bool SoilIsDry { get; set; }

		private DateTime StartDate;
		private DateTime EndDate;
		private double TopDUL;
		private double TopLL;
		private int nLayers;
	
		//Calculate static soil variables
		[EventSubscribe("StartOfSimulation")]
		private void OnStartOfSimulation(object sender, EventArgs e)
		{   
			//Set the season dates
			StartDate = DateTime.Parse(seasonStart + "-" + Clock.Today.Year.ToString());
			EndDate = DateTime.Parse(seasonEnd + "-" + Clock.Today.Year.ToString());
			
			//Can we irrigate at all?
			IrrigationIsAllowed = false; 
			if (allowIrrigation == answerType.yes)
				IrrigationIsAllowed = true; 

			//Calculate soil water variables
			double depthFromSurface = 0.0;
			double fracLayer = 0.0;
			nLayers = Soil.SoilWater.Thickness.Length;
			for (int layer = 0; layer < nLayers; layer++)
			{
				fracLayer = Math.Min(1.0, (depthPAWC - depthFromSurface) / Soil.SoilWater.Thickness[layer]);
				TopLL += Soil.SoilWater.LL15mm[layer] * fracLayer;
				TopDUL += Soil.SoilWater.DULmm[layer] * fracLayer;
				depthFromSurface += Soil.SoilWater.Thickness[layer];
				if (depthFromSurface >= depthPAWC)
					layer = nLayers;
			}
		}
	   	  
		//Determine daily requirement for irrigation
		[EventSubscribe("StartOfDay")]
		private void OnStartOfDay(object sender, EventArgs e)
		{
			//Can we irrigate today?		  
			SeasonIsOpen = isBetween(Clock.Today, StartDate, EndDate);

			//Is there a crop in the ground that needs irrigation?
			CropIsActive = false;
			if ((existingCrop != null) && (existingCrop.IsAlive))
				CropIsActive = true;
			//if ((existingCrop.Phenology.Stage >= 3.0) && (existingCrop.Phenology.Stage < 6.0))
	      
			//Is the irrigator available?
			IrrigatorIsAvailable = false;
			DaysSinceIrrigation += 1;
			if (DaysSinceIrrigation >= returndays)
				IrrigatorIsAvailable = true;
	      
			//Is the soil dry enough to require irrigation?
			SoilIsDry = false;
			double depthFromSurface = 0.0;
			double fracLayer = 0.0;
			TopSWC = 0.0;
			for (int layer = 0; layer < nLayers; layer++)
			//for (int layer = 0; depthFromSurface < depthPAWC + Soil.SoilWater.Thickness[layer]; layer++)
			{
				fracLayer = Math.Min(1.0, (depthPAWC - depthFromSurface) / Soil.SoilWater.Thickness[layer]);
				TopSWC += Soil.SoilWater.SWmm[layer] * fracLayer;
				depthFromSurface += Soil.SoilWater.Thickness[layer];
				if (depthFromSurface >= depthPAWC)
					layer = nLayers;
			}
			
			TopSWdeficit = TopSWC - TopDUL;
			if (Math.Max(0.0, -TopSWdeficit) >= (TopDUL - TopLL) * (100 - triggerDeficit) / 100)
				SoilIsDry = true;
	            
			//Are all the conditions ratifying irrigation
			if (IrrigationIsAllowed && SeasonIsOpen && CropIsActive && IrrigatorIsAvailable && SoilIsDry)
			{
				//Lets bloody well irrigate then!!!!
				AmountToApply = TopDUL * targetDeficit / 100 - TopSWC;
				AmountToApply = Math.Max(0.0, Math.Min(AmountToApply, seasonsAllocation - SeasonAppliedAmount));
				Irrigation.Apply(AmountToApply);
				DaysSinceIrrigation = 0;
				SeasonAppliedAmount += AmountToApply;
			}
		}
		
		///Checks whether theDate is between iniDate and endDate (non-year specific)
		private bool isBetween(DateTime theDay, DateTime iniDate, DateTime endDate)
		{
			bool result = false;
			if (iniDate.DayOfYear < endDate.DayOfYear)
			{
				// period is within one year, ex: summer in the northern hemisphere
				if ((theDay.DayOfYear >= iniDate.DayOfYear) && (theDay.DayOfYear <= endDate.DayOfYear))
					result = true;
			}
			else
			{
				// period goes over the end of the year, ex: summer in the southern hemisphere
				if ((theDay.DayOfYear >= iniDate.DayOfYear) || (theDay.DayOfYear <= endDate.DayOfYear))
					result = true;
			}
			
			return result;
		}
	}
}
```
          Manager ExtraVariables: same as Validation.ScottFarm.C17a.Field.ExtraVariables
          Operations Sowing
            2008-10-15  [Chicory].Sow(population:200, cultivar:"Choice", depth:10, rowSpacing:150);
          Manager Defoliate
            removeAmountType = ResidualDM
            cutPasture_StartDate = 2010-11-15
            cutPasture_EndDate = 2013-06-10
            interval2Cut = 21
            duration = 3
            defoliationType = Graze
            herbageAmount = 10000
            leafResidueFrac = 0.05
            stemResidueFrac = 0.5
            fracN2Remove = 0.15
            urineDepth = 300
            fracN2Dung = 0.4
            fracPopDecline = 0.2
```csharp
// Defoliates on a regular cycle or one-off via a schedule
// currenty defoliates by the amount specified spread evenly over the specified period

using System;
using Models.Core;
using System.Collections.Generic;
using System.Text;
using Models.Soils;
using Models.PMF;
using Models;
using System.Xml.Serialization;
using APSIM.Shared.Utilities;

namespace Models
{


	public class Defoliation
	{
		public DateTime startDate { set; get; }
		public DateTime endDate { set; get; }
		public double herbageAmount { set; get; }
	}
	

	[Serializable] 
	public class Script : Model
	{
		[Link] Plant Chicory;
		[Link] Zone zone;
		[Link] ISummary summary = null;
		[Link] Clock Clock;
		
		List<Defoliation> defoliations = new List<Defoliation>();

		//defoliations = new List<Defoliation>();
		
		//Outputs
		[XmlIgnore] private RemovalFractions removalFractions { get; set; }
		[XmlIgnore] public double leafWt { get; set; }
		[XmlIgnore] public double stemWt { get; set; }
		
		
		[XmlIgnore] public double leafToDefoliate { get; set; }
		[XmlIgnore] public double stemToDefoliate { get; set; }

		
		//Whether today is a harvesting day
		[XmlIgnore] public string Can_Cut{ get; set; }
		//Whether today's harvest was done
		[XmlIgnore] public string Has_Cut{ get; set; }
		//Pasture DM harvested today (kg/ha)
		[XmlIgnore] public double harvested_dm{ get; set; }
		//N harvested today
		[XmlIgnore] public double harvested_n{ get; set; }
		//DM removed from the paddock
		[XmlIgnore] public double removed_dm{ get; set; }
		//N removed from the paddock
		[XmlIgnore] public double removed_n{ get; set; }
		//DM returned to the paddock
		[XmlIgnore] public double returned_dm{ get; set; }
		//N returned to the paddock
		[XmlIgnore] public double returned_n{ get; set; }
		//N returned as dung (SurfaceOM)
		[XmlIgnore] public double NReturnedInDung{ get; set; }
		//N returned as urine (urea)
		[XmlIgnore] public double NReturnedInUrine{ get; set; }
		//Average growth rate for this cut
		[XmlIgnore] public double GrowthRateCalc{ get; set; }
		//Number of days after last harvest
		[XmlIgnore] public int DaysAfterCut{ get; set; }
		//Total standing DM (Leaf + Stem/Sheath) before cut
		[XmlIgnore] public double PreHarvestDM{ get; set; }
		//Total standing DM (Leaf + Stem/Sheath) after cut
		[XmlIgnore] public double PostHarvestDM{ get; set; }
		
		
		//Internal variables
		//The fraction of DM to be removed from the simulation (0-1)
		private double FracDM2Remove;
		//Whether cutting are allowed
		private bool CutIsAllowed;
		//The fraction of urine to be applied in each layer
		private double[] FracLayer;
		
		
		public enum removeAmountTypes
		{
			/// <summary>Setting DM amount to remove</summary>
			DMToRemove,
			/// <summary>Setting residual DM amount</summary>
			ResidualDM
		}


		public enum defoliationTypes
		{
			/// <summary>Cut</summary>
			Cut,
			/// <summary>Graze</summary>
			Graze
		}

		[Description("Choose what amount is being defined:")]
		public removeAmountTypes removeAmountType { get; set; }
		
		[Description("Enter the date to start the rotation (dd/mm/yyyy):")]
		public DateTime cutPasture_StartDate { get; set; }

		[Description("Enter the date to end the rotation (dd/mm/yyyy):")]
		public DateTime cutPasture_EndDate { get; set; }

		[Description("Enter the interval between harvests (days):")]
		public int interval2Cut { get; set; }

		[Description("Enter the number of days to defoliate over (days):")]
		public int duration { get; set; }

		[Description("Select type of defoliation:")]
		public defoliationTypes defoliationType { get; set; }

		[Description("Enter amount to defoliate (kgDM/ha):")]
		public double herbageAmount { get; set; }

		[Description("Enter fraction of leaf returned as residue(0-1):")]
		public double leafResidueFrac { get; set; }

		[Description("Enter fraction of stem returned as residue(0-1):")]
		public double stemResidueFrac { get; set; }

		[Description("Enter fraction of N that is removed from the field (0-1):")]
		public double fracN2Remove { get; set; }

		[Description("Enter the depth down to which urine will applied (mm):")]
		public double urineDepth { get; set; }

		[Description("Enter the proportion of N returned in dung (0-1):")]
		public double fracN2Dung { get; set; }

		[Description("Enter the fraction of population decline due to defoliation (0-1):")]
		public double fracPopDecline { get; set; }

		private void defoliate(int listNumber)
		{
			double numDays = (defoliations[listNumber].endDate - defoliations[listNumber].startDate).TotalDays;
			
			summary.WriteMessage(this, "Defoliating (" + listNumber + "). " + defoliations[listNumber].herbageAmount + "kg/ha over " + numDays + " days");
			
			leafWt = (double)zone.Get("Chicory.Leaf.Wt");
			stemWt = (double)zone.Get("Chicory.Stem.Wt");
			
			
			if (leafWt + stemWt > 0)
			{
			
				double herbageToRemove = (defoliations[listNumber].herbageAmount / 10) / numDays; // total herbage to remove in g/m2 per day
				
				
				
				if (herbageToRemove > (leafWt + stemWt) * 0.9) // limit to 90% of existing herbage
				{
					herbageToRemove = (leafWt + stemWt) * 0.9;
				}			
							
				leafToDefoliate = herbageToRemove * leafWt / (leafWt + stemWt);			
				stemToDefoliate = herbageToRemove * stemWt / (leafWt + stemWt);

				summary.WriteMessage(this, "Current herbage (g/m2): leaf=" + leafWt + ",stem=" + stemWt);
				summary.WriteMessage(this, "Herbage to remove today (g/m2): " + herbageToRemove + " (leaf=" + leafToDefoliate + ",stem=" + stemToDefoliate + ")");


				double leafFracToRemove = leafToDefoliate / (leafWt + stemWt);
				double stemFracToRemove = stemToDefoliate / (leafWt + stemWt);				

				// calculate residue				
				double leafFracToResidue = leafResidueFrac * leafFracToRemove;
				double stemFracToResidue = stemResidueFrac * stemFracToRemove;
				
				// subtract residue from amount to remove
				leafFracToRemove = leafFracToRemove - leafFracToResidue;
				stemFracToRemove = stemFracToRemove - stemFracToResidue;
				
				removalFractions.SetFractionRemoved("Leaf", leafFracToRemove);
				removalFractions.SetFractionToResidue("Leaf", leafFracToResidue);
				removalFractions.SetFractionRemoved("Stem", stemFracToRemove);
				removalFractions.SetFractionToResidue("Stem", stemFracToResidue);  
				
				removalFractions.SetFractionRemoved("Root", 0.0);
				removalFractions.SetFractionToResidue("Root", 0.0);
				
			
				if (defoliationType == defoliationTypes.Cut)
				{			
					Chicory.RemoveBiomass("Cut", removalFractions);  
				}
				else
				{
					Chicory.RemoveBiomass("Graze", removalFractions);  
				}
															
				double popDeclineToday = fracPopDecline / numDays;
				Chicory.Population = Chicory.Population * (1.0 - popDeclineToday);						

			
			}

			
/*			if (phenStageReset > 0)
			{
				//removalFractions.SetPhenologyStage = 3.5; //phenStageReset;

//				Chicory.Phenology.ReSetToStage(3.5); // same ERROR
//				Chicory.Phenology.Stage = 3.5; // nada

			} */
			
			
		
		
		}

		public void addDefoliation(int numDays, double amount)
		{			
			
			Defoliation defoliation = new Defoliation();
			defoliation.startDate = Clock.Today;
			defoliation.endDate = Clock.Today.AddDays(numDays);
			defoliation.herbageAmount = amount;
			
			defoliations.Add(defoliation);
			
			summary.WriteMessage(this, "Added defoliation for " + numDays + " days");
			
			
			/*

			
			
			// Reduce population			
			if ((Clock.Today > popStartDate) && (Clock.Today < popEndDate))
			{
				Chicory.Population = Chicory.Population * (1 - popDecline);
			}			 */
			
			//StoverWt = (double)zone.Get("Chicory.Stover.Wt");
			//summary.WriteMessage(this, StoverWt.ToString());

			
		}

					  
		[EventSubscribe("Commencing")]
		private void OnSimulationCommencing(object sender, EventArgs e)
		{
			removalFractions = new RemovalFractions();
		}
		
		[EventSubscribe("DoManagement")]
		private void OnDoManagement(object sender, EventArgs e)
		{			
			// Add any regular defoliations to the defoliation list if they begin today
			if ((Clock.Today >= cutPasture_StartDate) && (Clock.Today <= cutPasture_EndDate))
			{
				double daysSinceStart = (Clock.Today - cutPasture_StartDate).TotalDays;
				if (daysSinceStart % interval2Cut == 0)
				{
					summary.WriteMessage(this, "Added regular defoliation starting at " + Clock.Today.ToString());
					addDefoliation(duration, herbageAmount);
				}
			}
			
			// Check the list of defoliations to see if any need running
			for (var i = defoliations.Count - 1; i >= 0; i--)
			{
				if ((defoliations[i].startDate <= Clock.Today) && (defoliations[i].endDate > Clock.Today))
				{									
					defoliate(i);
				}
			}
		}
								
		
		[EventSubscribe("DoManagementCalculations")]
		private void OnDoManagementCalculations(object sender, EventArgs e)
		{
			
		}
	}
}
```
        MicroClimate: same as Validation.ScottFarm.C17a.Field.MicroClimate
        SurfaceOrganicMatter: PondActive=no; ReportAdditions=no; ReportRemovals=no; PoolName=grass; type=grass; mass=500; standing_fraction=0; cnr=40; CriticalResidueWeight=2000; OptimumDecompTemp=20; MaxCumulativeEOS=20; CNRatioDecompCoeff=0.277; CNRatioDecompThreshold=25; TotalLeachRain=25; MinRainToLeach=10; CriticalMinimumOrganicC=0.004; DefaultCPRatio=0; DefaultStandingFraction=0; StandingExtinctCoeff=0.5; FractionFaecesAdded=0.5
          Pools:
            {PoolName=grass, ResidueType=grass, Mass=500, CNRatio=40, StandingFraction=0}
          ResidueTypes: LoadFromResource=ResidueTypes
          TillageTypes TillageTypesList
        Irrigation
        Fertiliser
        Plant Chicory: ResourceName=SCUM; CropType=SCUM
        Soil HorotiuSoil: SoilType=Typic Udivitrand (US), Typic Orthic Allophanic Soil (NZ); LocalName=Horotiu silt loam; Site=Ruakura; NearestTown=Hamilton; Region=Waikato; Country=New Zealand; Latitude=0; Longitude=0; DataSource=Based primarily on Close et al, 2003
          Analysis: PHUnits=Water; BoronUnits=HotWater
            Thickness  Rocks  PH  CEC   ParticleSizeSand  ParticleSizeSilt  ParticleSizeClay
            200        0      6   23.1  47                33                20
            200        0      6   17.2  65                17                19
            130        2      6   12.4  76                13                11
            140        5      6   10    84                10                7
            380        5      6   7.2   88                8                 5
            230        19     6   3.1   91                6                 3
            220        33     6   1.6   94                5                 1
          Water
            Thickness  BD    AirDry  LL15  DUL   SAT   KS
            200        0.88  0.1     0.22  0.42  0.59  310
            200        0.85  0.18    0.18  0.36  0.62  2500
            130        1.03  0.18    0.18  0.33  0.56  4000
            140        1.11  0.17    0.17  0.31  0.52  5000
            380        1.11  0.08    0.08  0.21  0.52  10000
            230        1.03  0.05    0.05  0.14  0.46  15000
            220        1.03  0.04    0.04  0.12  0.39  20000
            SoilCrop ChicorySoil: LL=[0.22, 0.18, 0.18, 0.17, 0.08, 0.05, 0.04]; KL=[0.1, 0.08, 0.05, 0.02, 0.01, 0.01, 0]; XF=[1, 1, 1, 1, 1, 1, 1]
          SoilWater: residueinterception=0; SummerDate=21-Sep; SummerU=6; SummerCona=3.5; WinterDate=23-Mar; WinterU=6; WinterCona=2.5; DiffusConst=88; DiffusSlope=35; Salb=0.2; CN2Bare=0.7; CNRed=20; CNCov=0.8; max_pond=0; Thickness=[200, 200, 130, 140, 380, 230, 220]; SWCON=[0.55, 0.6, 0.7, 0.7, 0.75, 0.8, 0.8]
          SoilNitrogen: fom_type=[default, manure, mucuna, lablab, shemp, stable]; fract_carb=[0.2, 0.3, 0.54, 0.57, 0.45, 0]; fract_cell=[0.7, 0.3, 0.37, 0.37, 0.47, 0.1]; fract_lign=[0.1, 0.4, 0.09, 0.06, 0.08, 0.9]; wfpsN2N2O_x=[22, 88]; wfpsN2N2O_y=[0.1, 1]
          SoilOrganicMatter: RootCN=40; RootWt=1000; SoilCN=12.5; EnrACoeff=7.4; EnrBCoeff=0.2; OCUnits=Total
            Thickness  OC    FBiom  FInert
            200        8     0.08   0.57
            200        1.88  0.04   0.6
            130        0.93  0.02   0.62
            140        0.43  0.01   0.65
            380        0.13  0.01   0.7
            230        0.1   0.01   0.8
            220        0.07  0.01   0.85
          InitialWater Initial water: PercentMethod=FilledFromTop; FractionFull=1
          Sample Initial nitrogen: NO3Units=ppm; NH4Units=ppm; SWUnits=Volumetric; OCUnits=Total; PHUnits=Water
            Thickness  NO3  NH4
            200        15   0.5
            200        10   0.2
            600        5    0.093
            500        1    0.093
        Report: EventNames=[Clock].DoReport
          VariableNames:
            [Clock].Today as Date
            [ExtraVariables].Script.AccumPlantN
            [ExtraVariables].Script.AccumMineralisation
            [ExtraVariables].Script.AccumDenit
            [ExtraVariables].Script.AccumFert
            [ExtraVariables].Script.AccumLeach
            [ExtraVariables].Script.AccumDetach
            [ExtraVariables].Script.DeltaSoilOMN
            [ExtraVariables].Script.DeltaSurfaceOMN
            [ExtraVariables].Script.DeltaSoilMineralN
            [ExtraVariables].Script.SWC
            [ExtraVariables].Script.DUL
            [ExtraVariables].Script.OutFlowLat
            [ExtraVariables].Script.AccumEO
            [ExtraVariables].Script.AccumEP
            [ExtraVariables].Script.AccumES
            [ExtraVariables].Script.AccumDrainage
            [ExtraVariables].Script.AccumRunoff
            [ExtraVariables].Script.AccumRainfall
            [ExtraVariables].Script.AccumIrrigation
            [ExtraVariables].Script.AccumOutflowLat
            [ExtraVariables].Script.SoilWaterDeficit
            [ExtraVariables].Script.SoilNitrogenContent
            [ExtraVariables].Script.FomN
            [ExtraVariables].Script.HumN
            [ExtraVariables].Script.BiomN
            [ExtraVariables].Script.DltNMinRes
            [ExtraVariables].Script.DltNMinTot
            [MicroClimate].net_radn
            [MicroClimate].peta
            [MicroClimate].petr
            [Soil].SoilWater.Drainage
            [Soil].SoilWater.Runoff
            [Soil].SoilWater.Eo
            [Soil].SoilWater.Es
            [Soil].SoilWater.pond
            sum([Soil].SoilWater.SWmm) as ProfileWater
            sum([Soil].SoilNitrogen.urea) as ProfileUreaN
            sum([Soil].SoilNitrogen.NH4) as ProfileNH4N
            sum([Soil].SoilNitrogen.NO3) as ProfileNO3N
            sum([Soil].SoilNitrogen.FOMN) as ProfileFOMN
            sum([Soil].SoilNitrogen.MicrobialN) as ProfileBiomN
            sum([Soil].SoilNitrogen.HumicN) as ProfileHumN
            [SurfaceOrganicMatter].N
            [AutomaticIrrigation].Script.TopSWdeficit
            [AutomaticIrrigation].Script.TopSWC
            [AutomaticIrrigation].Script.AmountToApply
            [AutomaticIrrigation].Script.SeasonAppliedAmount
            [Irrigation].IrrigationApplied as Irrigation Applied (mm)
            [AutomaticFertiliser].Script.TopMineralN as TopMineralN
            [Fertiliser].NitrogenApplied as Nitrogen Applied
            [Defoliate].Script.LeafWt
            [Defoliate].Script.LeafHarvested
            [Defoliate].Script.StemWt
            [Defoliate].Script.StemHarvested
            [Defoliate].Script.leafToDefoliate
            [Defoliate].Script.stemToDefoliate
            [Chicory].Population as Population
            [Chicory].Phenology.CurrentPhaseName
            [Chicory].Phenology.Stage
            [Chicory].Root.LengthDensity
            [Chicory].Arbitrator.DMSupply
            [Chicory].Arbitrator.DMDemand
            [Chicory].Arbitrator.DMAllocated
            [Chicory].Arbitrator.DMSinkLimitation
            [Chicory].Arbitrator.DMNutrientLimitation
            [Chicory].Arbitrator.FDM
            [Chicory].Arbitrator.NSupply
            [Chicory].Arbitrator.NDemand
            [Chicory].Arbitrator.NAllocated
            [Chicory].Arbitrator.FN
            [Chicory].Arbitrator.WSupply
            [Chicory].Arbitrator.WDemand
            [Chicory].Arbitrator.WAllocated
            [Chicory].Arbitrator.FW
            sum([Chicory].Arbitrator.PotentialNO3NUptake) as PotentialNO3NUptake
            sum([Chicory].Arbitrator.PotentialNH4NUptake) as PotentialNH4NUptake
            (sum([Chicory].Arbitrator.PotentialNO3NUptake)+sum([Chicory].Arbitrator.PotentialNH4NUptake)) as PotentialPlantAvailable
            [ExtraVariables].Script.ShootRootRatio as currentSR
            [Chicory].TargetShootRootRatio.Value
            [Chicory].AdjustedShootRootRatio.Value
            [Chicory].Total.Wt as Total Weight
            [Chicory].Total.N as Total N
            [Chicory].AboveGround.Wt as Above Ground Weight
            [Chicory].BelowGround.Wt as Below Ground Weight
            [Chicory].Leaf.Wt as Leaf Weight
            [Chicory].Leaf.Live.Wt as Leaf Live Weight
            [Chicory].Leaf.Live.N as Leaf Live N
            [Chicory].Leaf.Live.NConc as Leaf Live N Concentration
            [Chicory].Leaf.Dead.Wt as Leaf dead weight
            [Chicory].Leaf.CoverTotal as Leaf Total Cover
            [Chicory].Leaf.CoverDead as Leaf Dead Cover
            [Chicory].Leaf.LAI as LAI Green
            [Chicory].Leaf.LAIDead as LAI Dead
            [Chicory].Leaf.Height as Leaf Height
            [Chicory].Leaf.PotentialBiomass.Value as Leaf Potential Biomass
            [Chicory].Leaf.Transpiration as LeafTranspiration
            [Chicory].Leaf.Fw
            [Chicory].Leaf.Fn
            [Chicory].Stem.Live.Wt as Stem Live Weight
            [Chicory].Stem.Live.N as Stem Live N
            [Chicory].Stem.Live.NConc as Stem Live N Concentration
            [Chicory].Stem.Dead.Wt as Stem dead weight
            [Chicory].Inflorescence.Live.Wt as Inflorescence Live Weight
            [Chicory].Inflorescence.Live.N as Inflorescence Live N
            [Chicory].Inflorescence.Live.NConc as Inflorescence Live N Concentration
            [Chicory].Inflorescence.Dead.Wt as Inflorescence dead weight
            [Chicory].Taproot.Live.Wt as Taproot Live Weight
            [Chicory].Taproot.Live.N as Taproot Live N
            [Chicory].Taproot.Live.NConc as Taproot Live N Concentration
            [Chicory].Taproot.Dead.Wt as Taproot dead weight
            [Chicory].Root.Live.Wt as Fine roots live Weight
            [Chicory].Root.Live.N as Fine roots live N
            [Chicory].Root.Live.NConc as Root Live N Concentration
            [Chicory].Root.Dead.Wt as Fine roots dead weight
            [Chicory].Root.Depth as Root Depth
            [Chicory].Root.WaterDemand as WaterDemand
            [Chicory].Root.WaterUptake as WaterUptake
            [Chicory].Leaf.Live.StructuralWt
            [Chicory].Leaf.Live.NonStructuralWt
            [Chicory].Leaf.Live.StructuralN
            [Chicory].Leaf.Live.NonStructuralN
            [Chicory].Stem.Live.StructuralWt
            [Chicory].Stem.Live.NonStructuralWt
            [Chicory].Stem.Live.StructuralN
            [Chicory].Stem.Live.NonStructuralN
            [Chicory].Inflorescence.Live.StructuralWt
            [Chicory].Inflorescence.Live.NonStructuralWt
            [Chicory].Inflorescence.Live.StructuralN
            [Chicory].Inflorescence.Live.NonStructuralN
            [Chicory].Root.Live.StructuralWt
            [Chicory].Root.Live.NonStructuralWt
            [Chicory].Root.Live.StructuralN
            [Chicory].Root.Live.NonStructuralN
            [Chicory].Taproot.Live.StructuralWt
            [Chicory].Taproot.Live.NonStructuralWt
            [Chicory].Taproot.Live.StructuralN
            [Chicory].Taproot.Live.NonStructuralN
            [Chicory].Leaf.Live.StructuralNConc
            [Chicory].Leaf.Live.NonStructuralNConc
            [Chicory].Root.Live.StructuralNConc
            [Chicory].Root.Live.NonStructuralNConc
            [Chicory].Phenology.Vernalisation.DaysVernalised as DaysVernalised
            [Chicory].Leaf.DMDemandFunction.PartitionFraction.Value as LeafFraction
            [Chicory].Stem.DMDemandFunction.PartitionFraction.Value as StemFraction
            [Chicory].Inflorescence.DMDemandFunction.PartitionFraction.Value as InflorescenceFraction
            [Chicory].Root.PartitionFraction.Value as FineRootFraction
            [Chicory].Taproot.DMDemandFunction.PartitionFraction.Value as TaprootFraction
    Simulation AFSRC: Area=0; Slope=0
      Clock: StartDate=1993-05-01; EndDate=1995-12-31
      Weather: FileName=%root%\Prototypes\Chicory\Beckley.met
      Summary
      SoilArbitrator Soil Arbitrator
      Zone Field: Area=1; Slope=0
        Folder Management
          Manager AutomaticFertiliser: same as Sensibility.Base.Field.Management.AutomaticFertiliser
          Manager AutomaticIrrigation
            allowIrrigation = no
            seasonStart = 15-Sep
            seasonEnd = 30-May
            seasonsAllocation = 10000
            triggerDeficit = 90
            targetDeficit = 99
            returndays = 1
            maximumAmount = 30
            depthPAWC = 300
            script: same as in Sensibility.Base.Field.Management.AutomaticIrrigation
          Manager ExtraVariables: same as Validation.ScottFarm.C17a.Field.ExtraVariables
          Operations Sowing
            1993-06-15  [Chicory].Sow(population:200, cultivar:"Puna", depth:10, rowSpacing:150);
          Manager Defoliate
            cutPasture_StartDate = 1994-05-20
            cutPasture_EndDate = 2100-12-31
            defoliationType = Cut
            interval2Cut = 21
            durationOfCut = 1
            removeAmountType = ResidualDM
            herbageAmount = 500
            fracDM2Remove = 0.75
            fracN2Remove = 0.15
            urineDepth = 300
            fracN2Dung = 0.4
            fracPopDecline = 0.2
```csharp
// Defoliates on a regular cycle or one-off via a schedule
// currenty defoliates by the amount specified spread evenly over the specified period

using System;
using Models.Core;
using System.Collections.Generic;
using System.Text;
using Models.Soils;
using Models.PMF;
using Models;
using System.Xml.Serialization;
using APSIM.Shared.Utilities;

namespace Models
{
	[Serializable] 
	public class Script : Model
	{
		[Link] Plant Chicory;
		[Link] Zone zone;
		[Link] ISummary summary = null;
		[Link] Clock Clock;
				
		[Description("Enter the date to start the rotation (dd/mm/yyyy):")]
		public DateTime cutPasture_StartDate { get; set; }

		[Description("Enter the date to end the rotation (dd/mm/yyyy):")]
		public DateTime cutPasture_EndDate { get; set; }

		[Description("Select type of defoliation:")]
		public defoliationTypes defoliationType { get; set; }

		[Description("Enter the interval between harvests (days):")]
		public int interval2Cut { get; set; }

		[Description("Enter the number of days to defoliate over (days):")]
		public int durationOfCut { get; set; }

		[Description("Choose what amount is being defined:")]
		public removeAmountTypes removeAmountType { get; set; }

		[Description("Enter the amount to use (kgDM/ha):")]
		public double herbageAmount { get; set; }

		[Description("Enter the fraction of DM that is removed from the field (0-1):")]
		public double fracDM2Remove { get; set; }

		[Description("Enter the fraction of N that is removed from the field (0-1):")]
		public double fracN2Remove { get; set; }

		[Description("Enter the depth down to which urine will applied (mm):")]
		public double urineDepth { get; set; }

		[Description("Enter the proportion of N returned in dung (0-1):")]
		public double fracN2Dung { get; set; }

		[Description("Enter the fraction of population decline due to defoliation (0-1):")]
		public double fracPopDecline { get; set; }

		//fraction of each plant part returned as residue (0-1), wastage
		private double leafResidueFrac = 0.1;
		private double stemResidueFrac = 0.5;
		private double flowerResidueFrac = 0.1;
		
		//Outputs
		//Pasture DM harvested today (kg/ha)
		[XmlIgnore] public double HarvestedDM{ get; set; }
		//N harvested today
		[XmlIgnore] public double HarvestedN{ get; set; }
		//DM removed from the paddock
		[XmlIgnore] public double RemovedDM{ get; set; }
		//N removed from the paddock
		[XmlIgnore] public double RemovedN{ get; set; }
		//DM returned to the paddock
		[XmlIgnore] public double ReturnedDM{ get; set; }
		//N returned to the paddock
		[XmlIgnore] public double ReturnedN{ get; set; }
		//N returned as dung (SurfaceOM)
		[XmlIgnore] public double NReturnedInDung{ get; set; }
		//N returned as urine (urea)
		[XmlIgnore] public double NReturnedInUrine{ get; set; }
		//Number of days after last harvest
		[XmlIgnore] public int DaysAfterCut{ get; set; }
		//Total standing DM (Leaf + Stem/Sheath) before cut
		[XmlIgnore] public double PreHarvestDM{ get; set; }
		//Total standing DM (Leaf + Stem/Sheath) after cut
		[XmlIgnore] public double PostHarvestDM{ get; set; }
		
		//Internal variables
		private RemovalFractions removalFractions;
		//The fraction of urine to be applied in each layer
		private double[] FracLayer;
		// total herbage to remove in g/m2 per day
		private double herbageToRemove;
		// counter
		private int daysCutting = 0;

		public enum removeAmountTypes
		{
			/// <summary>Setting DM amount to remove</summary>
			DMToRemove,
			/// <summary>Setting residual DM amount</summary>
			ResidualDM
		}

		public enum defoliationTypes
		{
			/// <summary>Cut</summary>
			Cut,
			/// <summary>Graze</summary>
			Graze
		}

		[EventSubscribe("Commencing")]
		private void OnSimulationCommencing(object sender, EventArgs e)
		{
			DaysAfterCut = interval2Cut;
		}
		
		[EventSubscribe("DoManagement")]
		private void OnDoManagement(object sender, EventArgs e)
		{
			if ((Clock.Today >= cutPasture_StartDate) && (Clock.Today <= cutPasture_EndDate))
			{
				// Check whether we should start cutting
				if (DaysAfterCut % interval2Cut == 0)
				{
					summary.WriteMessage(this, "   Regular defoliation starting at " + Clock.Today.ToString());
					defoliate(herbageAmount, removeAmountType, durationOfCut);
				}
				
				// Check whether we need to continure cutting
				if (daysCutting < durationOfCut)
				{
					removeDM(herbageToRemove);
					daysCutting += 1;
				}
			}
		}

		[EventSubscribe("DoManagementCalculations")]
		private void OnDoManagementCalculations(object sender, EventArgs e)
		{
			if (daysCutting % durationOfCut == 0)
			{
				PostHarvestDM = (double)zone.Get("Chicory.Leaf.Wt") + (double)zone.Get("Chicory.Stem.Wt") + (double)zone.Get("Chicory.Inflorescence.Wt");
				daysCutting = 0;
				Chicory.Population = Chicory.Population * (1.0 - fracPopDecline);
			}
		}

		// Perform the basic calculations for defoliation
		public void defoliate(double amountDM, removeAmountTypes removeType, int numDays)
		{
			// get the existing plant amount
			PreHarvestDM = (double)zone.Get("Chicory.Leaf.Wt") + (double)zone.Get("Chicory.Stem.Wt") + (double)zone.Get("Chicory.Inflorescence.Wt");
			
			if ((removeType == removeAmountTypes.DMToRemove) && (PreHarvestDM >= amountDM))
			{
				summary.WriteMessage(this, "   Defoliating " + amountDM.ToString("#0.0") + "kg/ha over " + numDays + " days");
				herbageToRemove = (amountDM / 10) / numDays;
			}
			else if ((removeType == removeAmountTypes.ResidualDM) && (PreHarvestDM >= amountDM))
			{
				summary.WriteMessage(this, "   Defoliating down to approximately " + amountDM.ToString("#0.0") + "kg/ha over " + numDays + " days");
				herbageToRemove = (PreHarvestDM - amountDM / 10) / numDays;
			}
			else
			{
				summary.WriteMessage(this, "   Defoliation will not happend because there is not enough plant material");
				return;
			}
			
			durationOfCut = numDays;
			// first defoliation
			removeDM(herbageToRemove);
			daysCutting += 1;
		}
		
		private void removeDM(double amount)
		{
			double leafWt = (double)zone.Get("Chicory.Leaf.Wt");
			double stemWt = (double)zone.Get("Chicory.Stem.Wt");
			double flowerWt = (double)zone.Get("Chicory.Inflorescence.Wt");
			double existingWt = leafWt + stemWt + flowerWt;
			if (existingWt >= amount)
			{
				double leafToHarvest = amount * leafWt / existingWt;
				double stemToHarvest = amount * stemWt / existingWt;
				double flowerToHarvest = amount * stemWt / existingWt;
				HarvestedDM = leafToHarvest + stemToHarvest + flowerToHarvest;
				HarvestedN = leafToHarvest * (double)zone.Get("Chicory.Leaf.Nconc")
				+ stemToHarvest * (double)zone.Get("Chicory.Stem.Nconc")
				+ flowerToHarvest * (double)zone.Get("Chicory.Inflorescence.Nconc");

				double leafFracToRemove = leafToHarvest / existingWt;
				double stemFracToRemove = stemToHarvest / existingWt;
				double flowerFracToRemove = flowerToHarvest / existingWt;

// calculate removed and residue
				RemovedDM = leafToHarvest * leafResidueFrac
				+ stemToHarvest * stemResidueFrac
				+ flowerToHarvest * flowerResidueFrac;
				RemovedN = leafToHarvest * leafResidueFrac * (double)zone.Get("Chicory.Leaf.Nconc")
				+ stemToHarvest * stemResidueFrac * (double)zone.Get("Chicory.Stem.Nconc")
				+ flowerToHarvest * flowerResidueFrac * (double)zone.Get("Chicory.Inflorescence.Nconc");
				ReturnedDM = HarvestedDM - RemovedDM;
				ReturnedN = HarvestedN - RemovedN;

// subtract residue from amount to remove
/*double leafFracToResidue = leafResidueFrac * leafFracToRemove;
				double stemFracToResidue = stemResidueFrac * stemFracToRemove;
				double flowerFracToResidue = flowerResidueFrac * flowerFracToRemove;
				
				leafFracToRemove = leafFracToRemove - leafFracToResidue;
				stemFracToRemove = stemFracToRemove - stemFracToResidue;
				flowerFracToRemove = flowerFracToRemove - flowerFracToResidue;

				removalFractions.SetFractionToResidue("Leaf", leafFracToResidue);
				removalFractions.SetFractionToResidue("Stem", stemFracToResidue);  
				removalFractions.SetFractionToResidue("Inflorescence", flowerFracToResidue);
				removalFractions.SetFractionToResidue("Root", 0.0);
				removalFractions.SetFractionToResidue("Taproot", 0.0); */
				
				removalFractions.SetFractionRemoved("Leaf", leafFracToRemove);
				removalFractions.SetFractionRemoved("Stem", stemFracToRemove);
				removalFractions.SetFractionRemoved("Inflorescence", stemFracToRemove);
				removalFractions.SetFractionRemoved("Root", 0.0);
				removalFractions.SetFractionRemoved("Taproot", 0.0);
							
				if (defoliationType == defoliationTypes.Cut)
					Chicory.RemoveBiomass("Cut", removalFractions);
				else
					Chicory.RemoveBiomass("Graze", removalFractions);  

// Return dung and urine
				if ((ReturnedDM > 0.0) || (ReturnedN > 0.0))
				{
					NReturnedInDung = ReturnedN * fracN2Dung;
//TODO: add return of dung to surface OM
					
					NReturnedInUrine = ReturnedN - NReturnedInDung;
					if (NReturnedInUrine > 0.0)
					{
//TODO: add return of urine (as fertiliser)
					}
				}
			}
		}
	}
}
```
        MicroClimate: same as Validation.ScottFarm.C17a.Field.MicroClimate
        SurfaceOrganicMatter: same as Sensibility.Base.Field.SurfaceOrganicMatter
        Irrigation
        Fertiliser
        Soil Ramsey: SoilType=Typic Hapludult (US); LocalName=Ramsey fine-loam; State=West Virginia; Country=USA; NaturalVegetation=Forest; Latitude=0; Longitude=0; DataSource=National Cooperative Soil Survey, US
          Comments=Generic soil description based on data of the same sol type from different locations
          Analysis: PHUnits=Water; BoronUnits=HotWater
            Thickness  Rocks  PH  CEC  ParticleSizeSand  ParticleSizeSilt  ParticleSizeClay
            130        2      6   6    45                40                15
            240        3      6   4    60                30                10
            280        3      6   3    75                20                5
            250        8      6   3    80                15                5
            600        8      6   2    80                10                10
          Water
            Thickness  BD    AirDry  LL15   DUL    SAT    KS
            130        1.21  0.016   0.04   0.249  0.499  4800
            240        1.43  0.05    0.056  0.25   0.43   2400
            280        1.33  0.04    0.04   0.248  0.469  840
            250        1.5   0.045   0.045  0.212  0.354  1200
            600        1.5   0.045   0.045  0.212  0.354  2400
            SoilCrop ChicorySoil: LL=[0.04, 0.056, 0.04, 0.045, 0.045]; KL=[0.1, 0.1, 0.08, 0.06, 0.04]; XF=[1, 1, 1, 1, 1]
          SoilWater: residueinterception=0; SummerDate=21-Mar; SummerU=6; SummerCona=3.5; WinterDate=23-Sep; WinterU=6; WinterCona=2.5; DiffusConst=88; DiffusSlope=35; Salb=0.13; CN2Bare=73; CNRed=20; CNCov=0.8; max_pond=0; Thickness=[130, 240, 280, 250, 600]; SWCON=[0.6, 0.5, 0.3, 0.5, 0.5]
          SoilNitrogen: fom_type=[default, manure, mucuna, lablab, shemp, stable]; fract_carb=[0.2, 0.3, 0.54, 0.57, 0.45, 0]; fract_cell=[0.7, 0.3, 0.37, 0.37, 0.47, 0.1]; fract_lign=[0.1, 0.4, 0.09, 0.06, 0.08, 0.9]; wfpsN2N2O_x=[22, 88]; wfpsN2N2O_y=[0.1, 1]
          SoilOrganicMatter: RootCN=40; RootWt=1000; SoilCN=11; EnrACoeff=7.4; EnrBCoeff=0.2; OCUnits=Total
            Thickness  OC   FBiom  FInert
            130        3.5  0.03   0.4
            240        1    0.02   0.6
            280        0.5  0.01   0.75
            250        0.3  0.01   0.9
            600        0.1  0.01   0.99
          InitialWater Initial water: PercentMethod=EvenlyDistributed; FractionFull=0.95
          Sample Initial nitrogen: NO3Units=kgha; NH4Units=kgha; SWUnits=Volumetric; OCUnits=Total; PHUnits=Water
            Thickness  NO3  NH4
            130        20   2
            240        15   2
            280        10   1
            850        5    0.5
        Plant Chicory: ResourceName=SCUM; CropType=SCUM
        Report: same as Sensibility.Base.Field.Report
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