Simulations: Version=2
  Replacements
    Plant Chicory: CropType=SCUM
      Memo TitlePage
        # SCUM: the Simple Crop Uptake Model

        _Hamish Brown and Rob Zyskowski, Plant and Food Research, New Zealand_

        This model has been built using the Plant Modelling Framework (PMF) of [brown_plant_2014] to simulate a range of different crops in simulations where water and nitrogen balance are of interest but a fully mechanistic plant model is not needed or is not available. It is a daily time step implementation of the crop model that is used on the Overseer nutrient balance model [Cichota_etal_2010].  It uses simple sigmoidal functions for estimating daily cover and biomass deltas to give realistic water and nitrogen demands. It does not simulate potential yield, this is specified as an input. Yield will be reduced below the specified potential yield if N or water supplies from the soil are insufficient to meet demand. The model has been paramaterised for simulating water and nitrogen balances of cropping rotations in New Zealand (where over 50 different crop types are grown and it is not feasible to produce full crop models for each of these).  Because of this the model is not as generically applicable as full APSIM crop models.   It may be adapted for other purposes and other crop types may be added but the user will need to keep in mind that because it is a simple model the the parameters might need changing for crops in different locations or for crops sown at different times of the year.  Some sensibility testing or validation is recommended before application in different sutuations.

        SCUM has a simple phenology model which divides the crop growth into three main phases; a vegetative phase when the canopy is expanding, a reproductive phase when product is being formed and a senescing phase when the canopy is contracting.  SCUM has 4 organ classes to represent different biomass components and the real biomass components that these classes represent changes from crop to crop:
           1. A Simple leaf class called <b>Stover</b> which represents the unharvested parts of the plant.  Generally, this represents the leaf and stem components of the crop but for crops where stem and leaf are part of the harvested product (e.g forages and leafy vegetables) than stover is the residual fraction of leaf and stem that is not harvested.
           2. A Generic organ class called <b>Product</b> which represents the plant parts that are harvested and removed from the field.  This could represent grain, fruits, tubers, leaf or stem depending on what sort of crop is being represented.
           3. A Root organ which extracts water and nitrogen from the soil for plant growth and returns biomass to the soil on harvest
           4. A Nodule organ which is only activated and fixes nitrogen for the legume crops.
        An Arbitrator is also included which determines the allocation of drymatter and nitrogen biomass between each of these organs.

        ##Inclusion in APSIM simulations
        A scum crop is included in a simulation the same as any other APSIM crop
         * The SCUM object needs to be dragged or copied from the Crop folder in the tool box into the field of your simulation.
         * It is then planted with a sowing rule
        <pre><code class='language-cs'>
        SCUM.Sow(cultivar: Wheat_Autumn, population: 1, depth: 10, rowSpacing: 150);
        </code></pre>
          * Note that SCUM has no notion of population or rowSpacing but these parameters are required by the Sow method so filler values are provided
          * To specify an expected Expected Yield that differs to the defalt value provided, included the following code in a manager script to be executed on the day of sowing.
        <pre><code class='language-cs'>
         zone.Set("[SCUM].Product.ExpectedYield.Value", ResetValue);
        </code></pre>
        * SCUM can be Harvested, Cut, Grazed and Pruned like other crops.  Defalt proportions of the biomass in each organ are removed from the sysem and/or added to the fields residue pools.  Note that defalt removal fraction for product on harvest is 0 (becaue it is represented with a generic organ) so more appropriate removal fractions should be sepcified in a manager script as follows:
        <pre><code class='language-cs'>
        [EventSubscribe("Commencing")]
        private void OnSimulationCommencing(object sender, EventArgs e)
        {
          Remove = new RemovalFractions(SCUM.Organs);
        }
        [EventSubscribe("DoManagement")]
        private void OnDoManagement(object sender, EventArgs e)
        {
          if (Clock.Today.Date == HarvestDate2)
          {
            Remove.SetFractionRemoved("Product", 1.0);
            Remove.SetFractionRemoved("Stover", 0.05);
            Remove.SetFractionToResidue("Stover",0.95)
            SCUM.Harvest(Remove);
            SCUM.EndCrop();
          }
        }
         </code></pre>
        * A Remove class as shown above can be sent with Harvest, Cut, Graze and Prune events to specificy the proportions of removals.
         * Once a crop has been ended the field is open to plant another crop using another APSIM crop model or sowing another SCUM crop.
      Phenology
        AirTemperatureFunction ThermalTime
          Memo Description
            Progression through each of the phenological stages is driven by thermal time.  As temperature increases from zero to 30 degrees, development acelerates and then slows down again above 30 degress
          XYPairs: X=[5, 30, 40]; Y=[0, 30, 0]
        Memo Description1
          As ThermalTime accumulates the crop progresses through the following phases:
        GerminatingPhase Germinating: Start=Sowing; End=Germination
        EmergingPhase Emerging: Start=Germination; End=Emergence; ShootLag=75; ShootRate=0.12
          VariableReference ThermalTime: VariableName=[Phenology].ThermalTime.Value
          Memo Description
            Currently the duration of the Emergence phase is set to zero because the period of zero cover and biomass production following sowing is accounted for in the cover and biomass accumulation functions.  However this phase is included if parameterisations of other crops in the future wish to give this phase a duration.
        GenericPhase Vegetative: Start=Emergence; End=StartInductive
          Memo Description
            During this phase the plant only partitions biomass to Root and Stover (leaf and stem) Organs
          Constant Target: Value=10; Units=<sup>o</sup>Cd
          AddFunction ThermalTime
            AirTemperatureFunction Vernalisation
              Memo Description
                Progression through each of the phenological stages is driven by thermal time.  As temperature increases from zero to 30 degrees, development acelerates and then slows down again above 30 degress
              XYPairs: X=[0, 4, 6, 12]; Y=[0, 1, 1, 0]
          MaximumFunction Devernalisation
            MultiplyFunction
              VariableReference ThermalTime: VariableName=[Phenology].AccumulatedTT
              Constant: Value=-1
            AirTemperatureFunction Devernalisation
              Memo Description
                Progression through each of the phenological stages is driven by thermal time.  As temperature increases from zero to 30 degrees, development acelerates and then slows down again above 30 degress
              XYPairs: X=[0, 4, 5]; Y=[0, 0, -10]
        GenericPhase Inductive: Start=StartInductive; End=StartReproductive
          Constant Target: Value=500; Units=<sup>o</sup>Cd
          VariableReference ThermalTime: VariableName=[Phenology].ThermalTime.Value
        GenericPhase Reproductive: Start=StartReproductive; End=EndReproductive
          Memo Description
            During this phase the plant is partitioning biomass to Root, Stover and Product organs.
          Constant Target: Value=600; Units=<sup>o</sup>Cd
          VariableReference ThermalTime: VariableName=[Phenology].ThermalTime.Value
            VariableReference ThermalTime: VariableName=[Phenology].ThermalTime.Value
        GotoPhase: Start=EndReproductive; End=EndReproductive; FractionComplete=0; PhaseNameToGoto=Vegetative
      OrganArbitrator Arbitrator: NArbitrationOption=RelativeAllocation; DMArbitrationOption=RelativeAllocation
      SimpleLeaf Leaf: CohortsInitialised=false; Albedo=0.18; Gsmax=0.015; R50=150
        zero: BiomassYesterday, PlantAppearedLeafNo, LAI, Height, FRGR, PotentialEP, K, KDead, DeltaBiomass, LAIDead, WaterAllocation
        Memo Description
          Stover represents any part of the crop that is not removed at harvest (i.e not part of the product).
        Constant InitialDM: Value=0.6
        RUEModel Photosynthesis
          Constant RUE: Value=0.5
          RUECO2Function FCO2: PhotosyntheticPathway=C3
          LinearInterpolationFunction FN: XProperty=[Leaf].Fn
            XYPairs: X=[0, 0.5, 1, 1.5]; Y=[0, 0.2, 1, 1]
          WeightedTemperatureFunction FT: MaximumTemperatureWeighting=0.75
            XYPairs: X=[2, 12, 24, 34]; Y=[0, 1, 1, 0]
          LinearInterpolationFunction FW: XProperty=[Leaf].Fw
            XYPairs: X=[0, 0.8, 1, 1.5]; Y=[0, 1, 1, 1]
          LinearInterpolationFunction FVPD: XProperty=[Leaf].Photosynthesis.VPD
            XYPairs: X=[0, 10, 50]; Y=[1, 1, 1]
          VariableReference RadnInt: VariableName=[Leaf].RadIntTot
        Biomass Live
        Biomass Dead
        DivideFunction FRGRFunction
          VariableReference Photosynthesis: VariableName=[Leaf].Photosynthesis.Value
          MultiplyFunction PotentialPhotosynthesis
            VariableReference PotentialRUE: VariableName=[Leaf].Photosynthesis.RUE.Value
            MaximumFunction Maximum
              VariableReference RadnInt: VariableName=[Leaf].RadIntTot
              Constant MinRadn: Value=1E-05
        PartitionFractionDemandFunction DMDemandFunction
          Memo Description
            DM demand is based on a simple partitioning coefficients.  At harvest the biomass partitioned to the stover = TotalDM * (1 - RootProportion) * (1 - Harvest index).  However the partitioningFraction is more complicated that this as it partitions more biomass to the stover in the CanopyExpanding Phase and less in the Yield increasing phase to give realistic patterns of accumulation of biomass in the Stover and Product over the duration of the crop
          PhaseLookup PartitionFraction
            PhaseLookupValue: Start=Emergence; End=EndReproductive
              Constant: Value=0.7
        Constant ExtinctionCoefficientFunction: Value=0.8
          Memo Description
            The extinction coefficient is used to calculate a LAI value (needed by MicroClimate) from the canopy cover
        AddFunction LAIFunction
          MultiplyFunction LAIFunction
            VariableReference LeafWeight: VariableName=[Leaf].Live.Wt
            Constant SLA: Value=0.02; Units=m^2/g
          Constant: Value=0.1
        LinearInterpolationFunction HeightFunction: XProperty=[Phenology].Stage
          XYPairs: X=[3, 5, 6]; Y=[100, 800, 1200]
        Constant MaximumNConc: Value=0.04
        Constant MinimumNConc: Value=0.02
        PhaseLookupValue NitrogenDemandSwitch: Start=Emergence; End=EndReproductive
          Constant One: Value=1
        Folder BiomassRemovalDefaults
          OrganBiomassRemovalType Harvest: FractionRemoved=0; FractionToResidue=0.3
          OrganBiomassRemovalType Cut: FractionRemoved=0.8; FractionToResidue=0
          OrganBiomassRemovalType Prune: FractionRemoved=0; FractionToResidue=0.6
          OrganBiomassRemovalType Graze: FractionRemoved=0.6; FractionToResidue=0.1
        Constant SenescenceRateFunction: Value=0.01
        Constant DetachmentRateFunction: Value=0
      GenericAboveGroundOrgan Stem
        Memo Description
          It is the biomass that is removed from the crop at harvest and may include grain, root, leaf, stem, pod or any other organ type depending on the type of crop and how it is harvested.
        Biomass Live
        Biomass Dead
        Constant MaximumNConc: Value=0.012
        Constant MinimumNConc: Value=0.008
        PartitionFractionDemandFunction DMDemandFunction
          PhaseLookup PartitionFraction
            PhaseLookupValue YieldIncreasing: Start=StartReproductive; End=EndReproductive
              Constant: Value=0.1
        Constant DryMatterContent: Value=0.4
          Memo Description
            This is the dry matter content of the harvested yield and is used to convert fresh yield into *DryYield* which are subsequently used in determining *Ymax* (total biomass production), daily dry matter production, *HarvestIndex* and the *PartitioningFraction* of each organ
        Folder BiomassRemovalDefaults
          OrganBiomassRemovalType Harvest: FractionRemoved=0.5; FractionToResidue=0.1
          OrganBiomassRemovalType Cut: FractionRemoved=0.8; FractionToResidue=0
          OrganBiomassRemovalType Prune: FractionRemoved=0; FractionToResidue=0.6
          OrganBiomassRemovalType Graze: FractionRemoved=0.6; FractionToResidue=0.2
      Root: InitialDM=0.3; SpecificRootLength=40000; NuptakeSupply=0
        Memo Description
          The root organ demands and is partitioned N and DM and its depth increases through time to provide a water uptake supply
        CompositeBiomass Live: Propertys=[[Root].LayerLive]
        CompositeBiomass Dead: Propertys=[[Root].LayerDead]
        Constant SoilWaterEffect: Value=1
        Constant MaxDailyNUptake: Value=12
        Constant SenescenceRate: Value=0
        Constant MaximumNConc: Value=0.009
        Constant MinimumNConc: Value=0.009
        PhaseBasedSwitch NitrogenDemandSwitch: Start=Germination; End=EndReproductive
        Constant TemperatureEffect: Value=1
        Constant MaximumRootDepth: Value=1500
        MultiplyFunction RootFrontVelocity
          Constant RootFrontVelocity: Value=0.1
          VariableReference ThermalTime: VariableName=[Phenology].ThermalTime.Value
        PhaseLookupValue PartitionFraction: Start=Emergence; End=EndReproductive
          Constant RootProportion: Value=0.2
            Memo Description
              This is the proportion of total biomass that is paritioned into the roots and is used to set the partitioning fraction for the roots
        Constant KLModifier: Value=1
        LinearInterpolationFunction KNO3: XProperty=[Root].RootLengthDenisty
          XYPairs: X=[0, 0.003]; Y=[0.02, 0.02]
        LinearInterpolationFunction KNH4: XProperty=[Root].RootLengthDenisty
          XYPairs: X=[0, 0.003]; Y=[0, 0]
        Folder BiomassRemovalDefaults
          OrganBiomassRemovalType Harvest: FractionRemoved=0; FractionToResidue=0.2
          OrganBiomassRemovalType Cut: FractionRemoved=0; FractionToResidue=0.3
          OrganBiomassRemovalType Prune: FractionRemoved=0; FractionToResidue=0.1
          OrganBiomassRemovalType Graze: FractionRemoved=0; FractionToResidue=0.15
        LinearInterpolationFunction NUptakeSWFactor: XProperty=[Root].RWC
          XYPairs: X=[0, 1]; Y=[0, 1]
      CompositeBiomass Total
        Propertys=[[Leaf].Live, [Leaf].Dead, [Stem].Live, [Stem].Dead, [Root].Live, [Root].Dead]
      CompositeBiomass AboveGround: Propertys=[[Leaf].Live, [Leaf].Dead, [Stem].Live, [Stem].Dead]
        Memo
          The AboveGround composite biomass object includes Stover and Product organs.
      Cultivar Puna
      Cultivar Choice
  Memo TitlePage
    # The APSIM Chicory Model
  DataStore
  Folder Soils
    Soil Iversen 12: SoilType=Aquic Haplustept (US), Mottled Inmature Pallic (NZ); Site=Lincoln University: Iversen Field Paddock 12; NearestTown=Lincoln; Region=South East Queensland; NaturalVegetation=Grassland, mainly Qld bluegrass; Latitude=0; Longitude=0
      InitialWater Initial water: PercentMethod=FilledFromTop; FractionFull=0.87
      Water
        Thickness  BD    AirDry  LL15   DUL    SAT
        200        1.2   0.08    0.165  0.348  0.37
        100        1.3   0.169   0.169  0.358  0.37
        100        1.4   0.173   0.173  0.335  0.37
        100        1.4   0.14    0.14   0.317  0.37
        100        1.4   0.114   0.114  0.318  0.37
        100        1.45  0.107   0.107  0.329  0.37
        100        1.45  0.106   0.106  0.336  0.37
        100        1.45  0.119   0.119  0.356  0.37
        100        1.5   0.181   0.181  0.362  0.37
        100        1.5   0.176   0.176  0.352  0.37
        100        1.5   0.167   0.167  0.333  0.37
        100        1.55  0.152   0.152  0.303  0.37
        100        1.55  0.164   0.164  0.328  0.37
        100        1.55  0.177   0.177  0.353  0.37
        SoilCrop ChickpeaSoil
          LL=[0.165, 0.169, 0.173, 0.14, 0.114, 0.107, 0.106, 0.119, 0.181, 0.176, 0.167, 0.152, 0.164, 0.177]
          KL=[0.1, 0.1, 0.08, 0.06, 0.04, 0.02, 0.01, 0, 0, 0, 0, 0, 0, 0]
          XF=[1, 1, 1, 1, 1, 1, 1, 0, 0, 0, 0, 0, 0, 0]
      SoilWater: residueinterception=0; SummerDate=21-Sep; SummerU=6; SummerCona=3.5; WinterDate=23-Mar; WinterU=6; WinterCona=2.5; DiffusConst=88; DiffusSlope=35; Salb=0.13; CN2Bare=73; CNRed=20; CNCov=0.8; max_pond=0
        Thickness=[200, 100, 100, 100, 100, 100, 100, 100, 100, 100, 100, 100, 100, 100]
        SWCON=[0.7, 0.7, 0.7, 0.7, 0.7, 0.7, 0.7, 0.7, 0.7, 0.7, 0.7, 0.7, 0.7, 0.7]
      SoilNitrogen: fom_type=[default, manure, mucuna, lablab, shemp, stable]; fract_carb=[0.2, 0.3, 0.54, 0.57, 0.45, 0]; fract_cell=[0.7, 0.3, 0.37, 0.37, 0.47, 0.1]; fract_lign=[0.1, 0.4, 0.09, 0.06, 0.08, 0.9]; wfpsN2N2O_x=[22, 88]; wfpsN2N2O_y=[0.1, 1]
      SoilOrganicMatter: RootCN=40; RootWt=1000; SoilCN=11; EnrACoeff=7.4; EnrBCoeff=0.2; OCUnits=Total
        Thickness  OC    FBiom  FInert
        200        2.7   0.03   0.4
        100        1     0.02   0.6
        100        0.45  0.01   0.7
        100        0.3   0.01   0.8
        100        0.2   0.01   0.9
        100        0.2   0.01   0.9
        100        0.2   0.01   0.9
        100        0.2   0.01   0.9
        100        0.2   0.01   1
        100        0.2   0.01   1
        100        0.2   0.01   1
        100        0.2   0.01   1
        100        0.2   0.01   1
        100        0.2   0.01   1
      Analysis: PH=[6, -, -, -, -, -, -, -, -, -, -, -, -, -]; PHUnits=Water; BoronUnits=HotWater
        Thickness=[200, 100, 100, 100, 100, 100, 100, 100, 100, 100, 100, 100, 100, 100]
      Sample Initial nitrogen: NO3Units=ppm; NH4Units=ppm; SWUnits=Volumetric; OCUnits=Total; PHUnits=Water
        Thickness  NO3     NH4
        200        15.491  0.093
        100        15.491  0.093
        100        15.491  0.093
        100        15.491  0.093
        100        15.491  0.093
        100        15.491  0.093
        100        15.491  0.093
        100        15.491  0.093
        100        15.491  0.093
        100        15.491  0.093
        100        15.491  0.093
        100        15.491  0.093
        100        15.491  0.093
        100        15.491  0.093
  Folder Sensibility
    Simulation Base: Area=0; Slope=0
      Clock: StartDate=2008-07-01; EndDate=2010-05-30
      Weather: FileName=%root%\Prototypes\Chicory\Ruakura.met
      Summary
      SoilArbitrator Soil Arbitrator
      Zone Field: Area=1; Slope=0
        Folder Management
          Manager FertiliseTopupOnCriticalNO3Level
            fertCriteria = 200
            fertCritical = 100
            fertMinDays = 30
```csharp
// Auto fertilise per Lee model in Apsim classic

using System;
using Models.Core;
using Models.PMF;
using Models.Soils;
using APSIM.Shared.Utilities;
namespace Models
{
	[Serializable]
	public class Script : Model
	{
		[Link] Clock Clock;
		[Link] Fertiliser fertiliser;
		[Link] ISummary summary = null;
		[Link] Soil soil;

		private DateTime lastApplicationDate;

		[Description("Maximum Amount of NO3 required in top 3 layers (kg/ha)")]
		public double fertCriteria { get; set; }

		[Description("Critical Amount of NO3 in top 3 layers (kg/ha)")]
		public double fertCritical { get; set; }

		[Description("Minimum period between applications (days)")]
		public double fertMinDays { get; set; }

		
		[EventSubscribe("DoManagement")]
		private void OnDoManagement(object sender, EventArgs e)
		{						
			double NO3_available = soil.SoilNitrogen.NO3[0] + soil.SoilNitrogen.NO3[1] + soil.SoilNitrogen.NO3[2];
						
			double daysSinceLastApplication = (Clock.Today - lastApplicationDate).TotalDays;
			
			if (daysSinceLastApplication >= fertMinDays)
			{			
				if (NO3_available <= fertCritical)
				{
					double nDeficit = fertCriteria - NO3_available;				
					fertiliser.Apply(nDeficit, Fertiliser.Types.UreaN, 50);	// 50mm per LEE
					lastApplicationDate = Clock.Today;
					//summary.WriteMessage(this, "Applied " + nDeficit + " (was " + NO3_available.ToString() + ")");
					
				}
			}
		}
	}
}
```
          Manager AutomaticIrrigation
            Irrigation_Yes_No = yes
            Season_Start = 1-Oct
            Season_End = 30-Jul
            Season_Allocation = 10000
            Refull_Frac = 0.9
            Trigger_Frac = 0.75
            Return_days = 3
            Maximum_Irrigation_Amount = 30
            Top_Depth = 300
```csharp
using System;
using Models.Core;
using Models.PMF;
using Models.Soils;
using System.Xml.Serialization;
using Models.PMF;
using APSIM.Shared.Utilities;

        
namespace Models
{
	[Serializable] 
	[System.Xml.Serialization.XmlInclude(typeof(Model))]
	public class Script : Model
	{
		//Communication to other modules
		[Link] ISummary summary = null;
		[Link] Irrigation Irrigation;
		[Link] Clock Clock;
		[Link] Soil Soil;
		[Link] Plant SCUM;
	   
		//User inputs from properties tab
		[Description("Irrigation on (yes or no)")]
		public string Irrigation_Yes_No { get; set; }
		[Description("SeasonStart (dd-MMM)")]
		public string Season_Start { get; set; }
		[Description("SeasonEnd (dd-MMM)")]
		public string Season_End { get; set; }
		[Description("Season Allocation (mm)")]
		public double Season_Allocation { get; set; }
		[Description("% PAWC to refill soil to (0-1)")]
		public double Refull_Frac { get; set; }
		[Description("% PAWC to trigger irrigation (0-1)")]
		public double Trigger_Frac { get; set; }
		[Description("Minimum days for irrigation to return")]
		public double Return_days { get; set; }
		[Description("Maximum irrigation application (mm)")]
		public double Maximum_Irrigation_Amount { get; set; }
		[Description("Depth to calculate PAWC (mm)")]
		public double Top_Depth { get; set; }
	   
		//Class members
		[XmlIgnore] private bool IrrigationIsAvailable { get; set; }
		[XmlIgnore] public bool SeasonIsOpen { get; set; }
		[XmlIgnore] private bool CropIsActive { get; set; }
		[XmlIgnore] private bool IrrigatorIsAvailable { get; set; }
		[XmlIgnore] private bool SoilIsDry { get; set; }
		[XmlIgnore] public double Top_DUL { get; set; }
		[XmlIgnore] public double Top_Refull { get; set; }
		[XmlIgnore] public double Top_Trigger { get; set; }
		[XmlIgnore] public double Top_LL { get; set; }
		[XmlIgnore] public double Top_SW { get; set; }
		[XmlIgnore] public double Accumulated_depth { get; set; }
		[XmlIgnore] public double Days_since_irrigation { get; set; }
		[XmlIgnore] public double Amount_to_apply { get; set; }
		[XmlIgnore] public double Season_Application { get; set; }
		
		//Variables for date logic testing
		[XmlIgnore] public string StartString { get; set; }
		[XmlIgnore] public string EndString { get; set; }
		[XmlIgnore] public DateTime StartDate { get; set; }
		[XmlIgnore] public DateTime EndDate { get; set; }
		[XmlIgnore] public int TodayYear { get; set; }
		[XmlIgnore] public int TodayMonth { get; set; }
		[XmlIgnore] public int StartMonth { get; set; }
		[XmlIgnore] public int EndMonth { get; set; }
		[XmlIgnore] public int TodayDay { get; set; }
		[XmlIgnore] public int StartDay { get; set; }
		[XmlIgnore] public int EndDay { get; set; }
	   
	
		//Calculate static soil variables
		[EventSubscribe("StartOfSimulation")]
		private void OnStartOfSimulation(object sender, EventArgs e)
		{   
			//Calculated soil water variables
			Accumulated_depth = 0;
			for (int layer = 0; Accumulated_depth < Top_Depth; layer++)
			{
				Top_LL += Soil.SoilWater.LL15mm[layer];
				Top_DUL += Soil.SoilWater.DULmm[layer];
				Accumulated_depth += Soil.SoilWater.Thickness[layer];
			}
			Top_Refull = Top_LL + (Top_DUL - Top_LL) * Refull_Frac;
		}
	   
	  
		//Determine daily requirement for irrigation
		[EventSubscribe("StartOfDay")]
		private void OnStartOfDay(object sender, EventArgs e)
		{ 
			//Can we irrigate?
			IrrigationIsAvailable = false; 
			if (Irrigation_Yes_No == "yes")
				IrrigationIsAvailable = true; 
	
			//Are we Allowed to Irrigate?
			TodayYear = Clock.Today.Year;
			StartString = Season_Start + "-" + TodayYear.ToString();
			EndString = Season_End + "-" + TodayYear.ToString();
			StartDate = DateTime.Parse(StartString);
			EndDate = DateTime.Parse(EndString);
			TodayMonth = Clock.Today.Month;
			TodayDay = Clock.Today.Day;
			StartDay = StartDate.Day;
			StartMonth = StartDate.Month;
			EndDay = EndDate.Day;
			EndMonth = EndDate.Month;
		  
			SeasonIsOpen = false;
			//if we are in the spring and after the start date then yes
			if ((Clock.Today.Month > 6) && (Clock.Today >= StartDate))
				SeasonIsOpen = true;
			//if we are in the autumn and before the end date then yes
			if ((Clock.Today.Month <= 6) && (Clock.Today <= EndDate))
				SeasonIsOpen = true;
		  
			//Is there a crop in the ground that needs irrigation?
			CropIsActive = false;
			if ((SCUM.Phenology.Stage >= 3.0) && (SCUM.Phenology.Stage < 6.0))
				CropIsActive = true;
	      
			//Is the irrigator available?
			IrrigatorIsAvailable = false;
			Days_since_irrigation += 1;
			if (Days_since_irrigation >= Return_days)
				IrrigatorIsAvailable = true;
	      
			//Is the soil dry enough to require irrigation?
			SoilIsDry = false;
			double CurrentRootDepth = 0;
			double RootDepth = SCUM.Root.Depth;
			CurrentRootDepth = Math.Max(RootDepth, CurrentRootDepth);
	      
			double RelativeRootDepth = Math.Min(1.0, CurrentRootDepth / Top_Depth);
			Top_Trigger = Math.Min(Top_Refull, Top_DUL - (Top_DUL - Top_LL) * RelativeRootDepth * (1 - Trigger_Frac)); 
	      
			Accumulated_depth = 0;
			Top_SW = 0;
			for (int layer = 0; Accumulated_depth < Top_Depth; layer++)
			{
				Top_SW += Soil.SoilWater.SWmm[layer];
				Accumulated_depth += Soil.SoilWater.Thickness[layer];
			}
			if (Top_SW <= Top_Trigger)
				SoilIsDry = true;
	            
			//Lets bloody well irrigate then!!!!
			if ((IrrigationIsAvailable) && (SeasonIsOpen) && (CropIsActive) && (IrrigatorIsAvailable) && (SoilIsDry)) //The conditions are rife for irrigation
			{
				Amount_to_apply = Math.Min(Top_Refull - Top_SW, Maximum_Irrigation_Amount);
				Amount_to_apply = Math.Min(Amount_to_apply, Season_Allocation - Season_Application); 
				Amount_to_apply = Math.Max(Amount_to_apply, 0.0);
				Irrigation.Apply(Amount_to_apply);
				Days_since_irrigation = 0;
				Season_Application += Amount_to_apply;
				summary.WriteMessage(this, "Automatic Irrigation");
            
			}
		}
	}
}
```
          Manager ExtraVariables
```csharp
using System;
using Models.Core;
using System.Collections.Generic;
using System.Text;
using Models.Soils;
using Models.PMF;
using Models;
using System.Xml.Serialization;
using APSIM.Shared.Utilities;

namespace Models
{
	[Serializable] 
	public class Script : Model
	{
		[Link] Clock Clock;
		[Link] Soils.Soil Soil;
		[Link] Models.SurfaceOM.SurfaceOrganicMatter SOM;
		[Link] Weather Met;
		[Link] Fertiliser Fert;
		[Link] Irrigation Irrig;
		[Link] Plant Chicory;
		[Link] Zone zone;
					
		[XmlIgnore] public bool InitialDay { get; set; }
		
		[XmlIgnore] public double AccumPlantN { get; set; }
		[XmlIgnore] public double AccumMineralisation { get; set; }
		[XmlIgnore] public double AccumDenit { get; set; }
		[XmlIgnore] public double AccumFert { get; set; }
		[XmlIgnore] public double AccumLeach { get; set; }
		[XmlIgnore] public double AccumDetach { get; set; }
		[XmlIgnore] public double DeltaSoilOMN { get; set; }
		[XmlIgnore] public double DeltaSurfaceOMN { get; set; }
		[XmlIgnore] public double DeltaSoilMineralN { get; set; }
		[XmlIgnore] public double SoilNitrogenContent { get; set; }
		
		[XmlIgnore] public double AccumEO { get; set; }
		[XmlIgnore] public double AccumEP { get; set; }
		[XmlIgnore] public double AccumES { get; set; }
		[XmlIgnore] public double AccumDrainage { get; set; }
		[XmlIgnore] public double AccumRunoff { get; set; }
		[XmlIgnore] public double AccumOutflowLat { get; set; }
		[XmlIgnore] public double AccumIrrigation { get; set; }
		[XmlIgnore] public double AccumRainfall { get; set; }
		[XmlIgnore] public double SoilWaterDeficit { get; set; }
	
		[XmlIgnore] public double  InitialSoilOMN { get; set; }
		[XmlIgnore] public double  InitialSurfaceOMN { get; set; }
		[XmlIgnore] public double  InitialMineralN { get; set; }
		
		[XmlIgnore] public double SWC { get; set; }
		[XmlIgnore] public double DUL { get; set; }
		[XmlIgnore] public double OutFlowLat { get; set; }

		[XmlIgnore] public double FomN { get; set; }
		[XmlIgnore] public double BiomN { get; set; }
		[XmlIgnore] public double HumN { get; set; }
		[XmlIgnore] public double OrganicN { get; set; }
		[XmlIgnore] public double NO3N { get; set; }
		[XmlIgnore] public double NH4N { get; set; }
		[XmlIgnore] public double UreaN { get; set; }
		[XmlIgnore] public double MineralN { get; set; }
		[XmlIgnore] public double DltNMinRes { get; set; }
		[XmlIgnore] public double DltNMinTot { get; set; }
		
		[EventSubscribe("Commencing")]
		private void OnSimulationCommencing(object sender, EventArgs e)
		{
			InitialDay = true;
		}
		
		[EventSubscribe("DoManagement")]
		private void OnDoManagement(object sender, EventArgs e)
		{
			//!!!!!! Nitrogen balance components !!!!!!
			//!!!!!!^^^^^^^^^^^^^^^^^^^^^^^^^^^^^!!!!!!
			FomN = MathUtilities.Sum(Soil.SoilNitrogen.FOMN);
			HumN = MathUtilities.Sum(Soil.SoilNitrogen.HumicN);
			BiomN = MathUtilities.Sum(Soil.SoilNitrogen.MicrobialN);
			OrganicN = FomN + HumN + BiomN;
			NO3N = MathUtilities.Sum(Soil.NO3N);
			NH4N = MathUtilities.Sum(Soil.NH4N);
			UreaN = MathUtilities.Sum(Soil.SoilNitrogen.urea);
			MineralN = NO3N + NH4N + UreaN; 
			DltNMinRes = MathUtilities.Sum(Soil.SoilNitrogen.dlt_n_min_res);
			DltNMinTot = MathUtilities.Sum(Soil.SoilNitrogen.MineralisedN);
			int layers = Soil.Thickness.Length;
			if (InitialDay == true)
			{
				InitialSurfaceOMN = SOM.N;
				InitialSoilOMN = OrganicN;
				InitialMineralN = MineralN;
				InitialDay = false;
			}
			DeltaSurfaceOMN = SOM.N - InitialSurfaceOMN;
			AccumLeach = AccumLeach - Soil.SoilWater.LeachNH4 - Soil.SoilWater.LeachNO3 - Soil.SoilWater.LeachUrea; //Fails
			AccumMineralisation += MathUtilities.Sum(Soil.SoilNitrogen.MineralisedN);
			AccumDenit -= MathUtilities.Sum(Soil.SoilNitrogen.Denitrification);
			AccumPlantN -= (double)zone.Get("Chicory.Root.NUptake");
			DeltaSoilOMN = OrganicN - InitialSoilOMN;
			DeltaSoilMineralN = MineralN - InitialMineralN;
			SoilNitrogenContent = MineralN;
			
			//!!!!!! Water balance components !!!!!!
			//!!!!!!^^^^^^^^^^^^^^^^^^^^^^^^^^!!!!!!

			AccumRainfall += Met.Rain;
			//AccumEP -= (double)zone.Get("[Chicory].Leaf.Transpiration");
			AccumEP -= (double)zone.Get("Chicory.Root.WaterUptake");
			SoilWaterDeficit = (SWC - DUL);
			double OutFlowLat = MathUtilities.Sum(Soil.SoilWater.outflow_lat);
			AccumOutflowLat -= OutFlowLat;
		}
		
		[EventSubscribe("DoManagementCalculations")]
		private void OnDoManagementCalculations(object sender, EventArgs e)
		{
			FomN = MathUtilities.Sum(Soil.SoilNitrogen.FOMN);
			HumN = MathUtilities.Sum(Soil.SoilNitrogen.HumicN);
			BiomN = MathUtilities.Sum(Soil.SoilNitrogen.MicrobialN);
			AccumFert += Fert.NitrogenApplied;
			AccumIrrigation += Irrig.IrrigationApplied;
			
			
			AccumEO -= Soil.SoilWater.Eo;
			AccumES -= Soil.SoilWater.Es; 
			AccumDrainage -= Soil.SoilWater.Drainage;
			AccumRunoff -= Soil.SoilWater.Runoff;
			SWC = MathUtilities.Sum(Soil.SoilWater.SWmm);
			DUL = MathUtilities.Sum(Soil.SoilWater.DULmm);
		}
	}
}
```
          Operations Sowing
            2008-10-23  [Chicory].Sow(population:200, cultivar:"Choice", depth:10, rowSpacing:150);
        MicroClimate: a_interception=0; b_interception=1; c_interception=0; d_interception=0; soil_albedo=0.23; air_pressure=1010; soil_emissivity=0.96; sun_angle=15; soil_heat_flux_fraction=0.4; night_interception_fraction=0.5; windspeed_default=3; refheight=2; albedo=0.26; emissivity=0.96; gsmax=0.01; r50=200
        SurfaceOrganicMatter surface organic matter: PondActive=no; ReportAdditions=no; ReportRemovals=no; PoolName=maize; type=maize; mass=500; standing_fraction=0; cnr=65; CriticalResidueWeight=2000; OptimumDecompTemp=20; MaxCumulativeEOS=20; CNRatioDecompCoeff=0.277; CNRatioDecompThreshold=25; TotalLeachRain=25; MinRainToLeach=10; CriticalMinimumOrganicC=0.004; DefaultCPRatio=0; DefaultStandingFraction=0; StandingExtinctCoeff=0.5; FractionFaecesAdded=0.5
          Pools:
            {PoolName=maize, ResidueType=maize, Mass=500, CNRatio=65, StandingFraction=0}
          ResidueTypes: LoadFromResource=ResidueTypes
          TillageTypes TillageTypesList
        Irrigation
        Fertiliser
        Plant Chicory: ResourceName=SCUM; CropType=SCUM
        Soil HorotiuSoil: SoilType=Typic Udivitrand (US), Typic Orthic Allophanic Soil (NZ); LocalName=Horotiu silt loam; Site=Ruakura; NearestTown=Hamilton; Country=New Zealand; Latitude=0; Longitude=0; DataSource=Based primarily on Close et al, 2003
          Analysis: PHUnits=Water; BoronUnits=HotWater
            Thickness  Rocks  PH  CEC   ParticleSizeSand  ParticleSizeSilt  ParticleSizeClay
            200        0      6   23.1  47                33                20
            200        0      6   17.2  65                17                19
            130        2      6   12.4  76                13                11
            140        5      6   10    84                10                7
            380        5      6   7.2   88                8                 5
            230        19     6   3.1   91                6                 3
            220        33     6   1.6   94                5                 1
          Water
            Thickness  BD    AirDry  LL15  DUL   SAT   KS
            200        0.88  0.1     0.22  0.42  0.59  310
            200        0.85  0.18    0.18  0.36  0.62  2500
            130        1.03  0.18    0.18  0.33  0.56  4000
            140        1.11  0.17    0.17  0.31  0.52  5000
            380        1.11  0.08    0.08  0.21  0.52  10000
            230        1.03  0.05    0.05  0.14  0.46  15000
            220        1.03  0.04    0.04  0.12  0.39  20000
            SoilCrop ChickpeaSoil: LL=[0.22, 0.18, 0.18, 0.17, 0.08, 0.05, 0.04]; KL=[0.1, 0.08, 0.05, 0.02, 0.01, 0.01, 0]; XF=[1, 1, 1, 1, 1, 1, 1]
          SoilWater: residueinterception=0; SummerDate=21-Sep; SummerU=6; SummerCona=3.5; WinterDate=23-Mar; WinterU=6; WinterCona=2.5; DiffusConst=88; DiffusSlope=35; Salb=0.2; CN2Bare=0.7; CNRed=20; CNCov=0.8; max_pond=0; Thickness=[200, 200, 130, 140, 380, 230, 220]; SWCON=[0.55, 0.6, 0.7, 0.7, 0.75, 0.8, 0.8]
          SoilNitrogen: fom_type=[default, manure, mucuna, lablab, shemp, stable]; fract_carb=[0.2, 0.3, 0.54, 0.57, 0.45, 0]; fract_cell=[0.7, 0.3, 0.37, 0.37, 0.47, 0.1]; fract_lign=[0.1, 0.4, 0.09, 0.06, 0.08, 0.9]; wfpsN2N2O_x=[22, 88]; wfpsN2N2O_y=[0.1, 1]
          SoilOrganicMatter: RootCN=40; RootWt=1000; SoilCN=12.5; EnrACoeff=7.4; EnrBCoeff=0.2; OCUnits=Total
            Thickness  OC    FBiom  FInert
            200        8     0.08   0.57
            200        1.88  0.04   0.6
            130        0.93  0.02   0.62
            140        0.43  0.01   0.65
            380        0.13  0.01   0.7
            230        0.1   0.01   0.8
            220        0.07  0.01   0.85
          InitialWater Initial water: PercentMethod=FilledFromTop; FractionFull=1
          Sample Initial nitrogen: NO3Units=ppm; NH4Units=ppm; SWUnits=Volumetric; OCUnits=Total; PHUnits=Water
            Thickness  NO3  NH4
            200        15   0.5
            200        10   0.2
            600        5    0.093
            500        1    0.093
        Report: EventNames=[Clock].DoReport
          VariableNames:
            [Clock].Today as Date
            [Weather].Rain as Rain
            [Irrigation].IrrigationApplied as Irrigation
            sum([HorotiuSoil].SoilWater.SWmm) as SoilWater
      Memo Caption
        # SCUM: the Simple Crop Uptake Model

        _Hamish Brown and Rob Zyskowski, Plant and Food Research, New Zealand_

        This model has been built to simulate a range of different crops in simulations where water and nitrogen balance are of interest but a fully mechanistic plant model is not needed. It is a daily time step implementation of the crop model that is used on the Overseer nutrient balance model (Cichota_etal_2010).  It uses simple sigmoidal functions for estimating daily cover and biomass deltas to give realistic water and nitrogen demands. It does not simulate potential yield, this is specified as an input. Yield will be reduced below the specified potential yield if N or water supplies from the soil are insufficient to meet demand. The model has been paramaterised for simulating water and nitrogen balances of cropping rotations in New Zealand (where over 50 different crop types are grown and it is not feasible to produce full crop models for each of these). It may be adapted for other purposes and other crop types may be added but the user will need to keep in mind that it is empirical and the parameters might need changing for crops from different locations.
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