Simulations: Version=170
  DataStore
  Folder Replacements
    Plant DEROPAPY: PlantType=DEROPAPY
      Memo TitlePage
        # DEROPAPY

        This model has been built using the Plant Modelling Framework (PMF) of [brown_plant_2014] to provide a simple representation of perennial tree and vine crops.  Its scope is intended for use in water and nitrogen balance studies where the focus is on soil processes and a very simple crop is adequate.  The model has simple functions for estimating the growht and nitrogen uptake of different organs and anohter simple function for predicting canopy size so water uptake can be predicted.

        The model has currently been parameterised and tested for 4 genotpes; Apple, Kiwifruit, Grape and Peach.

        DEROPAPY has a simple phenology model that breaks the annual growth cycle into 4 phases:

           1. The <b>Dormancy</b> phase when the tree is a bare trunk, using no water, growing no biomass and taking up no Nitrogen
           2. The <b>CanopyExpansion</b> phase which occurs in the spring when the bulk of biomass assimilation is partitioned to the new leaves with smaller proportions going to trunk and root growth
           3. The <b>FruitGrowth</b> phase where the bulk of biomass assimilation is partitioned to the growing fruit with smaller proportions going to leaf, trunk and root growth
           4. The <b>LeafFall</b> phase where any further biomass assimilated is partitioned to the trunk and roots.

        As infered above the DEROPAPY consists of 4 organs:

           1. <b>Leaf</b> which ls represented with the Simpleleaf class and provides estimates of:
            - Leaf area index that the MicroClimate model uses to estimate the radiation of the tree canopy and the grass in the underlying alley
            - Water uptake demand that the soil arbitrator uses to estimate soil water extraction
            - Photosynthesis estimates (Using radiation use efficiency) to drive tree biomass production
            - Biomass demand that is used to grow leaf biomass and determine N demand for leaf growth
           2. <b>Fruit</b> which represents the biomass and nitrogen that may be removed from the orchard each year as harvested product
           3. <b>Trunk</b> which represents the perennial biomass of the trees and will grow a small amount each year but is mostly pruned out at the end of the year and may be returned to the soil surface.
           4. <b>Root</b> which extracts water and nitrogen from the soil for plant growth, grows a small amount of biomass each year and senesesses a proportion of this to the soil.

        #Inclusion in APSIM simulations
        A DEROPAPY crop is included in a simulation the same as any other APSIM crop

         * The DEROPAPY object needs to be dragged or copied from the Crop folder in the tool box into the field of your simulation.
         * It is then planted with a sowing rule
        ~~~
        DEROPAPY.Sow(cultivar: StaticCrop, population: 1, depth: 10, rowSpacing: 150);
        ~~~

          * Note that the SimpleTreeModel has no notion of population or rowSpacing but these parameters are required by the Sow method so filler values are provided
          * `depth` in the Sow arguement is the depth that the crop is sown at.  In most cases the Sow argument is used to initialise an established tree crop so sow depth arguement is used to set the root depth of the trees.  This depth should be set to the rooting depth that is expected as roots will not grow during the simulation.

        #Representing and Orchard System
         * While the DEROPAPY model will run as a stand alone model, in most cases fruit trees and vines are grown in rows with a grass or herb ley growing in the alleys.  As such it is important to set up a simulation with two rectangular zones, one with the fruit tree established within and another with the pasture or herb ley established.  In most cases a SPRUM is adequate to represent the energy, water and nitrogen balance of the alleys.
         * As part of the development of this crop model the Microclimate radiation arbitration was improved to be suitable for fruit crop set ups.  This involved modifying the strip crop radiation interception code to allow:
           1. The entire depth of the tallest (tree) canopy to be taller than the grass growing in the alleys
           2. The width of the canopy of the trees to exceed the width of the zone that the trees are planted in so they may intercept more radiation that would be possible if they were kept within the spatial confines of the row zone
        ![Schematic of radiation interception scheme as modeled for tree row crops](RadInt.jpg)

        #Further development requirements
        The greatest effort has been spent on getting the models water balance predictions working to an adequate standard.  This included running an optimisation procedure against the validation data set to obtain the most suitalbe parameters for water extraction parameters (kl pattern through the soil) and water demand parameters (max canopy conductance and conductance response to light) as well as weather the roots of the alley should be allowed to grow sideways into the row.
        The model has been set up to predict biomass accumulation and N uptake but the parameters for this functionality have not be determined from observed or published data so further work is required here.  The rates of senescence of the FruitTree root system and the contribution of the mown grass in the alley to the N and C balance have not yet been established correctly.
        Kl patterns are currently parameterised in a manager script (so they could be optimised) this needs to be moved into model set up.
        Optimisation was not able to give good fits for both row and alley zones for grape suggesting the kl patterns differ between alley and row.  Further investigation is required to better determine spatial water extraction parameters.
      OrganArbitrator Arbitrator
        BiomassTypeArbitrator DMArbitration
          Folder PotentialPartitioningMethods
            ReallocationMethod
            AllocateFixationMethod
            RetranslocationMethod
            SendPotentialDMAllocationsMethod
          Folder AllocationMethods
            NutrientConstrainedAllocationMethod
            DryMatterAllocationsMethod
          RelativeAllocation ArbitrationMethod
        BiomassTypeArbitrator NArbitration
          Folder PotentialPartitioningMethods
            ReallocationMethod
          Folder ActualPartitioningMethods
            AllocateFixationMethod
            RetranslocationMethod
          Folder AllocationMethods
            NitrogenAllocationsMethod
          RelativeAllocation ArbitrationMethod
          AllocateUptakesMethod
        WaterUptakeMethod
        NitrogenUptakeMethod
      Phenology
        Memo Description
          As ThermalTime accumulates the crop progresses through the following phases:
        WeightedTemperatureFunction ThermalTime: MaximumTemperatureWeighting=0.5
          XYPairs: X=[0, 30, 40]; Y=[0, 30, 0]
        DAWSPhase Emerging1: Start=Dormant; End=Break; IsEmerged=true; DAWStoProgress=0
        GenericPhase Emerging: Start=Emergence; End=Seedling; IsEmerged=true
          Memo Description
            The phase that runs from emergence until the seedlings are established (later that emergence)
          Constant Target: FixedValue=0; Units=<sup>o</sup>Cd
            Memo Param value set at establishment
              SCRUM calculates this parameter value during run-time when the crop is established from parameter values set in the relevent SCRUMcrop and SCRUMmanagement objects
          VariableReference Progression: VariableName=[Phenology].ThermalTime
        GenericPhase EarlyVegetative: same as Replacements.DEROPAPY.Phenology.Emerging
        GenericPhase LateVegetative: Start=Seedling; End=Vegetative; IsEmerged=true
          Memo Description
            During the vegetative phase the crop is producing leaf and stem and closing its canopy
          Constant Target: FixedValue=0; Units=<sup>o</sup>Cd
            Memo Param value set at establishment
              SCRUM calculates this parameter value during run-time when the crop is established from parameter values set in the relevent SCRUMcrop and SCRUMmanagement objects
          VariableReference Progression: VariableName=[Phenology].ThermalTime
        GotoPhase DefoliateOrDevelop: Start=Vegetative; IsEmerged=true; PhaseNameToGoto=SpringDormancy
        GenericPhase EarlyReproductive: Start=Vegetative; End=EarlyReproductive; IsEmerged=true
          Memo Description
            During the early reproductive stage the crop will be flowering
          Constant Target: FixedValue=0; Units=<sup>o</sup>Cd
            Memo Param value set at establishment
              SCRUM calculates this parameter value during run-time when the crop is established from parameter values set in the relevent SCRUMcrop and SCRUMmanagement objects
          VariableReference Progression: VariableName=[Phenology].ThermalTime
        GenericPhase MidReproductive: Start=EarlyReproductive; End=MidReproductive; IsEmerged=true
          Memo Description
            During this plant has started grain filling.
          Constant Target: FixedValue=0; Units=<sup>o</sup>Cd
            Memo Param value set at establishment
              SCRUM calculates this parameter value during run-time when the crop is established from parameter values set in the relevent SCRUMcrop and SCRUMmanagement objects
          VariableReference Progression: VariableName=[Phenology].ThermalTime
        GenericPhase LateReproductive: Start=MidReproductive; End=LateReproductive; IsEmerged=true
          Memo Description
            During this phase the crop is completing grain filling
          Constant Target: FixedValue=0; Units=<sup>o</sup>Cd
            Memo Param value set at establishment
              SCRUM calculates this parameter value during run-time when the crop is established from parameter values set in the relevent SCRUMcrop and SCRUMmanagement objects
          VariableReference Progression: VariableName=[Phenology].ThermalTime
        GenericPhase Maturity: Start=LateReproductive; End=Maturity; IsEmerged=true
          Memo Description
            Grain filling is nearly complete
          Constant Target: FixedValue=0; Units=<sup>o</sup>Cd
            Memo Param value set at establishment
              SCRUM calculates this parameter value during run-time when the crop is established from parameter values set in the relevent SCRUMcrop and SCRUMmanagement objects
          VariableReference Progression: VariableName=[Phenology].ThermalTime
        GenericPhase Ripe: Start=Maturity; End=Ripe; IsEmerged=true
          Memo Description
            During this phase grains are drying down to be ready for harvest
          Constant Target: FixedValue=0; Units=<sup>o</sup>Cd
            Memo Param value set at establishment
              SCRUM calculates this parameter value during run-time when the crop is established from parameter values set in the relevent SCRUMcrop and SCRUMmanagement objects
          VariableReference Progression: VariableName=[Phenology].ThermalTime
        DAWSPhase FinalDormancy: Start=Ripe; End=SpringDormant; IsEmerged=true; DAWStoProgress=365
        GotoPhase Reset: Start=Ripe; IsEmerged=true; PhaseNameToGoto=SpringDormancy
        GrazeAndRewind Graze: Start=Grazing; IsEmerged=true; PhaseNameToGoto=Seedling
        EndPhase ReadyForHarvesting: Start=Ripe; End=Unused; IsEmerged=true
          VariableReference ThermalTime: VariableName=[Phenology].ThermalTime
        Age
        AddFunction AgeDecimal
          VariableReference AgeInt: VariableName=[Phenology].Age
          DivideFunction Decimal
            VariableReference DOY: VariableName=[Weather].DaysSinceWinterSolstice
            Constant DaysInAYear: FixedValue=365
      Root (disabled): GrowthRespiration=0; MaintenanceRespiration=0
        RootShapeCylinder RootShape
        DivideFunction RootFrontVelocity
          VariableReference MaxRootDepth: VariableName=[Root].MaximumRootDepth
          MultiplyFunction RootGrowthDuration
            Constant YearsToMaxDepth: FixedValue=0; Units=years
              Memo Param value set at establishment
                DEROPAPY calculates this parameter value during run-time when the crop is established from parameter values set in the relevent DEROPAPYtree object
            Constant DaysInAYear: FixedValue=365
        Constant MaxDailyNUptake: FixedValue=10; Units=g/m2
        Constant DMConversionEfficiency: FixedValue=1; Units=g/m2
        Constant RemobilisationCost: FixedValue=0
        Constant MaximumRootDepth: FixedValue=3000; Units=mm
        Constant NitrogenDemandSwitch: FixedValue=1; Units=0-1
        KLModiferVsDepthFunction klModifier
          VariableReference LayerDepth: VariableName=[Physical].DepthMidPoints
          VariableReference MaximumRootDepth: VariableName=[Root].MaximumRootDepth
        MultiplyFunction SenescenceRate
          ExponentialFunction: A=0; B=1; C=1
            DivideFunction
              SubtractFunction
                SoilTemperatureDepthFunction: Depth=100
                Constant: FixedValue=20
              Constant: FixedValue=10
          Constant Coefficient: FixedValue=0.015
        Constant SpecificRootLength: FixedValue=105; Units=m/g
        LinearInterpolationFunction KNO3
          XYPairs: X=[0, 0.003]; Y=[0.02, 0.02]
          VariableReference XValue: VariableName=[Root].LengthDensity
        LinearInterpolationFunction KNH4
          XYPairs: X=[0, 0.003]; Y=[0, 0]
          VariableReference XValue: VariableName=[Root].LengthDensity
        BiomassRemoval BiomassRemovalDefaults: HarvestFractionLiveToRemove=0; HarvestFractionDeadToRemove=0; HarvestFractionLiveToResidue=0; HarvestFractionDeadToResidue=0
        LinearInterpolationFunction NUptakeSWFactor
          XYPairs: X=[0, 1]; Y=[0, 1]
          VariableReference XValue: VariableName=[Root].RWC
        Constant CarbonConcentration: FixedValue=0.4
        Constant MaintenanceRespirationFunction: FixedValue=0
        NutrientDemandFunctions DMDemands
          MultiplyFunction Structural
            PartitionFractionDemandFunction DMDemandFunction
              PhaseLookup PartitionFraction
                PhaseLookupValue AcitveGrowth: Start=Emergence; End=Maturity
                  Constant: FixedValue=0.2
            Constant StructuralFraction: FixedValue=1
          Constant Metabolic: FixedValue=0
          Constant Storage: FixedValue=0
          Constant QStructuralPriority: FixedValue=1
          Constant QMetabolicPriority: FixedValue=1
          Constant QStoragePriority: FixedValue=1
        NutrientDemandFunctions NDemands
          MultiplyFunction Structural
            VariableReference MinNconc: VariableName=[Root].minimumNconc
            VariableReference PotentialDMAllocation: VariableName=[Root].potentialDMAllocation.Structural
          Constant Metabolic: FixedValue=0
          Constant Storage: FixedValue=0
          Constant QStructuralPriority: FixedValue=1
          Constant QMetabolicPriority: FixedValue=1
          Constant QStoragePriority: FixedValue=1
        NutrientPoolFunctions InitialWt
          Constant Structural: FixedValue=0; Units=g/plant
            Memo Param value set at establishment
              DEROPAPY calculates this parameter value during run-time when the crop is established from parameter values set in the relevent DEROPAPYtree object
          Constant Metabolic: FixedValue=0
          Constant Storage: FixedValue=0
        Constant RootDepthStressFactor: FixedValue=1
        Constant MaximumNConc: FixedValue=0
          Memo Param value set at establishment
            DEROPAPY calculates this parameter value during run-time when the crop is established from parameter values set in the relevent DEROPAPYtree object
        VariableReference CriticalNConc: VariableName=[Root].MaximumNConc
        VariableReference MinimumNConc: VariableName=[Root].MaximumNConc
      SimpleLeaf Leaf (disabled): Albedo=0.18; LeafInitialisationStage=Dormant
        zero: Gsmax350, R50, Height, BaseHeight, Width, FRGR, PotentialEP, WaterDemand, fRadnAllZones, KDead, LAIDead
        Constant StomatalConductanceCO2Modifier: FixedValue=1
        Constant DetachmentRate: FixedValue=0; Units=/d
        Constant RemobilisationCost: FixedValue=0
        Constant InitialWt: FixedValue=0; Units=g/plant
        Constant LaiDead: FixedValue=0; Units=m^2/m^2
        RUEModel Photosynthesis
          Constant RUE: FixedValue=1.2
          WeightedTemperatureFunction FT: MaximumTemperatureWeighting=0.5
            XYPairs: X=[0, 10, 25, 40]; Y=[0, 1, 1, 0]
          RUECO2Function FCO2: PhotosyntheticPathway=C3
          VariableReference RadnInt: VariableName=[Leaf].RadiationIntercepted
          Constant FVPD: FixedValue=1
          Constant FN: FixedValue=1
          LinearInterpolationFunction Fw
            XYPairs: X=[0, 0.8]; Y=[0, 1]
            VariableReference XValue: VariableName=[Leaf].Fw
        SubDailyInterpolation FRGR: agregationMethod=0
          XYPairs Response: X=[0, 10, 25, 40]; Y=[0, 1, 1, 0]
          ThreeHourAirTemperature InterpolationMethod
        MultiplyFunction ExtinctionCoefficient
          Constant UnstressedCoeff: FixedValue=0
            Memo Param value set at establishment
              SCRUM calculates this parameter value during run-time when the crop is established from parameter values set in the relevent SCRUMcrop and SCRUMmanagement objects
          LinearInterpolationFunction WaterStressFactor
            XYPairs: X=[0.4, 1]; Y=[0.2, 1]
            VariableReference XValue: VariableName=[Leaf].Fw
        Constant NReallocationFactor: FixedValue=0
        PhaseLookup SenescenceRate
          PhaseLookupValue LeafFall: Start=LateReproductive; End=Maturity
            Constant: FixedValue=0
        BiomassRemoval BiomassRemovalDefaults: HarvestFractionLiveToRemove=0; HarvestFractionDeadToRemove=0; HarvestFractionLiveToResidue=0; HarvestFractionDeadToResidue=0
        Constant MaintenanceRespiration: FixedValue=0; Units=0-1
        Constant DMConversionEfficiency: FixedValue=1; Units=0-1
        Constant NRetranslocationFactor: FixedValue=0
        Constant NitrogenDemandSwitch: FixedValue=1
        Constant DMReallocationFactor: FixedValue=0
        Constant DMRetranslocationFactor: FixedValue=0
        Constant CarbonConcentration: FixedValue=0.4
        NutrientDemandFunctions DMDemands
          MultiplyFunction Structural
            PartitionFractionDemandFunction DMDemandFunction
              PhaseLookup PartitionFraction
                PhaseLookupValue CanopyExpansion: Start=Emergence; End=EarlyReproductive
                  Constant: FixedValue=0.6
                PhaseLookupValue FruitGrowth: Start=MidReproductive; End=LateReproductive
                  Constant: FixedValue=0.1
            Constant StructuralFraction: FixedValue=0.5; Units=0-1
          Constant Metabolic: FixedValue=0
          Constant Storage: FixedValue=0
          Constant QStructuralPriority: FixedValue=1
          Constant QMetabolicPriority: FixedValue=1
          Constant QStoragePriority: FixedValue=1
        NutrientDemandFunctions NDemands
          MultiplyFunction Structural
            VariableReference MinNconc: VariableName=[Leaf].minimumNconc
            VariableReference PotentialDMAllocation: VariableName=[Leaf].potentialDMAllocation.Structural
          Constant Metabolic: FixedValue=0
          Constant Storage: FixedValue=0
          Constant QStructuralPriority: FixedValue=1
          Constant QMetabolicPriority: FixedValue=1
          Constant QStoragePriority: FixedValue=1
        VariableReference BaseHeight: VariableName=[DEROPAPY].Height.CanopyBaseHeight
        VariableReference HeightFunction: VariableName=[DEROPAPY].Height
        VariableReference Wideness: VariableName=[DEROPAPY].Width
        MultiplyFunction Area
          Constant Maximum: FixedValue=0; Units=m2/m2
          VariableReference RelativeAnnualDimension: VariableName=[DEROPAPY].RelativeAnnualDimension
          LinearInterpolationFunction RelativeSeasonalDimension
            XYPairs: X=[3, 3.2, 3.5, 4, 5, 6]; Y=[0, 0.1, 0.5, 0.99, 1, 0]
            VariableReference XValue: VariableName=[Phenology].Stage
          Constant FrostFactor: FixedValue=1
        Constant MaxNConcAtStartLeafFall: FixedValue=0
          Memo Param value set at establishment
            SCRUM calculates this parameter value during run-time when the crop is established from parameter values set in the relevent SCRUMcrop and SCRUMmanagement objects
        AddFunction MaximumNConc
          VariableReference MaxNConcAtStartLeafFall: VariableName=[Leaf].MaxNConcAtStartLeafFall
          MultiplyFunction EarlyNConcElevation
            SubtractFunction
              Constant YoungLeafNconc: FixedValue=0.04
              VariableReference MaxNConcAtStartLeafFall: VariableName=[Leaf].MaxNConcAtStartLeafFall
            LinearInterpolationFunction DilutionCurve
              XYPairs: X=[1, 3, 4, 5, 6, 7, 8]; Y=[1, 1, 0.1, 0.02, 0, 0, 0]
              VariableReference XValue: VariableName=[Phenology].Stage
        MultiplyFunction CriticalNConc
          Constant StructuralNFactor: FixedValue=0.6
          VariableReference MaxNConcAtStartLeafFall: VariableName=[Leaf].MaxNConcAtStartLeafFall
        MultiplyFunction MinimumNConc
          Constant StructuralNFactor: FixedValue=0.6
          VariableReference MaxNConcAtStartLeafFall: VariableName=[Leaf].MaxNConcAtStartLeafFall
      GenericOrgan Trunk (disabled): IsAboveGround=true
        Constant NReallocationFactor: FixedValue=0
        Constant NRetranslocationFactor: FixedValue=0
        Constant DMRetranslocationFactor: FixedValue=0.05
        PhaseLookupValue NitrogenDemandSwitch: Start=Emergence; End=Maturity
          Constant: FixedValue=1
        BiomassRemoval BiomassRemovalDefaults: HarvestFractionLiveToRemove=0; HarvestFractionDeadToRemove=0; HarvestFractionLiveToResidue=0; HarvestFractionDeadToResidue=0
        Constant SenescenceRate: FixedValue=0; Units=/d
        Constant DetachmentRateFunction: FixedValue=0; Units=/d
        Constant MaintenanceRespirationFunction: FixedValue=0; Units=0-1
        Constant DMConversionEfficiency: FixedValue=1; Units=0-1
        Constant DMReallocationFactor: FixedValue=0
        Constant RemobilisationCost: FixedValue=0
        Constant CarbonConcentration: FixedValue=0.4
        NutrientDemandFunctions DMDemands
          PartitionFractionDemandFunction Structural
            PhaseLookup PartitionFraction
              PhaseLookupValue CanopyExpansion: Start=Emergence; End=MidReproductive
                Constant: FixedValue=0.2
              PhaseLookupValue FruitGrowth: Start=MidReproductive; End=LateReproductive
                Constant: FixedValue=0.15
              PhaseLookupValue LeafFall: Start=LateReproductive; End=Ripe
                Constant: FixedValue=0
          Constant Metabolic: FixedValue=0
          Constant Storage: FixedValue=0
          Constant QStructuralPriority: FixedValue=1
          Constant QMetabolicPriority: FixedValue=1
          Constant QStoragePriority: FixedValue=1
        NutrientDemandFunctions NDemands
          Constant Storage: FixedValue=0
          Constant Metabolic: FixedValue=0
          MultiplyFunction Structural
            VariableReference MinNconc: VariableName=[Trunk].minimumNconc
            VariableReference PotentialDMAllocation: VariableName=[Trunk].potentialDMAllocation.Structural
          Constant QStructuralPriority: FixedValue=1
          Constant QMetabolicPriority: FixedValue=1
          Constant QStoragePriority: FixedValue=1
        RetranslocateNonStructural RetranslocateNitrogen
        EnergyBalance: Albedo=0.1; Gsmax350=0; R50=0; fRadnAllZones=0; KDead=0; LAIDead=0
          Constant FRGRer: FixedValue=0
          Constant StomatalConductanceCO2Modifier: FixedValue=1
          VariableReference Tallness: VariableName=[DEROPAPY].Height
          VariableReference Deepness: VariableName=[DEROPAPY].Height
          Constant GreenAreaIndex: FixedValue=0
          MultiplyFunction DeadAreaIndex
            Constant VolumeToArea: FixedValue=0.3; Units=m2/l
            DivideFunction Volume
              VariableReference Wt: VariableName=[Trunk].Wt
              Constant Density: FixedValue=750; Units=g/l
          Constant GreenExtinctionCoefficient: FixedValue=0
          Constant DeadExtinctionCoefficient: FixedValue=0.5
          VariableReference Wideness: VariableName=[DEROPAPY].Width
        NutrientPoolFunctions InitialWt
          Constant Structural: Units=g/m^2
            Memo Param value set at establishment
              DEROPAPY calculates this parameter value during run-time when the crop is established from parameter values set in the relevent DEROPAPYtree object
          Constant Metabolic: FixedValue=0
          Constant Storage: FixedValue=0
        Constant Photosynthesis: FixedValue=0
        VariableReference initialNConcFunction: VariableName=[Trunk].MinimumNConc
        Constant MaximumNConc: FixedValue=0.01
          Memo Param value set at establishment
            SCRUM calculates this parameter value during run-time when the crop is established from parameter values set in the relevent SCRUMcrop and SCRUMmanagement objects
        MultiplyFunction CriticalNConc
          Constant StructuralNFactor: FixedValue=0.6
          VariableReference MaxNConc: VariableName=[Trunk].MaxNConc
        MultiplyFunction MinimumNConc
          Constant StructuralNFactor: FixedValue=0.6
          VariableReference MaxNConc: VariableName=[Trunk].MaxNConc
      GenericOrgan Fruit (disabled): IsAboveGround=true
        Constant NReallocationFactor: FixedValue=0
        Constant NRetranslocationFactor: FixedValue=0
        Constant DMRetranslocationFactor: FixedValue=0
        PhaseLookupValue NitrogenDemandSwitch: Start=EarlyReproductive; End=Ripe
          Constant: FixedValue=1
        BiomassRemoval BiomassRemovalDefaults: HarvestFractionLiveToRemove=0.8; HarvestFractionDeadToRemove=0; HarvestFractionLiveToResidue=0.2; HarvestFractionDeadToResidue=1
        Constant SenescenceRate: FixedValue=0; Units=/d
        Constant DetachmentRateFunction: FixedValue=0; Units=/d
        Constant MaintenanceRespirationFunction: FixedValue=0; Units=0-1
        Constant DMConversionEfficiency: FixedValue=1; Units=0-1
        Constant DMReallocationFactor: FixedValue=0
        Constant RemobilisationCost: FixedValue=0
        Constant CarbonConcentration: FixedValue=0.4
        NutrientDemandFunctions DMDemands
          MultiplyFunction Structural
            MaximumFunction RelativeFruitMass
              DeltaFunction Delta
                LinearInterpolationFunction Integral
                  XYPairs: X=[0, 80, 150, 250, 300, 365]; Y=[0, 0, 0.1, 0.9, 1, 1]
                  VariableReference XValue: VariableName=[Weather].DaysSinceWinterSolstice
              Constant Zero: FixedValue=0
            VariableReference Number: VariableName=[Fruit].Number
            VariableReference PotentialDW: VariableName=[Fruit].PotentialDryWt
          Constant Metabolic: FixedValue=0
          Constant Storage: FixedValue=0
          Constant QStructuralPriority: FixedValue=100
          Constant QMetabolicPriority: FixedValue=100
          Constant QStoragePriority: FixedValue=100
        NutrientDemandFunctions NDemands
          Constant Storage: FixedValue=0
          Constant Metabolic: FixedValue=0
          MultiplyFunction Structural
            VariableReference MinNconc: VariableName=[Trunk].minimumNconc
            VariableReference PotentialDMAllocation: VariableName=[Fruit].potentialDMAllocation.Structural
          Constant QStructuralPriority: FixedValue=1
          Constant QMetabolicPriority: FixedValue=1
          Constant QStoragePriority: FixedValue=1
        RetranslocateNonStructural RetranslocateNitrogen
        NutrientPoolFunctions InitialWt
          Constant Structural: FixedValue=0; Units=g/m^2
          Constant Metabolic: FixedValue=0
          Constant Storage: FixedValue=0
        Constant Photosynthesis: FixedValue=0
        VariableReference initialNConcFunction: VariableName=[Fruit].MaximumNConc
        Constant MaxNConcAtHarvest: FixedValue=0
          Memo Param value set at establishment
            SCRUM calculates this parameter value during run-time when the crop is established from parameter values set in the relevent SCRUMcrop and SCRUMmanagement objects
        AddFunction MaximumNConc
          VariableReference MaxNConcAtHarvest: VariableName=[Fruit].MaxNConcAtHarvest
          MultiplyFunction EarlyNConcElevation
            SubtractFunction
              Constant MaxNConcAtSet: FixedValue=4
              VariableReference MaxNConcAtHarvest: VariableName=[Fruit].MaxNConcAtHarvest
            LinearInterpolationFunction DilutionCurve: same as Replacements.DEROPAPY.Leaf.MaximumNConc.EarlyNConcElevation.DilutionCurve
        MultiplyFunction CriticalNConc
          Constant StructuralNFactor: FixedValue=0.6
          VariableReference MaxNConcAtHarvest: VariableName=[Fruit].MaxNConcAtHarvest
        MultiplyFunction MinimumNConc
          Constant StructuralNFactor: FixedValue=0.6
          VariableReference MaxNConcAtHarvest: VariableName=[Fruit].MaxNConcAtHarvest
        Constant MaximumSize: FixedValue=0; Units=mm
        Constant Density: FixedValue=0; Units=g/cm3
        Constant MinimumDMC: FixedValue=0; Units=g/g
        MultiplyFunction PotentialDryWt
          ExpressionFunction Volume: Expression=((4/3*3.1415926*([Fruit].MaximumSize/2)^3/1000
          VariableReference Density: VariableName=[Fruit].Density
          VariableReference DMC: VariableName=[Fruit].MinimumDMC
          VariableReference RelativeAnnualDimension: VariableName=[DEROPAPY].RelativeAnnualDimension
        MultiplyFunction DryMatterPc
          VariableReference UnStressedDM: VariableName=[Fruit].MinimumDMC
          LinearInterpolationFunction FruitAge
            XYPairs: X=[0, 3, 4, 5]; Y=[1, 1, 1, 1]
            VariableReference XValue: VariableName=[Weather].DaysSinceWinterSolstice
          LinearInterpolationFunction WaterStress
            XYPairs: X=[0, 85]; Y=[1, 1]
            VariableReference XValue: VariableName=[AccumulatedWaterStress]
        MultiplyFunction FreshWt
          DivideFunction FreshWtConversion
            Constant: FixedValue=1
            VariableReference DMconc: VariableName=[Fruit].DryMatterPc
          VariableReference DryWt: VariableName=[Fruit].Wt
        MultiplyFunction Number
          Constant RetainedPostThinning: FixedValue=15; Units=fruit/m2
          LinearInterpolationFunction WaterStress
            XYPairs: X=[0, 85]; Y=[1, 1]
            VariableReference XValue: VariableName=[AccumulatedWaterStress]
        DivideFunction FreshWtPerFruit
          VariableReference FreshWt: VariableName=[Fruit].FreshWt
          VariableReference Number: VariableName=[Fruit].Number
        DivideFunction VolumePerFruit
          VariableReference FreshWtPerFruit: VariableName=[Fruit].FreshWtPerFruit
          VariableReference Density: VariableName=[Fruit].Density
        MultiplyFunction FruitingBuds
          VariableReference RetainedPostThinning: VariableName=[Fruit].Number.RetainedPostThinning
          LinearInterpolationFunction WaterStress
            XYPairs: X=[0, 70, 90, 150, 200]; Y=[1, 1, 0.9, 0.6, 0]
            VariableReference XValue: VariableName=[AccumulatedWaterStress]
        ExpressionFunction Size: Expression=(6*[Fruit].VolumePerFruit/3.1415926)^(1/3)
      AccumulateFunction AccumulatedWaterStress (disabled): StartStageName=Emergence; EndStageName=Ripe; ResetStageName=Dormant; FractionRemovedOnCut=0; FractionRemovedOnHarvest=0; FractionRemovedOnGraze=0; FractionRemovedOnPrune=1
        SubtractFunction StressIndex
          Constant One: FixedValue=1
          LinearInterpolationFunction FW
            XYPairs: X=[0.1, 0.9, 1.5]; Y=[0, 1, 1]
            VariableReference XValue: VariableName=[Leaf].Fw
      CompositeBiomass AboveGround (disabled): OrganNames=[Leaf, Trunk, Fruit]; IncludeLive=true; IncludeDead=true
      CompositeBiomass Total (disabled): OrganNames=[Leaf, Trunk, Fruit, Root]; IncludeLive=true; IncludeDead=true
      CompositeBiomass TotalLive (disabled): OrganNames=[Leaf, Trunk, Fruit, Root]; IncludeLive=true; IncludeDead=false
      CompositeBiomass TotalDead (disabled): OrganNames=[Leaf, Trunk, Fruit, Root]; IncludeLive=false; IncludeDead=true
      Constant MortalityRate: FixedValue=0
      Constant SeedMortalityRate: FixedValue=0
      Constant MaxPrunedHeight: FixedValue=0
      AddFunction Height (disabled)
        MultiplyFunction CanopyBaseHeight
          Constant Maximum: FixedValue=0
          VariableReference Age pattern: VariableName=[DEROPAPY].RelativeAnnualDimension
        MultiplyFunction PrunedCanopyDepth
          SubtractFunction Maximum
            VariableReference MaxPrunedHeight: VariableName=[DEROPAPY].MaxPrunedHeight
            VariableReference MaxBaseHeight: VariableName=[DEROPAPY].Height.CanopyBaseHeight.Maximum
          VariableReference Age pattern: VariableName=[DEROPAPY].RelativeAnnualDimension
        MultiplyFunction SeasonalGrowth
          VariableReference Seasonal pattern: VariableName=[DEROPAPY].RelativeSeasonalDimension
          Constant Maximum: FixedValue=100; Units=mm
          VariableReference Age pattern: VariableName=[DEROPAPY].RelativeAnnualDimension
      AddFunction Width (disabled)
        MultiplyFunction PrunedWidth
          VariableReference Age pattern: VariableName=[DEROPAPY].RelativeAnnualDimension
          Constant Maximum: FixedValue=500; Units=mm
        MultiplyFunction SeasonalGrowth
          VariableReference Seasonal pattern: VariableName=[DEROPAPY].RelativeSeasonalDimension
          Constant Maximum: FixedValue=500; Units=mm
      LinearInterpolationFunction RelativeAnnualDimension (disabled)
        XYPairs: X=[0, 6]; Y=[0.4, 1]
        VariableReference XValue: VariableName=[Phenology].Age.YearDecimal
      StageBasedInterpolation RelativeSeasonalDimension (disabled): Values=[0, 0, 0, 0, 0.6, 1, 1, 1]; Proportional=true
  Simulation PatternsTest
    Clock: Start=2000-07-21; End=2011-07-01
    Summary SummaryFile
    Weather: FileName=Whakatu.met
    MicroClimate: a_interception=0; b_interception=1; c_interception=0; d_interception=0; SoilHeatFluxFraction=0.4; MinimumHeightDiffForNewLayer=0; NightInterceptionFraction=0.5; ReferenceHeight=2
    SoilArbitrator Soil Arbitrator
    Manager AutoIrrigationDeficitBased
      AllowIrrigation = True
      depthPAWC = 1000
      triggerDeficit = 80
      irrigateAmount = 15
      returndays = 3
      IrrigateAlley = True
```csharp
using Newtonsoft.Json;
using APSIM.Shared.Utilities;
using System.Xml.Serialization;
using Models.Soils;
using Models.PMF;
using Models.Core;
using System;
using Models.Interfaces;

        
namespace Models
{
    [Serializable] 
    [System.Xml.Serialization.XmlInclude(typeof(Model))]
    public class Script : Model
    {
        [Link] private Clock Clock;
        [Link] private Zone patch;
        [Link] private ISummary summary;
        //[Link] private Irrigation Irrigation;
        [Link] private Soil Soil;
        [Link(IsOptional = true)] private IPlant existingCrop;
        [Link] private IPhysical soilPhysical;
        [Link] private ISoilWater waterBalance;
        [Link(Type = LinkType.Scoped, ByName = true)] private Zone Row;
        [Link(Type = LinkType.Scoped, ByName = true)] private Zone Alley;
       
        // Parameters from user interface
        [Separator("Manager for controlling automatic irrigation")]
        [Description(" Allow this manager to control irrigation?")]
        public bool AllowIrrigation { get; set; }
      
        [Separator(" Parameters for the irrigation system")]
        [Description(" Depth to calculate PAWC and deficit (mm)")]
        public double depthPAWC { get; set; }
        [Description(" Deficit to trigger irrigations (% PAWC)")]
        public double triggerDeficit { get; set; }
        [Description(" Irrigation amount to apply each event (mm)")]
        public double irrigateAmount { get; set; }
        [Description(" Minimum days for irrigation to return")]
        public double returndays { get; set; }
        
        [Description("Is the Alley zone irrigated?")]
        public bool IrrigateAlley {get; set;}

        //Class members
        [JsonIgnore] public double IrrigLayerSWDeficit { get; set; }
        [JsonIgnore] public double TopSWC { get; set; }
        [JsonIgnore] public double DaysSinceIrrigation { get; set; }
        [JsonIgnore] public double AmountToApply { get; set; }
        [JsonIgnore] public double SeasonAppliedAmount { get; set; }
        
        private bool IrrigationIsAllowed { get; set; }
        private bool CropIsActive { get; set; }
        private bool IrrigatorIsAvailable { get; set; }
        private bool SoilIsDry { get; set; }
        private double TopDUL;
        private double TopLL;
        private int nLayers;

    
        //Calculate static soil variables
        [EventSubscribe("StartOfSimulation")]
        private void OnStartOfSimulation(object sender, EventArgs e)
        {
            
            //Can we irrigate at all?
            IrrigationIsAllowed = false; 
            if (AllowIrrigation)
                IrrigationIsAllowed = true; 

            //Calculate soil water variables
            double depthFromSurface = 0.0;
            double fracLayer = 0.0;
            nLayers = soilPhysical.Thickness.Length;
            for (int layer = 0; layer < nLayers; layer++)
            {
                fracLayer = Math.Min(1.0, (depthPAWC - depthFromSurface) / soilPhysical.Thickness[layer]);
                TopLL += soilPhysical.LL15mm[layer] * fracLayer;
                TopDUL += soilPhysical.DULmm[layer] * fracLayer;
                depthFromSurface += soilPhysical.Thickness[layer];
                if (depthFromSurface >= depthPAWC)
                    layer = nLayers;
            }
        }
             
        //Determine daily requirement for irrigation
        [EventSubscribe("StartOfDay")]
        private void OnStartOfDay(object sender, EventArgs e)
        {
            AmountToApply = 0.0;
            DaysSinceIrrigation += 1;

            //Is the row crop actively growing?
            CropIsActive = false;
            double StageCode = (double)Row.Get("DEROPAPY.Phenology.Stage");
            if ((StageCode > 3.0) && (StageCode<5.0))
            {
                CropIsActive = true;
            }
          
            //Is the irrigator available?
            IrrigatorIsAvailable = false;
            if (DaysSinceIrrigation >= returndays)
                IrrigatorIsAvailable = true;
          
            //Is the soil dry enough to require irrigation?
            SoilIsDry = false;
            double depthFromSurface = 0.0;
            double fracLayer = 0.0;
            TopSWC = 0.0;
            for (int layer = 0; layer < nLayers; layer++)
            //for (int layer = 0; depthFromSurface < depthPAWC + soilPhysical.Thickness[layer]; layer++)
            {
                fracLayer = Math.Min(1.0, (depthPAWC - depthFromSurface) / soilPhysical.Thickness[layer]);
                TopSWC += waterBalance.SWmm[layer] * fracLayer;
                depthFromSurface += soilPhysical.Thickness[layer];
                if (depthFromSurface >= depthPAWC)
                    layer = nLayers;
            }
            
            IrrigLayerSWDeficit = TopSWC - TopDUL;
            if (Math.Max(0.0, -IrrigLayerSWDeficit) >= (TopDUL - TopLL) * (100 - triggerDeficit) / 100)
                SoilIsDry = true;

            //Are all the conditions ratifying irrigation
            if (IrrigationIsAllowed && CropIsActive && IrrigatorIsAvailable && SoilIsDry)
            {
                //Lets irrigate well !!!!
                Irrigation irrigRow = (Irrigation)Row.Get("Irrigation");
                irrigRow.Apply(irrigateAmount, depth: 0);
                DaysSinceIrrigation = 0;
                if (IrrigateAlley)
                {
                   Irrigation irrigAlley = (Irrigation)Alley.Get("Irrigation");
                   irrigAlley.Apply(irrigateAmount , depth: 0);           
                }
            }
        }
    }
}
```
    Manager AutomaticFertiliser
      AllowFertiliser = yes
      Depth2SoilN = 1500
      CriticalSoilN = 30
      FertNAmount = 50
      FertType = UreaN
      FertApplicationDepth = 10
      FertMinimumDays = 15
```csharp
using Newtonsoft.Json;
using Models.Soils.Nutrients;
using Models.Interfaces;
using System.Xml.Serialization;
using APSIM.Shared.Utilities;
using Models.Soils;
using Models.PMF;
using Models.Core;
using System;

namespace Models
{
    [Serializable]
    public class Script : Model
    {
        [Link] private Clock Clock;
        [Link] private Fertiliser fertiliser;
        [Link] private ISummary summary;
        [Link] private Soil Soil;
        [Link(Type = LinkType.Scoped, ByName = true)] private Zone Row;
        private DateTime lastApplicationDate;
        private bool fertiliserIsAllowed;
        private int nLayers;
        [Link(ByName = true)]
        private ISolute NO3;
        [Link(ByName = true)]
        private ISolute NH4;
        [Link(ByName = true)]
        private ISolute Urea;
        [Link]
        private IPhysical soilPhysical;

        //User inputs from properties tab
        [Description("Turn fertiliser applications on? ")]
        public yesnoType AllowFertiliser { get; set; }
        
        [Description("Depth to calculate available soil N (mm): ")]
        public double Depth2SoilN { get; set; }

        [Description("Minimum available N, triggers an application (kgN/ha): ")]
        public double CriticalSoilN { get; set; }

        [Description("Amount of N fertiliser for each application (kgN/ha): ")]
        public double FertNAmount { get; set; }

        [Description("Type of N fertiliser to apply: ")]
        public Fertiliser.Types FertType { get; set; }

        [Description("Depth at which to apply the fertiliser (mm): ")]
        public double FertApplicationDepth { get; set; }
       
        [Description("Minimum period between applications (days): ")]
        public double FertMinimumDays { get; set; }
       
        public enum yesnoType
        {
            /// <summary>a positive answer</summary>
            yes,
            /// <summary>a negative answer</summary>
            no
        }

        [JsonIgnore] public double TopMineralN { get; set; }
        private bool CropIsActive { get; set; }
        

        [EventSubscribe("StartOfSimulation")]
        private void OnStartOfSimulation(object sender, EventArgs e)
        {
            fertiliserIsAllowed = (AllowFertiliser == yesnoType.yes);
            nLayers = soilPhysical.Thickness.Length;
        }

        [EventSubscribe("DoManagement")]
        private void OnDoManagement(object sender, EventArgs e)
        {
            double daysSinceLastApplication = (Clock.Today - lastApplicationDate).TotalDays;
            
            //Is the row crop actively growing?
            CropIsActive = false;
            double StageCode = (double)Row.Get("DEROPAPY.Phenology.Stage");
            if ((StageCode > 3.0) && (StageCode<5.0))
            {
                CropIsActive = true;
            }
            
            // get the N stored in the soil
            double depthFromSurface = 0.0;
            double fracLayer = 0.0;
            TopMineralN = 0.0;
            for (int layer = 0; layer < nLayers; layer++)
            {
                fracLayer = Math.Min(1.0, (Depth2SoilN - depthFromSurface) / soilPhysical.Thickness[layer]);
                TopMineralN += (NO3.kgha[layer]
                + NH4.kgha[layer]
                + Urea.kgha[layer])
                * fracLayer;
                depthFromSurface += soilPhysical.Thickness[layer];
                if (depthFromSurface >= Depth2SoilN)
                    layer = nLayers;
            }

            if (fertiliserIsAllowed && CropIsActive && (daysSinceLastApplication >= FertMinimumDays) && (TopMineralN <= CriticalSoilN))
            {
                fertiliser.Apply(FertNAmount, FertType, FertApplicationDepth);
                lastApplicationDate = Clock.Today;
            }
        }
    }
}
```
    RectangularZone Row: Length=100; Width=1.3; Slope=0; AspectAngle=0; Altitude=50
      Report RowZoneReport: EventNames=[Clock].DoReport
      Report ReportBoth: EventNames=[Clock].DoReport
      Soil: Latitude=0; Longitude=0
        LayerStructure: Thickness=[200, 200, 200, 200, 200, 200, 300, 300, 400, 800]
        Chemical: Thickness=[100, 200, 300, 300, 300, 300]; PH=[6.6, 6.2, 5.7, 5.5, 5.5, 5.5]; PHUnits=Water
        Water: Thickness=[300, 300, 300, 300, 300, 300, 1200]; InitialValues=[0.42, 0.41, 0.5, 0.46, 0.45, 0.43, 0.43]; InitialPAWmm=702; RelativeTo=LL15; FilledFromTop=false
        WaterBalance SoilWater: SummerDate=1-Nov; SummerU=9; SummerCona=4.4; WinterDate=1-Apr; WinterU=9; WinterCona=4.4; DiffusConst=88; DiffusSlope=35.4; Salb=0.3; CN2Bare=68; CNRed=20; CNCov=0.8; DischargeWidth=0; CatchmentArea=0; PSIDul=-100
          Thickness  SWCON  KLAT
          300        0.55   0
          300        0.55   0
          300        0.55   0
          300        0.55   0
          300        0.1    0
          300        0.02   0
          400        0.02   0
          800        0      0
        Organic: FOMCNRatio=30; CarbonUnits=Total
          Thickness  Carbon  SoilCNRatio  FBiom  FInert  FOM
          100        1.82    11.5         0.025  0.3     1243.931
          200        1.47    11.5         0.025  0.4     833.832
          300        1.2     11.5         0.015  0.75    457.617
          300        1.03    11.5         0.01   0.9     251.145
          300        0.47    11.5         0.01   0.96    137.831
          300        0.47    11.5         0.01   0.96    75.644
        CERESSoilTemperature Temperature
        OutputLayers: Thickness=[300, 300, 300, 300, 300, 300]
        Solute NO3: Thickness=[100, 200, 300, 300, 300, 300]; InitialValues=[217, 15, 1.66667, 1.66667, 0, 0]; InitialValuesUnits=ppm; WaterTableConcentration=0; D0=0; DepthConstant=0; MaxDepthSoluteAccessible=0; RunoffEffectivenessAtMovingSolute=0; MaxEffectiveRunoff=0
        Solute NH4: Thickness=[100, 200, 300, 300, 300, 300]; InitialValues=[0, 0, 0, 0, 0, 0]; InitialValuesUnits=ppm; WaterTableConcentration=0; D0=0; DepthConstant=0; MaxDepthSoluteAccessible=0; RunoffEffectivenessAtMovingSolute=0; MaxEffectiveRunoff=0
        Solute Urea: Thickness=[100, 200, 300, 300, 300, 300]; InitialValues=[0, 0, 0, 0, 0, 0]; InitialValuesUnits=kg/ha; WaterTableConcentration=0; D0=0; DepthConstant=0; MaxDepthSoluteAccessible=0; RunoffEffectivenessAtMovingSolute=0; MaxEffectiveRunoff=0
        Physical
          Thickness  BD  AirDry  LL15  DUL   SAT   KS
          300        1   0.2     0.2   0.4   0.5   100
          300        1   0.2     0.2   0.4   0.5   100
          300        1   0.25    0.25  0.4   0.5   50
          300        1   0.2     0.2   0.46  0.5   40
          300        1   0.2     0.2   0.45  0.5   40
          300        1   0.2     0.2   0.43  0.53  40
          1200       1   0.2     0.2   0.43  0.53  40
          SoilCrop DEROPAPYSoil: LL=[0.2, 0.2, 0.2, 0.2, 0.2, 0.2, 0.2]; KL=[1, 1, 1, 1, 1, 1, 1]; XF=[1, 1, 1, 1, 1, 1, 1]
        Nutrient
      SurfaceOrganicMatter: InitialResidueName=wheat_stubble; InitialResidueType=wheat; InitialResidueMass=500; InitialStandingFraction=0; InitialCPR=0; InitialCNR=100
      Plant DEROPAPY
      Fertiliser
      Manager AgrgateZoneVariables
```csharp
using Models.Climate;
using System;
using Models.Core;
using Models.PMF;
using System.Collections.Generic;
using Models.Soils;
using APSIM.Shared.Utilities;
using Models.Zones;
using Models.PMF.Organs;

namespace Models
{
    [Serializable]
    public class Script : Model
    {
        
    }
}
```
      Irrigation
      BiomassRemovalEvents Pick: RemovalType=2
        BiomassRemovals:
          PlantName  OrganName  TypeString  LiveToRemove  DeadToRemove  LiveToResidue  DeadToResidue
          DEROPAPY   Root       Harvesting  0             0             0              0
          DEROPAPY   Leaf       Harvesting  0             0             0              0
          DEROPAPY   Trunk      Harvesting  0             0             0              0
          DEROPAPY   Fruit      Harvesting  0.8           0             0.1            0.5
        Plant PlantToRemoveFrom: PlantType=DEROPAPY
          Memo TitlePage: same as Replacements.DEROPAPY.TitlePage
          OrganArbitrator Arbitrator: same as Replacements.DEROPAPY.Arbitrator
          Phenology
            Constant ThermalTime: FixedValue=1; Units=days
            GenericPhase ZeroPhase: Start=ModelInitialisation; End=Dormant; IsEmerged=true
              Memo
                It is necessary to have a phase before Dormancy otherwise the rewind doesn't work
              VariableReference Progression: VariableName=[Phenology].ThermalTime
              Constant Target: FixedValue=0; Units=oCd
            DAWSPhase SpringDormancy: Start=Dormant; End=BudBreak; IsEmerged=true; DAWStoProgress=0
            DAWSPhase CanopyExpansion: Start=BudBreak; End=StartFullCanopy; IsEmerged=true; DAWStoProgress=0
            DAWSPhase FullCanopy: Start=StartFullCanopy; End=StartLeafFall; IsEmerged=true; DAWStoProgress=0
            DAWSPhase LeafFall: Start=StartLeafFall; End=BareTree; IsEmerged=true; DAWStoProgress=0
            DAWSPhase WinterDormancy: Start=BareTree; End=SpringDormant; IsEmerged=true; DAWStoProgress=365
            GotoPhase: Start=BareTree; IsEmerged=true; PhaseNameToGoto=SpringDormancy
            Age
            AddFunction AgeDecimal: same as Replacements.DEROPAPY.Phenology.AgeDecimal
          Root: GrowthRespiration=0; MaintenanceRespiration=0
            RootShapeCylinder RootShape
            DivideFunction RootFrontVelocity
              VariableReference MaxRootDepth: VariableName=[Root].MaximumRootDepth
              MultiplyFunction RootGrowthDuration
                Constant YearsToMaxDepth: FixedValue=0; Units=years
                  Memo Param value set at establishment
                    DEROPAPY calculates this parameter value during run-time when the crop is established from parameter values set in the relevent DEROPAPYtree object
                Constant DaysInAYear: FixedValue=365
            Constant MaxDailyNUptake: FixedValue=10; Units=g/m2
            Constant DMConversionEfficiency: FixedValue=1; Units=g/m2
            Constant RemobilisationCost: FixedValue=0
            Constant MaximumRootDepth: FixedValue=3000; Units=mm
            Constant NitrogenDemandSwitch: FixedValue=1; Units=0-1
            KLModiferVsDepthFunction klModifier
              VariableReference LayerDepth: VariableName=[Physical].DepthMidPoints
              VariableReference MaximumRootDepth: VariableName=[Root].MaximumRootDepth
            MultiplyFunction SenescenceRate
              ExponentialFunction: A=0; B=1; C=1
                DivideFunction
                  SubtractFunction
                    SoilTemperatureDepthFunction: Depth=100
                    Constant: FixedValue=20
                  Constant: FixedValue=10
              Constant Coefficient: FixedValue=0.015
            Constant SpecificRootLength: FixedValue=105; Units=m/g
            LinearInterpolationFunction KNO3
              XYPairs: X=[0, 0.003]; Y=[0.02, 0.02]
              VariableReference XValue: VariableName=[Root].LengthDensity
            LinearInterpolationFunction KNH4
              XYPairs: X=[0, 0.003]; Y=[0, 0]
              VariableReference XValue: VariableName=[Root].LengthDensity
            BiomassRemoval BiomassRemovalDefaults: HarvestFractionLiveToRemove=0; HarvestFractionDeadToRemove=0; HarvestFractionLiveToResidue=0; HarvestFractionDeadToResidue=0
            LinearInterpolationFunction NUptakeSWFactor
              XYPairs: X=[0, 1]; Y=[0, 1]
              VariableReference XValue: VariableName=[Root].RWC
            Constant CarbonConcentration: FixedValue=0.4
            Constant MaintenanceRespirationFunction: FixedValue=0
            NutrientDemandFunctions DMDemands
              MultiplyFunction Structural
                PartitionFractionDemandFunction DMDemandFunction
                  PhaseLookup PartitionFraction
                    PhaseLookupValue AcitveGrowth: Start=BudBreak; End=BareTree
                      Constant: FixedValue=0.2
                Constant StructuralFraction: FixedValue=1
              Constant Metabolic: FixedValue=0
              Constant Storage: FixedValue=0
              Constant QStructuralPriority: FixedValue=1
              Constant QMetabolicPriority: FixedValue=1
              Constant QStoragePriority: FixedValue=1
            NutrientDemandFunctions NDemands
              MultiplyFunction Structural
                VariableReference MinNconc: VariableName=[Root].minimumNconc
                VariableReference PotentialDMAllocation: VariableName=[Root].potentialDMAllocation.Structural
              Constant Metabolic: FixedValue=0
              Constant Storage: FixedValue=0
              Constant QStructuralPriority: FixedValue=1
              Constant QMetabolicPriority: FixedValue=1
              Constant QStoragePriority: FixedValue=1
            NutrientPoolFunctions InitialWt
              Constant Structural: FixedValue=0; Units=g/plant
                Memo Param value set at establishment
                  DEROPAPY calculates this parameter value during run-time when the crop is established from parameter values set in the relevent DEROPAPYtree object
              Constant Metabolic: FixedValue=0
              Constant Storage: FixedValue=0
            Constant RootDepthStressFactor: FixedValue=1
            Constant MaximumNConc: FixedValue=0
              Memo Param value set at establishment
                DEROPAPY calculates this parameter value during run-time when the crop is established from parameter values set in the relevent DEROPAPYtree object
            VariableReference CriticalNConc: VariableName=[Root].MaximumNConc
            VariableReference MinimumNConc: VariableName=[Root].MaximumNConc
          SimpleLeaf Leaf: Albedo=0.18; LeafInitialisationStage=Dormant
            zero: Gsmax350, R50, Height, BaseHeight, Width, FRGR, PotentialEP, WaterDemand, fRadnAllZones, KDead, LAIDead
            Constant StomatalConductanceCO2Modifier: FixedValue=1
            Constant DetachmentRate: FixedValue=0; Units=/d
            Constant RemobilisationCost: FixedValue=0
            Constant InitialWt: FixedValue=0; Units=g/plant
            Constant LaiDead: FixedValue=0; Units=m^2/m^2
            RUEModel Photosynthesis
              Constant RUE: FixedValue=1.2
              WeightedTemperatureFunction FT: MaximumTemperatureWeighting=0.5
                XYPairs: X=[0, 10, 25, 40]; Y=[0, 1, 1, 0]
              LinearInterpolationFunction FW
                XYPairs: X=[0, 0.8, 1.5]; Y=[0, 1, 1]
                VariableReference XValue: VariableName=[Leaf].Fw
              RUECO2Function FCO2: PhotosyntheticPathway=C3
              VariableReference RadnInt: VariableName=[Leaf].RadiationIntercepted
              Constant FVPD: FixedValue=1
              Constant FN: FixedValue=1
            SubDailyInterpolation FRGR: agregationMethod=0
              XYPairs Response: X=[0, 10, 25, 40]; Y=[0, 1, 1, 0]
              ThreeHourAirTemperature InterpolationMethod
            MultiplyFunction ExtinctionCoefficient
              Constant UnstressedCoeff: FixedValue=0
                Memo Param value set at establishment
                  SCRUM calculates this parameter value during run-time when the crop is established from parameter values set in the relevent SCRUMcrop and SCRUMmanagement objects
              LinearInterpolationFunction FW
                XYPairs: X=[0, 0.4, 0.9, 1.5]; Y=[0.2, 0.2, 1, 1]
                VariableReference XValue: VariableName=[Leaf].Fw
            Constant NReallocationFactor: FixedValue=0
            PhaseLookup SenescenceRate
              PhaseLookupValue LeafFall: Start=StartLeafFall; End=BareTree
                Constant: FixedValue=0
            BiomassRemoval BiomassRemovalDefaults: HarvestFractionLiveToRemove=0; HarvestFractionDeadToRemove=0; HarvestFractionLiveToResidue=0; HarvestFractionDeadToResidue=0
            Constant MaintenanceRespiration: FixedValue=0; Units=0-1
            Constant DMConversionEfficiency: FixedValue=1; Units=0-1
            Constant NRetranslocationFactor: FixedValue=0
            Constant NitrogenDemandSwitch: FixedValue=1
            Constant DMReallocationFactor: FixedValue=0
            Constant DMRetranslocationFactor: FixedValue=0
            Constant CarbonConcentration: FixedValue=0.4
            NutrientDemandFunctions DMDemands
              MultiplyFunction Structural
                PartitionFractionDemandFunction DMDemandFunction
                  PhaseLookup PartitionFraction
                    PhaseLookupValue CanopyExpansion: Start=BudBreak; End=StartFullCanopy
                      Constant: FixedValue=0.6
                    PhaseLookupValue FruitGrowth: Start=StartFullCanopy; End=StartLeafFall
                      Constant: FixedValue=0.1
                Constant StructuralFraction: FixedValue=0.5; Units=0-1
              Constant Metabolic: FixedValue=0
              Constant Storage: FixedValue=0
              Constant QStructuralPriority: FixedValue=1
              Constant QMetabolicPriority: FixedValue=1
              Constant QStoragePriority: FixedValue=1
            NutrientDemandFunctions NDemands
              MultiplyFunction Structural
                VariableReference MinNconc: VariableName=[Leaf].minimumNconc
                VariableReference PotentialDMAllocation: VariableName=[Leaf].potentialDMAllocation.Structural
              Constant Metabolic: FixedValue=0
              Constant Storage: FixedValue=0
              Constant QStructuralPriority: FixedValue=1
              Constant QMetabolicPriority: FixedValue=1
              Constant QStoragePriority: FixedValue=1
            VariableReference BaseHeight: VariableName=[DEROPAPY].Height.CanopyBaseHeight
            VariableReference HeightFunction: VariableName=[DEROPAPY].Height
            VariableReference Wideness: VariableName=[DEROPAPY].Width
            MultiplyFunction Area
              Constant Maximum: FixedValue=0; Units=m2/m2
              VariableReference RelativeAnnualDimension: VariableName=[DEROPAPY].RelativeAnnualDimension
              VariableReference RelativeSeasonalDimension: VariableName=[DEROPAPY].RelativeSeasonalDimension
              Constant FrostFactor: FixedValue=1
            Constant MaxNConcAtStartLeafFall: FixedValue=0
              Memo Param value set at establishment
                SCRUM calculates this parameter value during run-time when the crop is established from parameter values set in the relevent SCRUMcrop and SCRUMmanagement objects
            AddFunction MaximumNConc
              VariableReference MaxNConcAtStartLeafFall: VariableName=[Leaf].MaxNConcAtStartLeafFall
              MultiplyFunction EarlyNConcElevation
                SubtractFunction
                  Constant YoungLeafNconc: FixedValue=0.04
                  VariableReference MaxNConcAtStartLeafFall: VariableName=[Leaf].MaxNConcAtStartLeafFall
                LinearInterpolationFunction DilutionCurve
                  XYPairs: X=[1, 3, 4, 5, 6, 7, 8]; Y=[1, 1, 0.1, 0.02, 0, 0, 0]
                  VariableReference XValue: VariableName=[Phenology].Stage
            MultiplyFunction CriticalNConc
              Constant StructuralNFactor: FixedValue=0.6
              VariableReference MaxNConcAtStartLeafFall: VariableName=[Leaf].MaxNConcAtStartLeafFall
            MultiplyFunction MinimumNConc
              Constant StructuralNFactor: FixedValue=0.6
              VariableReference MaxNConcAtStartLeafFall: VariableName=[Leaf].MaxNConcAtStartLeafFall
          GenericOrgan Trunk: IsAboveGround=true
            Constant NReallocationFactor: FixedValue=0
            Constant NRetranslocationFactor: FixedValue=0
            Constant DMRetranslocationFactor: FixedValue=0.05
            PhaseLookupValue NitrogenDemandSwitch: Start=BudBreak; End=BareTree
              Constant: FixedValue=1
            BiomassRemoval BiomassRemovalDefaults: HarvestFractionLiveToRemove=0; HarvestFractionDeadToRemove=0; HarvestFractionLiveToResidue=0; HarvestFractionDeadToResidue=0
            Constant SenescenceRate: FixedValue=0; Units=/d
            Constant DetachmentRateFunction: FixedValue=0; Units=/d
            Constant MaintenanceRespirationFunction: FixedValue=0; Units=0-1
            Constant DMConversionEfficiency: FixedValue=1; Units=0-1
            Constant DMReallocationFactor: FixedValue=0
            Constant RemobilisationCost: FixedValue=0
            Constant CarbonConcentration: FixedValue=0.4
            NutrientDemandFunctions DMDemands
              PartitionFractionDemandFunction Structural
                PhaseLookup PartitionFraction
                  PhaseLookupValue CanopyExpansion: Start=BudBreak; End=StartFullCanopy
                    Constant: FixedValue=0.2
                  PhaseLookupValue FruitGrowth: Start=StartFullCanopy; End=StartLeafFall
                    Constant: FixedValue=0.15
                  PhaseLookupValue LeafFall: Start=StartLeafFall; End=BareTree
                    Constant: FixedValue=0
              Constant Metabolic: FixedValue=0
              Constant Storage: FixedValue=0
              Constant QStructuralPriority: FixedValue=1
              Constant QMetabolicPriority: FixedValue=1
              Constant QStoragePriority: FixedValue=1
            NutrientDemandFunctions NDemands
              Constant Storage: FixedValue=0
              Constant Metabolic: FixedValue=0
              MultiplyFunction Structural
                VariableReference MinNconc: VariableName=[Trunk].minimumNconc
                VariableReference PotentialDMAllocation: VariableName=[Trunk].potentialDMAllocation.Structural
              Constant QStructuralPriority: FixedValue=1
              Constant QMetabolicPriority: FixedValue=1
              Constant QStoragePriority: FixedValue=1
            RetranslocateNonStructural RetranslocateNitrogen
            EnergyBalance: Albedo=0.1; Gsmax350=0; R50=0; fRadnAllZones=0; KDead=0; LAIDead=0
              Constant FRGRer: FixedValue=0
              Constant StomatalConductanceCO2Modifier: FixedValue=1
              VariableReference Tallness: VariableName=[DEROPAPY].Height
              VariableReference Deepness: VariableName=[DEROPAPY].Height
              Constant GreenAreaIndex: FixedValue=0
              MultiplyFunction DeadAreaIndex
                Constant VolumeToArea: FixedValue=0.3; Units=m2/l
                DivideFunction Volume
                  VariableReference Wt: VariableName=[Trunk].Wt
                  Constant Density: FixedValue=750; Units=g/l
              Constant GreenExtinctionCoefficient: FixedValue=0
              Constant DeadExtinctionCoefficient: FixedValue=0.5
              VariableReference Wideness: VariableName=[DEROPAPY].Width
            NutrientPoolFunctions InitialWt
              Constant Structural: Units=g/m^2
                Memo Param value set at establishment
                  DEROPAPY calculates this parameter value during run-time when the crop is established from parameter values set in the relevent DEROPAPYtree object
              Constant Metabolic: FixedValue=0
              Constant Storage: FixedValue=0
            Constant Photosynthesis: FixedValue=0
            VariableReference initialNConcFunction: VariableName=[Trunk].MinimumNConc
            Constant MaximumNConc: FixedValue=0.01
              Memo Param value set at establishment
                SCRUM calculates this parameter value during run-time when the crop is established from parameter values set in the relevent SCRUMcrop and SCRUMmanagement objects
            MultiplyFunction CriticalNConc
              Constant StructuralNFactor: FixedValue=0.6
              VariableReference MaxNConc: VariableName=[Trunk].MaxNConc
            MultiplyFunction MinimumNConc
              Constant StructuralNFactor: FixedValue=0.6
              VariableReference MaxNConc: VariableName=[Trunk].MaxNConc
          GenericOrgan Fruit: IsAboveGround=true
            Constant NReallocationFactor: FixedValue=0
            Constant NRetranslocationFactor: FixedValue=0
            Constant DMRetranslocationFactor: FixedValue=0
            PhaseLookupValue NitrogenDemandSwitch: Start=StartFullCanopy; End=StartLeafFall
              Constant: FixedValue=1
            BiomassRemoval BiomassRemovalDefaults: HarvestFractionLiveToRemove=0.8; HarvestFractionDeadToRemove=0; HarvestFractionLiveToResidue=0.2; HarvestFractionDeadToResidue=1
            Constant SenescenceRate: FixedValue=0; Units=/d
            Constant DetachmentRateFunction: FixedValue=0; Units=/d
            Constant MaintenanceRespirationFunction: FixedValue=0; Units=0-1
            Constant DMConversionEfficiency: FixedValue=1; Units=0-1
            Constant DMReallocationFactor: FixedValue=0
            Constant RemobilisationCost: FixedValue=0
            Constant CarbonConcentration: FixedValue=0.4
            NutrientDemandFunctions DMDemands
              MultiplyFunction Structural
                MaximumFunction RelativeFruitMass
                  DeltaFunction Delta
                    LinearInterpolationFunction Integral
                      XYPairs: X=[0, 80, 150, 250, 300, 365]; Y=[0, 0, 0.1, 0.9, 1, 1]
                      VariableReference XValue: VariableName=[Weather].DaysSinceWinterSolstice
                  Constant Zero: FixedValue=0
                VariableReference Number: VariableName=[Fruit].Number
                VariableReference PotentialDW: VariableName=[Fruit].PotentialDryWt
              Constant Metabolic: FixedValue=0
              Constant Storage: FixedValue=0
              Constant QStructuralPriority: FixedValue=100
              Constant QMetabolicPriority: FixedValue=100
              Constant QStoragePriority: FixedValue=100
            NutrientDemandFunctions NDemands
              Constant Storage: FixedValue=0
              Constant Metabolic: FixedValue=0
              MultiplyFunction Structural
                VariableReference MinNconc: VariableName=[Trunk].minimumNconc
                VariableReference PotentialDMAllocation: VariableName=[Fruit].potentialDMAllocation.Structural
              Constant QStructuralPriority: FixedValue=1
              Constant QMetabolicPriority: FixedValue=1
              Constant QStoragePriority: FixedValue=1
            RetranslocateNonStructural RetranslocateNitrogen
            NutrientPoolFunctions InitialWt
              Constant Structural: FixedValue=0; Units=g/m^2
              Constant Metabolic: FixedValue=0
              Constant Storage: FixedValue=0
            Constant Photosynthesis: FixedValue=0
            VariableReference initialNConcFunction: VariableName=[Fruit].MaximumNConc
            Constant MaxNConcAtHarvest: FixedValue=0
              Memo Param value set at establishment
                SCRUM calculates this parameter value during run-time when the crop is established from parameter values set in the relevent SCRUMcrop and SCRUMmanagement objects
            AddFunction MaximumNConc
              VariableReference MaxNConcAtHarvest: VariableName=[Fruit].MaxNConcAtHarvest
              MultiplyFunction EarlyNConcElevation
                SubtractFunction
                  Constant MaxNConcAtSet: FixedValue=4
                  VariableReference MaxNConcAtHarvest: VariableName=[Fruit].MaxNConcAtHarvest
                LinearInterpolationFunction DilutionCurve: same as PatternsTest.Row.Pick.PlantToRemoveFrom.Leaf.MaximumNConc.EarlyNConcElevation.DilutionCurve
            MultiplyFunction CriticalNConc
              Constant StructuralNFactor: FixedValue=0.6
              VariableReference MaxNConcAtHarvest: VariableName=[Fruit].MaxNConcAtHarvest
            MultiplyFunction MinimumNConc
              Constant StructuralNFactor: FixedValue=0.6
              VariableReference MaxNConcAtHarvest: VariableName=[Fruit].MaxNConcAtHarvest
            Constant MaximumSize: FixedValue=0; Units=mm
            Constant Density: FixedValue=0; Units=g/cm3
            Constant MinimumDMC: FixedValue=0; Units=g/g
            MultiplyFunction PotentialDryWt
              ExpressionFunction Volume: Expression=((4/3*3.1415926*([Fruit].MaximumSize/2)^3/1000
              VariableReference Density: VariableName=[Fruit].Density
              VariableReference DMC: VariableName=[Fruit].MinimumDMC
              VariableReference RelativeAnnualDimension: VariableName=[DEROPAPY].RelativeAnnualDimension
            MultiplyFunction DryMatterPc
              VariableReference UnStressedDM: VariableName=[Fruit].MinimumDMC
              LinearInterpolationFunction FruitAge
                XYPairs: X=[0, 3, 4, 5]; Y=[1, 1, 1, 1]
                VariableReference XValue: VariableName=[Weather].DaysSinceWinterSolstice
              LinearInterpolationFunction WaterStress
                XYPairs: X=[0, 85]; Y=[1, 1]
                VariableReference XValue: VariableName=[AccumulatedWaterStress]
            MultiplyFunction FreshWt
              DivideFunction FreshWtConversion
                Constant: FixedValue=1
                VariableReference DMconc: VariableName=[Fruit].DryMatterPc
              VariableReference DryWt: VariableName=[Fruit].Wt
            MultiplyFunction Number
              Constant RetainedPostThinning: FixedValue=15; Units=fruit/m2
              LinearInterpolationFunction WaterStress
                XYPairs: X=[0, 85]; Y=[1, 1]
                VariableReference XValue: VariableName=[AccumulatedWaterStress]
            DivideFunction FreshWtPerFruit
              VariableReference FreshWt: VariableName=[Fruit].FreshWt
              VariableReference Number: VariableName=[Fruit].Number
            DivideFunction VolumePerFruit
              VariableReference FreshWtPerFruit: VariableName=[Fruit].FreshWtPerFruit
              VariableReference Density: VariableName=[Fruit].Density
            MultiplyFunction FruitingBuds
              VariableReference RetainedPostThinning: VariableName=[Fruit].Number.RetainedPostThinning
              LinearInterpolationFunction WaterStress
                XYPairs: X=[0, 70, 90, 150, 200]; Y=[1, 1, 0.9, 0.6, 0]
                VariableReference XValue: VariableName=[AccumulatedWaterStress]
            ExpressionFunction Size: Expression=(6*[Fruit].VolumePerFruit/3.1415926)^(1/3)
          AccumulateFunction AccumulatedWaterStress: StartStageName=StartFullCanopy; EndStageName=StartLeafFall; ResetStageName=Dormant; FractionRemovedOnCut=0; FractionRemovedOnHarvest=0; FractionRemovedOnGraze=0; FractionRemovedOnPrune=1
            SubtractFunction StressIndex
              Constant One: FixedValue=1
              LinearInterpolationFunction FW
                XYPairs: X=[0.1, 0.9, 1.5]; Y=[0, 1, 1]
                VariableReference XValue: VariableName=[Leaf].Fw
          CompositeBiomass AboveGround: OrganNames=[Leaf, Trunk, Fruit]; IncludeLive=true; IncludeDead=true
          CompositeBiomass Total: OrganNames=[Leaf, Trunk, Fruit, Root]; IncludeLive=true; IncludeDead=true
          CompositeBiomass TotalLive: OrganNames=[Leaf, Trunk, Fruit, Root]; IncludeLive=true; IncludeDead=false
          CompositeBiomass TotalDead: OrganNames=[Leaf, Trunk, Fruit, Root]; IncludeLive=false; IncludeDead=true
          Constant MortalityRate: FixedValue=0
          Constant SeedMortalityRate: FixedValue=0
          Constant MaxPrunedHeight: FixedValue=0
          AddFunction Height
            MultiplyFunction CanopyBaseHeight
              Constant Maximum: FixedValue=0
              VariableReference RelativeAnnualDimension: VariableName=[DEROPAPY].RelativeAnnualDimension
            MultiplyFunction PrunedCanopyDepth
              SubtractFunction Maximum
                VariableReference MaxPrunedHeight: VariableName=[DEROPAPY].MaxPrunedHeight
                VariableReference MaxBaseHeight: VariableName=[DEROPAPY].Height.CanopyBaseHeight.Maximum
              VariableReference RelativeAnnualDimension: VariableName=[DEROPAPY].RelativeAnnualDimension
            MultiplyFunction SeasonalGrowth
              VariableReference RelativeSeasonalDimension: VariableName=[DEROPAPY].RelativeSeasonalDimension
              Constant Maximum: FixedValue=100; Units=mm
              VariableReference RelativeAnnualDimension: VariableName=[DEROPAPY].RelativeAnnualDimension
          AddFunction Width
            MultiplyFunction PrunedWidth
              VariableReference RelativeAnnualDimension: VariableName=[DEROPAPY].RelativeAnnualDimension
              Constant Maximum: FixedValue=500; Units=mm
            MultiplyFunction SeasonalGrowth
              VariableReference RelativeSeasonalDimension: VariableName=[DEROPAPY].RelativeSeasonalDimension
              Constant Maximum: FixedValue=500; Units=mm
          LinearInterpolationFunction RelativeAnnualDimension
            XYPairs: X=[0, 6]; Y=[0.4, 1]
            VariableReference XValue: VariableName=[Phenology].Age.YearDecimal
          StageBasedInterpolation RelativeSeasonalDimension: Values=[0, 0, 0, 0, 0.6, 1, 1, 1]; Proportional=true
      BiomassRemovalEvents Prune: RemovalType=3
        BiomassRemovals:
          PlantName  OrganName  TypeString  LiveToRemove  DeadToRemove  LiveToResidue  DeadToResidue
          DEROPAPY   Root       Pruning     0             0             0              0
          DEROPAPY   Leaf       Pruning     0             0             1              1
          DEROPAPY   Trunk      Pruning     0             0             0.3            0.9
          DEROPAPY   Fruit      Pruning     0             0             1              1
        Plant PlantToRemoveFrom: PlantType=DEROPAPY
          Memo TitlePage: same as Replacements.DEROPAPY.TitlePage
          OrganArbitrator Arbitrator: same as Replacements.DEROPAPY.Arbitrator
          Phenology
            Memo Description
              As ThermalTime accumulates the crop progresses through the following phases:
            WeightedTemperatureFunction ThermalTime: same as Replacements.DEROPAPY.Phenology.ThermalTime
            DAWSPhase SpringDormancy: Start=Dormant; End=Break; IsEmerged=true; DAWStoProgress=0
            EmergingPhase Emerging: Start=Break; End=Emergence; IsEmerged=true; TTForTimeStep=0
              VariableReference ThermalTime: VariableName=[Phenology].ThermalTime
              MultiplyFunction Target
                VariableReference SowingDepth: VariableName=[Plant].SowingData.Depth
                Constant ShootRate: FixedValue=5; Units=oCd/mm
            GenericPhase Seedling: same as Replacements.DEROPAPY.Phenology.Emerging
            GenericPhase Vegetative: same as Replacements.DEROPAPY.Phenology.LateVegetative
            GotoPhase DefoliateOrDevelop: Start=Vegetative; IsEmerged=true; PhaseNameToGoto=SpringDormancy
            GenericPhase EarlyReproductive: same as Replacements.DEROPAPY.Phenology.EarlyReproductive
            GenericPhase MidReproductive: same as Replacements.DEROPAPY.Phenology.MidReproductive
            GenericPhase LateReproductive: same as Replacements.DEROPAPY.Phenology.LateReproductive
            GenericPhase Maturity: same as Replacements.DEROPAPY.Phenology.Maturity
            GenericPhase Ripe: same as Replacements.DEROPAPY.Phenology.Ripe
            DAWSPhase WinterDormancy: Start=Ripe; End=SpringDormant; IsEmerged=true; DAWStoProgress=365
            GotoPhase Reset: Start=Ripe; IsEmerged=true; PhaseNameToGoto=SpringDormancy
            GrazeAndRewind Graze: Start=Grazing; IsEmerged=true; PhaseNameToGoto=Seedling
            EndPhase ReadyForHarvesting: Start=Ripe; End=Unused; IsEmerged=true
              VariableReference ThermalTime: VariableName=[Phenology].ThermalTime
            Age
            AddFunction AgeDecimal: same as Replacements.DEROPAPY.Phenology.AgeDecimal
          Root: GrowthRespiration=0; MaintenanceRespiration=0
            RootShapeCylinder RootShape
            DivideFunction RootFrontVelocity: same as PatternsTest.Row.Pick.PlantToRemoveFrom.Root.RootFrontVelocity
            Constant MaxDailyNUptake: FixedValue=10; Units=g/m2
            Constant DMConversionEfficiency: FixedValue=1; Units=g/m2
            Constant RemobilisationCost: FixedValue=0
            Constant MaximumRootDepth: FixedValue=3000; Units=mm
            Constant NitrogenDemandSwitch: FixedValue=1; Units=0-1
            KLModiferVsDepthFunction klModifier
              VariableReference LayerDepth: VariableName=[Physical].DepthMidPoints
              VariableReference MaximumRootDepth: VariableName=[Root].MaximumRootDepth
            MultiplyFunction SenescenceRate: same as PatternsTest.Row.Pick.PlantToRemoveFrom.Root.SenescenceRate
            Constant SpecificRootLength: FixedValue=105; Units=m/g
            LinearInterpolationFunction KNO3
              XYPairs: X=[0, 0.003]; Y=[0.02, 0.02]
              VariableReference XValue: VariableName=[Root].LengthDensity
            LinearInterpolationFunction KNH4
              XYPairs: X=[0, 0.003]; Y=[0, 0]
              VariableReference XValue: VariableName=[Root].LengthDensity
            BiomassRemoval BiomassRemovalDefaults: HarvestFractionLiveToRemove=0; HarvestFractionDeadToRemove=0; HarvestFractionLiveToResidue=0; HarvestFractionDeadToResidue=0
            LinearInterpolationFunction NUptakeSWFactor
              XYPairs: X=[0, 1]; Y=[0, 1]
              VariableReference XValue: VariableName=[Root].RWC
            Constant CarbonConcentration: FixedValue=0.4
            Constant MaintenanceRespirationFunction: FixedValue=0
            NutrientDemandFunctions DMDemands
              MultiplyFunction Structural
                PartitionFractionDemandFunction DMDemandFunction
                  PhaseLookup PartitionFraction
                    PhaseLookupValue AcitveGrowth: Start=Emergence; End=Maturity
                      Constant: FixedValue=0.2
                Constant StructuralFraction: FixedValue=1
              Constant Metabolic: FixedValue=0
              Constant Storage: FixedValue=0
              Constant QStructuralPriority: FixedValue=1
              Constant QMetabolicPriority: FixedValue=1
              Constant QStoragePriority: FixedValue=1
            NutrientDemandFunctions NDemands: same as PatternsTest.Row.Pick.PlantToRemoveFrom.Root.NDemands
            NutrientPoolFunctions InitialWt: same as PatternsTest.Row.Pick.PlantToRemoveFrom.Root.InitialWt
            Constant RootDepthStressFactor: FixedValue=1
            Constant MaximumNConc: FixedValue=0
              Memo Param value set at establishment
                DEROPAPY calculates this parameter value during run-time when the crop is established from parameter values set in the relevent DEROPAPYtree object
            VariableReference CriticalNConc: VariableName=[Root].MaximumNConc
            VariableReference MinimumNConc: VariableName=[Root].MaximumNConc
          SimpleLeaf Leaf: Albedo=0.18; LeafInitialisationStage=Dormant
            zero: Gsmax350, R50, Height, BaseHeight, Width, FRGR, PotentialEP, WaterDemand, fRadnAllZones, KDead, LAIDead
            Constant StomatalConductanceCO2Modifier: FixedValue=1
            Constant DetachmentRate: FixedValue=0; Units=/d
            Constant RemobilisationCost: FixedValue=0
            Constant InitialWt: FixedValue=0; Units=g/plant
            Constant LaiDead: FixedValue=0; Units=m^2/m^2
            RUEModel Photosynthesis
              Constant RUE: FixedValue=1.2
              WeightedTemperatureFunction FT: MaximumTemperatureWeighting=0.5
                XYPairs: X=[0, 10, 25, 40]; Y=[0, 1, 1, 0]
              RUECO2Function FCO2: PhotosyntheticPathway=C3
              VariableReference RadnInt: VariableName=[Leaf].RadiationIntercepted
              Constant FVPD: FixedValue=1
              Constant FN: FixedValue=1
              LinearInterpolationFunction Fw
                XYPairs: X=[0, 0.8]; Y=[0, 1]
                VariableReference XValue: VariableName=[Leaf].Fw
            SubDailyInterpolation FRGR: same as PatternsTest.Row.Pick.PlantToRemoveFrom.Leaf.FRGR
            MultiplyFunction ExtinctionCoefficient
              Constant UnstressedCoeff: FixedValue=0
                Memo Param value set at establishment
                  SCRUM calculates this parameter value during run-time when the crop is established from parameter values set in the relevent SCRUMcrop and SCRUMmanagement objects
              LinearInterpolationFunction WaterStressFactor
                XYPairs: X=[0.4, 1]; Y=[0.2, 1]
                VariableReference XValue: VariableName=[Leaf].Fw
            Constant NReallocationFactor: FixedValue=0
            PhaseLookup SenescenceRate
              PhaseLookupValue LeafFall: Start=LateReproductive; End=Maturity
                Constant: FixedValue=0
            BiomassRemoval BiomassRemovalDefaults: HarvestFractionLiveToRemove=0; HarvestFractionDeadToRemove=0; HarvestFractionLiveToResidue=0; HarvestFractionDeadToResidue=0
            Constant MaintenanceRespiration: FixedValue=0; Units=0-1
            Constant DMConversionEfficiency: FixedValue=1; Units=0-1
            Constant NRetranslocationFactor: FixedValue=0
            Constant NitrogenDemandSwitch: FixedValue=1
            Constant DMReallocationFactor: FixedValue=0
            Constant DMRetranslocationFactor: FixedValue=0
            Constant CarbonConcentration: FixedValue=0.4
            NutrientDemandFunctions DMDemands
              MultiplyFunction Structural
                PartitionFractionDemandFunction DMDemandFunction
                  PhaseLookup PartitionFraction
                    PhaseLookupValue CanopyExpansion: Start=Emergence; End=EarlyReproductive
                      Constant: FixedValue=0.6
                    PhaseLookupValue FruitGrowth: Start=MidReproductive; End=LateReproductive
                      Constant: FixedValue=0.1
                Constant StructuralFraction: FixedValue=0.5; Units=0-1
              Constant Metabolic: FixedValue=0
              Constant Storage: FixedValue=0
              Constant QStructuralPriority: FixedValue=1
              Constant QMetabolicPriority: FixedValue=1
              Constant QStoragePriority: FixedValue=1
            NutrientDemandFunctions NDemands: same as PatternsTest.Row.Pick.PlantToRemoveFrom.Leaf.NDemands
            VariableReference BaseHeight: VariableName=[DEROPAPY].Height.CanopyBaseHeight
            VariableReference HeightFunction: VariableName=[DEROPAPY].Height
            VariableReference Wideness: VariableName=[DEROPAPY].Width
            MultiplyFunction Area
              Constant Maximum: FixedValue=0; Units=m2/m2
              VariableReference RelativeAnnualDimension: VariableName=[DEROPAPY].RelativeAnnualDimension
              LinearInterpolationFunction RelativeSeasonalDimension
                XYPairs: X=[3, 3.2, 3.5, 4, 5, 6]; Y=[0, 0.1, 0.5, 0.99, 1, 0]
                VariableReference XValue: VariableName=[Phenology].Stage
              Constant FrostFactor: FixedValue=1
            Constant MaxNConcAtStartLeafFall: FixedValue=0
              Memo Param value set at establishment
                SCRUM calculates this parameter value during run-time when the crop is established from parameter values set in the relevent SCRUMcrop and SCRUMmanagement objects
            AddFunction MaximumNConc: same as PatternsTest.Row.Pick.PlantToRemoveFrom.Leaf.MaximumNConc
            MultiplyFunction CriticalNConc
              Constant StructuralNFactor: FixedValue=0.6
              VariableReference MaxNConcAtStartLeafFall: VariableName=[Leaf].MaxNConcAtStartLeafFall
            MultiplyFunction MinimumNConc
              Constant StructuralNFactor: FixedValue=0.6
              VariableReference MaxNConcAtStartLeafFall: VariableName=[Leaf].MaxNConcAtStartLeafFall
          GenericOrgan Trunk: IsAboveGround=true
            Constant NReallocationFactor: FixedValue=0
            Constant NRetranslocationFactor: FixedValue=0
            Constant DMRetranslocationFactor: FixedValue=0.05
            PhaseLookupValue NitrogenDemandSwitch: Start=Emergence; End=Maturity
              Constant: FixedValue=1
            BiomassRemoval BiomassRemovalDefaults: HarvestFractionLiveToRemove=0; HarvestFractionDeadToRemove=0; HarvestFractionLiveToResidue=0; HarvestFractionDeadToResidue=0
            Constant SenescenceRate: FixedValue=0; Units=/d
            Constant DetachmentRateFunction: FixedValue=0; Units=/d
            Constant MaintenanceRespirationFunction: FixedValue=0; Units=0-1
            Constant DMConversionEfficiency: FixedValue=1; Units=0-1
            Constant DMReallocationFactor: FixedValue=0
            Constant RemobilisationCost: FixedValue=0
            Constant CarbonConcentration: FixedValue=0.4
            NutrientDemandFunctions DMDemands
              PartitionFractionDemandFunction Structural
                PhaseLookup PartitionFraction
                  PhaseLookupValue CanopyExpansion: Start=Emergence; End=MidReproductive
                    Constant: FixedValue=0.2
                  PhaseLookupValue FruitGrowth: Start=MidReproductive; End=LateReproductive
                    Constant: FixedValue=0.15
                  PhaseLookupValue LeafFall: Start=LateReproductive; End=Ripe
                    Constant: FixedValue=0
              Constant Metabolic: FixedValue=0
              Constant Storage: FixedValue=0
              Constant QStructuralPriority: FixedValue=1
              Constant QMetabolicPriority: FixedValue=1
              Constant QStoragePriority: FixedValue=1
            NutrientDemandFunctions NDemands: same as PatternsTest.Row.Pick.PlantToRemoveFrom.Trunk.NDemands
            RetranslocateNonStructural RetranslocateNitrogen
            EnergyBalance: same as PatternsTest.Row.Pick.PlantToRemoveFrom.Trunk.EnergyBalance
            NutrientPoolFunctions InitialWt: same as PatternsTest.Row.Pick.PlantToRemoveFrom.Trunk.InitialWt
            Constant Photosynthesis: FixedValue=0
            VariableReference initialNConcFunction: VariableName=[Trunk].MinimumNConc
            Constant MaximumNConc: FixedValue=0.01
              Memo Param value set at establishment
                SCRUM calculates this parameter value during run-time when the crop is established from parameter values set in the relevent SCRUMcrop and SCRUMmanagement objects
            MultiplyFunction CriticalNConc
              Constant StructuralNFactor: FixedValue=0.6
              VariableReference MaxNConc: VariableName=[Trunk].MaxNConc
            MultiplyFunction MinimumNConc
              Constant StructuralNFactor: FixedValue=0.6
              VariableReference MaxNConc: VariableName=[Trunk].MaxNConc
          GenericOrgan Fruit: IsAboveGround=true
            Constant NReallocationFactor: FixedValue=0
            Constant NRetranslocationFactor: FixedValue=0
            Constant DMRetranslocationFactor: FixedValue=0
            PhaseLookupValue NitrogenDemandSwitch: Start=EarlyReproductive; End=Ripe
              Constant: FixedValue=1
            BiomassRemoval BiomassRemovalDefaults: HarvestFractionLiveToRemove=0.8; HarvestFractionDeadToRemove=0; HarvestFractionLiveToResidue=0.2; HarvestFractionDeadToResidue=1
            Constant SenescenceRate: FixedValue=0; Units=/d
            Constant DetachmentRateFunction: FixedValue=0; Units=/d
            Constant MaintenanceRespirationFunction: FixedValue=0; Units=0-1
            Constant DMConversionEfficiency: FixedValue=1; Units=0-1
            Constant DMReallocationFactor: FixedValue=0
            Constant RemobilisationCost: FixedValue=0
            Constant CarbonConcentration: FixedValue=0.4
            NutrientDemandFunctions DMDemands: same as PatternsTest.Row.Pick.PlantToRemoveFrom.Fruit.DMDemands
            NutrientDemandFunctions NDemands: same as PatternsTest.Row.Pick.PlantToRemoveFrom.Fruit.NDemands
            RetranslocateNonStructural RetranslocateNitrogen
            NutrientPoolFunctions InitialWt: same as PatternsTest.Row.Pick.PlantToRemoveFrom.Fruit.InitialWt
            Constant Photosynthesis: FixedValue=0
            VariableReference initialNConcFunction: VariableName=[Fruit].MaximumNConc
            Constant MaxNConcAtHarvest: FixedValue=0
              Memo Param value set at establishment
                SCRUM calculates this parameter value during run-time when the crop is established from parameter values set in the relevent SCRUMcrop and SCRUMmanagement objects
            AddFunction MaximumNConc: same as PatternsTest.Row.Pick.PlantToRemoveFrom.Fruit.MaximumNConc
            MultiplyFunction CriticalNConc
              Constant StructuralNFactor: FixedValue=0.6
              VariableReference MaxNConcAtHarvest: VariableName=[Fruit].MaxNConcAtHarvest
            MultiplyFunction MinimumNConc
              Constant StructuralNFactor: FixedValue=0.6
              VariableReference MaxNConcAtHarvest: VariableName=[Fruit].MaxNConcAtHarvest
            Constant MaximumSize: FixedValue=0; Units=mm
            Constant Density: FixedValue=0; Units=g/cm3
            Constant MinimumDMC: FixedValue=0; Units=g/g
            MultiplyFunction PotentialDryWt: same as PatternsTest.Row.Pick.PlantToRemoveFrom.Fruit.PotentialDryWt
            MultiplyFunction DryMatterPc: same as PatternsTest.Row.Pick.PlantToRemoveFrom.Fruit.DryMatterPc
            MultiplyFunction FreshWt: same as PatternsTest.Row.Pick.PlantToRemoveFrom.Fruit.FreshWt
            MultiplyFunction Number: same as PatternsTest.Row.Pick.PlantToRemoveFrom.Fruit.Number
            DivideFunction FreshWtPerFruit
              VariableReference FreshWt: VariableName=[Fruit].FreshWt
              VariableReference Number: VariableName=[Fruit].Number
            DivideFunction VolumePerFruit
              VariableReference FreshWtPerFruit: VariableName=[Fruit].FreshWtPerFruit
              VariableReference Density: VariableName=[Fruit].Density
            MultiplyFunction FruitingBuds: same as PatternsTest.Row.Pick.PlantToRemoveFrom.Fruit.FruitingBuds
            ExpressionFunction Size: Expression=(6*[Fruit].VolumePerFruit/3.1415926)^(1/3)
          AccumulateFunction AccumulatedWaterStress: StartStageName=Emergence; EndStageName=Ripe; ResetStageName=Dormant; FractionRemovedOnCut=0; FractionRemovedOnHarvest=0; FractionRemovedOnGraze=0; FractionRemovedOnPrune=1
            SubtractFunction StressIndex: same as PatternsTest.Row.Pick.PlantToRemoveFrom.AccumulatedWaterStress.StressIndex
          CompositeBiomass AboveGround: OrganNames=[Leaf, Trunk, Fruit]; IncludeLive=true; IncludeDead=true
          CompositeBiomass Total: OrganNames=[Leaf, Trunk, Fruit, Root]; IncludeLive=true; IncludeDead=true
          CompositeBiomass TotalLive: OrganNames=[Leaf, Trunk, Fruit, Root]; IncludeLive=true; IncludeDead=false
          CompositeBiomass TotalDead: OrganNames=[Leaf, Trunk, Fruit, Root]; IncludeLive=false; IncludeDead=true
          Constant MortalityRate: FixedValue=0
          Constant SeedMortalityRate: FixedValue=0
          Constant MaxPrunedHeight: FixedValue=0
          AddFunction Height
            MultiplyFunction CanopyBaseHeight
              Constant Maximum: FixedValue=0
              VariableReference Age pattern: VariableName=[DEROPAPY].RelativeAnnualDimension
            MultiplyFunction PrunedCanopyDepth
              SubtractFunction Maximum
                VariableReference MaxPrunedHeight: VariableName=[DEROPAPY].MaxPrunedHeight
                VariableReference MaxBaseHeight: VariableName=[DEROPAPY].Height.CanopyBaseHeight.Maximum
              VariableReference Age pattern: VariableName=[DEROPAPY].RelativeAnnualDimension
            MultiplyFunction SeasonalGrowth
              VariableReference Seasonal pattern: VariableName=[DEROPAPY].RelativeSeasonalDimension
              Constant Maximum: FixedValue=100; Units=mm
              VariableReference Age pattern: VariableName=[DEROPAPY].RelativeAnnualDimension
          AddFunction Width
            MultiplyFunction PrunedWidth
              VariableReference Age pattern: VariableName=[DEROPAPY].RelativeAnnualDimension
              Constant Maximum: FixedValue=500; Units=mm
            MultiplyFunction SeasonalGrowth
              VariableReference Seasonal pattern: VariableName=[DEROPAPY].RelativeSeasonalDimension
              Constant Maximum: FixedValue=500; Units=mm
          LinearInterpolationFunction RelativeAnnualDimension
            XYPairs: X=[0, 6]; Y=[0.4, 1]
            VariableReference XValue: VariableName=[Phenology].Age.YearDecimal
          StageBasedInterpolation RelativeSeasonalDimension: Values=[0, 0, 0, 0, 0.6, 1, 1, 1]; Proportional=true
      DEROPAPY ThisDero: CoeffientFile=DraftCoeff.csv; CropName=Maize
    RectangularZone Alley: Length=100; Width=2.2; Slope=0; AspectAngle=0; Altitude=50
      Report AlleyZoneReport: EventNames=[Clock].DoReport
      Report ReportBoth: EventNames=[Clock].DoReport
        VariableNames=([Row].Irrigation.IrrigationApplied*[Row].Width + [Alley].Irrigation.IrrigationApplied*[Alley].Width)/([Row].Width + [Alley].Width) as WeightedAverage_IrrigationApplied
      Soil: Latitude=0; Longitude=0
        LayerStructure: Thickness=[200, 200, 200, 200, 200, 200, 300, 300, 400, 800]
        Chemical: Thickness=[100, 200, 300, 300, 300, 300]; PH=[6.6, 6.2, 5.7, 5.5, 5.5, 5.5]; PHUnits=Water
        Water: Thickness=[300, 300, 300, 300, 300, 300, 1200]; InitialValues=[0.4, 0.4, 0.4, 0.46, 0.45, 0.43, 0.43]; InitialPAWmm=663; RelativeTo=LL15; FilledFromTop=false
        WaterBalance SoilWater: same as PatternsTest.Row.Soil.SoilWater
        Organic: FOMCNRatio=30; CarbonUnits=Total
          Thickness  Carbon  SoilCNRatio  FBiom  FInert  FOM
          100        1.82    11.5         0.025  0.3     1243.93
          200        1.47    11.5         0.025  0.4     833.832
          300        1.2     11.5         0.015  0.75    457.617
          300        1.03    11.5         0.01   0.9     251.145
          300        0.47    11.5         0.01   0.96    137.831
          300        0.47    11.5         0.01   0.96    75.6435
        CERESSoilTemperature Temperature
        OutputLayers: Thickness=[300, 300, 300, 300, 300, 300]
        Solute NO3: same as PatternsTest.Row.Soil.NO3
        Solute NH4: same as PatternsTest.Row.Soil.NH4
        Solute Urea: same as PatternsTest.Row.Soil.Urea
        Physical: same as PatternsTest.Row.Soil.Physical
        Nutrient
      SurfaceOrganicMatter: InitialResidueName=wheat_stubble; InitialResidueType=wheat; InitialResidueMass=500; InitialStandingFraction=0; InitialCPR=0; InitialCNR=100
      Fertiliser
      Manager AgrgateZoneVariables
        script: same as in PatternsTest.Row.AgrgateZoneVariables
      Irrigation
      Plant DEROPAPY
      BiomassRemovalEvents Mow: RemovalType=0
        BiomassRemovals:
          PlantName  OrganName  TypeString  LiveToRemove  DeadToRemove  LiveToResidue  DeadToResidue
          DEROPAPY   Root       Cutting     0             0             0              0
          DEROPAPY   Leaf       Cutting     0             0             0              0
          DEROPAPY   Trunk      Cutting     0             0             0              0
          DEROPAPY   Fruit      Cutting     0             0             0              0
        Plant PlantToRemoveFrom: PlantType=DEROPAPY
          Memo TitlePage: same as Replacements.DEROPAPY.TitlePage
          OrganArbitrator Arbitrator: same as Replacements.DEROPAPY.Arbitrator
          Phenology
            Memo Description
              As ThermalTime accumulates the crop progresses through the following phases:
            WeightedTemperatureFunction ThermalTime: same as Replacements.DEROPAPY.Phenology.ThermalTime
            DAWSPhase SpringDormancy: Start=Dormant; End=BudBreak; IsEmerged=true; DAWStoProgress=0
            EmergingPhase Emerging: Start=Seed; End=Emergence; IsEmerged=true; TTForTimeStep=0
              VariableReference ThermalTime: VariableName=[Phenology].ThermalTime
              MultiplyFunction Target
                VariableReference SowingDepth: VariableName=[Plant].SowingData.Depth
                Constant ShootRate: FixedValue=5; Units=oCd/mm
            GenericPhase Seedling: same as Replacements.DEROPAPY.Phenology.Emerging
            GenericPhase Vegetative: same as Replacements.DEROPAPY.Phenology.LateVegetative
            GotoPhase GotoPhase1: Start=BareTree; IsEmerged=true; PhaseNameToGoto=SpringDormancy
            GenericPhase EarlyReproductive: same as Replacements.DEROPAPY.Phenology.EarlyReproductive
            GenericPhase MidReproductive: same as Replacements.DEROPAPY.Phenology.MidReproductive
            GenericPhase LateReproductive: same as Replacements.DEROPAPY.Phenology.LateReproductive
            GenericPhase Maturity: same as Replacements.DEROPAPY.Phenology.Maturity
            GenericPhase Ripe: same as Replacements.DEROPAPY.Phenology.Ripe
            DAWSPhase WinterDormancy: Start=BareTree; End=SpringDormant; IsEmerged=true; DAWStoProgress=365
            GotoPhase: Start=BareTree; IsEmerged=true; PhaseNameToGoto=SpringDormancy
            GrazeAndRewind Graze: Start=Grazing; IsEmerged=true; PhaseNameToGoto=ReStart
            EndPhase ReadyForHarvesting: Start=Ripe; End=Unused; IsEmerged=true
              VariableReference ThermalTime: VariableName=[Phenology].ThermalTime
            Age
            AddFunction AgeDecimal: same as Replacements.DEROPAPY.Phenology.AgeDecimal
          Root: same as PatternsTest.Row.Pick.PlantToRemoveFrom.Root
          SimpleLeaf Leaf: Albedo=0.18; LeafInitialisationStage=Dormant
            zero: Gsmax350, R50, Height, BaseHeight, Width, FRGR, PotentialEP, WaterDemand, fRadnAllZones, KDead, LAIDead
            Constant StomatalConductanceCO2Modifier: FixedValue=1
            Constant DetachmentRate: FixedValue=0; Units=/d
            Constant RemobilisationCost: FixedValue=0
            Constant InitialWt: FixedValue=0; Units=g/plant
            Constant LaiDead: FixedValue=0; Units=m^2/m^2
            RUEModel Photosynthesis: same as PatternsTest.Row.Prune.PlantToRemoveFrom.Leaf.Photosynthesis
            SubDailyInterpolation FRGR: same as PatternsTest.Row.Pick.PlantToRemoveFrom.Leaf.FRGR
            MultiplyFunction ExtinctionCoefficient: same as PatternsTest.Row.Prune.PlantToRemoveFrom.Leaf.ExtinctionCoefficient
            Constant NReallocationFactor: FixedValue=0
            PhaseLookup SenescenceRate
              PhaseLookupValue LeafFall: Start=StartLeafFall; End=BareTree
                Constant: FixedValue=0
            BiomassRemoval BiomassRemovalDefaults: HarvestFractionLiveToRemove=0; HarvestFractionDeadToRemove=0; HarvestFractionLiveToResidue=0; HarvestFractionDeadToResidue=0
            Constant MaintenanceRespiration: FixedValue=0; Units=0-1
            Constant DMConversionEfficiency: FixedValue=1; Units=0-1
            Constant NRetranslocationFactor: FixedValue=0
            Constant NitrogenDemandSwitch: FixedValue=1
            Constant DMReallocationFactor: FixedValue=0
            Constant DMRetranslocationFactor: FixedValue=0
            Constant CarbonConcentration: FixedValue=0.4
            NutrientDemandFunctions DMDemands: same as PatternsTest.Row.Pick.PlantToRemoveFrom.Leaf.DMDemands
            NutrientDemandFunctions NDemands: same as PatternsTest.Row.Pick.PlantToRemoveFrom.Leaf.NDemands
            VariableReference BaseHeight: VariableName=[DEROPAPY].Height.CanopyBaseHeight
            VariableReference HeightFunction: VariableName=[DEROPAPY].Height
            VariableReference Wideness: VariableName=[DEROPAPY].Width
            MultiplyFunction Area: same as PatternsTest.Row.Prune.PlantToRemoveFrom.Leaf.Area
            Constant MaxNConcAtStartLeafFall: FixedValue=0
              Memo Param value set at establishment
                SCRUM calculates this parameter value during run-time when the crop is established from parameter values set in the relevent SCRUMcrop and SCRUMmanagement objects
            AddFunction MaximumNConc: same as PatternsTest.Row.Pick.PlantToRemoveFrom.Leaf.MaximumNConc
            MultiplyFunction CriticalNConc
              Constant StructuralNFactor: FixedValue=0.6
              VariableReference MaxNConcAtStartLeafFall: VariableName=[Leaf].MaxNConcAtStartLeafFall
            MultiplyFunction MinimumNConc
              Constant StructuralNFactor: FixedValue=0.6
              VariableReference MaxNConcAtStartLeafFall: VariableName=[Leaf].MaxNConcAtStartLeafFall
          GenericOrgan Trunk: same as PatternsTest.Row.Pick.PlantToRemoveFrom.Trunk
          GenericOrgan Fruit: same as PatternsTest.Row.Pick.PlantToRemoveFrom.Fruit
          AccumulateFunction AccumulatedWaterStress: same as PatternsTest.Row.Pick.PlantToRemoveFrom.AccumulatedWaterStress
          CompositeBiomass AboveGround: OrganNames=[Leaf, Trunk, Fruit]; IncludeLive=true; IncludeDead=true
          CompositeBiomass Total: OrganNames=[Leaf, Trunk, Fruit, Root]; IncludeLive=true; IncludeDead=true
          CompositeBiomass TotalLive: OrganNames=[Leaf, Trunk, Fruit, Root]; IncludeLive=true; IncludeDead=false
          CompositeBiomass TotalDead: OrganNames=[Leaf, Trunk, Fruit, Root]; IncludeLive=false; IncludeDead=true
          Constant MortalityRate: FixedValue=0
          Constant SeedMortalityRate: FixedValue=0
          Constant MaxPrunedHeight: FixedValue=0
          AddFunction Height: same as PatternsTest.Row.Prune.PlantToRemoveFrom.Height
          AddFunction Width: same as PatternsTest.Row.Prune.PlantToRemoveFrom.Width
          LinearInterpolationFunction RelativeAnnualDimension
            XYPairs: X=[0, 6]; Y=[0.4, 1]
            VariableReference XValue: VariableName=[Phenology].Age.YearDecimal
          StageBasedInterpolation RelativeSeasonalDimension: Values=[0, 0, 0, 0, 0.6, 1, 1, 1]; Proportional=true
      DEROPAPY ThisDero: CoeffientFile=DraftCoeff.csv; CropName=Maize
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