Simulations
  Replacements
    Plant FodderBeet: CropType=FodderBeet
      Cultivar Rivage
      OrganArbitrator Arbitrator: NArbitrationOption=RelativeAllocation; DMArbitrationOption=RelativeAllocation
      Phenology: Emerged=false
        MultiplyFunction ThermalTime
          PhaseLookup
            PhaseLookupValue SoilTemperature: Start=Sowing; End=Germination
              SoilTemperatureFunction ThermalTime: maxt_soil_surface=20; mint_soil_surface=10
                XYPairs: X=[0, 20, 35]; Y=[0, 18, 35]
            PhaseLookupValue AirTemperature: Start=Germination; End=EndSenescence
              AirTemperatureFunction ThermalTime
                XYPairs: X=[0, 20, 35]; Y=[0, 18, 35]
          AddFunction DroughtPhenologyAcelleration
            Constant One: Value=1
            MultiplyFunction Stress
              Constant StressResponseCoefficient: Value=2
              LinearInterpolationFunction StressFactor: XProperty=[FodderBeet].WaterSupplyDemandRatio
                XYPairs: X=[0, 1]; Y=[0, 0]
        GerminatingPhase Planted: Start=Sowing; End=Germination
        EmergingPhase Germinating: Start=Germination; End=PreEmerge; ShootLag=15; ShootRate=2
          VariableReference ThermalTime: VariableName=[Phenology].ThermalTime.Value
        GenericPhase Emerging: Start=PreEmerge; End=Established
          Constant Target: Value=400
          VariableReference ThermalTime: VariableName=[Phenology].ThermalTime.Value
        GenericPhase BeginBulb: Start=Established; End=BulbGrowth
          Constant Target: Value=400
          VariableReference ThermalTime: VariableName=[Phenology].ThermalTime.Value
        GenericPhase LinearGrowth: Start=BulbGrowth; End=EndLinear
          Constant Target: Value=520
          VariableReference ThermalTime: VariableName=[Phenology].ThermalTime.Value
        GenericPhase StableGrowth: Start=EndLinear; End=StartSenescence
          Constant Target: Value=400
          VariableReference ThermalTime: VariableName=[Phenology].ThermalTime.Value
        GenericPhase Senescing: Start=StartSenescence; End=EndSenescence
          Constant Target: Value=900
          VariableReference ThermalTime: VariableName=[Phenology].ThermalTime.Value
        EndPhase Maturity: Start=EndSenescence; End=Maturity
          Constant Target: Value=15000
          VariableReference ThermalTime: VariableName=[Phenology].ThermalTime.Value
        AccumulateFunction AccumulatedThermalTime: StartStageName=PreEmerge; EndStageName=Maturity
          VariableReference: VariableName=[Phenology].ThermalTime.Value
      Structure: InitialiseStage=PreEmerge; PrimaryBudNo=1
        VariableReference ThermalTime: VariableName=[Phenology].ThermalTime.Value
        LinearInterpolationFunction HeightModel: XProperty=[Structure].MainStemNodeNo
          XYPairs: X=[0, 24]; Y=[20, 2500]
        PhaseLookupValue MainStemPrimordiaInitiationRate: Start=PreEmerge; End=Maturity
          DivideFunction NodeInitiationRateFunction
            VariableReference Phyllochron: VariableName=[Structure].MainStemNodeAppearanceRate.Phyllochron.Value
            Constant PrimordiaPerMainstemNode: Value=2
        PhaseLookupValue MainStemNodeAppearanceRate: Start=PreEmerge; End=Maturity
          Constant Phyllochron: Value=57
        Constant MainStemFinalNodeNumber: Value=80
        Constant DroughtInducedBranchMortality: Value=0
        Constant BranchingRate: Value=0
        Constant ShadeInducedBranchMortality: Value=0
        LinearInterpolationFunction PlantMortality: XProperty=[Leaf].CoverGreen
          XYPairs: X=[0.98, 1]; Y=[0, 1]
      Leaf: CurrentExpandingLeaf=0; StartFractionExpanded=0; FractionNextleafExpanded=0; _ExpandedNodeNo=0; DeadNodesYesterday=0; MaxCover=1; PotentialEP=0; KDead=0.03; GsMax=0.03; R50=200; Emissivity=0.96; Albido=0.26; FractionDied=0
        LeafCohort InitialLeaves[1]: Rank=1; Area=50
        CompositeBiomass Live: Propertys=[[Leaf].CohortLive]
        CompositeBiomass Dead: Propertys=[[Leaf].CohortDead]
        CompositeBiomass Total: Propertys=[[Leaf].CohortLive, [Leaf].CohortDead]
        ArrayBiomass CohortArrayLive: Propertys=[[Leaf].Live]; ArraySize=[Leaf].MaxNodeNo
        ArrayBiomass CohortArrayDead: Propertys=[[Leaf].Dead]; ArraySize=[Leaf].MaxNodeNo
        VariableReference ThermalTime: VariableName=[Phenology].ThermalTime.Value
        RUEModel Photosynthesis
          Constant RUE: Value=1.6
          Constant FN: Value=1
          Constant FVPD: Value=1
          WeightedTemperatureFunction FT: MaximumTemperatureWeighting=0.75
            XYPairs: X=[0, 10, 18, 26, 38]; Y=[0.2, 1, 1, 1, 0]
          LinearInterpolationFunction FW: XProperty=[Leaf].Fw
            XYPairs: X=[0, 0.4, 1.5]; Y=[0, 1, 1]
          RUECO2Function FCO2: PhotosyntheticPathway=C3
        LinearInterpolationFunction FrostFraction: XProperty=[Weather].MinT
          XYPairs: X=[-1, 0]; Y=[0, 0]
        MultiplyFunction ExtinctionCoeff
          Constant PotentialExtinctionCoeff: Value=0.9
          LinearInterpolationFunction WaterStress: XProperty=[FodderBeet].WaterSupplyDemandRatio
            XYPairs: X=[0, 1]; Y=[0.5, 1]
        LeafCohortParameters CohortParameters
          PhaseLookup GrowthDuration
            PhaseLookupValue Pre: Start=Sowing; End=Established
              Constant Function: Value=280
            PhaseLookupValue Early: Start=Established; End=EndLinear
              Constant Function: Value=120
            PhaseLookupValue Middle: Start=EndLinear; End=StartSenescence
              Constant Function: Value=120
            PhaseLookupValue Maturity: Start=StartSenescence; End=Maturity
              Constant Function: Value=90
          LinearInterpolationFunction MaxArea: XProperty=[Structure].MainStemNodeNo
            XYPairs: X=[0, 2, 6, 8, 10]; Y=[125, 500, 3000, 15000, 25000]
          Constant LagDuration: Value=200
          Constant SenescenceDuration: Value=20
          Constant DetachmentLagDuration: Value=1000000
          Constant DetachmentDuration: Value=1000000
          Constant StructuralFraction: Value=0.5
          Constant SpecificLeafAreaMin: Value=14000
          Constant SpecificLeafAreaMax: Value=16000
          LinearInterpolationFunction ExpansionStress: XProperty=[FodderBeet].WaterSupplyDemandRatio
            XYPairs: X=[0.5, 1]; Y=[0, 1]
          Constant MinimumNConc: Value=0.015
          Constant CriticalNConc: Value=0.02
          Constant MaximumNConc: Value=0.035
          Constant NReallocationFactor: Value=0.95
          Constant NRetranslocationFactor: Value=0.01
          Constant DMRetranslocationFactor: Value=0.95
          Constant DMReallocationFactor: Value=0.95
          Constant NonStructuralFraction: Value=0.2
            Constant NonStructuralFraction: Value=0.2
          LinearInterpolationFunction ShadeInducedSenescenceRate: XProperty=[Leaf].CohortCurrentRankCoverAbove
            XYPairs: X=[0, 0.5, 0.95, 1]; Y=[0, 0, 0, 0.1]
          Constant InitialNConc: Value=0
      Root: InitialDM=5; SpecificRootLength=40000; KNO3_yProperty=[0.02, 0.02]; KNO3_xRootLength=[0, 0.003]; KNH4_yProperty=[0, 0]; KNH4_xRootLength=[0, 0.003]; NuptakeSupply=0
        Constant KLModifier: Value=1
        Constant SoilWaterEffect: Value=1
        AirTemperatureFunction TemperatureEffect
          XYPairs: X=[0, 26, 35]; Y=[1, 1, 1]
        PhaseLookup RootFrontVelocity
          PhaseLookupValue: Start=Germination; End=Maturity
            Constant: Value=10
        PhaseLookup PartitionFraction
          PhaseLookupValue PhaseLookUp: Start=PreEmerge; End=Maturity
            Constant Function: Value=0.05
        Constant MaximumNConc: Value=0.01
        Constant MinimumNConc: Value=0.005
        PhaseBasedSwitch NitrogenDemandSwitch: Start=PreEmerge; End=Maturity
        LinearInterpolationFunction SenescenceRate: XProperty=[Leaf].FractionDied
          XYPairs: X=[0, 1]; Y=[0, 0.001]
        CompositeBiomass Live: Propertys=[[Root].LayerLive]
        CompositeBiomass Dead: Propertys=[[Root].LayerDead]
        Constant MaxDailyNUptake: Value=7.5
        Constant StructuralFraction: Value=0.8
      GenericAboveGroundOrgan Bulb
        Constant StructuralFraction: Value=0.95
        Constant MaximumNConc: Value=0.011
        Constant MinimumNConc: Value=0.01
        PhaseBasedSwitch NitrogenDemandSwitch: Start=Germination; End=Maturity
        Constant NRetranslocationFactor: Value=0.05
        Constant DMRetranslocationFactor: Value=0.05
        Biomass Live
        Biomass Dead
        Constant DMSinkCapacity: Value=1
        PartitionFractionDemandFunction DMDemandFunction
          PhaseLookup PartitionFraction
            PhaseLookupValue Early: Start=PreEmerge; End=BulbGrowth
              Constant Target: Value=0
            PhaseLookupValue Middle: Start=BulbGrowth; End=EndLinear
              Constant Target: Value=0.8
            PhaseLookupValue Maturity: Start=EndLinear; End=EndSenescence
              Constant Function: Value=0.8
            PhaseLookupValue PostMaturity: Start=EndSenescence; End=Maturity
              Constant Function: Value=0.8
      GenericAboveGroundOrgan Petiole
        Constant StructuralFraction: Value=0.95
        Constant MaximumNConc: Value=0.011
        Constant MinimumNConc: Value=0.01
        PhaseBasedSwitch NitrogenDemandSwitch: Start=Germination; End=Maturity
        Constant NRetranslocationFactor: Value=0.05
        Constant DMRetranslocationFactor: Value=0.05
        Biomass Live
        Biomass Dead
        PartitionFractionDemandFunction DMDemandFunction
          PhaseLookup PartitionFraction
            PhaseLookupValue Early: Start=PreEmerge; End=BulbGrowth
              MultiplyFunction
                Constant Target: Value=1
                VariableReference: VariableName=[leaf].PotentialGrowth
            PhaseLookupValue Middle: Start=BulbGrowth; End=EndLinear
              Constant Target: Value=0.9
            PhaseLookupValue Maturity: Start=EndLinear; End=EndSenescence
              Constant Function: Value=0.9
            PhaseLookupValue PostMaturity: Start=EndSenescence; End=Maturity
              Constant Function: Value=0
      Summariser
        CompositeBiomass AboveGround
          Propertys=[[Leaf].Live, [Leaf].Dead, [Bulb].Live, [Bulb].Dead, [Petiole].Live, [Petiole].Dead]
        CompositeBiomass BelowGround: Propertys=[[Root].Live, [Root].Dead]
        CompositeBiomass Total
          Propertys=[[Leaf].Live, [Leaf].Dead, [Bulb].Live, [Bulb].Dead, [Petiole].Live, [Petiole].Dead, [Root].Live, [Root].Dead]
        CompositeBiomass TotalLive: Propertys=[[Leaf].Live, [Petiole].Live, [Bulb].Live, [Root].Live]
        CompositeBiomass TotalDead: Propertys=[[Leaf].Dead, [Petiole].Dead, [Bulb].Dead, [Root].Dead]
  DataStore
  Simulation FodderBeetTest: Area=0; Slope=0
    Clock: StartDate=2000-10-15; EndDate=2001-06-01
    Summary summaryfile
    Weather: FileName=%root%\Prototypes\Potato\lincoln.met
    Zone paddock: Area=1; Slope=0
      Soil: Latitude=0; Longitude=0
        Analysis: Thickness=[100, 200, 300, 300, 300, 300]; PH=[6.6, 6.2, 5.7, 5.5, 5.5, 5.5]; PHUnits=Water; BoronUnits=HotWater
        InitialWater Initial water: PercentMethod=EvenlyDistributed; FractionFull=1
        Water
          Thickness  BD   AirDry  LL15  DUL   SAT
          100        1.2  0.08    0.13  0.33  0.5
          200        1.2  0.13    0.13  0.33  0.5
          300        1.2  0.1     0.1   0.31  0.44
          300        1.2  0.06    0.06  0.15  0.46
          300        1.2  0.04    0.04  0.1   0.44
          300        1.2  0.02    0.02  0.06  0.44
          SoilCrop FodderBeetSoil: LL=[0.13, 0.13, 0.1, 0.08, 0.11, 0.11]; KL=[0.06, 0.06, 0.06, 0.06, 0.06, 0.06]; XF=[1, 1, 1, 1, 1, 1]
          SoilCrop PotatoSoil: LL=[0.13, 0.13, 0.27, 0.27, 0.3, 0.3]; KL=[0.1, 0.06, 0.03, 0.01, 0, 0]; XF=[1, 1, 0.1, 0, 0, 0]
        SoilWater: residueinterception=0; SummerDate=1-Nov; SummerU=9; SummerCona=4.4; WinterDate=1-Apr; WinterU=9; WinterCona=4.4; DiffusConst=88; DiffusSlope=35.4; Salb=0.18; CN2Bare=68; CNRed=20; CNCov=0.8; max_pond=0; Thickness=[100, 200, 300, 300, 300, 300]; SWCON=[0.55, 0.55, 0.55, 0.55, 0.55, 0.55]
        SoilNitrogen: fom_type=[default, manure, mucuna, lablab, shemp, stable]; fract_carb=[0.2, 0.3, 0.54, 0.57, 0.45, 0]; fract_cell=[0.7, 0.3, 0.37, 0.37, 0.47, 0.1]; fract_lign=[0.1, 0.4, 0.09, 0.06, 0.08, 0.9]; wfpsN2N2O_x=[22, 88]; wfpsN2N2O_y=[0.1, 1]
        SoilOrganicMatter: RootCN=30; RootWt=3000; SoilCN=11.5; EnrACoeff=7.4; EnrBCoeff=0.2; OCUnits=Total
          Thickness  OC    FBiom  FInert
          100        1.82  0.025  0.3
          200        1.47  0.025  0.4
          300        1.2   0.015  0.75
          300        1.03  0.01   0.9
          300        0.47  0.01   0.96
          300        0.47  0.01   0.96
        Sample: NO3Units=kgha; NH4Units=ppm; SWUnits=Volumetric; OCUnits=Total; PHUnits=Water
          Thickness  NO3  NH4
          100        217  0
          200        30   0
          300        5    0
          300        5    0
          300        0    0
          300        0    0
      Plant FodderBeet: CropType=FodderBeet
      MicroClimate: air_pressure=1010; soil_emissivity=0.96; sun_angle=15; soil_heat_flux_fraction=0.4; night_interception_fraction=0.5; windspeed_default=3; refheight=2; albedo=0.26; emissivity=0.96; gsmax=0.01; r50=200; a_interception=0; b_interception=1; c_interception=0; d_interception=0; soil_albedo=0.23
      Irrigation
      Fertiliser
      Operations OpperationsSchedule
        2000-10-15  [FodderBeet].Sow(population:12, cultivar:"Rivage", depth:20, rowSpacing:720);
      Manager ExtraVariables
```csharp
using System;
using Models.Core;
using System.Collections.Generic;
using System.Text;
using Models.Soils;
using Models.PMF;
using Models;
using System.Xml.Serialization;
using APSIM.Shared.Utilities;
namespace Models
{
	[Serializable] 
	public class Script : Model
	{      
		[Link] Clock Clock;
		[Link] Soils.Soil Soil;
		[Link] Models.SurfaceOM.SurfaceOrganicMatter SOM;
		[Link] Weather Met;   
		[Link] Fertiliser Fert;
		[Link] Irrigation Irrig;  
		[Link] Plant FodderBeet;          
		[Link] Zone zone;			
					
		[XmlIgnore] public bool InitialDay { get; set; }
		
		[XmlIgnore] public double AccumPlantN { get; set; }
		[XmlIgnore] public double AccumMineralisation { get; set; }
		[XmlIgnore] public double AccumDenit { get; set; }
		[XmlIgnore] public double AccumFert { get; set; }
		[XmlIgnore] public double AccumLeach { get; set; }
		[XmlIgnore] public double AccumDetach { get; set; }
		[XmlIgnore] public double DeltaSoilOMN { get; set; }
		[XmlIgnore] public double DeltaSurfaceOMN { get; set; }
		[XmlIgnore] public double DeltaSoilMineralN { get; set; }
		[XmlIgnore] public double SoilNitrogenContent { get; set; }
		
		[XmlIgnore] public double AccumEO { get; set; }
		[XmlIgnore] public double AccumEP { get; set; }
		[XmlIgnore] public double AccumES { get; set; }
		[XmlIgnore] public double AccumDrainage { get; set; }
		[XmlIgnore] public double AccumRunoff { get; set; }
		[XmlIgnore] public double AccumOutflowLat { get; set; }
		[XmlIgnore] public double AccumIrrigation { get; set; }
		[XmlIgnore] public double AccumRainfall { get; set; }
		[XmlIgnore] public double SoilWaterDeficit { get; set; }
	
		[XmlIgnore] public double  InitialSoilOMN { get; set; }
		[XmlIgnore] public double  InitialSurfaceOMN { get; set; }
		[XmlIgnore] public double  InitialMineralN { get; set; }
		
		[XmlIgnore] public double SWC { get; set; }
		[XmlIgnore] public double DUL { get; set; }
		[XmlIgnore] public double OutFlowLat { get; set; }

		[XmlIgnore] public double FomN { get; set; }
		[XmlIgnore] public double BiomN { get; set; }
		[XmlIgnore] public double HumN { get; set; }
		[XmlIgnore] public double OrganicN { get; set; }
		[XmlIgnore] public double NO3N { get; set; }
		[XmlIgnore] public double NH4N { get; set; }
		[XmlIgnore] public double UreaN { get; set; }
		[XmlIgnore] public double MineralN { get; set; }
		[XmlIgnore] public double DltNMinRes { get; set; }
		[XmlIgnore] public double DltNMinTot { get; set; }
		
        [EventSubscribe("Commencing")]
        private void OnSimulationCommencing(object sender, EventArgs e)
        {
			InitialDay = true;
		}	   
		
		[EventSubscribe("DoManagement")]
		private void OnDoManagement(object sender, EventArgs e)
		{
			//!!!!!! Nitrogen balance components !!!!!!
			//!!!!!!^^^^^^^^^^^^^^^^^^^^^^^^^^^^^!!!!!!
           	FomN = MathUtilities.Sum(Soil.SoilNitrogen.FOMN);
			HumN = MathUtilities.Sum(Soil.SoilNitrogen.HumicN);
		    BiomN = MathUtilities.Sum(Soil.SoilNitrogen.MicrobialN);
			OrganicN = FomN + HumN + BiomN;
			NO3N = MathUtilities.Sum(Soil.NO3N);
			NH4N = MathUtilities.Sum(Soil.NH4N);
			UreaN = MathUtilities.Sum(Soil.SoilNitrogen.urea);
			MineralN = NO3N + NH4N + UreaN; 
			DltNMinRes = MathUtilities.Sum(Soil.SoilNitrogen.dlt_n_min_res);
			DltNMinTot = MathUtilities.Sum(Soil.SoilNitrogen.MineralisedN);
            int layers = Soil.Thickness.Length;
			if (InitialDay == true)
			{
				InitialSurfaceOMN = SOM.N;
				InitialSoilOMN = OrganicN;
				InitialMineralN = MineralN;
				InitialDay = false;
			}
			AccumFert += Fert.NitrogenApplied;
			DeltaSurfaceOMN = SOM.N - InitialSurfaceOMN;
			AccumLeach = AccumLeach - Soil.SoilWater.LeachNH4 - Soil.SoilWater.LeachNO3 - Soil.SoilWater.LeachUrea; //Fails
            AccumMineralisation += MathUtilities.Sum(Soil.SoilNitrogen.MineralisedN);
            AccumDenit -= MathUtilities.Sum(Soil.SoilNitrogen.Denitrification);
			AccumPlantN -= (double)zone.Get("FodderBeet.Root.NUptake");
			DeltaSoilOMN = OrganicN - InitialSoilOMN;
			DeltaSoilMineralN = MineralN - InitialMineralN;
			SoilNitrogenContent = MineralN;
			
			//!!!!!! Water balance components !!!!!!
			//!!!!!!^^^^^^^^^^^^^^^^^^^^^^^^^^!!!!!!

			AccumIrrigation += Irrig.IrrigationApplied;
			AccumRainfall += Met.Rain;
			//AccumEP -= (double)zone.Get("[FodderBeet].Leaf.Transpiration");
            AccumEP -= (double)zone.Get("FodderBeet.Root.WaterUptake");
			SoilWaterDeficit =  (SWC - DUL);
			double OutFlowLat = MathUtilities.Sum(Soil.SoilWater.outflow_lat);
			AccumOutflowLat -= OutFlowLat;
		}
		
		[EventSubscribe("DoManagementCalculations")]
		private void OnDoManagementCalculations(object sender, EventArgs e)
		{
			FomN = MathUtilities.Sum(Soil.SoilNitrogen.FOMN);
			HumN = MathUtilities.Sum(Soil.SoilNitrogen.HumicN);
		    BiomN = MathUtilities.Sum(Soil.SoilNitrogen.MicrobialN);
			
			
			AccumEO -= Soil.SoilWater.Eo;
			AccumES -= Soil.SoilWater.Es; 
			AccumDrainage -= Soil.SoilWater.Drainage;
			AccumRunoff -= Soil.SoilWater.Runoff;
			SWC = MathUtilities.Sum(Soil.SoilWater.SWmm);
			DUL = MathUtilities.Sum(Soil.SoilWater.DULmm);
		}
	}
}
```
      SurfaceOrganicMatter surface organic matter: PoolName=wheat; type=wheat; mass=0; standing_fraction=0; cnr=80; CriticalResidueWeight=2000; OptimumDecompTemp=20; MaxCumulativeEOS=20; CNRatioDecompCoeff=0.277; CNRatioDecompThreshold=25; TotalLeachRain=25; MinRainToLeach=10; CriticalMinimumOrganicC=0.004; DefaultCPRatio=0; DefaultStandingFraction=0; StandingExtinctCoeff=0.5; FractionFaecesAdded=0.5
        Pools:
          {PoolName=wheat, ResidueType=wheat, Mass=0, CNRatio=80, StandingFraction=0}
        ResidueTypes ResidueTypesList: LoadFromResource=ResidueTypes
      Report: EventNames=[Clock].DoReport
        VariableNames:
          [Clock].Today
          [ExtraVariables].Script.AccumPlantN
          [ExtraVariables].Script.AccumMineralisation
          [ExtraVariables].Script.AccumDenit
          [ExtraVariables].Script.AccumFert
          [ExtraVariables].Script.AccumLeach
          [ExtraVariables].Script.AccumDetach
          [ExtraVariables].Script.DeltaSoilOMN
          [ExtraVariables].Script.DeltaSurfaceOMN
          [ExtraVariables].Script.DeltaSoilMineralN
          [FodderBeet].Root.NSupply
          [Soil].SoilWater.Eo
          [Soil].SoilWater.Es
          [ExtraVariables].Script.SWC
          [ExtraVariables].Script.DUL
          [Soil].SoilWater.Drainage
          [Soil].SoilWater.Runoff
          [ExtraVariables].Script.OutFlowLat
          [Soil].SoilWater.pond
          [ExtraVariables].Script.AccumEO
          [ExtraVariables].Script.AccumEP
          [ExtraVariables].Script.AccumES
          [ExtraVariables].Script.AccumDrainage
          [ExtraVariables].Script.AccumRunoff
          [ExtraVariables].Script.AccumRainfall
          [ExtraVariables].Script.AccumIrrigation
          [ExtraVariables].Script.AccumOutflowLat
          [ExtraVariables].Script.SoilWaterDeficit
          [FodderBeet].Bulb.Live.Wt
          [FodderBeet].Petiole.Live.Wt
          [FodderBeet].Bulb.Live.N
          [FodderBeet].Petiole.Live.N
          [FodderBeet].Leaf.Live.Wt
          [FodderBeet].Root.Live.Wt
          [FodderBeet].Leaf.Live.N
          [FodderBeet].Root.Live.N
          [FodderBeet].Leaf.Live.NConc
          [FodderBeet].Root.Live.NConc
          [FodderBeet].Root.WaterSupply
          [FodderBeet].Root.WaterUptake
          [FodderBeet].Leaf.Transpiration
          [FodderBeet].Leaf.WaterDemand
          [FodderBeet].Root.Depth
          [FodderBeet].Leaf.CoverTotal
          [FodderBeet].Leaf.CoverDead
          [FodderBeet].Leaf.LAI
          [FodderBeet].Leaf.Height
          [FodderBeet].Leaf.PotentialBiomass.Value
          [Soil].SoilWater.SWmm
          [Soil].NO3N
          [ExtraVariables].Script.SoilNitrogenContent
          [FodderBeet].Arbitrator.NDemand
          [MicroClimate].net_radn
          [MicroClimate].peta
          [MicroClimate].petr
          [ExtraVariables].Script.FomN
          [ExtraVariables].Script.HumN
          [ExtraVariables].Script.BiomN
          [ExtraVariables].Script.DltNMinRes
          [ExtraVariables].Script.DltNMinTot
          [FodderBeet].Leaf.Fw
          [FodderBeet].Leaf.Fn
          [FodderBeet].Phenology.CurrentPhaseName
          [FodderBeet].Phenology.Stage
    SoilArbitrator Soil Arbitrator
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