Simulations: Version=2
  Memo TitlePage
    # The APSIM Wheat Model

    _Brown, H.E., Huth, N.I. and Holzworth, D.P._
  Memo Introduction
    The APSIM wheat model has been developed using the Plant Modelling Framework (PMF) of [brown_plant_2014]. This new framework provides a library of plant organ and process submodels that can be coupled, at runtime, to construct a model in much the same way that models can be coupled to construct a simulation. This means that dynamic composition of lower level process and organ classes (e.g. photosynthesis, leaf) into larger constructions (e.g. maize, wheat, sorghum) can be achieved by the model developer without additional coding.

    The wheat model consists of:

    * a phenology model to simulate development through sequential growth phases
    * a structure model to simulate plant morphology
    * a collection of organs to simulate the various plant parts
    * an arbitrator to allocate resources (N, biomass) to the various plant organs

    This work builds upon earlier APSIM Wheat models such as NWheat [Asseng200225][KeatingNWheat], NWheatS [Asseng1998163], Cropmod-Wheat[Wang2002GenericCropModel], and the earlier versions developed within the Plant Modelling Framework [brown_plant_2014].
  Replacements
    Soil Makoka Soil: SoilType=sand; NearestTown=Makoka; Country=Malawi; Latitude=-15.25; Longitude=37.25; Area=0
      Water
        Thickness  BD    AirDry  LL15  DUL   SAT
        200        1.42  0.16    0.17  0.38  0.4
        200        1.45  0.17    0.18  0.38  0.41
        200        1.47  0.18    0.19  0.37  0.42
        200        1.31  0.2     0.22  0.36  0.43
        200        1.42  0.23    0.25  0.33  0.44
        200        1.38  0.23    0.25  0.28  0.44
        200        1.32  0.26    0.27  0.29  0.44
        200        1.3   0.27    0.27  0.3   0.44
        200        1.31  0.28    0.29  0.3   0.44
        200        1.31  0.28    0.29  0.29  0.44
        SoilCrop MaizeSoil
          LL=[0.17, 0.18, 0.19, 0.22, 0.25, 0.25, 0.27, 0.27, 0.29, 0.29]
          KL=[0.08, 0.08, 0.08, 0.08, 0.06, 0.04, 0.03, 0.02, 0.02, 0.02]
          XF=[1, 1, 1, 1, 1, 1, 1, 1, 1, 1]
      SoilWater: SummerDate=1-Nov; SummerU=9; SummerCona=2.5; WinterDate=1-Apr; WinterU=9; WinterCona=2.5; DiffusConst=40; DiffusSlope=16; Salb=0.13; CN2Bare=65; CNRed=20; CNCov=0.8; max_pond=0; Thickness=[200, 1800]; SWCON=[0.6, 0.6]; residueinterception=0
      SoilNitrogen: fom_type=[default, manure, mucuna, lablab, shemp, stable]; fract_carb=[0.2, 0.3, 0.54, 0.57, 0.45, 0]; fract_cell=[0.7, 0.3, 0.37, 0.37, 0.47, 0.1]; fract_lign=[0.1, 0.4, 0.09, 0.06, 0.08, 0.9]; wfpsN2N2O_x=[22, 88]; wfpsN2N2O_y=[0.1, 1]
      SoilOrganicMatter: RootCN=40; RootWt=400; SoilCN=14.3; EnrACoeff=7.4; EnrBCoeff=0.2; OCUnits=Total
        Thickness  OC    FBiom  FInert
        200        0.88  0.01   0.66
        200        0.63  0.01   0.66
        200        0.4   0.01   0.9
        200        0.23  0.01   1
        200        0.22  0.01   1
        200        0.11  0.01   1
        200        0.05  0.01   1
        200        0.05  0.01   1
        200        0.05  0.01   1
        200        0.05  0.01   1
      Analysis: Thickness=[200, 200, 200, 200, 200, 200, 200, 200, 200, 200]; PH=[5.9, 5.6, 5.8, 5.9, 6.1, 6.3, 6.2, 6.4, 6.3, 5.9]; PHUnits=Water; BoronUnits=HotWater
      Sample: NO3Units=ppm; NH4Units=ppm; SWUnits=Volumetric; OCUnits=Total; PHUnits=Water
        Thickness  NO3  NH4  SW
        200        3    1    0.25
        200        2    1    0.25
        200        1    0.5  0.25
        200        1    0.1  0.27
        200        1    0.1  0.27
        200        0.5  0.1  0.29
        200        0.1  0.1  0.3
        200        0.1  0.1  0.3
        200        0.1  0.1  0.3
        200        0.1  0.1  0.3
    Manager SowingRule
      StartDate = 12-Dec
      EndDate = 30-Dec
      MinESW = 30
      MinRain = 30
      RainDays = 10
      CultivarName = NSCM_41
      SowingDepth = 30
      RowSpacing = 750
      Population = 4.44
```csharp
using System;
using Models.Core;
using Models.PMF;
using Models.Soils;
using Models.Utilities;
using APSIM.Shared.Utilities;

namespace Models
{
	[Serializable]
	public class Script : Model
	{
		[Link] Clock Clock;
		[Link] Fertiliser Fertiliser;
		[Link] Summary Summary;
		[Link] Plant Maize;
		[Link] Soil Soil;
		Accumulator accumulatedRain;
		
		[Description("Start of sowing window (d-mmm)")]
		public string StartDate { get; set; }
		[Description("End of sowing window (d-mmm)")]
		public string EndDate { get; set; }
		[Description("Minimum extractable soil water for sowing (mm)")]
		public double MinESW { get; set; }
		[Description("Accumulated rainfall required for sowing (mm)")]
		public double MinRain { get; set; }
		[Description("Duration of rainfall accumulation (d)")]
		public int RainDays { get; set; }
		[Description("Cultivar to be sown")]
		public string CultivarName { get; set; }
		[Description("Sowing depth (mm)")]
		public double SowingDepth { get; set; }
		[Description("Row spacing (mm)")]
		public double RowSpacing { get; set; }
		[Description("Plant population (/m2)")]
		public double Population { get; set; }
		
		
		[EventSubscribe("Commencing")]
		private void OnSimulationCommencing(object sender, EventArgs e)
		{
			accumulatedRain = new Accumulator(this, "[Weather].Rain", RainDays);
		}
		

		[EventSubscribe("DoManagement")]
		private void OnDoManagement(object sender, EventArgs e)
		{
			accumulatedRain.Update();
			
			if (DateUtilities.WithinDates(StartDate, Clock.Today, EndDate) &&
			    Maize.IsAlive != true &&
			    Soil.SoilWater.ESW > MinESW &&
			    accumulatedRain.Sum > MinRain)
			{
				Maize.Sow(population: Population, cultivar: CultivarName, depth: SowingDepth, rowSpacing: RowSpacing);	
			}
		
		}
		
	}
}
```
  DataStore
    ExcelInput Observed: FileName=Observed.xlsx; SheetNames=[Observed]
    ExcelInput OBSERVEDGrainWt: FileName=Observed.xlsx; SheetNames=[GrainWt]
    PredictedObserved: PredictedTableName=HarvestReport; ObservedTableName=Observed; FieldNameUsedForMatch=Year
  Folder Makoka 11Yr Gliricidia
    Memo
      This test evaluates performance of the APSIM AgroforestrySystem model in simulating crop and soil water data of [odhiambo1999tree;odhiambo2001roots;wilson1998comparison]. The experiment was conducted at ICRAF’s field station at Machakos, Kenya (1<sup>o</sup> 33’S and 37<sup>o</sup> 8’E) at a mean elevation of 1660 m. Bimodal annual rainfall averages 740 mm.

      Treatments were Gliricidia-maize, Grevillea-maize and sole maize. Grevillea and Gliricidia were planted in October 1993 as a single row in the middle of each 20 m x 18 m plot (1 m within-row spacing). Tree rows were oriented east-west to minimize shading effects on crops. Grevillea was pruned to 2.5. m height, but Gliricidia, which was grown as a hedgerow, was heavily cut back before each rainy season. Maize (‘Katumani composite’ ) was sown at the start of each ‘long’ season (March-July), and beans at the start of each ‘short’ season (October-February). Results were reported for two ‘long’ seasons 1996-1997, but beans failed during the intervening ‘short’ season. Tree heights during 1996-1997 were approximately 5-7 m for Grevillea and 4-5 m for Gliricidia.

      This experiment should not be confused with the CIRUS experiment reported by [Howard1997;lott2009understorey] and intervening papers and reports, but it was conducted at the same research station and over-lapped temporally.  This experiment was funded by DFID (Project T01065s5) led by Prof. Chin Ong (currently, University of Nottingham, UK). Some site data, including meteorological data, were used from these sources, or from data supplied by researchers from the two studies. For example, the met file was collated mainly from data collected using a Campbell weather station managed by Nick Jackson, and supplemented with data from a Delta-T weather station managed by James Lott. These weather station data were provided by Julia Wilson (Centre for Ecology and Hydrology, Natural Environment Research Council, UK). Watch Forcing Data [Weedon2011] interpolated data helped fill some data gaps.

      Soils are well-drained dark brown sandy clays. These soils are weakly to moderately leached with a pH of 6 to 6.5 and possess medium base saturation (50 to 80%) in the topsoil. Nitrogen and phosphorus contents were considered less than optimal, but like other nutrients, adequate for growth [mathuva1998improving].

      At the beginning of each wet season, 1 to 2 m deep trenches (depending on depth to bedrock) were dug at the margins of each plot to stop roots from one plot penetrating into and exploiting adjacent plots. All cultivations were by hand tools, which mimiced farmer practise and caused minimal disturbance to tree roots. Similarly, each season, weeds were controlled by cutting/uprooting them with hand tools on two occasions after crop germination. Key measurements reported include transects from the tree row out to 8 maize rows for: soil water, tree and crop root length density, tree growth, and maize germination, biomass and grain yield. Maize germination and growth was severely limited by low rainfall and tree competition for water.

      NOTE: Germination failure was an important factor in determining yield impacts of trees within this trial. The Maize model was not able to simulate changes in plant population density away from the tree row, but instead it was specifically coded into the model for this case. Also, we do not simulate the intervening bean crop between the two maize seasons. We add fertiliser to the second crop to provide N that would have been provided by the bean crop.
    Simulation Sm: Area=0; Slope=0
      Clock: StartDate=1992-09-01; EndDate=2003-08-31
      Summary SummaryFile
      Weather: FileName=Makoka.met
      SoilArbitrator Soil Arbitrator
      AgroforestrySystem WindbreakSystem: Area=0.000999975; Slope=0; RainfallInterceptionFraction=0; RainShaddowWidth=0
        Report TreeReport: EventNames=[Clock].DoReport
          VariableNames:
            [Clock].Today
            [TreeProxy].heightToday
            [TreeProxy].LeafAreaToday
            [TreeProxy].CanopyWidthToday
        TreeProxy: RootRadius=0.02; NumberOfTrees=0; Kd=1E-07; BaseKL=0.05; KValue=0; dates=[1992-12-15, 2016-01-15]; heights=[0, 0]; NDemands=[0, 0]; CanopyWidths=[0, 0]; TreeLeafAreas=[0, 0]
          Table=[[Parameter, 0, 0.5h, 1h, 1.5h, 2h, 2.5h, 3h, 4h, 5h, 6h], [Shade (%), Root Length Density (cm/cm3), Depth (cm), 0-20, 20-40, 40-60, 60-80, 80-100, 100-120, 120-140, 140-160, 160-180, 180-200], [0, , , 4, 1, 1.6, .5, .5, .5, .5, .5, .5, .5], [0, , , 4, 1, 1.6, .5, .5, .5, .5, .5, .5, .5], [0, , , .5, .4, .3, .3, .3, .2, .2, .2, .2, .2], [0, , , .4, .3, .2, .1, 0, 0, 0, 0, 0, 0], [0, , , .3, .2, .1, .1, 0, 0, 0, 0, 0, 0], [0, , , 0, 0, 0, 0, 0, 0, 0, 0, 0, 0], [0, , , 0, 0, 0, 0, 0, 0, 0, 0, 0, 0], [0, , , 0, 0, 0, 0, 0, 0, 0, 0, 0, 0], [0, , , 0, 0, 0, 0, 0, 0, 0, 0, 0, 0], [0, , , 0, 0, 0, 0, 0, 0, 0, 0, 0, 0]]
        RectangularZone Maize row: Area=0.000999975; Slope=0; Length=13.333; Width=0.75
          Soil Makoka Soil: NearestTown=Makoka; Country=Malawi; Latitude=-15.25; Longitude=37.25; Area=0
            Water
              Thickness  BD    AirDry  LL15  DUL   SAT
              200        1.42  0.16    0.18  0.27  0.4
              200        1.45  0.17    0.19  0.27  0.41
              200        1.47  0.18    0.21  0.27  0.42
              200        1.31  0.2     0.22  0.29  0.43
              200        1.42  0.23    0.25  0.29  0.44
              200        1.38  0.23    0.25  0.31  0.44
              200        1.32  0.26    0.28  0.32  0.44
              200        1.3   0.27    0.28  0.32  0.44
              200        1.31  0.28    0.28  0.33  0.44
              200        1.31  0.28    0.28  0.33  0.44
              SoilCrop MaizeSoil
                LL=[0.17, 0.18, 0.19, 0.22, 0.25, 0.25, 0.27, 0.27, 0.29, 0.29]
                KL=[0.08, 0.08, 0.08, 0.08, 0.06, 0.04, 0.03, 0.02, 0.02, 0.02]
                XF=[1, 1, 1, 1, 1, 1, 1, 1, 1, 1]
            SoilWater: same as Replacements.Makoka Soil.SoilWater
            SoilNitrogen: fom_type=[default, manure, mucuna, lablab, shemp, stable]; fract_carb=[0.2, 0.3, 0.54, 0.57, 0.45, 0]; fract_cell=[0.7, 0.3, 0.37, 0.37, 0.47, 0.1]; fract_lign=[0.1, 0.4, 0.09, 0.06, 0.08, 0.9]; wfpsN2N2O_x=[22, 88]; wfpsN2N2O_y=[0.1, 1]
            SoilOrganicMatter: RootCN=40; RootWt=400; SoilCN=14.3; EnrACoeff=7.4; EnrBCoeff=0.2; OCUnits=Total
              Thickness  OC    FBiom  FInert
              200        0.88  0.08   0.6
              200        0.63  0.08   0.6
              200        0.4   0.08   0.6
              200        0.23  0.01   1
              200        0.22  0.01   1
              200        0.11  0.01   1
              200        0.05  0.01   1
              200        0.05  0.01   1
              200        0.05  0.01   1
              200        0.05  0.01   1
            Analysis: Thickness=[200, 200, 200, 200, 200, 200, 200, 200, 200, 200]; PH=[5.9, 5.6, 5.8, 5.9, 6.1, 6.3, 6.2, 6.4, 6.3, 5.9]; PHUnits=Water; BoronUnits=HotWater
            Sample: NO3Units=ppm; NH4Units=ppm; SWUnits=Volumetric; OCUnits=Total; PHUnits=Water
              Thickness  NO3  NH4  SW
              200        5    1    0.25
              200        2    1    0.25
              200        1    0.5  0.25
              200        0    0    0.27
              200        0    0    0.27
              200        0    0    0.29
              200        0    0    0.3
              200        0    0    0.3
              200        0    0    0.3
              200        0    0    0.3
          LocalMicroClimate
          MicroClimate: a_interception=0; b_interception=0; c_interception=0; d_interception=0; soil_albedo=0.23; air_pressure=1010; soil_emissivity=0.96; sun_angle=15; soil_heat_flux_fraction=0.4; night_interception_fraction=0.5; windspeed_default=3; refheight=2; albedo=0.15; emissivity=0.96; gsmax=0.01; r50=200; RadIntTotal=0
          Operations
            1999-12-12  [Maize].Sow(population: 0.5, cultivar: "NSCM_41", depth: 30, rowSpacing: 750);
            2000-01-12  [Fertiliser].Apply(Amount: 0, Type: Fertiliser.Types.NO3N)
          Report HarvestReport: EventNames=[Maize].Harvesting
            VariableNames:
              [Clock].Today
              [Clock].Today.Year as Year
              [Zone].Area
              Distance
              [Maize].Phenology.CurrentStageName as Stage
              [Maize].Grain.Live.Wt as GrainWt
              [Maize].Stem.Live.Wt
              [Maize].EarLive.Wt
              [Maize].Leaf.Live.Wt
              [Maize].Root.Live.Wt
              [Maize].Husk.Live.Wt
              [Maize].Rachis.Live.Wt
              [Maize].EarLive.N
              [Maize].Grain.Live.N
              [Maize].Stem.Live.N
              [Maize].Leaf.Live.N
              [Maize].Root.Live.N
              [Maize].Root.Depth
              [Maize].AboveGround.N
              [Maize].AboveGround.Wt as Biomass
              [Maize].Total.N
              [Maize].Total.Wt
              max of [Maize].Leaf.LAI from [Maize].Sowing to [Maize].Harvesting as LAImax
              [Maize].Grain.NumberFunction.Value as GPSM
              [Maize].Grain.Size as GrainSize
              [Maize].Population
              [Maize].Phenology.FloweringDAS.Value as FloweringDAS
              sum([Soil].SoilNitrogen.FOMC) as FOMC
              sum([Soil].SoilNitrogen.HumicC) as HumicC
              sum([Soil].SoilNitrogen.MicrobialC) as MicrobialC
          Report DailyReport: EventNames=[Clock].DoReport
            VariableNames:
              [Clock].Today as Date
              [Zone].Area
              Distance
              LocalMicroClimate.Wind
              [Soil].SoilWater.Es
              sum([Soil].NO3N) as TotalNO3N
              sum([Soil].NH4N) as TotalNH4N
              sum([TreeProxy].WaterUptake) as WaterUptake
              sum([Soil].SoilWater.SWmm[1:10]) as SW200cm
              [Soil].SoilWater.SW[2] as SW30cm
              [Soil].SoilWater.SW[3] as SW50cm
              [Soil].SoilWater.SW[4] as SW70cm
              [Soil].FInert[1] as FInert10cm
              [Soil].SoilNitrogen.OC[1] as SOC10cm
              [Soil].SoilNitrogen.OC[2] as SOC30cm
              [Soil].SoilNitrogen.OC[3] as SOC50cm
              [Soil].SoilNitrogen.OC[4] as SOC70cm
              [Soil].SoilNitrogen.OC[5] as SOC90cm
              [Soil].SoilNitrogen.OC[6] as SOC110cm
              [Soil].SoilNitrogen.OC[7] as SOC130cm
              [Soil].SoilNitrogen.OC[8] as SOC150cm
              [Soil].SoilNitrogen.NO3ppm[1] as NO3ppm10cm
              [Soil].SoilNitrogen.NO3ppm[2] as NO3ppm30cm
              [Soil].SoilNitrogen.NO3ppm[3] as NO3ppm50cm
              [Soil].SoilNitrogen.NO3[1] as NO3kgpha10cm
              [Soil].SoilNitrogen.NO3[2] as NO3kgpha30cm
              [Soil].SoilNitrogen.NO3[3] as NO3kgpha50cm
              [Soil].SoilNitrogen.dlt_n_min_res[1] as NNM10cm
              [TreeProxy].Urel
              [TreeProxy].H
              [TreeProxy].SWDemand
              [TreeProxy].heightToday
              [MicroClimate].peta
              [MicroClimate].petr
              [Soil].SoilWater.Eo
              [Soil].FBiom[1] as FBiom10cm
              [TreeProxy].WaterStress
              [Soil].SoilWater.SW[1] as SurfaceSW
              [Maize].Leaf.Fw
              [Maize].Leaf.Photosynthesis.FVPD.Value
              [Maize].Leaf.Photosynthesis.FT.Value
              [Maize].Leaf.Fn
              [Maize].Root.Depth
              [Maize].Grain.Live.Wt as GrainWt
              [SurfaceOrganicMatter].Wt
              sum([Soil].SoilNitrogen.FOMN) as FOMN
              sum([Soil].SoilNitrogen.HumicN) as HumicN
              sum([Soil].SoilNitrogen.MicrobialN) as MicrobialN
              [Soil].SoilNitrogen.MicrobialN[1] as MicrobialN1
              [Soil].SoilNitrogen.MicrobialN[2] as MicrobialN2
              [Soil].SoilNitrogen.MicrobialN[3] as MicrobialN3
          Fertiliser
          SurfaceOrganicMatter: PoolName=maize_stubble; type=maize; mass=0; standing_fraction=0; cpr=400; cnr=80; CriticalResidueWeight=2000; OptimumDecompTemp=20; MaxCumulativeEOS=20; CNRatioDecompCoeff=0.277; CNRatioDecompThreshold=25; TotalLeachRain=25; MinRainToLeach=10; CriticalMinimumOrganicC=0.004; DefaultCPRatio=0; DefaultStandingFraction=0; StandingExtinctCoeff=0.5; FractionFaecesAdded=0.5
            Pools:
              {PoolName=maize_stubble, ResidueType=maize, Mass=0, CNRatio=80, CPRatio=400, StandingFraction=0}
            ResidueTypes: LoadFromResource=ResidueTypes
          Manager SowingRule
            StartDate = 15-Nov
            EndDate = 30-dec
            MinESW = 30
            MinRain = 30
            RainDays = 5
            CultivarName = NSCM_41
            SowingDepth = 30
            RowSpacing = 750
            Population = 4.44
```csharp
using System;
using Models.Core;
using Models.PMF;
using Models.Soils;
using Models.Utilities;
using APSIM.Shared.Utilities;

namespace Models
{
	[Serializable]
	public class Script : Model
	{
		[Link] Clock Clock;
		[Link] Fertiliser Fertiliser;
		[Link] Summary Summary;
		[Link] Plant Maize;
		[Link] Soil Soil;
		Accumulator accumulatedRain;
		
		[Description("Start of sowing window (d-mmm)")]
		public string StartDate { get; set; }
		[Description("End of sowing window (d-mmm)")]
		public string EndDate { get; set; }
		[Description("Minimum extractable soil water for sowing (mm)")]
		public double MinESW { get; set; }
		[Description("Accumulated rainfall required for sowing (mm)")]
		public double MinRain { get; set; }
		[Description("Duration of rainfall accumulation (d)")]
		public int RainDays { get; set; }
		[Description("Cultivar to be sown")]
		public string CultivarName { get; set; }
		[Description("Sowing depth (mm)")]
		public double SowingDepth { get; set; }
		[Description("Row spacing (mm)")]
		public double RowSpacing { get; set; }
		[Description("Plant population (/m2)")]
		public double Population { get; set; }
		
		
		[EventSubscribe("Commencing")]
		private void OnSimulationCommencing(object sender, EventArgs e)
		{
			accumulatedRain = new Accumulator(this, "[Weather].Rain", RainDays);
		}
		

		[EventSubscribe("DoManagement")]
		private void OnDoManagement(object sender, EventArgs e)
		{
			accumulatedRain.Update();
			
			if (DateUtilities.WithinDates(StartDate, Clock.Today, EndDate) &&
			    Maize.IsAlive != true &&
			    Soil.SoilWater.ESW > MinESW &&
			    accumulatedRain.Sum > MinRain)
			{
				if (Clock.Today.Year != 2000)
					Maize.Sow(population: Population, cultivar: CultivarName, depth: SowingDepth, rowSpacing: RowSpacing);
				else
					Maize.Sow(population: (Population / 4.0), cultivar: CultivarName, depth: SowingDepth, rowSpacing: RowSpacing);	
			}
		
		}
		
	}
}
```
          Manager FertiliserRule
            Amount = 0
            CropName = maize
            FertDAS = 30
```csharp
using System;
using Models.Core;
using Models.PMF;
namespace Models
{
	[Serializable]
	public class Script : Model
	{
		[Link] Clock Clock;
		[Link] Fertiliser Fertiliser;
		[Link] Summary Summary;
		[Link] Plant Maize;
		
		
		[Description("Amount of fertiliser to be applied (kg/ha)")]
		public double Amount { get; set; }
		
		[Description("Crop to be fertilised")]
		public string CropName { get; set; }
		
		[Description("Days after sowing:")]
		public int FertDAS { get; set; }
		
		

		[EventSubscribe("DoManagement")]
		private void OnDoManagement(object sender, EventArgs e)
		{
			if (Maize.IsAlive && Maize.Phenology.DaysAfterSowing == FertDAS)
				Fertiliser.Apply(Amount: Amount, Type: Fertiliser.Types.UreaN);
				
				
		}
		
	}
}
```
          Manager Harvesting
```csharp
using System;
using Models.Core;
using System.Collections.Generic;
using System.Text;
using Models.Soils;
using Models.PMF;
using Models;
using System.Xml.Serialization;
using APSIM.Shared.Utilities;

namespace Models
{
	[Serializable] 
	public class Script : Model
	{
		[Link] Plant Maize;
		[Link] Zone zone;
					
        
		[EventSubscribe("Commencing")]
		private void OnSimulationCommencing(object sender, EventArgs e)
		{
		}
		
		[EventSubscribe("DoManagement")]
		private void OnDoManagement(object sender, EventArgs e)
		{
			if (Maize.Phenology.CurrentPhaseName == "ReadyForHarvesting")
			{
				Maize.Harvest();
				Maize.EndCrop();
			}
		}
		
		[EventSubscribe("DoManagementCalculations")]
		private void OnDoManagementCalculations(object sender, EventArgs e)
		{
			
		}
	}
}
```
          Plant Maize: CropType=Maize
    Simulation Sm48N: Area=0; Slope=0
      Clock: StartDate=1992-09-01; EndDate=2003-08-31
      Summary SummaryFile
      Weather: FileName=Makoka.met
      SoilArbitrator Soil Arbitrator
      AgroforestrySystem WindbreakSystem: Area=0.000999975; Slope=0; RainfallInterceptionFraction=0; RainShaddowWidth=0
        Report TreeReport: EventNames=[Clock].DoReport
          VariableNames:
            [Clock].Today
            [TreeProxy].heightToday
            [TreeProxy].LeafAreaToday
            [TreeProxy].CanopyWidthToday
        TreeProxy: same as Makoka 11Yr Gliricidia.Sm.WindbreakSystem.TreeProxy
        RectangularZone Maize row: Area=0.000999975; Slope=0; Length=13.333; Width=0.75
          Soil Makoka Soil: same as Makoka 11Yr Gliricidia.Sm.WindbreakSystem.Maize row.Makoka Soil
          LocalMicroClimate
          MicroClimate: same as Makoka 11Yr Gliricidia.Sm.WindbreakSystem.Maize row.MicroClimate
          Operations
            1999-12-12  [Maize].Sow(population: 1.2, cultivar: "NSCM_41", depth: 30, rowSpacing: 750);
            2000-01-12  [Fertiliser].Apply(Amount: 48, Type: Fertiliser.Types.NO3N)
          Report HarvestReport: same as Makoka 11Yr Gliricidia.Sm.WindbreakSystem.Maize row.HarvestReport
          Report DailyReport: EventNames=[Clock].DoReport
            VariableNames:
              [Clock].Today as Date
              [Zone].Area
              Distance
              LocalMicroClimate.Wind
              [Soil].SoilWater.Es
              sum([Soil].NO3N) as TotalNO3N
              sum([Soil].NH4N) as TotalNH4N
              sum([TreeProxy].WaterUptake) as WaterUptake
              sum([Soil].SoilWater.SWmm[1:10]) as SW200cm
              [Soil].SoilWater.SW[2] as SW30cm
              [Soil].SoilWater.SW[3] as SW50cm
              [Soil].SoilWater.SW[4] as SW70cm
              [Soil].FInert[1] as FInert10cm
              [Soil].SoilNitrogen.OC[1] as SOC10cm
              [Soil].SoilNitrogen.OC[2] as SOC30cm
              [Soil].SoilNitrogen.OC[3] as SOC50cm
              [Soil].SoilNitrogen.OC[4] as SOC70cm
              [Soil].SoilNitrogen.OC[5] as SOC90cm
              [Soil].SoilNitrogen.OC[6] as SOC110cm
              [Soil].SoilNitrogen.OC[7] as SOC130cm
              [Soil].SoilNitrogen.OC[8] as SOC150cm
              [Soil].SoilNitrogen.NO3ppm[1] as NO3ppm10cm
              [Soil].SoilNitrogen.NO3ppm[2] as NO3ppm30cm
              [Soil].SoilNitrogen.NO3ppm[3] as NO3ppm50cm
              [Soil].SoilNitrogen.NO3[1] as NO3kgpha10cm
              [Soil].SoilNitrogen.NO3[2] as NO3kgpha30cm
              [Soil].SoilNitrogen.NO3[3] as NO3kgpha50cm
              [Soil].SoilNitrogen.dlt_n_min_res[1] as NNM10cm
              [TreeProxy].Urel
              [TreeProxy].H
              [TreeProxy].SWDemand
              [TreeProxy].heightToday
              [MicroClimate].peta
              [MicroClimate].petr
              [Soil].SoilWater.Eo
              [Soil].FBiom[1] as FBiom10cm
              [TreeProxy].WaterStress
              [Soil].SoilWater.SW[1] as SurfaceSW
              [Maize].Leaf.Fw
              [Maize].Leaf.Photosynthesis.FVPD.Value
              [Maize].Leaf.Photosynthesis.FT.Value
              [Maize].Leaf.Fn
              [Maize].Root.Depth
              [Maize].Grain.Live.Wt as GrainWt
              [SurfaceOrganicMatter].Wt
              sum([Soil].SoilNitrogen.FOMN) as FOMN
              sum([Soil].SoilNitrogen.HumicN) as HumicN
              sum([Soil].SoilNitrogen.MicrobialN) as MicrobialN
              [Soil].SoilNitrogen.MicrobialN[1] as MicrobialN1
              [Soil].SoilNitrogen.MicrobialN[2] as MicrobialN2
              [Soil].SoilNitrogen.MicrobialN[3] as MicrobialN3
              [Maize].Phenology.DaysAfterSowing
          Fertiliser
          SurfaceOrganicMatter: same as Makoka 11Yr Gliricidia.Sm.WindbreakSystem.Maize row.SurfaceOrganicMatter
          Manager SowingRule
            StartDate = 15-Nov
            EndDate = 30-Dec
            MinESW = 30
            MinRain = 30
            RainDays = 5
            CultivarName = NSCM_41
            SowingDepth = 30
            RowSpacing = 750
            Population = 4.44
            script: same as in Makoka 11Yr Gliricidia.Sm.WindbreakSystem.Maize row.SowingRule
          Manager FertiliserRule
            Amount = 48
            CropName = maize
            FertDAS = 30
```csharp
using System;
using Models.Core;
using Models.PMF;
namespace Models
{
	[Serializable]
	public class Script : Model
	{
		[Link] Clock Clock;
		[Link] Fertiliser Fertiliser;
		[Link] Summary Summary;
		[Link] Plant Maize;
		
		
		[Description("Amount of fertiliser N to be applied (kg/ha)")]
		public double Amount { get; set; }
		
		[Description("Crop to be fertilised")]
		public string CropName { get; set; }
		
		[Description("Days after sowing:")]
		public int FertDAS { get; set; }
		
		

		[EventSubscribe("DoManagement")]
		private void OnDoManagement(object sender, EventArgs e)
		{
			if (Maize.IsAlive && Maize.Phenology.DaysAfterSowing == FertDAS)
				Fertiliser.Apply(Amount: Amount, Type: Fertiliser.Types.UreaN);
				
				
		}
		
	}
}
```
          Manager Harvesting: same as Makoka 11Yr Gliricidia.Sm.WindbreakSystem.Maize row.Harvesting
          Plant Maize: CropType=Maize
  Folder Gliricidia
    Simulation Gm: Area=0; Slope=0
      Clock: StartDate=1992-09-01; EndDate=2003-08-31
      Summary SummaryFile
      Weather: FileName=Makoka.met
      SoilArbitrator Soil Arbitrator
      AgroforestrySystem WindbreakSystem: Area=0.000999975; Slope=0; RainfallInterceptionFraction=0; RainShaddowWidth=0
        Report TreeReport: EventNames=[Clock].DoReport
          VariableNames:
            [Clock].Today
            [TreeProxy].heightToday
            [TreeProxy].LeafAreaToday
            [TreeProxy].CanopyWidthToday
        TreeProxy: RootRadius=0.02; NumberOfTrees=7.407; Kd=1E-07; BaseKL=0.05; KValue=0; CanopyWidths=[0, 0, 0, 0, 0, 0, 0, 0, 0, 0, 0, 0, 0, 0]; TreeLeafAreas=[0, 0, 0, 0, 0, 0, 0, 0, 0, 0, 0, 0, 0, 0]
          Table=[[Parameter, 0, 0.5h, 1h, 1.5h, 2h, 2.5h, 3h, 4h, 5h, 6h], [Shade (%), Root Length Density (cm/cm3), Depth (cm), 0-20, 20-40, 40-60, 60-80, 80-100, 100-120, 120-140, 140-160, 160-180, 180-200], [0, , , .2, .2, .8, .6, .6, .5, .4, .3, .1, .1], [0, , , .2, .2, .8, .6, .6, .5, .4, .3, .1, .1], [0, , , .2, .2, .8, .6, .6, .5, .4, .3, .1, .1], [0, , , 0, 0, 0, 0, 0, 0, 0, 0, 0, 0], [0, , , 0, 0, 0, 0, 0, 0, 0, 0, 0, 0], [0, , , 0, 0, 0, 0, 0, 0, 0, 0, 0, 0], [0, , , 0, 0, 0, 0, 0, 0, 0, 0, 0, 0], [0, , , 0, 0, 0, 0, 0, 0, 0, 0, 0, 0], [0, , , 0, 0, 0, 0, 0, 0, 0, 0, 0, 0], [0, , , 0, 0, 0, 0, 0, 0, 0, 0, 0, 0]]
          dates=[1991-12-15, 1992-12-15, 1993-12-15, 1994-12-15, 1995-12-15, 1996-12-15, 1997-12-15, 1998-12-15, 1999-12-15, 2000-12-15, 2001-12-15, 2002-12-15, 2003-12-15, 2004-01-15]
          heights=[1000, 1000, 1000, 1000, 1000, 1000, 1000, 1000, 1000, 1000, 1000, 1000, 1000, 1000]
          NDemands=[0.005, 0.01, 0.0272, 0.0401, 0.0371, 0.0489, 0.0588, 0.0709, 0.0586, 0.0437, 0.0577, 0.05, 0.0517, 0.0517]
        RectangularZone Maize row: Area=0.000999975; Slope=0; Length=13.333; Width=0.75
          Soil Makoka Soil: same as Makoka 11Yr Gliricidia.Sm.WindbreakSystem.Maize row.Makoka Soil
          LocalMicroClimate
          MicroClimate: same as Makoka 11Yr Gliricidia.Sm.WindbreakSystem.Maize row.MicroClimate
          Operations
            1991-12-15  [SurfaceOrganicMatter].Add(mass: 0, N:0, P:0, type:"maize", name:"maize")
            1992-02-15  [SurfaceOrganicMatter].Add(mass: 0, N:0, P:0, type:"maize", name:"maize")
            1992-08-15  [SurfaceOrganicMatter].Add(mass: 0, N:0, P:0, type:"maize", name:"maize")
            1992-10-15  [SurfaceOrganicMatter].Add(mass: 0, N:0, P:0, type:"maize", name:"maize")
            1992-12-15  [SurfaceOrganicMatter].Add(mass: 0, N:0, P:0, type:"maize", name:"maize")
            1993-02-15  [SurfaceOrganicMatter].Add(mass: 654, N:25.5, P:0, type:"maize", name:"maize")
            1993-08-15  [SurfaceOrganicMatter].Add(mass: 654, N:25.5, P:0, type:"maize", name:"maize")
            1993-10-15  [SurfaceOrganicMatter].Add(mass: 654, N:25.5, P:0, type:"maize", name:"maize")
            1993-12-15  [SurfaceOrganicMatter].Add(mass: 654, N:25.5, P:0, type:"maize", name:"maize")
            1994-02-15  [SurfaceOrganicMatter].Add(mass: 957, N:37.6, P:0, type:"maize", name:"maize")
            1994-08-15  [SurfaceOrganicMatter].Add(mass: 957, N:37.6, P:0, type:"maize", name:"maize")
            1994-10-15  [SurfaceOrganicMatter].Add(mass: 957, N:37.6, P:0, type:"maize", name:"maize")
            1994-12-15  [SurfaceOrganicMatter].Add(mass: 957, N:37.6, P:0, type:"maize", name:"maize")
            1995-02-15  [SurfaceOrganicMatter].Add(mass: 895, N:34.7, P:0, type:"maize", name:"maize")
            1995-08-15  [SurfaceOrganicMatter].Add(mass: 895, N:34.7, P:0, type:"maize", name:"maize")
            1995-10-15  [SurfaceOrganicMatter].Add(mass: 895, N:34.7, P:0, type:"maize", name:"maize")
            1995-12-15  [SurfaceOrganicMatter].Add(mass: 895, N:34.7, P:0, type:"maize", name:"maize")
            1996-02-15  [SurfaceOrganicMatter].Add(mass: 1179, N:45.8, P:0, type:"maize", name:"maize")
            1996-08-15  [SurfaceOrganicMatter].Add(mass: 1179, N:45.8, P:0, type:"maize", name:"maize")
            1996-10-15  [SurfaceOrganicMatter].Add(mass: 1179, N:45.8, P:0, type:"maize", name:"maize")
            1996-12-15  [SurfaceOrganicMatter].Add(mass: 1179, N:45.8, P:0, type:"maize", name:"maize")
            1997-02-15  [SurfaceOrganicMatter].Add(mass: 1414, N:55, P:0, type:"maize", name:"maize")
            1997-08-15  [SurfaceOrganicMatter].Add(mass: 1414, N:55, P:0, type:"maize", name:"maize")
            1997-10-15  [SurfaceOrganicMatter].Add(mass: 1414, N:55, P:0, type:"maize", name:"maize")
            1997-12-15  [SurfaceOrganicMatter].Add(mass: 1414, N:55, P:0, type:"maize", name:"maize")
            1998-02-15  [SurfaceOrganicMatter].Add(mass: 1698, N:66.4, P:0, type:"maize", name:"maize")
            1998-08-15  [SurfaceOrganicMatter].Add(mass: 1698, N:66.4, P:0, type:"maize", name:"maize")
            1998-10-15  [SurfaceOrganicMatter].Add(mass: 1698, N:66.4, P:0, type:"maize", name:"maize")
            1998-12-15  [SurfaceOrganicMatter].Add(mass: 1698, N:66.4, P:0, type:"maize", name:"maize")
            1999-02-15  [SurfaceOrganicMatter].Add(mass: 1414, N:54.8, P:0, type:"maize", name:"maize")
            1999-08-15  [SurfaceOrganicMatter].Add(mass: 1414, N:54.8, P:0, type:"maize", name:"maize")
            1999-10-15  [SurfaceOrganicMatter].Add(mass: 1414, N:54.8, P:0, type:"maize", name:"maize")
            1999-12-12  [Maize].Sow(population: 1.2, cultivar: "NSCM_41", depth: 30, rowSpacing: 750);
            2000-01-12  [Fertiliser].Apply(Amount: 0, Type: Fertiliser.Types.NO3N)
            1999-12-15  [SurfaceOrganicMatter].Add(mass: 1414, N:54.8, P:0, type:"maize", name:"maize")
            2000-02-15  [SurfaceOrganicMatter].Add(mass: 1068, N:40.9, P:0, type:"maize", name:"maize")
            2000-08-15  [SurfaceOrganicMatter].Add(mass: 1068, N:40.9, P:0, type:"maize", name:"maize")
            2000-10-15  [SurfaceOrganicMatter].Add(mass: 1068, N:40.9, P:0, type:"maize", name:"maize")
            2000-12-15  [SurfaceOrganicMatter].Add(mass: 1068, N:40.9, P:0, type:"maize", name:"maize")
            2001-02-15  [SurfaceOrganicMatter].Add(mass: 1389, N:54, P:0, type:"maize", name:"maize")
            2001-08-15  [SurfaceOrganicMatter].Add(mass: 1389, N:54, P:0, type:"maize", name:"maize")
            2001-10-15  [SurfaceOrganicMatter].Add(mass: 1389, N:54, P:0, type:"maize", name:"maize")
            2001-12-15  [SurfaceOrganicMatter].Add(mass: 1389, N:54, P:0, type:"maize", name:"maize")
            2002-02-15  [SurfaceOrganicMatter].Add(mass: 1216, N:46.8, P:0, type:"maize", name:"maize")
            2002-08-15  [SurfaceOrganicMatter].Add(mass: 1216, N:46.8, P:0, type:"maize", name:"maize")
            2002-10-15  [SurfaceOrganicMatter].Add(mass: 1216, N:46.8, P:0, type:"maize", name:"maize")
            2002-12-15  [SurfaceOrganicMatter].Add(mass: 1216, N:46.8, P:0, type:"maize", name:"maize")
            2003-02-15  [SurfaceOrganicMatter].Add(mass: 1228, N:48.4, P:0, type:"maize", name:"maize")
            2003-08-15  [SurfaceOrganicMatter].Add(mass: 1228, N:48.4, P:0, type:"maize", name:"maize")
            2003-10-15  [SurfaceOrganicMatter].Add(mass: 1228, N:48.4, P:0, type:"maize", name:"maize")
            2003-12-15  [SurfaceOrganicMatter].Add(mass: 1228, N:48.4, P:0, type:"maize", name:"maize")
          Report HarvestReport: EventNames=[Maize].Harvesting
            VariableNames:
              [Clock].Today
              [Clock].Today.Year as Year
              [Zone].Area
              Distance
              [Maize].Phenology.CurrentStageName as Stage
              [Maize].Grain.Live.Wt as GrainWt
              [Maize].Stem.Live.Wt
              [Maize].EarLive.Wt
              [Maize].Leaf.Live.Wt
              [Maize].Root.Live.Wt
              [Maize].Husk.Live.Wt
              [Maize].Rachis.Live.Wt
              [Maize].EarLive.N
              [Maize].Grain.Live.N
              [Maize].Stem.Live.N
              [Maize].Leaf.Live.N
              [Maize].Root.Live.N
              [Maize].Root.Depth
              [Maize].AboveGround.N
              [Maize].AboveGround.Wt as Biomass
              [Maize].Total.N
              [Maize].Total.Wt
              max of [Maize].Leaf.LAI from [Maize].Sowing to [Maize].Harvesting as LAImax
              [Maize].Grain.NumberFunction.Value as GPSM
              [Maize].Grain.Size as GrainSize
              [Maize].Population
              [Maize].Phenology.FloweringDAS.Value as FloweringDAS
          Report DailyReport: EventNames=[Clock].DoReport
            VariableNames:
              [Clock].Today as Date
              [Zone].Area
              Distance
              LocalMicroClimate.Wind
              [Soil].SoilWater.Es
              sum([Soil].NO3N) as TotalNO3N
              sum([Soil].NH4N) as TotalNH4N
              sum([TreeProxy].WaterUptake) as WaterUptake
              sum([Soil].SoilWater.SWmm[1:10]) as SW200cm
              [Soil].SoilWater.SW[2] as SW30cm
              [Soil].SoilWater.SW[3] as SW50cm
              [Soil].SoilWater.SW[4] as SW70cm
              [TreeProxy].Urel
              [TreeProxy].H
              [TreeProxy].SWDemand
              [TreeProxy].heightToday
              [MicroClimate].peta
              [MicroClimate].petr
              [Soil].SoilWater.Eo
              [Soil].FBiom[1] as FBiom10cm
              [Soil].FInert[1] as FInert10cm
              [Soil].SoilNitrogen.OC[1] as SOC10cm
              [Soil].SoilNitrogen.OC[2] as SOC30cm
              [Soil].SoilNitrogen.OC[3] as SOC50cm
              [Soil].SoilNitrogen.OC[4] as SOC70cm
              [Soil].SoilNitrogen.OC[5] as SOC90cm
              [Soil].SoilNitrogen.OC[6] as SOC110cm
              [Soil].SoilNitrogen.OC[7] as SOC130cm
              [Soil].SoilNitrogen.OC[8] as SOC150cm
              [Soil].SoilNitrogen.NO3ppm[1] as NO3ppm10cm
              [Soil].SoilNitrogen.NO3ppm[2] as NO3ppm30cm
              [Soil].SoilNitrogen.NO3ppm[3] as NO3ppm50cm
              [Soil].SoilNitrogen.NO3[1] as NO3kgpha10cm
              [Soil].SoilNitrogen.NO3[2] as NO3kgpha30cm
              [Soil].SoilNitrogen.NO3[3] as NO3kgpha50cm
              [Soil].SoilNitrogen.dlt_n_min_res[1] as NNM10cm
              [TreeProxy].WaterStress
              [Soil].SoilWater.SW[1] as SurfaceSW
              [Maize].Leaf.Fw
              [Maize].Leaf.Photosynthesis.FVPD.Value
              [Maize].Leaf.Photosynthesis.FT.Value
              [Maize].Leaf.Fn
              [Maize].Root.Depth
              [Maize].Grain.Live.Wt as GrainWt
              [SurfaceOrganicMatter].Wt
          Fertiliser
          SurfaceOrganicMatter: same as Makoka 11Yr Gliricidia.Sm.WindbreakSystem.Maize row.SurfaceOrganicMatter
          Manager SowingRule
            StartDate = 15-Nov
            EndDate = 30-Dec
            MinESW = 30
            MinRain = 30
            RainDays = 5
            CultivarName = NSCM_41
            SowingDepth = 30
            RowSpacing = 750
            Population = 4.44
            script: same as in Replacements.SowingRule
          Manager SowingFertiliser
            Amount = 0
            CropName = maize
```csharp
using System;
using Models.Core;
using Models.PMF;
namespace Models
{
	[Serializable]
	public class Script : Model
	{
		[Link] Clock Clock;
		[Link] Fertiliser Fertiliser;
		[Link] Summary Summary;
		
		
		[Description("Amount of fertiliser to be applied (kg/ha)")]
		public double Amount { get; set; }
		
		[Description("Crop to be fertilised")]
		public string CropName { get; set; }
		
		
		

		[EventSubscribe("Sowing")]
		private void OnSowing(object sender, EventArgs e)
		{
			Model crop = sender as Model;
			if (crop.Name.ToLower() == CropName.ToLower())
				Fertiliser.Apply(Amount: Amount, Type: Fertiliser.Types.UreaN);
		}
		
	}
}
```
          Manager Harvesting: same as Makoka 11Yr Gliricidia.Sm.WindbreakSystem.Maize row.Harvesting
          Plant Maize: CropType=Maize
    Simulation Gm48N: Area=0; Slope=0
      Clock: StartDate=1992-09-01; EndDate=2003-08-31
      Summary SummaryFile
      Weather: FileName=Makoka.met
      SoilArbitrator Soil Arbitrator
      AgroforestrySystem WindbreakSystem: Area=0.000999975; Slope=0; RainfallInterceptionFraction=0; RainShaddowWidth=0
        Report TreeReport: EventNames=[Clock].DoReport
          VariableNames:
            [Clock].Today
            [TreeProxy].heightToday
            [TreeProxy].LeafAreaToday
            [TreeProxy].CanopyWidthToday
        TreeProxy: same as Gliricidia.Gm.WindbreakSystem.TreeProxy
        RectangularZone Maize row: Area=0.000999975; Slope=0; Length=13.333; Width=0.75
          Soil Makoka Soil: NearestTown=Makoka; Country=Malawi; Latitude=-15.25; Longitude=37.25; Area=0
            Water
              Thickness  BD    AirDry  LL15  DUL   SAT
              200        1.42  0.16    0.18  0.35  0.4
              200        1.45  0.17    0.19  0.35  0.41
              200        1.47  0.18    0.21  0.35  0.42
              200        1.31  0.2     0.22  0.29  0.43
              200        1.42  0.23    0.25  0.29  0.44
              200        1.38  0.23    0.25  0.31  0.44
              200        1.32  0.26    0.28  0.32  0.44
              200        1.3   0.27    0.28  0.32  0.44
              200        1.31  0.28    0.28  0.33  0.44
              200        1.31  0.28    0.28  0.33  0.44
              SoilCrop MaizeSoil
                LL=[0.17, 0.18, 0.19, 0.22, 0.25, 0.25, 0.27, 0.27, 0.29, 0.29]
                KL=[0.08, 0.08, 0.08, 0.08, 0.06, 0.04, 0.03, 0.02, 0.02, 0.02]
                XF=[1, 1, 1, 1, 1, 1, 1, 1, 1, 1]
            SoilWater: same as Replacements.Makoka Soil.SoilWater
            SoilNitrogen: fom_type=[default, manure, mucuna, lablab, shemp, stable]; fract_carb=[0.2, 0.3, 0.54, 0.57, 0.45, 0]; fract_cell=[0.7, 0.3, 0.37, 0.37, 0.47, 0.1]; fract_lign=[0.1, 0.4, 0.09, 0.06, 0.08, 0.9]; wfpsN2N2O_x=[22, 88]; wfpsN2N2O_y=[0.1, 1]
            SoilOrganicMatter: same as Makoka 11Yr Gliricidia.Sm.WindbreakSystem.Maize row.Makoka Soil.SoilOrganicMatter
            Analysis: Thickness=[200, 200, 200, 200, 200, 200, 200, 200, 200, 200]; PH=[5.9, 5.6, 5.8, 5.9, 6.1, 6.3, 6.2, 6.4, 6.3, 5.9]; PHUnits=Water; BoronUnits=HotWater
            Sample: same as Makoka 11Yr Gliricidia.Sm.WindbreakSystem.Maize row.Makoka Soil.Sample
          LocalMicroClimate
          MicroClimate: same as Makoka 11Yr Gliricidia.Sm.WindbreakSystem.Maize row.MicroClimate
          Operations
            1991-12-15  [SurfaceOrganicMatter].Add(mass: 0, N:0, P:0, type:"maize", name:"maize")
            1992-02-15  [SurfaceOrganicMatter].Add(mass: 0, N:0, P:0, type:"maize", name:"maize")
            1992-08-15  [SurfaceOrganicMatter].Add(mass: 0, N:0, P:0, type:"maize", name:"maize")
            1992-10-15  [SurfaceOrganicMatter].Add(mass: 0, N:0, P:0, type:"maize", name:"maize")
            1992-12-15  [SurfaceOrganicMatter].Add(mass: 0, N:0, P:0, type:"maize", name:"maize")
            1993-02-15  [SurfaceOrganicMatter].Add(mass: 654, N:25.5, P:0, type:"maize", name:"maize")
            1993-08-15  [SurfaceOrganicMatter].Add(mass: 654, N:25.5, P:0, type:"maize", name:"maize")
            1993-10-15  [SurfaceOrganicMatter].Add(mass: 654, N:25.5, P:0, type:"maize", name:"maize")
            1993-12-15  [SurfaceOrganicMatter].Add(mass: 654, N:25.5, P:0, type:"maize", name:"maize")
            1994-02-15  [SurfaceOrganicMatter].Add(mass: 957, N:37.6, P:0, type:"maize", name:"maize")
            1994-08-15  [SurfaceOrganicMatter].Add(mass: 957, N:37.6, P:0, type:"maize", name:"maize")
            1994-10-15  [SurfaceOrganicMatter].Add(mass: 957, N:37.6, P:0, type:"maize", name:"maize")
            1994-12-15  [SurfaceOrganicMatter].Add(mass: 957, N:37.6, P:0, type:"maize", name:"maize")
            1995-02-15  [SurfaceOrganicMatter].Add(mass: 895, N:34.7, P:0, type:"maize", name:"maize")
            1995-08-15  [SurfaceOrganicMatter].Add(mass: 895, N:34.7, P:0, type:"maize", name:"maize")
            1995-10-15  [SurfaceOrganicMatter].Add(mass: 895, N:34.7, P:0, type:"maize", name:"maize")
            1995-12-15  [SurfaceOrganicMatter].Add(mass: 895, N:34.7, P:0, type:"maize", name:"maize")
            1996-02-15  [SurfaceOrganicMatter].Add(mass: 1179, N:45.8, P:0, type:"maize", name:"maize")
            1996-08-15  [SurfaceOrganicMatter].Add(mass: 1179, N:45.8, P:0, type:"maize", name:"maize")
            1996-10-15  [SurfaceOrganicMatter].Add(mass: 1179, N:45.8, P:0, type:"maize", name:"maize")
            1996-12-15  [SurfaceOrganicMatter].Add(mass: 1179, N:45.8, P:0, type:"maize", name:"maize")
            1997-02-15  [SurfaceOrganicMatter].Add(mass: 1414, N:55, P:0, type:"maize", name:"maize")
            1997-08-15  [SurfaceOrganicMatter].Add(mass: 1414, N:55, P:0, type:"maize", name:"maize")
            1997-10-15  [SurfaceOrganicMatter].Add(mass: 1414, N:55, P:0, type:"maize", name:"maize")
            1997-12-15  [SurfaceOrganicMatter].Add(mass: 1414, N:55, P:0, type:"maize", name:"maize")
            1998-02-15  [SurfaceOrganicMatter].Add(mass: 1698, N:66.4, P:0, type:"maize", name:"maize")
            1998-08-15  [SurfaceOrganicMatter].Add(mass: 1698, N:66.4, P:0, type:"maize", name:"maize")
            1998-10-15  [SurfaceOrganicMatter].Add(mass: 1698, N:66.4, P:0, type:"maize", name:"maize")
            1998-12-15  [SurfaceOrganicMatter].Add(mass: 1698, N:66.4, P:0, type:"maize", name:"maize")
            1999-02-15  [SurfaceOrganicMatter].Add(mass: 1414, N:54.8, P:0, type:"maize", name:"maize")
            1999-08-15  [SurfaceOrganicMatter].Add(mass: 1414, N:54.8, P:0, type:"maize", name:"maize")
            1999-10-15  [SurfaceOrganicMatter].Add(mass: 1414, N:54.8, P:0, type:"maize", name:"maize")
            1999-12-12  [Maize].Sow(population: 2.0, cultivar: "NSCM_41", depth: 30, rowSpacing: 750);
            2000-01-12  [Fertiliser].Apply(Amount: 48, Type: Fertiliser.Types.NO3N)
            1999-12-15  [SurfaceOrganicMatter].Add(mass: 1414, N:54.8, P:0, type:"maize", name:"maize")
            2000-02-15  [SurfaceOrganicMatter].Add(mass: 1068, N:40.9, P:0, type:"maize", name:"maize")
            2000-08-15  [SurfaceOrganicMatter].Add(mass: 1068, N:40.9, P:0, type:"maize", name:"maize")
            2000-10-15  [SurfaceOrganicMatter].Add(mass: 1068, N:40.9, P:0, type:"maize", name:"maize")
            2000-12-15  [SurfaceOrganicMatter].Add(mass: 1068, N:40.9, P:0, type:"maize", name:"maize")
            2001-02-15  [SurfaceOrganicMatter].Add(mass: 1389, N:54, P:0, type:"maize", name:"maize")
            2001-08-15  [SurfaceOrganicMatter].Add(mass: 1389, N:54, P:0, type:"maize", name:"maize")
            2001-10-15  [SurfaceOrganicMatter].Add(mass: 1389, N:54, P:0, type:"maize", name:"maize")
            2001-12-15  [SurfaceOrganicMatter].Add(mass: 1389, N:54, P:0, type:"maize", name:"maize")
            2002-02-15  [SurfaceOrganicMatter].Add(mass: 1216, N:46.8, P:0, type:"maize", name:"maize")
            2002-08-15  [SurfaceOrganicMatter].Add(mass: 1216, N:46.8, P:0, type:"maize", name:"maize")
            2002-10-15  [SurfaceOrganicMatter].Add(mass: 1216, N:46.8, P:0, type:"maize", name:"maize")
            2002-12-15  [SurfaceOrganicMatter].Add(mass: 1216, N:46.8, P:0, type:"maize", name:"maize")
            2003-02-15  [SurfaceOrganicMatter].Add(mass: 1228, N:48.4, P:0, type:"maize", name:"maize")
            2003-08-15  [SurfaceOrganicMatter].Add(mass: 1228, N:48.4, P:0, type:"maize", name:"maize")
            2003-10-15  [SurfaceOrganicMatter].Add(mass: 1228, N:48.4, P:0, type:"maize", name:"maize")
            2003-12-15  [SurfaceOrganicMatter].Add(mass: 1228, N:48.4, P:0, type:"maize", name:"maize")
          Report HarvestReport: same as Gliricidia.Gm.WindbreakSystem.Maize row.HarvestReport
          Report DailyReport: same as Gliricidia.Gm.WindbreakSystem.Maize row.DailyReport
          Fertiliser
          SurfaceOrganicMatter: same as Makoka 11Yr Gliricidia.Sm.WindbreakSystem.Maize row.SurfaceOrganicMatter
          Manager SowingRule: same as Gliricidia.Gm.WindbreakSystem.Maize row.SowingRule
          Manager FertiliserRule: same as Makoka 11Yr Gliricidia.Sm48N.WindbreakSystem.Maize row.FertiliserRule
          Manager Harvesting: same as Makoka 11Yr Gliricidia.Sm.WindbreakSystem.Maize row.Harvesting
          Plant Maize: CropType=Maize
  Folder Validation
    Experiment Makoka
      Memo
        This trial was conducted at Gatton in 1995 using the local variety, Hartog.  It consisted of 4 Nitrogen rates (0,40,80,160) with two irrigation rates (minimal amount for establishment, fully irrigated).  Yields ranged from 1.4 t/ha to 5.4 t/ha.
      Factors
        Factor N: Specifications=[FertiliserRule]
          Manager 0
            Amount = 0
            CropName = maize
            FertDAS = 30
            script: same as in Makoka 11Yr Gliricidia.Sm48N.WindbreakSystem.Maize row.FertiliserRule
          Manager 48: same as Makoka 11Yr Gliricidia.Sm48N.WindbreakSystem.Maize row.FertiliserRule
      Simulation MakokaBase: Area=0; Slope=0
        Clock: StartDate=1992-09-01; EndDate=2003-08-31
        Summary SummaryFile
        Weather: FileName=Makoka.met
        SoilArbitrator Soil Arbitrator
        AgroforestrySystem WindbreakSystem: Area=0.000999975; Slope=0; RainfallInterceptionFraction=0; RainShaddowWidth=0
          Report TreeReport: EventNames=[Clock].DoReport
            VariableNames:
              [Clock].Today
              [TreeProxy].heightToday
              [TreeProxy].LeafAreaToday
              [TreeProxy].CanopyWidthToday
          TreeProxy: same as Makoka 11Yr Gliricidia.Sm.WindbreakSystem.TreeProxy
          RectangularZone Maize row: Area=0.000999975; Slope=0; Length=13.333; Width=0.75
            Soil Makoka Soil: same as Makoka 11Yr Gliricidia.Sm.WindbreakSystem.Maize row.Makoka Soil
            LocalMicroClimate
            MicroClimate: same as Makoka 11Yr Gliricidia.Sm.WindbreakSystem.Maize row.MicroClimate
            Operations
              1999-12-12  [Maize].Sow(population: 1.2, cultivar: "NSCM_41", depth: 30, rowSpacing: 750);
              2000-01-12  [Fertiliser].Apply(Amount: 48, Type: Fertiliser.Types.NO3N)
            Report HarvestReport: EventNames=[Maize].Harvesting
              VariableNames:
                [Clock].Today
                [Clock].Today.Year as Year
                [Zone].Area
                Distance
                [Maize].SowingData.Population
                [Maize].Phenology.CurrentStageName as Stage
                [Maize].Grain.Live.Wt as GrainWt
                [Maize].Stem.Live.Wt
                [Maize].EarLive.Wt
                [Maize].Leaf.Live.Wt
                [Maize].Root.Live.Wt
                [Maize].Husk.Live.Wt
                [Maize].Rachis.Live.Wt
                [Maize].EarLive.N
                [Maize].Grain.Live.N
                [Maize].Stem.Live.N
                [Maize].Leaf.Live.N
                [Maize].Root.Live.N
                [Maize].Root.Depth
                [Maize].AboveGround.N
                [Maize].AboveGround.Wt as Biomass
                [Maize].Total.N
                [Maize].Total.Wt
                max of [Maize].Leaf.LAI from [Maize].Sowing to [Maize].Harvesting as LAImax
                [Maize].Grain.NumberFunction.Value as GPSM
                [Maize].Grain.Size as GrainSize
                [Maize].Population
                [Maize].Phenology.FloweringDAS.Value as FloweringDAS
                sum([Soil].SoilNitrogen.FOMC) as FOMC
                sum([Soil].SoilNitrogen.HumicC) as HumicC
                sum([Soil].SoilNitrogen.MicrobialC) as MicrobialC
            Report DailyReport: same as Makoka 11Yr Gliricidia.Sm48N.WindbreakSystem.Maize row.DailyReport
            Fertiliser
            SurfaceOrganicMatter: same as Makoka 11Yr Gliricidia.Sm.WindbreakSystem.Maize row.SurfaceOrganicMatter
            Manager SowingRule: same as Makoka 11Yr Gliricidia.Sm48N.WindbreakSystem.Maize row.SowingRule
            Manager FertiliserRule: same as Makoka 11Yr Gliricidia.Sm48N.WindbreakSystem.Maize row.FertiliserRule
            Manager Harvesting: same as Makoka 11Yr Gliricidia.Sm.WindbreakSystem.Maize row.Harvesting
            Plant Maize: CropType=Maize
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