Simulations
  DataStore
  Simulation NewSoil: Area=0; Slope=0
    Clock: StartDate=1999-01-01; EndDate=2000-12-31
    Weather: FileName=lincoln.met
    Summary SummaryFile
    Zone Field: Area=1; Slope=0
      Report: EventNames=[Clock].DoReport
        VariableNames:
          [Clock].Today
          [IWeather].MaxT
          [IWeather].MinT
          [IWeather].Rain
          [IWeather].Radn
          [IWeather].Wind
          [IWeather].DayLength
          [IWeather].VP
          [IWeather].CO2
          [IWeather].RainfallHours
          sum([Soil].SoilWater.SWmm) as ProfileWater
          [Soil].SoilWater.SWmm
          [Soil].SoilWater.SW
          [Soil].MultiPoreWater.Water
          [Soil].MultiPoreWater.Drainage
          [Soil].MultiPoreWater.Infiltration
          [Soil].MultiPoreWater.pond
          [Irrigation].IrrigationApplied
          [Soil].MultiPoreWater.Eos
          [Soil].MultiPoreWater.Es
      Fertiliser
      Soil: ASCOrder=Vertosol; ASCSubOrder=Black; SoilType=Clay; Site=Norwin; NearestTown=Norwin; Region=Darling Downs and Granite Belt; State=Queensland; Country=Australia; NaturalVegetation=Qld. Bluegrass, possible Qld. Blue gum; ApsoilNumber=900; Latitude=-27.581836; Longitude=151.320206; Area=0; LocationAccuracy=+/- 20m
        DataSource=CSIRO Sustainable Ecosystems, Toowoomba; Characteriesd as part of the GRDC funded project"Doing it better, doing it smarter, managing soil water in Australian agriculture' 2011
        Comments=OC, CLL for all crops estimated-based on Bongeen Mywybilla Soil No1
        Water
          Thickness  BD       AirDry    LL15  DUL   SAT   KS
          150        1.01056  0.13025   0.25  0.5   0.55  10
          150        1.07146  0.198689  0.25  0.49  0.5   10
          300        1.09394  0.28      0.25  0.48  0.49  20
          300        1.15861  0.28      0.25  0.47  0.5   20
          300        1.17301  0.28      0.25  0.46  0.5   20
          300        1.16287  0.28      0.25  0.45  0.5   20
          300        1.1875   0.28      0.25  0.44  0.5   20
          SoilCrop WheatSoil: LL=[0.261, 0.248, 0.28, 0.306, 0.36, 0.392, 0.446]; KL=[0.06, 0.06, 0.06, 0.04, 0.04, 0.02, 0.01]; XF=[1, 1, 1, 1, 1, 1, 1]
        MultiPoreWater: Salb=0.15; PoreBounds=[3500, 2000, 305, 76, 30, 3, 0.75, 0.2, 0.0005]; SubProfileConductance=100; WaterTableDepth=3; CalculateInfiltration=true; CalculateDrainage=true; ReportDetail=false; IncludeSorption=true; TotalCover=0; ResidueWater=0; Hour=0; ReportLayer=0; TimeStep=0
          XYPairs AdsorptionResponse: X=[0, 1]; Y=[1, 1]
        SoilNitrogen: fom_type=[default, manure, mucuna, lablab, shemp, stable]; fract_carb=[0.2, 0.3, 0.54, 0.57, 0.45, 0]; fract_cell=[0.7, 0.3, 0.37, 0.37, 0.47, 0.1]; fract_lign=[0.1, 0.4, 0.09, 0.06, 0.08, 0.9]; wfpsN2N2O_x=[22, 88]; wfpsN2N2O_y=[0.1, 1]
        SoilOrganicMatter: RootCN=40; RootWt=1000; SoilCN=12; EnrACoeff=7.4; EnrBCoeff=0.2; OCUnits=Total
          Thickness  OC    FBiom  FInert
          150        1.2   0.04   0.4
          150        0.96  0.02   0.6
          300        0.6   0.02   0.8
          300        0.3   0.02   1
          300        0.18  0.01   1
          300        0.12  0.01   1
          300        0.12  0.01   1
        Analysis: Thickness=[150, 150, 300, 300, 300, 300, 300]; PH=[8, 8, 8, 8, 8, 8, 8]; PHUnits=Water; BoronUnits=HotWater
        Sample InitialN: NO3Units=ppm; NH4Units=ppm; SWUnits=Volumetric; OCUnits=Total; PHUnits=Water
          Thickness  NO3  NH4
          150        10   0.1
          150        10   0.1
          300        10   0.1
          300        10   0.1
          300        10   0.1
          300        1    0.1
          300        1    0.1
        Sample InitialWater: Thickness=[150, 150, 300, 300, 300, 300, 300]; SW=[0.25, 0.25, 0.25, 0.25, 0.25, 0.25, 0.25]; NO3Units=ppm; NH4Units=ppm; SWUnits=Volumetric; OCUnits=Total; PHUnits=Water
        HydraulicProperties: psidul=-100; Thickness=[150, 150, 300, 300, 300, 300, 300]; kdul=[1, 1, 1, 1, 1, 1, 1]
        Evapotranspiration
      SurfaceOrganicMatter: PoolName=wheat_stubble; type=wheat; mass=0; standing_fraction=0; cnr=100; CriticalResidueWeight=2000; OptimumDecompTemp=20; MaxCumulativeEOS=20; CNRatioDecompCoeff=0.277; CNRatioDecompThreshold=25; TotalLeachRain=25; MinRainToLeach=10; CriticalMinimumOrganicC=0.004; DefaultCPRatio=0; DefaultStandingFraction=0; StandingExtinctCoeff=0.5; FractionFaecesAdded=0.5
        Pools:
          {PoolName=wheat_stubble, ResidueType=wheat, Mass=0, CNRatio=100, StandingFraction=0}
        ResidueTypes: LoadFromResource=ResidueTypes
      MicroClimate: a_interception=0; b_interception=1; c_interception=0; d_interception=0; soil_albedo=0.3; air_pressure=1010; soil_emissivity=0.96; sun_angle=15; soil_heat_flux_fraction=0.4; night_interception_fraction=0.5; windspeed_default=3; refheight=2; albedo=0.15; emissivity=0.96; gsmax=0.01; r50=200; RadIntTotal=0
      Irrigation
      Manager Irrigate on a fixed date
        IrrigateDate = 1-feb
        Amount = 50
        Depth = 0
        Efficiency = 1
        WillRunoff = False
        Duration = 0.5
```csharp
using System;
using Models.Core;
using Models.PMF;
using APSIM.Shared.Utilities;
namespace Models
{
	[Serializable]
	public class Script : Model
	{
		[Link] Clock Clock;
		[Link] Irrigation Irrigation;
		
		[Description("Date to irrigate")]
		public string IrrigateDate { get; set; }
		
		[Description("Amount of irrigation to be applied (mm)")]
		public double Amount { get; set; }
		
		[Description("Depth of irrigation (mm)")]
		public double Depth { get; set; }
		
		[Description("Efficiency of irrigation (0-1)")]
		public double Efficiency { get; set; }
		
		[Description("Will the irrigation runoff?")]
		public bool WillRunoff { get; set; }
		
		[Description("How may hours did it take to apply irrigation?")]
		public double Duration { get; set; }
		
		
		[EventSubscribe("DoManagement")]
		private void OnDoManagement(object sender, EventArgs e)
		{
			if (DateUtilities.WithinDates(IrrigateDate, Clock.Today, IrrigateDate))
			{
				Irrigation.Apply(amount: Amount, depth: Depth, efficiency: Efficiency, willRunoff: WillRunoff, duration: Duration);
			}
		}
	}
}
```
  Experiment Infiltration
    Factors
      Factor ItitialWater
        Factor Sat: Specifications=[InitialWater]
          Sample InitialWater: Thickness=[150, 150, 300, 300, 300, 300, 300]; SW=[0.6, 0.59, 0.58, 0.57, 0.56, 0.55, 0.54]; NO3Units=ppm; NH4Units=ppm; SWUnits=Volumetric; OCUnits=Total; PHUnits=Water
        Factor Mid: Specifications=[InitialWater]
          Sample Mid: Thickness=[150, 150, 300, 300, 300, 300, 300]; SW=[0.4, 0.39, 0.38, 0.37, 0.36, 0.35, 0.34]; NO3Units=ppm; NH4Units=ppm; SWUnits=Volumetric; OCUnits=Total; PHUnits=Water
        Factor LL: Specifications=[InitialWater]
          Sample InitialWater: Thickness=[150, 150, 300, 300, 300, 300, 300]; SW=[0.25, 0.25, 0.25, 0.25, 0.25, 0.25, 0.25]; NO3Units=ppm; NH4Units=ppm; SWUnits=Volumetric; OCUnits=Total; PHUnits=Water
      Factor MacroPores
        Factor Many: Specifications=[Water]
          Water
            Thickness  BD       AirDry  LL15  DUL   SAT   KS
            150        1.01056  0.25    0.25  0.5   0.6   100
            150        1.07146  0.25    0.25  0.49  0.59  100
            300        1.09394  0.25    0.25  0.48  0.58  20
            300        1.15861  0.25    0.25  0.47  0.57  20
            300        1.17301  0.25    0.25  0.46  0.56  20
            300        1.16287  0.25    0.25  0.45  0.55  20
            300        1.1875   0.25    0.25  0.44  0.54  20
        Factor Few: Specifications=[Water]
          Water
            Thickness  BD       AirDry  LL15  DUL   SAT   KS
            150        1.01056  0.25    0.25  0.59  0.6   1
            150        1.07146  0.25    0.25  0.58  0.59  1
            300        1.09394  0.25    0.25  0.57  0.58  1
            300        1.15861  0.25    0.25  0.56  0.57  1
            300        1.17301  0.25    0.25  0.55  0.56  1
            300        1.16287  0.25    0.25  0.54  0.55  1
            300        1.1875   0.25    0.25  0.53  0.54  1
        Factor None: Specifications=[Water]
          Water
            Thickness  BD       AirDry  LL15  DUL   SAT   KS
            150        1.01056  0.25    0.25  0.6   0.6   100
            150        1.07146  0.25    0.25  0.59  0.59  100
            300        1.09394  0.25    0.25  0.58  0.58  0
            300        1.15861  0.25    0.25  0.57  0.57  0
            300        1.17301  0.25    0.25  0.56  0.56  0
            300        1.16287  0.25    0.25  0.55  0.55  0
            300        1.1875   0.25    0.25  0.54  0.54  0
    Simulation BaseSoil: Area=0; Slope=0
      Clock: StartDate=1999-01-01; EndDate=1999-12-31
      Weather: FileName=lincoln.met
      Summary SummaryFile
      Zone Field: Area=1; Slope=0
        Report: EventNames=[Clock].DoReport
          VariableNames:
            [Clock].Today
            [IWeather].MaxT
            [IWeather].MinT
            [IWeather].Rain
            [IWeather].Radn
            [IWeather].Wind
            [IWeather].DayLength
            [IWeather].VP
            [IWeather].CO2
            [IWeather].RainfallHours
            sum([Soil].SoilWater.SWmm) as ProfileWater
            [Soil].SoilWater.SWmm
            [Soil].SoilWater.SW
            [Soil].MultiPoreWater.Water
            [Soil].MultiPoreWater.Drainage
            [Soil].MultiPoreWater.Infiltration
            [Soil].MultiPoreWater.pond
            [Irrigation].IrrigationApplied
            [Soil].MultiPoreWater.DeltaPond + [Soil].MultiPoreWater.Infiltration + [Soil].MultiPoreWater.Drainage as Check
        Fertiliser
        Soil: ASCOrder=Vertosol; ASCSubOrder=Black; SoilType=Clay; Site=Norwin; NearestTown=Norwin; Region=Darling Downs and Granite Belt; State=Queensland; Country=Australia; NaturalVegetation=Qld. Bluegrass, possible Qld. Blue gum; ApsoilNumber=900; Latitude=-27.581836; Longitude=151.320206; Area=0; LocationAccuracy=+/- 20m
          DataSource=CSIRO Sustainable Ecosystems, Toowoomba; Characteriesd as part of the GRDC funded project"Doing it better, doing it smarter, managing soil water in Australian agriculture' 2011
          Comments=OC, CLL for all crops estimated-based on Bongeen Mywybilla Soil No1
          Water
            Thickness  BD       AirDry    LL15  DUL   SAT   KS
            150        1.01056  0.13025   0.25  0.5   0.6   10
            150        1.07146  0.198689  0.25  0.49  0.59  10
            300        1.09394  0.25      0.25  0.48  0.58  20
            300        1.15861  0.25      0.25  0.47  0.57  1
            300        1.17301  0.25      0.25  0.46  0.56  20
            300        1.16287  0.25      0.25  0.45  0.55  20
            300        1.1875   0.25      0.25  0.44  0.54  20
          MultiPoreWater: Salb=0.15; PoreBounds=[3500, 3059, 305, 76, 30, 3, 0.75, 0.2, 0.0005]; SubProfileConductance=100; WaterTableDepth=3; CalculateInfiltration=true; CalculateDrainage=true; ReportDetail=false; IncludeSorption=true; TotalCover=0; ResidueWater=0; Hour=0; ReportLayer=0; TimeStep=0
            XYPairs AdsorptionResponse: X=[0, 1]; Y=[1, 1]
          SoilNitrogen: fom_type=[default, manure, mucuna, lablab, shemp, stable]; fract_carb=[0.2, 0.3, 0.54, 0.57, 0.45, 0]; fract_cell=[0.7, 0.3, 0.37, 0.37, 0.47, 0.1]; fract_lign=[0.1, 0.4, 0.09, 0.06, 0.08, 0.9]; wfpsN2N2O_x=[22, 88]; wfpsN2N2O_y=[0.1, 1]
          SoilOrganicMatter: same as NewSoil.Field.Soil.SoilOrganicMatter
          Analysis: Thickness=[150, 150, 300, 300, 300, 300, 300]; PH=[8, 8, 8, 8, 8, 8, 8]; PHUnits=Water; BoronUnits=HotWater
          Sample InitialN: NO3Units=ppm; NH4Units=ppm; SWUnits=Volumetric; OCUnits=Total; PHUnits=Water
            Thickness  NO3  NH4
            150        10   0.1
            150        10   0.1
            300        10   0.1
            300        10   0.1
            300        10   0.1
            300        1    0.1
            300        1    0.1
          Sample InitialWater: Thickness=[150, 150, 300, 300, 300, 300, 300]; SW=[0.6, 0.59, 0.58, 0.57, 0.56, 0.55, 0.54]; NO3Units=ppm; NH4Units=ppm; SWUnits=Volumetric; OCUnits=Total; PHUnits=Water
          HydraulicProperties: psidul=-100; Thickness=[150, 150, 300, 300, 300, 300, 300]; kdul=[1, 1, 1, 1, 1, 1, 1]
          Evapotranspiration
        SurfaceOrganicMatter: same as NewSoil.Field.SurfaceOrganicMatter
        MicroClimate: same as NewSoil.Field.MicroClimate
        Irrigation
        Manager Irrigate on a fixed date
          IrrigateDate = 1-feb
          Amount = 50
          Depth = 0
          Efficiency = 1
          WillRunoff = False
          Duration = 2
          script: same as in NewSoil.Field.Irrigate on a fixed date
  Experiment Irrigation
    Factors
      Factor IrrigDuration
        Specifications=[Irrigate on a fixed date].Script.Duration = 0.1,0.3,0.7,1,2,6
    Simulation BaseIrrigation: Area=0; Slope=0
      Clock: StartDate=1999-01-01; EndDate=1999-03-31
      Weather: FileName=lincoln.met
      Summary SummaryFile
      Zone Field: Area=1; Slope=0
        Report: same as Infiltration.BaseSoil.Field.Report
        Fertiliser
        Soil: ASCOrder=Vertosol; ASCSubOrder=Black; SoilType=Clay; Site=Norwin; NearestTown=Norwin; Region=Darling Downs and Granite Belt; State=Queensland; Country=Australia; NaturalVegetation=Qld. Bluegrass, possible Qld. Blue gum; ApsoilNumber=900; Latitude=-27.581836; Longitude=151.320206; Area=0; LocationAccuracy=+/- 20m
          DataSource=CSIRO Sustainable Ecosystems, Toowoomba; Characteriesd as part of the GRDC funded project"Doing it better, doing it smarter, managing soil water in Australian agriculture' 2011
          Comments=OC, CLL for all crops estimated-based on Bongeen Mywybilla Soil No1
          Water
            Thickness  BD       AirDry    LL15  DUL   SAT   KS
            150        1.01056  0.13025   0.25  0.45  0.6   10
            150        1.07146  0.198689  0.25  0.44  0.59  10
            300        1.09394  0.25      0.25  0.43  0.58  20
            300        1.15861  0.25      0.25  0.42  0.57  1
            300        1.17301  0.25      0.25  0.41  0.56  20
            300        1.16287  0.25      0.25  0.4   0.55  20
            300        1.1875   0.25      0.25  0.39  0.54  20
          MultiPoreWater: same as Infiltration.BaseSoil.Field.Soil.MultiPoreWater
          SoilNitrogen: fom_type=[default, manure, mucuna, lablab, shemp, stable]; fract_carb=[0.2, 0.3, 0.54, 0.57, 0.45, 0]; fract_cell=[0.7, 0.3, 0.37, 0.37, 0.47, 0.1]; fract_lign=[0.1, 0.4, 0.09, 0.06, 0.08, 0.9]; wfpsN2N2O_x=[22, 88]; wfpsN2N2O_y=[0.1, 1]
          SoilOrganicMatter: same as NewSoil.Field.Soil.SoilOrganicMatter
          Analysis: Thickness=[150, 150, 300, 300, 300, 300, 300]; PH=[8, 8, 8, 8, 8, 8, 8]; PHUnits=Water; BoronUnits=HotWater
          Sample InitialN: NO3Units=ppm; NH4Units=ppm; SWUnits=Volumetric; OCUnits=Total; PHUnits=Water
            Thickness  NO3  NH4
            150        10   0.1
            150        10   0.1
            300        10   0.1
            300        10   0.1
            300        10   0.1
            300        1    0.1
            300        1    0.1
          Sample InitialWater: Thickness=[150, 150, 300, 300, 300, 300, 300]; SW=[0.25, 0.25, 0.25, 0.25, 0.25, 0.25, 0.25]; NO3Units=ppm; NH4Units=ppm; SWUnits=Volumetric; OCUnits=Total; PHUnits=Water
          HydraulicProperties: psidul=-100; Thickness=[150, 150, 300, 300, 300, 300, 300]; kdul=[1, 1, 1, 1, 1, 1, 1]
          Evapotranspiration
        SurfaceOrganicMatter: same as NewSoil.Field.SurfaceOrganicMatter
        MicroClimate: same as NewSoil.Field.MicroClimate
        Irrigation
        Manager Irrigate on a fixed date
          IrrigateDate = 1-feb
          Amount = 10
          Depth = 0
          Efficiency = 1
          WillRunoff = False
          Duration = 0.5
          script: same as in NewSoil.Field.Irrigate on a fixed date
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