Simulations: Version=162
  Memo TitlePage
    # The STRUM model
    A simple representation of the shape and mass of rows of fruit trees which can be used in a multizone simulation with a row of mown grass to model the water N and C balance of an orchard system.
  Folder Replacements
    Plant STRUM: PlantType=STRUM; IsEnding=false; DaysAfterEnding=0
      Memo TitlePage
        # STRUM

        This model has been built using the Plant Modelling Framework (PMF) of [brown_plant_2014] to provide a simple representation of perennial tree and vine crops.  Its scope is intended for use in water and nitrogen balance studies where the focus is on soil processes and a very simple crop is adequate.  The model has simple functions for estimating the growht and nitrogen uptake of different organs and anohter simple function for predicting canopy size so water uptake can be predicted.

        The model has currently been parameterised and tested for 4 genotpes; Apple, Kiwifruit, Grape and Peach.

        STRUM has a simple phenology model that breaks the annual growth cycle into 4 phases:

           1. The <b>Dormancy</b> phase when the tree is a bare trunk, using no water, growing no biomass and taking up no Nitrogen
           2. The <b>CanopyExpansion</b> phase which occurs in the spring when the bulk of biomass assimilation is partitioned to the new leaves with smaller proportions going to trunk and root growth
           3. The <b>FruitGrowth</b> phase where the bulk of biomass assimilation is partitioned to the growing fruit with smaller proportions going to leaf, trunk and root growth
           4. The <b>LeafFall</b> phase where any further biomass assimilated is partitioned to the trunk and roots.

        As infered above the STRUM consists of 4 organs:

           1. <b>Leaf</b> which ls represented with the Simpleleaf class and provides estimates of:
            - Leaf area index that the MicroClimate model uses to estimate the radiation of the tree canopy and the grass in the underlying alley
            - Water uptake demand that the soil arbitrator uses to estimate soil water extraction
            - Photosynthesis estimates (Using radiation use efficiency) to drive tree biomass production
            - Biomass demand that is used to grow leaf biomass and determine N demand for leaf growth
           2. <b>Fruit</b> which represents the biomass and nitrogen that may be removed from the orchard each year as harvested product
           3. <b>Trunk</b> which represents the perennial biomass of the trees and will grow a small amount each year but is mostly pruned out at the end of the year and may be returned to the soil surface.
           4. <b>Root</b> which extracts water and nitrogen from the soil for plant growth, grows a small amount of biomass each year and senesesses a proportion of this to the soil.

        #Inclusion in APSIM simulations
        A STRUM crop is included in a simulation the same as any other APSIM crop

         * The STRUM object needs to be dragged or copied from the Crop folder in the tool box into the field of your simulation.
         * It is then planted with a sowing rule
        ~~~
        STRUM.Sow(cultivar: StaticCrop, population: 1, depth: 10, rowSpacing: 150);
        ~~~

          * Note that the SimpleTreeModel has no notion of population or rowSpacing but these parameters are required by the Sow method so filler values are provided
          * `depth` in the Sow arguement is the depth that the crop is sown at.  In most cases the Sow argument is used to initialise an established tree crop so sow depth arguement is used to set the root depth of the trees.  This depth should be set to the rooting depth that is expected as roots will not grow during the simulation.

        #Representing and Orchard System
         * While the STRUM model will run as a stand alone model, in most cases fruit trees and vines are grown in rows with a grass or herb ley growing in the alleys.  As such it is important to set up a simulation with two rectangular zones, one with the fruit tree established within and another with the pasture or herb ley established.  In most cases a SLURP is adequate to represent the energy, water and nitrogen balance of the alleys.
         * As part of the development of this crop model the Microclimate radiation arbitration was improved to be suitable for fruit crop set ups.  This involved modifying the strip crop radiation interception code to allow:
           1. The entire depth of the tallest (tree) canopy to be taller than the grass growing in the alleys
           2. The width of the canopy of the trees to exceed the width of the zone that the trees are planted in so they may intercept more radiation that would be possible if they were kept within the spatial confines of the row zone
        ![Schematic of radiation interception scheme as modeled for tree row crops](RadInt.jpg)

        #Further development requirements
        The greatest effort has been spent on getting the models water balance predictions working to an adequate standard.  This included running an optimisation procedure against the validation data set to obtain the most suitalbe parameters for water extraction parameters (kl pattern through the soil) and water demand parameters (max canopy conductance and conductance response to light) as well as weather the roots of the alley should be allowed to grow sideways into the row.
        The model has been set up to predict biomass accumulation and N uptake but the parameters for this functionality have not be determined from observed or published data so further work is required here.  The rates of senescence of the FruitTree root system and the contribution of the mown grass in the alley to the N and C balance have not yet been established correctly.
        Kl patterns are currently parameterised in a manager script (so they could be optimised) this needs to be moved into model set up.
        Optimisation was not able to give good fits for both row and alley zones for grape suggesting the kl patterns differ between alley and row.  Further investigation is required to better determine spatial water extraction parameters.
      OrganArbitrator Arbitrator
        BiomassTypeArbitrator DMArbitration
          Folder PotentialPartitioningMethods
            ReallocationMethod
            AllocateFixationMethod
            RetranslocationMethod
            SendPotentialDMAllocationsMethod
          Folder AllocationMethods
            NutrientConstrainedAllocationMethod
            DryMatterAllocationsMethod
          RelativeAllocation ArbitrationMethod
        BiomassTypeArbitrator NArbitration
          Folder PotentialPartitioningMethods
            ReallocationMethod
          Folder ActualPartitioningMethods
            AllocateFixationMethod
            RetranslocationMethod
          Folder AllocationMethods
            NitrogenAllocationsMethod
          RelativeAllocation ArbitrationMethod
          AllocateUptakesMethod
        WaterUptakeMethod
        NitrogenUptakeMethod
      Phenology
        Constant ThermalTime: FixedValue=1; Units=days
        GenericPhase ZeroPhase: Start=ModelInitialisation; End=Dormant; IsEmerged=true
          Memo
            It is necessary to have a phase before Dormancy otherwise the rewind doesn't work
          VariableReference Progression: VariableName=[Phenology].ThermalTime
          Constant Target: FixedValue=0; Units=oCd
        DAWSPhase SpringDormancy: Start=Dormant; End=BudBreak; IsEmerged=true; DAWStoProgress=0
        DAWSPhase CanopyExpansion: Start=BudBreak; End=StartFullCanopy; IsEmerged=true; DAWStoProgress=0
        DAWSPhase FullCanopy: Start=StartFullCanopy; End=StartLeafFall; IsEmerged=true; DAWStoProgress=0
        DAWSPhase LeafFall: Start=StartLeafFall; End=BareTree; IsEmerged=true; DAWStoProgress=0
        DAWSPhase WinterDormancy: Start=BareTree; End=SpringDormant; IsEmerged=true; DAWStoProgress=365
        GotoPhase: Start=BareTree; IsEmerged=true; PhaseNameToGoto=SpringDormancy
        Age
        AddFunction AgeDecimal
          VariableReference AgeInt: VariableName=[Phenology].Age
          DivideFunction Decimal
            VariableReference DOY: VariableName=[Weather].DaysSinceWinterSolstice
            Constant DaysInAYear: FixedValue=365
      Root: GrowthRespiration=0; MaintenanceRespiration=0
        RootShapeCylinder RootShape
        DivideFunction RootFrontVelocity
          VariableReference MaxRootDepth: VariableName=[Root].MaximumRootDepth
          MultiplyFunction RootGrowthDuration
            Constant YearsToMaxDepth: FixedValue=0; Units=years
              Memo Param value set at establishment
                STRUM calculates this parameter value during run-time when the crop is established from parameter values set in the relevent STRUMtree object
            Constant DaysInAYear: FixedValue=365
        Constant MaxDailyNUptake: FixedValue=1; Units=g/m2
        Constant DMConversionEfficiency: FixedValue=1; Units=g/m2
        Constant RemobilisationCost: FixedValue=0
        Constant MaximumRootDepth: FixedValue=3000; Units=mm
        Constant NitrogenDemandSwitch: FixedValue=1; Units=0-1
        KLModiferVsDepthFunction klModifier
          VariableReference LayerDepth: VariableName=[Physical].DepthMidPoints
          VariableReference MaximumRootDepth: VariableName=[Root].MaximumRootDepth
        MultiplyFunction SenescenceRate
          ExponentialFunction: A=0; B=1; C=1
            DivideFunction
              SubtractFunction
                SoilTemperatureDepthFunction: Depth=100
                Constant: FixedValue=20
              Constant: FixedValue=10
          Constant Coefficient: FixedValue=0.015
        Constant SpecificRootLength: FixedValue=105; Units=m/g
        LinearInterpolationFunction KNO3
          XYPairs: X=[0, 0.003]; Y=[0.02, 0.02]
          VariableReference XValue: VariableName=[Root].LengthDensity
        LinearInterpolationFunction KNH4
          XYPairs: X=[0, 0.003]; Y=[0, 0]
          VariableReference XValue: VariableName=[Root].LengthDensity
        BiomassRemoval BiomassRemovalDefaults
          OrganBiomassRemovalType Harvest: FractionLiveToRemove=0; FractionDeadToRemove=0; FractionLiveToResidue=0; FractionDeadToResidue=0
          OrganBiomassRemovalType Cut: FractionLiveToRemove=0; FractionDeadToRemove=0; FractionLiveToResidue=0; FractionDeadToResidue=0
          OrganBiomassRemovalType Prune: FractionLiveToRemove=0; FractionDeadToRemove=0; FractionLiveToResidue=0; FractionDeadToResidue=0
          OrganBiomassRemovalType Graze: FractionLiveToRemove=0; FractionDeadToRemove=0; FractionLiveToResidue=0; FractionDeadToResidue=0
        LinearInterpolationFunction NUptakeSWFactor
          XYPairs: X=[0, 1]; Y=[0, 1]
          VariableReference XValue: VariableName=[Root].RWC
        Constant CarbonConcentration: FixedValue=0.4
        Constant MaintenanceRespirationFunction: FixedValue=0
        NutrientDemandFunctions DMDemands
          MultiplyFunction Structural
            PartitionFractionDemandFunction DMDemandFunction
              PhaseLookup PartitionFraction
                PhaseLookupValue AcitveGrowth: Start=BudBreak; End=BareTree
                  Constant: FixedValue=0.2
            Constant StructuralFraction: FixedValue=1
          Constant Metabolic: FixedValue=0
          Constant Storage: FixedValue=0
          Constant QStructuralPriority: FixedValue=1
          Constant QMetabolicPriority: FixedValue=1
          Constant QStoragePriority: FixedValue=1
        NutrientDemandFunctions NDemands
          MultiplyFunction Structural
            VariableReference MinNconc: VariableName=[Root].minimumNconc
            VariableReference PotentialDMAllocation: VariableName=[Root].potentialDMAllocation.Structural
          Constant Metabolic: FixedValue=0
          Constant Storage: FixedValue=0
          Constant QStructuralPriority: FixedValue=1
          Constant QMetabolicPriority: FixedValue=1
          Constant QStoragePriority: FixedValue=1
        NutrientPoolFunctions InitialWt
          Constant Structural: FixedValue=0; Units=g/plant
            Memo Param value set at establishment
              STRUM calculates this parameter value during run-time when the crop is established from parameter values set in the relevent STRUMtree object
          Constant Metabolic: FixedValue=0
          Constant Storage: FixedValue=0
        Constant RootDepthStressFactor: FixedValue=1
        Constant MaximumNConc: FixedValue=0
          Memo Param value set at establishment
            STRUM calculates this parameter value during run-time when the crop is established from parameter values set in the relevent STRUMtree object
        VariableReference CriticalNConc: VariableName=[Root].MaximumNConc
        VariableReference MinimumNConc: VariableName=[Root].MaximumNConc
      SimpleLeaf Leaf: Albedo=0.18; Gsmax350=0.006; R50=100; LeafInitialisationStage=Dormant; Height=0; BaseHeight=0; Width=0; FRGR=0; PotentialEP=0; WaterDemand=0; KDead=0; LAIDead=0
        Constant StomatalConductanceCO2Modifier: FixedValue=1
        Constant DetachmentRate: FixedValue=0; Units=/d
        Constant RemobilisationCost: FixedValue=0
        Constant InitialWt: FixedValue=0; Units=g/plant
        Constant LaiDead: FixedValue=0; Units=m^2/m^2
        RUEModel Photosynthesis
          Constant RUE: FixedValue=1.2
          WeightedTemperatureFunction FT: MaximumTemperatureWeighting=0.5
            XYPairs: X=[0, 10, 25, 40]; Y=[0, 1, 1, 0]
          LinearInterpolationFunction FW
            XYPairs: X=[0, 0.6, 1.5]; Y=[1, 1, 1]
            VariableReference XValue: VariableName=[Leaf].Fw
          RUECO2Function FCO2: PhotosyntheticPathway=C3
          VariableReference RadnInt: VariableName=[Leaf].RadiationIntercepted
          Constant FVPD: FixedValue=1
          Constant FN: FixedValue=1
        SubDailyInterpolation FRGR: agregationMethod=0
          XYPairs Response: X=[0, 10, 25, 40]; Y=[0, 1, 1, 0]
          ThreeHourAirTemperature InterpolationMethod
        Constant ExtinctionCoefficient: FixedValue=0
          Memo Param value set at establishment
            SCRUM calculates this parameter value during run-time when the crop is established from parameter values set in the relevent SCRUMcrop and SCRUMmanagement objects
        Constant NReallocationFactor: FixedValue=0
        PhaseLookup SenescenceRate
          PhaseLookupValue LeafFall: Start=StartLeafFall; End=BareTree
            Constant: FixedValue=0
        BiomassRemoval BiomassRemovalDefaults
          OrganBiomassRemovalType Harvest: FractionLiveToRemove=0; FractionDeadToRemove=0; FractionLiveToResidue=0; FractionDeadToResidue=0
          OrganBiomassRemovalType Cut: FractionLiveToRemove=0; FractionDeadToRemove=0; FractionLiveToResidue=0; FractionDeadToResidue=0
          OrganBiomassRemovalType Prune: FractionLiveToRemove=0; FractionDeadToRemove=0; FractionLiveToResidue=1; FractionDeadToResidue=1
          OrganBiomassRemovalType Graze: FractionLiveToRemove=0; FractionDeadToRemove=0; FractionLiveToResidue=0; FractionDeadToResidue=0
        Constant MaintenanceRespiration: FixedValue=0; Units=0-1
        Constant DMConversionEfficiency: FixedValue=1; Units=0-1
        Constant NRetranslocationFactor: FixedValue=0
        Constant NitrogenDemandSwitch: FixedValue=1
        Constant DMReallocationFactor: FixedValue=0
        Constant DMRetranslocationFactor: FixedValue=0
        Constant CarbonConcentration: FixedValue=0.4
        NutrientDemandFunctions DMDemands
          MultiplyFunction Structural
            PartitionFractionDemandFunction DMDemandFunction
              PhaseLookup PartitionFraction
                PhaseLookupValue CanopyExpansion: Start=BudBreak; End=StartFullCanopy
                  Constant: FixedValue=0.6
                PhaseLookupValue FruitGrowth: Start=StartFullCanopy; End=StartLeafFall
                  Constant: FixedValue=0.1
            Constant StructuralFraction: FixedValue=0.5; Units=0-1
          Constant Metabolic: FixedValue=0
          StorageDMDemandFunction Storage
            SubtractFunction StorageFraction
              Constant One: FixedValue=1
              VariableReference StructuralFraction: VariableName=[Leaf].DMDemands.Structural.StructuralFraction
          Constant QStructuralPriority: FixedValue=1
          Constant QMetabolicPriority: FixedValue=1
          Constant QStoragePriority: FixedValue=1
        NutrientDemandFunctions NDemands
          MultiplyFunction Structural
            VariableReference MinNconc: VariableName=[Leaf].minimumNconc
            VariableReference PotentialDMAllocation: VariableName=[Leaf].potentialDMAllocation.Structural
          StorageNDemandFunction Storage
            VariableReference NitrogenDemandSwitch: VariableName=[Leaf].nitrogenDemandSwitch
            VariableReference MaxNconc: VariableName=[Leaf].maximumNconc
          Constant Metabolic: FixedValue=0
          Constant QStructuralPriority: FixedValue=1
          Constant QMetabolicPriority: FixedValue=1
          Constant QStoragePriority: FixedValue=1
        VariableReference BaseHeight: VariableName=[STRUM].Height.CanopyBaseHeight
        VariableReference HeightFunction: VariableName=[STRUM].Height
        VariableReference Wideness: VariableName=[STRUM].Width
        MultiplyFunction Area
          Constant Maximum: FixedValue=0; Units=m2/m2
          VariableReference RelativeAnnualDimension: VariableName=[STRUM].RelativeAnnualDimension
          VariableReference RelativeSeasonalDimension: VariableName=[STRUM].RelativeSeasonalDimension
          Constant FrostFactor: FixedValue=1
        Constant MaxNConcAtStartLeafFall: FixedValue=0
          Memo Param value set at establishment
            SCRUM calculates this parameter value during run-time when the crop is established from parameter values set in the relevent SCRUMcrop and SCRUMmanagement objects
        AddFunction MaximumNConc
          VariableReference MaxNConcAtStartLeafFall: VariableName=[Leaf].MaxNConcAtStartLeafFall
          MultiplyFunction EarlyNConcElevation
            SubtractFunction
              Constant YoungLeafNconc: FixedValue=0.04
              VariableReference MaxNConcAtStartLeafFall: VariableName=[Leaf].MaxNConcAtStartLeafFall
            LinearInterpolationFunction DilutionCurve
              XYPairs: X=[1, 3, 4, 5, 6, 7, 8]; Y=[1, 1, 0.1, 0.02, 0, 0, 0]
              VariableReference XValue: VariableName=[Phenology].Stage
        MultiplyFunction CriticalNConc
          Constant StructuralNFactor: FixedValue=0.6
          VariableReference MaxNConcAtStartLeafFall: VariableName=[Leaf].MaxNConcAtStartLeafFall
        MultiplyFunction MinimumNConc
          Constant StructuralNFactor: FixedValue=0.6
          VariableReference MaxNConcAtStartLeafFall: VariableName=[Leaf].MaxNConcAtStartLeafFall
      GenericOrgan Trunk: IsAboveGround=true
        Constant NReallocationFactor: FixedValue=0
        Constant NRetranslocationFactor: FixedValue=0
        Constant DMRetranslocationFactor: FixedValue=0.05
        PhaseLookupValue NitrogenDemandSwitch: Start=BudBreak; End=BareTree
          Constant: FixedValue=1
        BiomassRemoval BiomassRemovalDefaults
          OrganBiomassRemovalType Harvest: FractionLiveToRemove=0; FractionDeadToRemove=0; FractionLiveToResidue=0; FractionDeadToResidue=0
          OrganBiomassRemovalType Cut: FractionLiveToRemove=0; FractionDeadToRemove=0; FractionLiveToResidue=0; FractionDeadToResidue=0
          OrganBiomassRemovalType Prune: FractionLiveToRemove=0; FractionDeadToRemove=0; FractionLiveToResidue=0.3; FractionDeadToResidue=0.9
          OrganBiomassRemovalType Graze: FractionLiveToRemove=0; FractionDeadToRemove=0; FractionLiveToResidue=0; FractionDeadToResidue=0
        Constant SenescenceRate: FixedValue=0; Units=/d
        Constant DetachmentRateFunction: FixedValue=0; Units=/d
        Constant MaintenanceRespirationFunction: FixedValue=0; Units=0-1
        Constant DMConversionEfficiency: FixedValue=1; Units=0-1
        Constant DMReallocationFactor: FixedValue=0
        Constant RemobilisationCost: FixedValue=0
        Constant CarbonConcentration: FixedValue=0.4
        NutrientDemandFunctions DMDemands
          PartitionFractionDemandFunction Structural
            PhaseLookup PartitionFraction
              PhaseLookupValue CanopyExpansion: Start=BudBreak; End=StartFullCanopy
                Constant: FixedValue=0.2
              PhaseLookupValue FruitGrowth: Start=StartFullCanopy; End=StartLeafFall
                Constant: FixedValue=0.15
              PhaseLookupValue LeafFall: Start=StartLeafFall; End=BareTree
                Constant: FixedValue=0.8
          Constant Metabolic: FixedValue=0
          StorageDMDemandFunction Storage
            Constant StorageFraction: FixedValue=0.3
          Constant QStructuralPriority: FixedValue=1
          Constant QMetabolicPriority: FixedValue=1
          Constant QStoragePriority: FixedValue=1
        NutrientDemandFunctions NDemands
          Constant Storage: FixedValue=0
          Constant Metabolic: FixedValue=0
          MultiplyFunction Structural
            VariableReference MinNconc: VariableName=[Trunk].minimumNconc
            VariableReference PotentialDMAllocation: VariableName=[Trunk].potentialDMAllocation.Structural
          Constant QStructuralPriority: FixedValue=1
          Constant QMetabolicPriority: FixedValue=1
          Constant QStoragePriority: FixedValue=1
        RetranslocateNonStructural RetranslocateNitrogen
        EnergyBalance: Albedo=0.1; Gsmax350=0; R50=0; KDead=0; LAIDead=0
          Constant FRGRer: FixedValue=0
          Constant StomatalConductanceCO2Modifier: FixedValue=1
          VariableReference Tallness: VariableName=[STRUM].Height
          VariableReference Deepness: VariableName=[STRUM].Height
          Constant GreenAreaIndex: FixedValue=0
          MultiplyFunction DeadAreaIndex
            Constant VolumeToArea: FixedValue=0.3; Units=m2/l
            DivideFunction Volume
              VariableReference Wt: VariableName=[Trunk].Wt
              Constant Density: FixedValue=750; Units=g/l
          Constant GreenExtinctionCoefficient: FixedValue=0
          Constant DeadExtinctionCoefficient: FixedValue=0.5
          VariableReference Wideness: VariableName=[STRUM].Width
        NutrientPoolFunctions InitialWt
          Constant Structural: Units=g/m^2
            Memo Param value set at establishment
              STRUM calculates this parameter value during run-time when the crop is established from parameter values set in the relevent STRUMtree object
          Constant Metabolic: FixedValue=0
          Constant Storage: FixedValue=0
        Constant Photosynthesis: FixedValue=0
        VariableReference initialNConcFunction: VariableName=[Trunk].MinimumNConc
        Constant MaximumNConc: FixedValue=0.01
          Memo Param value set at establishment
            SCRUM calculates this parameter value during run-time when the crop is established from parameter values set in the relevent SCRUMcrop and SCRUMmanagement objects
        MultiplyFunction CriticalNConc
          Constant StructuralNFactor: FixedValue=0.6
          VariableReference MaxNConc: VariableName=[Trunk].MaxNConc
        MultiplyFunction MinimumNConc
          Constant StructuralNFactor: FixedValue=0.6
          VariableReference MaxNConc: VariableName=[Trunk].MaxNConc
      GenericOrgan Fruit: IsAboveGround=true
        Constant NReallocationFactor: FixedValue=0
        Constant NRetranslocationFactor: FixedValue=0
        Constant DMRetranslocationFactor: FixedValue=0
        PhaseLookupValue NitrogenDemandSwitch: Start=StartFullCanopy; End=StartLeafFall
          Constant: FixedValue=1
        BiomassRemoval BiomassRemovalDefaults
          OrganBiomassRemovalType Harvest: FractionLiveToRemove=0.8; FractionDeadToRemove=0; FractionLiveToResidue=0.2; FractionDeadToResidue=0
          OrganBiomassRemovalType Cut: FractionLiveToRemove=0; FractionDeadToRemove=0; FractionLiveToResidue=0; FractionDeadToResidue=0
          OrganBiomassRemovalType Prune: FractionLiveToRemove=0; FractionDeadToRemove=0; FractionLiveToResidue=1; FractionDeadToResidue=1
          OrganBiomassRemovalType Graze: FractionLiveToRemove=0; FractionDeadToRemove=0; FractionLiveToResidue=0; FractionDeadToResidue=0
        Constant SenescenceRate: FixedValue=0; Units=/d
        Constant DetachmentRateFunction: FixedValue=0; Units=/d
        Constant MaintenanceRespirationFunction: FixedValue=0; Units=0-1
        Constant DMConversionEfficiency: FixedValue=1; Units=0-1
        Constant DMReallocationFactor: FixedValue=0
        Constant RemobilisationCost: FixedValue=0
        Constant CarbonConcentration: FixedValue=0.4
        NutrientDemandFunctions DMDemands
          PartitionFractionDemandFunction Structural
            PhaseLookup PartitionFraction
              PhaseLookupValue FruitGrowth: Start=StartFullCanopy; End=StartLeafFall
                MultiplyFunction Fraction
                  Constant Proportion: FixedValue=0.55
                  Constant NotHarvested: FixedValue=0.55
          Constant Metabolic: FixedValue=0
          Constant Storage: FixedValue=0
          Constant QStructuralPriority: FixedValue=1
          Constant QMetabolicPriority: FixedValue=1
          Constant QStoragePriority: FixedValue=1
        NutrientDemandFunctions NDemands
          Constant Storage: FixedValue=0
          Constant Metabolic: FixedValue=0
          MultiplyFunction Structural
            VariableReference MinNconc: VariableName=[Trunk].minimumNconc
            VariableReference PotentialDMAllocation: VariableName=[Fruit].potentialDMAllocation.Structural
          Constant QStructuralPriority: FixedValue=1
          Constant QMetabolicPriority: FixedValue=1
          Constant QStoragePriority: FixedValue=1
        RetranslocateNonStructural RetranslocateNitrogen
        NutrientPoolFunctions InitialWt
          Constant Structural: FixedValue=0; Units=g/m^2
          Constant Metabolic: FixedValue=0
          Constant Storage: FixedValue=0
        Constant Photosynthesis: FixedValue=0
        VariableReference initialNConcFunction: VariableName=[Fruit].MaximumNConc
        MultiplyFunction DryMatterPc
          Constant UnStressedHarvestDMpc: FixedValue=0.2; Units=gDM/gtotalMass
          LinearInterpolationFunction FruitAge
            XYPairs: X=[0, 3, 4, 5]; Y=[1, 1, 0.8, 0.6]
            VariableReference XValue: VariableName=[Phenology].Stage
          LinearInterpolationFunction WaterStress
            XYPairs: X=[0, 85]; Y=[1, 2]
            VariableReference XValue: VariableName=[AccumulatedWaterStress]
        MultiplyFunction FreshWt
          DivideFunction FreshWtConversion
            Constant: FixedValue=1
            VariableReference DMconc: VariableName=[Fruit].DryMatterPc
          VariableReference DryWt: VariableName=[Fruit].Wt
        MultiplyFunction Number
          Constant ThinningTarget: FixedValue=15; Units=fruit/m2
          LinearInterpolationFunction WaterStress
            XYPairs: X=[0, 85]; Y=[1, 0]
            VariableReference XValue: VariableName=[AccumulatedWaterStress]
        DivideFunction FreshWtPerFruit
          VariableReference FreshWt: VariableName=[Fruit].FreshWt
          VariableReference Number: VariableName=[Fruit].Number
        MultiplyFunction Size
          VariableReference FreshWtPerFruit: VariableName=[Fruit].FreshWtPerFruit
          Constant: FixedValue=12; Units=mm Diameter/g
        MultiplyFunction FruitingBuds: same as Replacements.STRUM.Fruit.Number
        Constant MaxNConcAtHarvest: FixedValue=0
          Memo Param value set at establishment
            SCRUM calculates this parameter value during run-time when the crop is established from parameter values set in the relevent SCRUMcrop and SCRUMmanagement objects
        AddFunction MaximumNConc
          VariableReference MaxNConcAtHarvest: VariableName=[Fruit].MaxNConcAtHarvest
          MultiplyFunction EarlyNConcElevation
            SubtractFunction
              Constant MaxNConcAtSet: FixedValue=4
              VariableReference MaxNConcAtHarvest: VariableName=[Fruit].MaxNConcAtHarvest
            LinearInterpolationFunction DilutionCurve: same as Replacements.STRUM.Leaf.MaximumNConc.EarlyNConcElevation.DilutionCurve
        MultiplyFunction CriticalNConc
          Constant StructuralNFactor: FixedValue=0.6
          VariableReference MaxNConcAtHarvest: VariableName=[Fruit].MaxNConcAtHarvest
        MultiplyFunction MinimumNConc
          Constant StructuralNFactor: FixedValue=0.6
          VariableReference MaxNConcAtHarvest: VariableName=[Fruit].MaxNConcAtHarvest
      AccumulateFunction AccumulatedWaterStress: StartStageName=StartFullCanopy; EndStageName=StartLeafFall; ResetStageName=Dormant; FractionRemovedOnCut=0; FractionRemovedOnHarvest=0; FractionRemovedOnGraze=0; FractionRemovedOnPrune=1
        SubtractFunction StressIndex
          Constant One: FixedValue=1
          LinearInterpolationFunction FW
            XYPairs: X=[0.1, 0.9, 1.5]; Y=[0, 1, 1]
            VariableReference XValue: VariableName=[Leaf].Fw
      CompositeBiomass AboveGround: OrganNames=[Leaf, Trunk, Fruit]; IncludeLive=true; IncludeDead=true
      CompositeBiomass Total: OrganNames=[Leaf, Trunk, Fruit, Root]; IncludeLive=true; IncludeDead=true
      CompositeBiomass TotalLive: OrganNames=[Leaf, Trunk, Fruit, Root]; IncludeLive=true; IncludeDead=false
      CompositeBiomass TotalDead: OrganNames=[Leaf, Trunk, Fruit, Root]; IncludeLive=false; IncludeDead=true
      Constant MortalityRate: FixedValue=0
      Constant SeedMortalityRate: FixedValue=0
      Constant MaxPrunedHeight: FixedValue=0
      AddFunction Height
        MultiplyFunction CanopyBaseHeight
          Constant Maximum: FixedValue=0
          VariableReference RelativeAnnualDimension: VariableName=[STRUM].RelativeAnnualDimension
        MultiplyFunction PrunedCanopyDepth
          SubtractFunction Maximum
            VariableReference MaxPrunedHeight: VariableName=[STRUM].MaxPrunedHeight
            VariableReference MaxBaseHeight: VariableName=[STRUM].Height.CanopyBaseHeight.Maximum
          VariableReference RelativeAnnualDimension: VariableName=[STRUM].RelativeAnnualDimension
        MultiplyFunction SeasonalGrowth
          VariableReference RelativeSeasonalDimension: VariableName=[STRUM].RelativeSeasonalDimension
          Constant Maximum: FixedValue=100; Units=mm
          VariableReference RelativeAnnualDimension: VariableName=[STRUM].RelativeAnnualDimension
      AddFunction Width
        MultiplyFunction PrunedWidth
          VariableReference RelativeAnnualDimension: VariableName=[STRUM].RelativeAnnualDimension
          Constant Maximum: FixedValue=500; Units=mm
        MultiplyFunction SeasonalGrowth
          VariableReference RelativeSeasonalDimension: VariableName=[STRUM].RelativeSeasonalDimension
          Constant Maximum: FixedValue=500; Units=mm
      LinearInterpolationFunction RelativeAnnualDimension
        XYPairs: X=[0, 6]; Y=[0.4, 1]
        VariableReference XValue: VariableName=[Phenology].Age.YearDecimal
      StageBasedInterpolation RelativeSeasonalDimension: Values=[0, 0, 0, 0, 0.6, 1, 1, 1]; Proportional=true
    Report: EventNames=[Clock].DoReport
      VariableNames:
        [Clock].Today
        [PlantVariables].Script.Height as height
        [PlantVariables].Script.LAI as lai
        [PlantVariables].Script.FRadInt as f.rad.int
        [PlantVariables].Script.ET as transpiration
        [PlantVariables].Script.ES as Es
        [PlantVariables].Script.PET as PET
        [PlantVariables].Script.RootDepth as rootDepth
        [PlantVariables].Script.InterceptedRadiation as IntRadn
        [PlantVariables].Script.TotRadn as TotalRadn
        [Soil].OutputLayers.SW
        sum([Soil].OutputLayers.SWmm) as psw
        [Weather].DaysSinceWinterSolstice
        [Weather].Rain
        [Irrigation].IrrigationApplied
        [Soil].SoilWater.Drainage
        [Weather].DaysSinceWinterSolstice
        [Row].STRUM.Leaf.Transpiration
        [Row].STRUM.Leaf.Height
        [Row].STRUM.Leaf.CoverGreen
        [Row].STRUM.Leaf.LAI
        [Row].STRUM.Leaf.WaterDemand
        [Row].STRUM.Leaf.Width
        [Row].STRUM.Leaf.RadiationIntercepted
        [Weather].Radn
        [Row].STRUM.Trunk.EnergyBalance.RadiationInterceptedByDead
        [Row].STRUM.Phenology.Age.Years
        [Row].STRUM.Phenology.Stage
        [Row].STRUM.Leaf.Wt
        [Row].STRUM.Fruit.Wt
        [Row].STRUM.Trunk.Wt
        [Row].STRUM.Root.Wt
        [Row].STRUM.Trunk.EnergyBalance.LAIDead
        [Row].STRUM.Leaf.Fw
        [Fertiliser].NitrogenApplied
        ([Row].STRUM.Leaf.Wt + [Row].STRUM.Fruit.Wt + [Row].STRUM.Trunk.Wt) as AboveGroundWt
        ([Soil].OutputLayers.SWmm[1]+[Soil].OutputLayers.SWmm[2]+[Soil].OutputLayers.SWmm[3]+[Soil].OutputLayers.SWmm[4]+[Soil].OutputLayers.SWmm[5]+[Soil].OutputLayers.SWmm[6]) as ProfileSWmm
        sum([Soil].SoilNitrogen.MineralN) as ProfileMinN
    Report ReportOneZone: EventNames=[Clock].DoReport
      VariableNames:
        [Clock].Today
        [Weather].DaysSinceWinterSolstice
        [Weather].Rain
        [Weather].Radn
        [Weather].DaysSinceWinterSolstice
        [Irrigation].IrrigationApplied
        [Fertiliser].NitrogenApplied
        [AnnualReset].Script.AccumFW
        [Soil].SoilWater.Drainage
        [Soil].OutputLayers.SW
        ([Soil].OutputLayers.SWmm[1]+[Soil].OutputLayers.SWmm[2]+[Soil].OutputLayers.SWmm[3]+[Soil].OutputLayers.SWmm[4]+[Soil].OutputLayers.SWmm[5]+[Soil].OutputLayers.SWmm[6]) as ProfileSWmm
        sum([Soil].SoilNitrogen.MineralN) as ProfileMinN
        [STRUM].Leaf.Transpiration
        [STRUM].Leaf.Height
        [STRUM].Leaf.CoverGreen
        [STRUM].Leaf.LAI
        [STRUM].Leaf.CoverGreen
        [STRUM].Leaf.WaterDemand
        [STRUM].Leaf.Width
        [STRUM].Leaf.RadiationIntercepted
        [STRUM].Trunk.EnergyBalance.RadiationInterceptedByDead
        [STRUM].Phenology.Age.Years
        [STRUM].Phenology.Stage
        [STRUM].Leaf.Wt
        [STRUM].Fruit.Wt
        [STRUM].Trunk.Wt
        [STRUM].Root.Wt
        [STRUM].Root.Depth
        [STRUM].Leaf.DMSupply.Fixation
        [STRUM].Trunk.EnergyBalance.LAIDead
        [STRUM].Leaf.Fw
        ([STRUM].Leaf.Wt + [STRUM].Fruit.Wt + [STRUM].Trunk.Wt) as AboveGroundWt
        divide([STRUM].Leaf.Transpiration,[STRUM].Leaf.LAI,0) as TWU
  DataStore
    ExcelInput: FileNames=[AllObs.xlsx]; SheetNames=[Observed]
    PredictedObserved: PredictedTableName=Report; ObservedTableName=Observed; FieldNameUsedForMatch=SimulationName; FieldName2UsedForMatch=Zone; FieldName3UsedForMatch=Clock.Today; AllColumns=false
    PredictedObserved DrainagePO: PredictedTableName=Drainage; ObservedTableName=Observed; FieldNameUsedForMatch=SimulationName; FieldName2UsedForMatch=Zone; FieldName3UsedForMatch=Clock.Today; AllColumns=false
  Simulation PatternsTest
    Clock: Start=2000-07-01; End=2011-07-01
    Summary SummaryFile
    Weather: FileName=Whakatu.met
    MicroClimate: a_interception=0; b_interception=1; c_interception=0; d_interception=0; SoilHeatFluxFraction=0.4; MinimumHeightDiffForNewLayer=0; NightInterceptionFraction=0.5; ReferenceHeight=2
    SoilArbitrator Soil Arbitrator
    RectangularZone Row: Length=100; Width=1.3; Slope=0; AspectAngle=0; Altitude=50
      Report: EventNames=[Clock].DoReport
      Report Dimensions: EventNames=[Clock].DoReport
        VariableNames:
          [Clock].Today
          [PlantVariables].Script.Height as leafHeight
          [Row].STRUM.Height.CanopyBaseHeight as baseHeight
          [Row].STRUM.Height.CanopyBaseHeight  + [Row].STRUM.Height.PrunedCanopyDepth as prunedHeight
          [Row].STRUM.Height.CanopyBaseHeight  + [Row].STRUM.Height.PrunedCanopyDepth + [Row].STRUM.Height.SeasonalGrowth as totalHeight
          [Row].STRUM.RelativeSeasonalDimension
          [Row].STRUM.Width as plantWidth
          [Row].STRUM.Width.PrunedWidth as baseWidth
          [Row].STRUM.Width.PrunedWidth + [Row].STRUM.Width.SeasonalGrowth as fullWidth
          [Row].STRUM.Leaf.Area as LAI
          [Row].STRUM.Leaf.CoverGreen
          [Row].STRUM.Trunk.EnergyBalance.DeadAreaIndex
          [Row].STRUM.Trunk.EnergyBalance.CoverTotal
          [PlantVariables].Script.LeafRadInt as LeafRadInt
          [PlantVariables].Script.TrunkRadInt as TrunkRadInt
          [Row].STRUM.Phenology.Age.YearDecimal as YearDecimal
      Soil: Latitude=0; Longitude=0
        LayerStructure: Thickness=[200, 200, 200, 200, 200, 200, 300, 300, 400, 800]
        Chemical: Thickness=[100, 200, 300, 300, 300, 300]; PH=[6.6, 6.2, 5.7, 5.5, 5.5, 5.5]; PHUnits=Water
        Water: Thickness=[300, 300, 300, 300, 300, 300, 1200]; InitialValues=[0.42, 0.41, 0.5, 0.46, 0.45, 0.43, 0.43]; InitialPAWmm=702; RelativeTo=LL15; FilledFromTop=false
        WaterBalance SoilWater: SummerDate=1-Nov; SummerU=9; SummerCona=4.4; WinterDate=1-Apr; WinterU=9; WinterCona=4.4; DiffusConst=88; DiffusSlope=35.4; Salb=0.3; CN2Bare=68; CNRed=20; CNCov=0.8; DischargeWidth=0; CatchmentArea=0; PSIDul=-100
          Thickness  SWCON  KLAT
          300        0.55   0
          300        0.55   0
          300        0.55   0
          300        0.55   0
          300        0.1    0
          300        0.02   0
          400        0.02   0
          800        0      0
        SoilNitrogen: fom_types=[default, manure, mucuna, lablab, shemp, stable]; fract_carb=[0.2, 0.3, 0.54, 0.57, 0.45, 0]; fract_cell=[0.7, 0.3, 0.37, 0.37, 0.47, 0.1]; fract_lign=[0.1, 0.4, 0.09, 0.06, 0.08, 0.9]; NPartitionApproach=0
        Organic: FOMCNRatio=30; CarbonUnits=Total
          Thickness  Carbon  SoilCNRatio  FBiom  FInert  FOM
          100        1.82    11.5         0.025  0.3     1243.93
          200        1.47    11.5         0.025  0.4     833.832
          300        1.2     11.5         0.015  0.75    457.617
          300        1.03    11.5         0.01   0.9     251.145
          300        0.47    11.5         0.01   0.96    137.831
          300        0.47    11.5         0.01   0.96    75.6435
        CERESSoilTemperature Temperature
        OutputLayers: Thickness=[300, 300, 300, 300, 300, 300]
        SoilNitrogenNO3 NO3: Thickness=[100, 200, 300, 300, 300, 300]; InitialValues=[217, 15, 1.66667, 1.66667, 0, 0]; InitialValuesUnits=ppm; WaterTableConcentration=0; D0=0; DepthConstant=0; MaxDepthSoluteAccessible=0; RunoffEffectivenessAtMovingSolute=0; MaxEffectiveRunoff=0
        SoilNitrogenNH4 NH4: Thickness=[100, 200, 300, 300, 300, 300]; InitialValues=[0, 0, 0, 0, 0, 0]; InitialValuesUnits=ppm; WaterTableConcentration=0; D0=0; DepthConstant=0; MaxDepthSoluteAccessible=0; RunoffEffectivenessAtMovingSolute=0; MaxEffectiveRunoff=0
        SoilNitrogenUrea Urea: Thickness=[100, 200, 300, 300, 300, 300]; InitialValues=[0, 0, 0, 0, 0, 0]; InitialValuesUnits=kg/ha; WaterTableConcentration=0; D0=0; DepthConstant=0; MaxDepthSoluteAccessible=0; RunoffEffectivenessAtMovingSolute=0; MaxEffectiveRunoff=0
        Physical
          Thickness  BD  AirDry  LL15  DUL   SAT   KS
          300        1   0.2     0.2   0.4   0.5   100
          300        1   0.2     0.2   0.4   0.5   100
          300        1   0.25    0.25  0.4   0.5   50
          300        1   0.2     0.2   0.46  0.5   40
          300        1   0.2     0.2   0.45  0.5   40
          300        1   0.2     0.2   0.43  0.53  40
          1200       1   0.2     0.2   0.43  0.53  40
          SoilCrop STRUMSoil: LL=[0.2, 0.2, 0.2, 0.2, 0.2, 0.2, 0.2]; KL=[1, 1, 1, 1, 1, 1, 1]; XF=[1, 1, 1, 1, 1, 1, 1]
          SoilCrop SlurpSoil: LL=[0.2, 0.2, 0.2, 0.2, 0.2, 0.2, 0.2]; KL=[0.11, 0.11, 0.11, 0.11, 0.11, 0.11, 0.11]; XF=[1, 1, 1, 1, 1, 1, 1]
      SurfaceOrganicMatter: InitialResidueName=wheat_stubble; InitialResidueType=wheat; InitialResidueMass=500; InitialStandingFraction=0; InitialCPR=0; InitialCNR=100
      Plant STRUM: IsEnding=false; DaysAfterEnding=0
      StrumTree Apple: AgeAtSimulationStart=4; YearsToMaxDimension=6; BudBreakDAWS=70; StartFullCanopyDAWS=125; StartLeafFallDAWS=305; EndLeafFallDAWS=330; MaxRD=3000; CanopyBaseHeight=1000; MaxPrunedHeight=2500; SeasonalHeightGrowth=800; MaxPrunedWidth=1200; SeasonalWidthGrowth=600; RootNConc=0.01; LeafNConc=0.02; TrunkNConc=0.01; FruitNConc=0.02; ExtinctCoeff=0.6; MaxLAI=6
      Fertiliser
      Manager SetupTreeRootZones
        UseExtraZone = True
```csharp
using Models.Soils;
using Models.Functions;
using APSIM.Shared.Utilities;
using System.Xml.Serialization;
using Models;
using Models.PMF;
using System.Text;
using System.Collections.Generic;
using Models.Core;
using System;
using Models.PMF.Organs;

namespace Models
{
    [Serializable] 
    public class Script : Model
    {
        [Link] private Plant STRUM;
        [Link] private Clock Clock;
        [Link] private Zone zone;
        [Link(Type = LinkType.Path, Path = "[STRUM].Root")]
        private Root root;

        [Description("Use extra root zone")]
        public bool UseExtraZone { get; set; }

        
        [EventSubscribe("StartOfSimulation")]
        private void OnSimulationCommencing(object sender, EventArgs e)
        {
            if (UseExtraZone)
            {
            root.ZoneNamesToGrowRootsIn.Add("Alley");
            root.ZoneRootDepths.Add(2600);
NutrientPoolFunctions InitialDM = new NutrientPoolFunctions();
Constant InitStruct = new Constant();
InitStruct.FixedValue = 10;
InitialDM.Structural = InitStruct;
Constant InitMetab = new Constant();
InitMetab.FixedValue = 0;
InitialDM.Metabolic = InitMetab;
Constant InitStor = new Constant();
InitStor.FixedValue = 0;
InitialDM.Storage = InitStor;
            root.ZoneInitialDM.Add(InitialDM);

            }
        }
    }
}
```
      Manager PlantVariables
```csharp
using Models.Climate;
using System;
using Models.Core;
using Models.PMF;
using System.Collections.Generic;
using Models.Soils;
using APSIM.Shared.Utilities;
using Models.Zones;
using Models.PMF.Organs;

namespace Models
{
    [Serializable]
    public class Script : Model
    {
        [Link] private Weather weather;
        private RectangularZone AlleyZone {get; set; }
        private RectangularZone RowZone {get; set;}
        private RectangularZone ThisZone {get; set;}
        private double AreaWidth {get; set;}
        public double LeafRadInt {get; set;}
        public double TrunkRadInt {get; set;}
        public double TotRadn {get; set;}
        public double FRadInt {get; set;}
        public double ET {get; set;}
        public double ES {get; set;}
        public double PET {get; set;}
        public double LAI {get; set;}
        public double Height {get; set;}
        public double RootDepth {get; set;}
        public double PlantWidth {get; set;}
        public double InterceptedRadiation {get; set;}
        public double TreeRadInt {get; set;}


        [EventSubscribe("StartOfSimulation")]
        private void DoStartOfSimulation(object sender, EventArgs e)
        {
               
               ThisZone = this.Parent.Parent as RectangularZone;
               RowZone = this.Parent.Parent.Parent.FindInScope("Row") as RectangularZone;
               AlleyZone = (RectangularZone)this.Parent.Parent.Parent.FindInScope("Alley") as RectangularZone;
               AreaWidth = AlleyZone.Width + RowZone.Width;
               PlantWidth = 0;
        }
        
        [EventSubscribe("DoReportCalculations")]
        private void OnDoReportCalculations(object sender, EventArgs e)
        {

            if (ThisZone.Name == "Row")
                {
                LeafRadInt =(double)RowZone.Get("STRUM.Leaf.RadiationIntercepted");
                TrunkRadInt = (double)RowZone.Get("STRUM.Trunk.EnergyBalance.RadiationInterceptedByDead");
                TreeRadInt = LeafRadInt  + TrunkRadInt;
                FRadInt = (TreeRadInt * RowZone.Width)/(weather.Radn * AreaWidth);
                InterceptedRadiation = (double)RowZone.Get("STRUM.Leaf.RadiationIntercepted");
                ET = (double)RowZone.Get("STRUM.Leaf.Transpiration") * RowZone.Width/AreaWidth;
                LAI = (double)RowZone.Get("STRUM.Leaf.LAI");
                Height = (double)RowZone.Get("STRUM.Leaf.Height");
                RootDepth = (double)RowZone.Get("STRUM.Root.Depth");
                PlantWidth = (double)RowZone.Get("STRUM.Leaf.Width")/1000;
                }
            else
                {
                FRadInt = ((double)AlleyZone.Get("Slurp.Leaf.RadiationIntercepted") * AlleyZone.Width)/(weather.Radn * AreaWidth);
                InterceptedRadiation = (double)AlleyZone.Get("Slurp.Leaf.RadiationIntercepted");
                ET = (double)AlleyZone.Get("Slurp.Leaf.Transpiration") * ThisZone.Width/AreaWidth;
                LAI = (double)AlleyZone.Get("Slurp.Leaf.LAI");
                Height = (double)AlleyZone.Get("Slurp.Leaf.Height");
                RootDepth = (double)AlleyZone.Get("Slurp.Root.Depth");
                }
			TotRadn = weather.Radn * AreaWidth; 
            ES = (double)ThisZone.Get("Soil.SoilWater.Es") * ThisZone.Width/AreaWidth;
            double PETWidth = Math.Min(Math.Max(PlantWidth,ThisZone.Width),AreaWidth);
            PET = (double)ThisZone.Get("Soil.SoilWater.Eo") * PETWidth/AreaWidth;
        }
    }
}
```
      Manager HarvestNPrune
        HarvestDate = 15-Apr
        PruneDate = 1-Jun
```csharp
using APSIM.Shared.Utilities;
using Models.Utilities;
using Models.Soils;
using Models.PMF;
using Models.Core;
using System;

namespace Models
{
    [Serializable]
    public class Script : Model
    {
        [Link] Clock Clock;
        [Link] Plant STRUM;
        [Link] Summary Summary;
        [Link] Zone zone;

        [Description("Harvest date (d-mmm)")]
        public string HarvestDate { get; set; }
        [Description("Pruning date (d-mmm)")]
        public string PruneDate { get; set; }

        [EventSubscribe("DoManagement")]
        private void OnDoManagement(object sender, EventArgs e)
        {
            if (DateUtilities.WithinDates(HarvestDate, Clock.Today, HarvestDate))
            {
                STRUM.RemoveBiomass("Harvest");
                object NotHarvested = 0;
                zone.Set("STRUM.Fruit.DMDemands.Structural.PartitionFraction.FruitGrowth.Fraction.NotHarvested.FixedValue", NotHarvested);
            }

            if (DateUtilities.WithinDates(PruneDate, Clock.Today, PruneDate))
            {
                STRUM.RemoveBiomass("Prune");
                object NotHarvested = 1;
                zone.Set("STRUM.Fruit.DMDemands.Structural.PartitionFraction.FruitGrowth.Fraction.NotHarvested.FixedValue", NotHarvested);
            }
        }
        
    }
}
```
      Irrigation
    RectangularZone Alley: Length=100; Width=2.2; Slope=0; AspectAngle=0; Altitude=50
      Report: EventNames=[Clock].DoReport
      Report Drainage: EventNames=[Clock].DoReport
        VariableNames:
          [Clock].Today
          sum of [Soil].SoilWater.Flux[6] from 2008-10-01 to 2011-03-08 as drainage
          [Soil].Water.MM[9] + [Soil].Water.MM[10] as SW_belowRoots
      Soil: Latitude=0; Longitude=0
        LayerStructure: Thickness=[200, 200, 200, 200, 200, 200, 300, 300, 400, 800]
        Chemical: Thickness=[100, 200, 300, 300, 300, 300]; PH=[6.6, 6.2, 5.7, 5.5, 5.5, 5.5]; PHUnits=Water
        Water: Thickness=[300, 300, 300, 300, 300, 300, 1200]; InitialValues=[0.4, 0.4, 0.4, 0.46, 0.45, 0.43, 0.43]; InitialPAWmm=663; RelativeTo=LL15; FilledFromTop=false
        WaterBalance SoilWater: same as PatternsTest.Row.Soil.SoilWater
        SoilNitrogen: fom_types=[default, manure, mucuna, lablab, shemp, stable]; fract_carb=[0.2, 0.3, 0.54, 0.57, 0.45, 0]; fract_cell=[0.7, 0.3, 0.37, 0.37, 0.47, 0.1]; fract_lign=[0.1, 0.4, 0.09, 0.06, 0.08, 0.9]; NPartitionApproach=0
        Organic: same as PatternsTest.Row.Soil.Organic
        CERESSoilTemperature Temperature
        OutputLayers: Thickness=[300, 300, 300, 300, 300, 300]
        SoilNitrogenNO3 NO3: same as PatternsTest.Row.Soil.NO3
        SoilNitrogenNH4 NH4: same as PatternsTest.Row.Soil.NH4
        SoilNitrogenUrea Urea: same as PatternsTest.Row.Soil.Urea
        Physical: same as PatternsTest.Row.Soil.Physical
      SurfaceOrganicMatter: InitialResidueName=wheat_stubble; InitialResidueType=wheat; InitialResidueMass=500; InitialStandingFraction=0; InitialCPR=0; InitialCNR=100
      Plant Slurp
      Fertiliser
      Manager PastureInitialisation
        CultivarName = StaticCrop
        InitialRootDepth = 2000
        SowingDate = 07/02/2006 00:00:00
        RootDepth = 2000
        RFV = 10
        KLReductionFactor = -0.001
        KLReductionDepth = 150
        MaxG = 0.004
        R50 = 150
```csharp
using Models.Interfaces;
using Models.PMF.Organs;
using System;
using Models.Core;
using Models.PMF;
using APSIM.Shared.Utilities;
using Models.Soils;
        
namespace Models
{
    [Serializable] 
    [System.Xml.Serialization.XmlInclude(typeof(Model))]
    public class Script : Model
    {
        [Link] private Plant Slurp;
        [Link] private Clock Clock;
        [Link] private Soil Soil;
        [Link] private Zone zone;
        [Link(Type = LinkType.Path, Path = "[Slurp].Root")]
        private Root root;
        [Link]
        private IPhysical soilPhysical;

        [Display(Type = DisplayType.CultivarName)]
        [Description("Plant Type")]
        public string CultivarName { get; set; }
        [Description("Initial Root Depth")]
        public double InitialRootDepth { get; set; }
        [Description("Initialisation Date")]
        public DateTime SowingDate { get; set; }
        [Description("Maximum Root Depth")]
        public double RootDepth { get; set; }
        [Description("Roof Front Velocity")]
        public double RFV { get; set; }
        [Description("Factor to change Kl modifier with Depth")]
        public double KLReductionFactor { get; set; }
        [Description("Depth that KL starts to decline")]
        public double KLReductionDepth { get; set; }
        
        public double[] YKLModifiers { get; set; }
        public double[] XDepth { get; set; }
        private double Depth { get; set; }
        
        [Description("Maximum Stomatal Conductance")]
        public double MaxG { get; set; }
        [Description("Stomatal Radn response")]
        public double R50 { get; set; }
        
        [EventSubscribe("DoManagement")]
        private void OnDoManagement(object sender, EventArgs e)
        {
            if (Clock.Today.Date == SowingDate)
            {
                Slurp.Sow(cultivar: CultivarName, population: 1, depth: InitialRootDepth, rowSpacing: 150);
                
                YKLModifiers = new double[soilPhysical.Thickness.Length];
                XDepth = new double[soilPhysical.Thickness.Length];
                Depth = 0;
                for (int layer = 0; layer < soilPhysical.Thickness.Length; layer++)
                {
                    Depth += soilPhysical.Thickness[layer] / 2;  //Add half of the thickness of the current layer so depth is the mid depth of that layer
                    if (Depth <= KLReductionDepth)
                    {
                        YKLModifiers[layer] = 1;
                        XDepth[layer] = Depth;
                    }
                    else
                    {
                        double KLMod = 1 * Math.Exp(-KLReductionFactor * (Depth - KLReductionDepth));
                        YKLModifiers[layer] = KLMod;
                        XDepth[layer] = Depth;
                    }
                    Depth += soilPhysical.Thickness[layer] / 2;  //Add the other half of the current layer so depth is the top of the next layer
                }
                object KLMods = YKLModifiers;
                zone.Set("Slurp.Root.KLModifier.XYPairs.Y", KLMods);
                object Depths = XDepth;
                zone.Set("Slurp.Root.KLModifier.XYPairs.X", Depths);
                object RD = RootDepth;
                zone.Set("Slurp.Root.MaximumRootDepth.FixedValue", RD);
                object RV = RFV;
                zone.Set("Slurp.Root.RootFrontVelocity.Potential.FixedValue", RV);
                object GMaxValue = MaxG;
                zone.Set("Slurp.Leaf.Gsmax350", GMaxValue); 
                object R50Value = R50; 
                zone.Set("Slurp.Leaf.R50", R50Value); 
                
            }
        }
    }
}
```
      Manager SetPastureVariables
        Ext_coef = 0.6
        MaximumHeight = 200
        MinimumHeight = 50
```csharp
using Models.Soils;
using System.Data;
using APSIM.Shared.Utilities;
using System.Xml.Serialization;
using Models;
using Models.PMF;
using System.Text;
using System.Collections.Generic;
using Models.Core;
using System;
using Models.Climate;

namespace Models
{
    [Serializable] 
    //[System.Xml.Serialization.XmlInclude(typeof(Model))]
    public class Script : Model
    {
        [Link] Plant Slurp;
        [Link] Clock Clock;
        [Link] Zone zone;
        [Link] Weather weather;

        
        [Description("Extinction coefficient")]
        public  double Ext_coef { get; set; }
        [Description("Maximum height of leaves")]
        public double MaximumHeight { get; set; }
        [Description("Minimum height of leaves")]
        public double MinimumHeight { get; set; }
        
        public double Cover {get; private set;}
        public double LAI { get; private set; }
                
        [EventSubscribe("StartOfSimulation")]
        private void OnStartOfSimulation(object sender, EventArgs e)
        {
            Cover = 0.5;
        }
        
        [EventSubscribe("StartOfDay")]
        private void OnStartOfDay(object sender, EventArgs e)
        {
            Cover += weather.MeanT * 0.0005;

            if (Cover >= 1.0)
            {
                Cover = 0.75;        
            }

              LAI = Math.Log(1 - Cover) / -Ext_coef;

            object LAIResetValue = LAI;
            zone.Set("Slurp.Leaf.Area.FixedValue", LAIResetValue);  
            object HeightResetValue = MinimumHeight + Cover * (MaximumHeight-MinimumHeight);
            zone.Set("Slurp.Leaf.HeightFunction.FixedValue", HeightResetValue);  
        }
    }
}
```
      Manager SetupPastureRootZones
        UseExtraZone = False
```csharp
using Models.Soils;
using Models.Functions;
using APSIM.Shared.Utilities;
using System.Xml.Serialization;
using Models;
using Models.PMF;
using System.Text;
using System.Collections.Generic;
using Models.Core;
using System;
using Models.PMF.Organs;

namespace Models
{
    [Serializable] 
    public class Script : Model
    {
        [Link] private Plant Slurp;
        [Link] private Clock Clock;
        [Link] private Zone zone;
        [Link(Type = LinkType.Path, Path = "[Slurp].Root")]
        private Root root;

        [Description("Use extra root zone")]
        public bool UseExtraZone { get; set; }

        
        [EventSubscribe("StartOfSimulation")]
        private void OnSimulationCommencing(object sender, EventArgs e)
        {
            if (UseExtraZone)
            {
            root.ZoneNamesToGrowRootsIn.Add("Row");
            root.ZoneRootDepths.Add(600);
NutrientPoolFunctions InitialDM = new NutrientPoolFunctions();
Constant InitStruct = new Constant();
InitStruct.FixedValue = 10;
InitialDM.Structural = InitStruct;
Constant InitMetab = new Constant();
InitMetab.FixedValue = 0;
InitialDM.Metabolic = InitMetab;
Constant InitStor = new Constant();
InitStor.FixedValue = 0;
InitialDM.Storage = InitStor;
            root.ZoneInitialDM.Add(InitialDM);

            }
        }
    }
}
```
      Manager PlantVariables: same as PatternsTest.Row.PlantVariables
      Irrigation
  Simulation Apple_Dwarf
    Clock: Start=2008-07-01; End=2011-07-01
    Summary SummaryFile
    Weather: FileName=Whakatu.met
    MicroClimate: a_interception=0; b_interception=1; c_interception=0; d_interception=0; SoilHeatFluxFraction=0.4; MinimumHeightDiffForNewLayer=0; NightInterceptionFraction=0.5; ReferenceHeight=2
    SoilArbitrator Soil Arbitrator
    RectangularZone Row: Length=100; Width=1.3; Slope=0; AspectAngle=0; Altitude=50
      Report: EventNames=[Clock].DoReport
      Report Drainage: EventNames=[Clock].DoReport
        VariableNames:
          [Clock].Today
          sum of [Soil].SoilWater.Flux[6] from 2008-10-01 to 2011-03-08 as drainage
          [Soil].Water.MM[9] + [Soil].Water.MM[10] as SW_belowRoots
      Soil: same as PatternsTest.Row.Soil
      SurfaceOrganicMatter: InitialResidueName=wheat_stubble; InitialResidueType=wheat; InitialResidueMass=500; InitialStandingFraction=0; InitialCPR=0; InitialCNR=100
      Plant STRUM: IsEnding=false; DaysAfterEnding=0
      StrumTree Apple: AgeAtSimulationStart=4; YearsToMaxDimension=6; BudBreakDAWS=80; StartFullCanopyDAWS=120; StartLeafFallDAWS=290; EndLeafFallDAWS=320; MaxRD=3000; CanopyBaseHeight=900; MaxPrunedHeight=2500; SeasonalHeightGrowth=800; MaxPrunedWidth=1200; SeasonalWidthGrowth=600; RootNConc=0.01; LeafNConc=0.02; TrunkNConc=0.01; FruitNConc=0.02; ExtinctCoeff=0.8; MaxLAI=6
      Fertiliser
      Irrigation
      Manager TreeInitialisation
        CultivarName = Apple
        SowingDate = 07/01/2008 00:00:00
        StartAge = 6
        SurfaceKL = 0.11
        KLReductionFactor = 0.003
        KLReductionDepth = 250
```csharp
using Models.Interfaces;
using Models.Soils;
using APSIM.Shared.Utilities;
using Models.PMF;
using Models.Core;
using System;
using Models.PMF.Organs;
using Models.PMF.Phen;
        
namespace Models
{
    [Serializable] 
    [System.Xml.Serialization.XmlInclude(typeof(Model))]
    public class Script : Model
    {
        [Link] private Plant STRUM;
        [Link] private Clock Clock;
        [Link] private Soil Soil;
        [Link] private Zone zone;
        [Link(Type = LinkType.Path, Path = "[STRUM].Root")]
        private Root root;
        [Link(Type = LinkType.Path, Path = "[STRUM].Phenology")]
        private Phenology phenology;
        [Link]
        private IPhysical soilPhysical;

        [Display(Type = DisplayType.CultivarName)]
        [Description("Plant Type")]
        public string CultivarName { get; set; }
        [Description("Initialisation Date")]
        public DateTime SowingDate { get; set; }
        [Description("Age of trees (in Years) at start of simulation)")]
        public int StartAge {get;set;}

        [Description("Kl in the shallowest layer")]
        public double SurfaceKL { get; set; }
        [Description("Factor to change Kl modifier with Depth")]
        public double KLReductionFactor { get; set; }
        [Description("Depth that KL starts to decline")]
        public double KLReductionDepth { get; set; }
        
        public double[] YKLModifiers { get; set; }
        public double[] XDepth { get; set; }
        private double Depth { get; set; }
        
        [EventSubscribe("DoManagement")]
        private void OnDoManagement(object sender, EventArgs e)
        {
            if (Clock.Today.Date == SowingDate)
            {
                double maxRootDepth = (double)zone.Get("STRUM.Root.MaximumRootDepth.FixedValue");
                double initialRootDepth = Math.Min(1,StartAge/6) * maxRootDepth;
                STRUM.Sow(cultivar: CultivarName, population: 1, depth: initialRootDepth, rowSpacing: 3000);
                object StartAgeValue = StartAge;
                zone.Set("STRUM.Phenology.Age.Years",StartAgeValue);
                YKLModifiers = new double[soilPhysical.Thickness.Length];
                XDepth = new double[soilPhysical.Thickness.Length];
                Depth = 0;
                for (int layer = 0; layer < soilPhysical.Thickness.Length; layer++)
                {
                    Depth += soilPhysical.Thickness[layer] / 2;  //Add half of the thickness of the current layer so depth is the mid depth of that layer
                    if (Depth <= KLReductionDepth)
                    {
                        YKLModifiers[layer] = SurfaceKL;
                        XDepth[layer] = Depth;
                    }
                    else
                    {
                        double KLMod = SurfaceKL * Math.Exp(-KLReductionFactor * Math.Max(0,(Depth - KLReductionDepth)));
                        YKLModifiers[layer] = KLMod;
                        XDepth[layer] = Depth;
                    }
                    Depth += soilPhysical.Thickness[layer] / 2;  //Add the other half of the current layer so depth is the top of the next layer
                }
                object KLMods = YKLModifiers;
                //zone.Set("STRUM.Root.KLModifier.XYPairs.Y", KLMods);
                object Depths = XDepth;
                //zone.Set("STRUM.Root.KLModifier.XYPairs.X", Depths);
            }
        }
    }
}
```
      Manager SetupTreeRootZones: same as PatternsTest.Row.SetupTreeRootZones
      Operations
        2008-09-16  [Irrigation].apply(15)
        2008-10-05  [Irrigation].apply(5)
        2008-10-06  [Irrigation].apply(6)
        2008-10-11  [Irrigation].apply(15)
        2008-10-18  [Irrigation].apply(16)
        2008-10-22  [Irrigation].apply(2)
        2008-10-25  [Irrigation].apply(12)
        2008-11-01  [Irrigation].apply(6)
        2008-11-04  [Irrigation].apply(20)
        2008-11-14  [Irrigation].apply(15)
        2008-11-19  [Irrigation].apply(15)
        2008-11-23  [Irrigation].apply(15)
        2008-11-27  [Irrigation].apply(15)
        2008-12-01  [Irrigation].apply(2)
        2008-12-03  [Irrigation].apply(15)
        2008-12-06  [Irrigation].apply(15)
        2008-12-13  [Irrigation].apply(9)
        2008-12-16  [Irrigation].apply(15)
        2008-12-24  [Irrigation].apply(16)
        2008-12-31  [Irrigation].apply(8)
        2009-01-04  [Irrigation].apply(15)
        2009-01-11  [Irrigation].apply(15)
        2009-01-18  [Irrigation].apply(15)
        2009-01-24  [Irrigation].apply(15)
        2009-01-30  [Irrigation].apply(15)
        2009-02-04  [Irrigation].apply(15)
        2009-02-12  [Irrigation].apply(18)
        2009-02-16  [Irrigation].apply(12)
        2009-02-20  [Irrigation].apply(7)
        2009-03-01  [Irrigation].apply(50)
        2009-03-22  [Irrigation].apply(25)
        2009-12-16  [Irrigation].apply(20)
        2009-12-21  [Irrigation].apply(20)
        2009-12-26  [Irrigation].apply(20)
        2010-01-03  [Irrigation].apply(20)
        2010-01-08  [Irrigation].apply(15)
        2010-03-17  [Irrigation].apply(20)
        2010-03-18  [Irrigation].apply(20)
        2010-03-19  [Irrigation].apply(20)
        2010-03-12  [Irrigation].apply(20)
        2010-10-28  [Irrigation].apply(15)
        2010-10-29  [Irrigation].apply(15)
        2010-11-30  [Irrigation].apply(15)
        2010-12-06  [Irrigation].apply(15)
        2010-12-07  [Irrigation].apply(15)
        2010-12-27  [Irrigation].apply(15)
        2011-01-02  [Irrigation].apply(15)
        2011-01-04  [Irrigation].apply(15)
        2011-01-29  [Irrigation].apply(15)
        2011-02-16  [Irrigation].apply(15)
      Manager PlantVariables
```csharp
using Models.Climate;
using System;
using Models.Core;
using Models.PMF;
using System.Collections.Generic;
using Models.Soils;
using APSIM.Shared.Utilities;
using Models.Zones;
using Models.PMF.Organs;

namespace Models
{
    [Serializable]
    public class Script : Model
    {
        [Link] private Weather weather;
        private RectangularZone AlleyZone {get; set; }
        private RectangularZone RowZone {get; set;}
        private RectangularZone ThisZone {get; set;}
        private double AreaWidth {get; set;}
        public double TotRadn {get; set;}
        public double FRadInt {get; set;}
        public double ET {get; set;}
        public double ES {get; set;}
        public double PET {get; set;}
        public double LAI {get; set;}
        public double Height {get; set;}
        public double RootDepth {get; set;}
        public double PlantWidth {get; set;}
        public double InterceptedRadiation {get; set;}
        public double TreeRadInt {get; set;}


        [EventSubscribe("StartOfSimulation")]
        private void DoStartOfSimulation(object sender, EventArgs e)
        {
               
               ThisZone = this.Parent.Parent as RectangularZone;
               RowZone = this.Parent.Parent.Parent.FindInScope("Row") as RectangularZone;
               AlleyZone = (RectangularZone)this.Parent.Parent.Parent.FindInScope("Alley") as RectangularZone;
               AreaWidth = AlleyZone.Width + RowZone.Width;
               PlantWidth = 0;
        }
        
        [EventSubscribe("DoReportCalculations")]
        private void OnDoReportCalculations(object sender, EventArgs e)
        {

            if (ThisZone.Name == "Row")
                {
                TreeRadInt = (double)RowZone.Get("STRUM.Leaf.RadiationIntercepted") + (double)RowZone.Get("STRUM.Trunk.EnergyBalance.RadiationInterceptedByDead");
                FRadInt = (TreeRadInt * RowZone.Width)/(weather.Radn * AreaWidth);
                InterceptedRadiation = (double)RowZone.Get("STRUM.Leaf.RadiationIntercepted");
                ET = (double)RowZone.Get("STRUM.Leaf.Transpiration") * RowZone.Width/AreaWidth;
                LAI = (double)RowZone.Get("STRUM.Leaf.LAI");
                Height = (double)RowZone.Get("STRUM.Leaf.Height");
                RootDepth = (double)RowZone.Get("STRUM.Root.Depth");
                PlantWidth = (double)RowZone.Get("STRUM.Leaf.Width")/1000;
                }
            else
                {
                FRadInt = ((double)AlleyZone.Get("Slurp.Leaf.RadiationIntercepted") * AlleyZone.Width)/(weather.Radn * AreaWidth);
                InterceptedRadiation = (double)AlleyZone.Get("Slurp.Leaf.RadiationIntercepted");
                ET = (double)AlleyZone.Get("Slurp.Leaf.Transpiration") * ThisZone.Width/AreaWidth;
                LAI = (double)AlleyZone.Get("Slurp.Leaf.LAI");
                Height = (double)AlleyZone.Get("Slurp.Leaf.Height");
                RootDepth = (double)AlleyZone.Get("Slurp.Root.Depth");
                }
			TotRadn = weather.Radn * AreaWidth; 
            ES = (double)ThisZone.Get("Soil.SoilWater.Es") * ThisZone.Width/AreaWidth;
            double PETWidth = Math.Min(Math.Max(PlantWidth,ThisZone.Width),AreaWidth);
            PET = (double)ThisZone.Get("Soil.SoilWater.Eo") * PETWidth/AreaWidth;
        }
    }
}
```
      Manager WaterTable (disabled)
        StartDate = 1-dec
        EndDate = 1-mar
```csharp
using Models.Zones;
using APSIM.Shared.Utilities;
using Models.Soils;
using System.Collections.Generic;
using Models.PMF;
using Models.Core;
using System;

namespace Models
{
    [Serializable]
    public class Script : Model
    {
        [Link] Clock Clock;
        [Link] Soil soil;
        [Link] Irrigation irrigation;
        [Description("Start of sowing window (d-mmm)")]
        public string StartDate { get; set; }
        [Description("End of sowing window (d-mmm)")]
        public string EndDate { get; set; }

        [EventSubscribe("StartOfDay")]
        private void OnStartOfDay(object sender, EventArgs e)
        {
        if (DateUtilities.WithinDates(StartDate, Clock.Today, EndDate))
            irrigation.Apply(2, 2500);
        }
    }
}
```
      Manager HarvestNPrune: same as PatternsTest.Row.HarvestNPrune
    RectangularZone Alley: Length=100; Width=2.2; Slope=0; AspectAngle=0; Altitude=50
      Report: EventNames=[Clock].DoReport
      Report Drainage: EventNames=[Clock].DoReport
        VariableNames:
          [Clock].Today
          sum of [Soil].SoilWater.Flux[6] from 2008-10-01 to 2011-03-08 as drainage
          [Soil].Water.MM[9] + [Soil].Water.MM[10] as SW_belowRoots
      Soil: same as PatternsTest.Alley.Soil
      SurfaceOrganicMatter: InitialResidueName=wheat_stubble; InitialResidueType=wheat; InitialResidueMass=500; InitialStandingFraction=0; InitialCPR=0; InitialCNR=100
      Plant Slurp
      Fertiliser
      Irrigation
      Manager PastureInitialisation
        CultivarName = StaticCrop
        InitialRootDepth = 2000
        SowingDate = 07/01/2008 00:00:00
        RootDepth = 2000
        RFV = 10
        KLReductionFactor = -0.001
        KLReductionDepth = 150
        MaxG = 0.004
        R50 = 150
        script: same as in PatternsTest.Alley.PastureInitialisation
      Manager SetPastureVariables: same as PatternsTest.Alley.SetPastureVariables
      Manager SetupPastureRootZones: same as PatternsTest.Alley.SetupPastureRootZones
      Manager PlantVariables: same as Apple_Dwarf.Row.PlantVariables
      Operations: same as Apple_Dwarf.Row.Operations
      Manager WaterTable
        StartDate = 1-dec
        EndDate = 1-mar
        script: same as in Apple_Dwarf.Row.WaterTable
    Memo Reason why drainage looks bad
      The flux meters were flooded by a rising water table so the drainage observations are not representative of actual drainage
  Folder NZ Experiments
    Experiment Manawatu_1994
      Factors
        Permutation
          Factor _Irr_
            CompositeFactor Control: Specifications=[IrrigationOperations]
              Operations IrrigationOperations
                1994-10-20  [Irrigation].Apply(4)
                1994-10-21  [Irrigation].Apply(4)
                1994-10-22  [Irrigation].Apply(4)
                1994-10-23  [Irrigation].Apply(4)
                1994-10-24  [Irrigation].Apply(4)
                1994-10-25  [Irrigation].Apply(4)
                1994-10-26  [Irrigation].Apply(4)
                1994-10-27  [Irrigation].Apply(4)
                1994-10-28  [Irrigation].Apply(4)
                1994-10-29  [Irrigation].Apply(4)
                1994-10-30  [Irrigation].Apply(4)
                1994-10-31  [Irrigation].Apply(4)
                1994-11-01  [Irrigation].Apply(4)
                1994-11-02  [Irrigation].Apply(4)
                1994-11-03  [Irrigation].Apply(4)
                1994-11-04  [Irrigation].Apply(4)
                1994-11-05  [Irrigation].Apply(4)
                1994-11-06  [Irrigation].Apply(4)
                1994-11-07  [Irrigation].Apply(4)
                1994-11-08  [Irrigation].Apply(4)
                1994-11-09  [Irrigation].Apply(4)
                1994-11-10  [Irrigation].Apply(4)
                1994-11-11  [Irrigation].Apply(4)
                1994-11-12  [Irrigation].Apply(4)
                1994-11-13  [Irrigation].Apply(4)
                1994-11-14  [Irrigation].Apply(4)
                1994-11-15  [Irrigation].Apply(4)
                1994-11-16  [Irrigation].Apply(4)
                1994-11-17  [Irrigation].Apply(4)
                1994-11-18  [Irrigation].Apply(4)
                1994-11-19  [Irrigation].Apply(4)
                1994-11-20  [Irrigation].Apply(4)
                1994-11-21  [Irrigation].Apply(4)
                1994-11-22  [Irrigation].Apply(4)
                1994-11-23  [Irrigation].Apply(4)
                1994-11-24  [Irrigation].Apply(4)
                1994-11-25  [Irrigation].Apply(4)
                1994-11-26  [Irrigation].Apply(4)
                1994-11-27  [Irrigation].Apply(4)
                1994-11-28  [Irrigation].Apply(4)
                1994-11-29  [Irrigation].Apply(4)
                1994-11-30  [Irrigation].Apply(4)
                1994-12-01  [Irrigation].Apply(4)
                1994-12-02  [Irrigation].Apply(4)
                1994-12-03  [Irrigation].Apply(4)
                1994-12-04  [Irrigation].Apply(4)
                1994-12-05  [Irrigation].Apply(4)
                1994-12-06  [Irrigation].Apply(4)
                1994-12-07  [Irrigation].Apply(4)
                1994-12-08  [Irrigation].Apply(4)
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            CompositeFactor EarlyDeficit: Specifications=[IrrigationOperations]
              Operations IrrigationOperations
                1994-12-14  [Irrigation].Apply(2)
                1994-12-15  [Irrigation].Apply(2)
                1994-12-16  [Irrigation].Apply(2)
                1994-12-17  [Irrigation].Apply(2)
                1994-12-18  [Irrigation].Apply(2)
                1994-12-19  [Irrigation].Apply(2)
                1994-12-20  [Irrigation].Apply(2)
                1994-12-21  [Irrigation].Apply(2)
                1994-12-22  [Irrigation].Apply(2)
                1994-12-23  [Irrigation].Apply(2)
                1994-12-24  [Irrigation].Apply(2)
                1994-12-25  [Irrigation].Apply(2)
                1994-12-26  [Irrigation].Apply(2)
                1994-12-27  [Irrigation].Apply(2)
                1994-12-28  [Irrigation].Apply(2)
                1994-12-29  [Irrigation].Apply(2)
                1994-12-30  [Irrigation].Apply(2)
                1994-12-31  [Irrigation].Apply(2)
                1995-01-01  [Irrigation].Apply(2)
                1995-01-02  [Irrigation].Apply(2)
                1995-01-03  [Irrigation].Apply(2)
                1995-01-04  [Irrigation].Apply(2)
                1995-01-05  [Irrigation].Apply(2)
                1995-01-06  [Irrigation].Apply(2)
                1995-01-07  [Irrigation].Apply(2)
                1995-01-08  [Irrigation].Apply(2)
                1995-01-09  [Irrigation].Apply(2)
                1995-01-10  [Irrigation].Apply(2)
                1995-01-11  [Irrigation].Apply(2)
                1995-01-12  [Irrigation].Apply(2)
                1995-01-13  [Irrigation].Apply(2)
                1995-01-14  [Irrigation].Apply(2)
                1995-01-15  [Irrigation].Apply(2)
                1995-01-16  [Irrigation].Apply(2)
                1995-01-17  [Irrigation].Apply(2)
                1995-01-18  [Irrigation].Apply(2)
                1995-01-19  [Irrigation].Apply(2)
                1995-01-20  [Irrigation].Apply(2)
                1995-01-21  [Irrigation].Apply(2)
                1995-01-22  [Irrigation].Apply(2)
                1995-01-23  [Irrigation].Apply(2)
                1995-01-24  [Irrigation].Apply(2)
                1995-01-25  [Irrigation].Apply(2)
                1995-01-26  [Irrigation].Apply(2)
                1995-01-27  [Irrigation].Apply(2)
                1995-01-28  [Irrigation].Apply(2)
                1995-01-29  [Irrigation].Apply(4)
                1995-01-30  [Irrigation].Apply(4)
                1995-01-31  [Irrigation].Apply(4)
                1995-02-01  [Irrigation].Apply(4)
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            CompositeFactor LateDeficit: Specifications=[IrrigationOperations]
              Operations IrrigationOperations
                1994-10-20  [Irrigation].Apply(4)
                1994-10-21  [Irrigation].Apply(4)
                1994-10-22  [Irrigation].Apply(4)
                1994-10-23  [Irrigation].Apply(4)
                1994-10-24  [Irrigation].Apply(4)
                1994-10-25  [Irrigation].Apply(4)
                1994-10-26  [Irrigation].Apply(4)
                1994-10-27  [Irrigation].Apply(4)
                1994-10-28  [Irrigation].Apply(4)
                1994-10-29  [Irrigation].Apply(4)
                1994-10-30  [Irrigation].Apply(4)
                1994-10-31  [Irrigation].Apply(4)
                1994-11-01  [Irrigation].Apply(4)
                1994-11-02  [Irrigation].Apply(4)
                1994-11-03  [Irrigation].Apply(4)
                1994-11-04  [Irrigation].Apply(4)
                1994-11-05  [Irrigation].Apply(4)
                1994-11-06  [Irrigation].Apply(4)
                1994-11-07  [Irrigation].Apply(4)
                1994-11-08  [Irrigation].Apply(4)
                1994-11-09  [Irrigation].Apply(4)
                1994-11-10  [Irrigation].Apply(4)
                1994-11-11  [Irrigation].Apply(4)
                1994-11-12  [Irrigation].Apply(4)
                1994-11-13  [Irrigation].Apply(4)
                1994-11-14  [Irrigation].Apply(4)
                1994-11-15  [Irrigation].Apply(4)
                1994-11-16  [Irrigation].Apply(4)
                1994-11-17  [Irrigation].Apply(4)
                1994-11-18  [Irrigation].Apply(4)
                1994-11-19  [Irrigation].Apply(4)
                1994-11-20  [Irrigation].Apply(4)
                1994-11-21  [Irrigation].Apply(4)
                1994-11-22  [Irrigation].Apply(4)
                1994-11-23  [Irrigation].Apply(4)
                1994-11-24  [Irrigation].Apply(4)
                1994-11-25  [Irrigation].Apply(4)
                1994-11-26  [Irrigation].Apply(4)
                1994-11-27  [Irrigation].Apply(4)
                1994-11-28  [Irrigation].Apply(4)
                1994-11-29  [Irrigation].Apply(4)
                1994-11-30  [Irrigation].Apply(4)
                1994-12-01  [Irrigation].Apply(4)
                1994-12-02  [Irrigation].Apply(4)
                1994-12-03  [Irrigation].Apply(4)
                1994-12-04  [Irrigation].Apply(4)
                1994-12-05  [Irrigation].Apply(4)
                1994-12-06  [Irrigation].Apply(4)
                1994-12-07  [Irrigation].Apply(4)
                1994-12-08  [Irrigation].Apply(4)
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                1995-02-02  [Irrigation].Apply(2)
      Simulation Manawatu_94
        Memo Experiment description
          *	Based on Mills et al (1997).

          *	Lysimeter (1.2 m deep by 1 m wide) trial conducted during the 1994/95 season.

          *	Location: Massey University, Palmerston North (40°2'S, 175°4'E.

          *	Soil: Manawatu fine sandy loam.

          *	Plant material: 4-year-old 'Braeburn' on MM106 rootstock

          *	Date of full bloom (DAF): 20/10/1994

          *	Three irrigation regimes: Control, Early Deficit, Late Deficit
        Clock: Start=1993-06-25; End=1995-08-28
        Summary SummaryFile
        Weather: FileName=PalmerstonNorth-Turitea.met
        MicroClimate: a_interception=0; b_interception=1; c_interception=0; d_interception=0; SoilHeatFluxFraction=0.4; MinimumHeightDiffForNewLayer=0; NightInterceptionFraction=0.5; ReferenceHeight=2
        SoilArbitrator Soil Arbitrator
        RectangularZone Row: Length=100; Width=1.3; Slope=0; AspectAngle=0; Altitude=50
          Report ReportOneZone: EventNames=[Clock].DoReport
            VariableNames:
              [Clock].Today
              [PlantVariables].Script.FRadInt as f.rad.int
              [Soil].OutputLayers.SW
              sum([Soil].OutputLayers.SWmm) as psw
              [Weather].DaysSinceWinterSolstice
              [Weather].Rain
              [Irrigation].IrrigationApplied
              [Soil].SoilWater.Drainage
              [Weather].DaysSinceWinterSolstice
              [Row].STRUM.Leaf.Transpiration
              [Row].STRUM.Leaf.Height
              [Row].STRUM.Leaf.CoverGreen
              [Row].STRUM.Leaf.LAI
              [Row].STRUM.Leaf.WaterDemand
              [Row].STRUM.Leaf.Width
              [Row].STRUM.Leaf.RadiationIntercepted
              [Weather].Radn
              [Row].STRUM.Trunk.EnergyBalance.RadiationInterceptedByDead
              [Row].STRUM.Phenology.Age.Years
              [Row].STRUM.Phenology.Stage
              [Row].STRUM.Leaf.Wt
              [Row].STRUM.Fruit.Wt
              [Row].STRUM.Trunk.Wt
              [Row].STRUM.Root.Wt
              [Row].STRUM.Trunk.EnergyBalance.LAIDead
              [Row].STRUM.Leaf.Fw
              [Row].STRUM.WaterUptake as Wateruptake
              [AnnualReset].Script.AccumFW
              ([Row].STRUM.Leaf.Wt + [Row].STRUM.Fruit.Wt + [Row].STRUM.Trunk.Wt) as AboveGroundWt
              ([Soil].OutputLayers.SWmm[1]+[Soil].OutputLayers.SWmm[2]+[Soil].OutputLayers.SWmm[3]+[Soil].OutputLayers.SWmm[4]+[Soil].OutputLayers.SWmm[5]+[Soil].OutputLayers.SWmm[6]) as ProfileSWmm
              [Soil].SoilNitrogen.MineralN
          SurfaceOrganicMatter: InitialResidueName=wheat_stubble; InitialResidueType=wheat; InitialResidueMass=500; InitialStandingFraction=0; InitialCPR=0; InitialCNR=100
          Plant STRUM: IsEnding=false; DaysAfterEnding=0
          Fertiliser
          Irrigation
          Manager TreeInitialisation
            CultivarName = Apple
            SowingDate = 07/01/1993 00:00:00
            StartAge = 4
            SurfaceKL = 0.13
            KLReductionFactor = 0.003
            KLReductionDepth = 150
```csharp
using Models.Interfaces;
using Models.Soils;
using APSIM.Shared.Utilities;
using Models.PMF;
using Models.Core;
using System;
using Models.PMF.Organs;
using Models.PMF.Phen;
        
namespace Models
{
    [Serializable] 
    [System.Xml.Serialization.XmlInclude(typeof(Model))]
    public class Script : Model
    {
        [Link] private Plant STRUM;
        [Link] private Clock Clock;
        [Link] private Soil Soil;
        [Link] private Zone zone;
        [Link(Type = LinkType.Path, Path = "[STRUM].Root")]
        private Root root;
        [Link(Type = LinkType.Path, Path = "[STRUM].Phenology")]
        private Phenology phenology;
        [Link]
        private IPhysical soilPhysical;

        [Display(Type = DisplayType.CultivarName)]
        [Description("Plant Type")]
        public string CultivarName { get; set; }
        [Description("Initialisation Date")]
        public DateTime SowingDate { get; set; }
        [Description("Age of trees (in Years) at start of simulation)")]
        public int StartAge {get;set;}

        [Description("Kl in the shallowest layer")]
        public double SurfaceKL { get; set; }
        [Description("Factor to change Kl modifier with Depth")]
        public double KLReductionFactor { get; set; }
        [Description("Depth that KL starts to decline")]
        public double KLReductionDepth { get; set; }
        
        public double[] YKLModifiers { get; set; }
        public double[] XDepth { get; set; }
        private double Depth { get; set; }
        
        [EventSubscribe("DoManagement")]
        private void OnDoManagement(object sender, EventArgs e)
        {
            if (Clock.Today.Date == SowingDate)
            {
                STRUM.Sow(cultivar: CultivarName, population: 1, depth: 1200, rowSpacing: 3000);
                object StartAgeValue = StartAge;
                zone.Set("STRUM.Phenology.Age.Years",StartAgeValue);
            }
        }
    }
}
```
          Manager PlantVariables
```csharp
using Models.Climate;
using System;
using Models.Core;
using Models.PMF;
using System.Collections.Generic;
using Models.Soils;
using APSIM.Shared.Utilities;
using Models.Zones;
using Models.PMF.Organs;

namespace Models
{
    [Serializable]
    public class Script : Model
    {
        [Link] private Weather weather;
        [Link] private RectangularZone zone {get; set;}
        private double AreaWidth {get; set;}
        public double TotRadn {get; set;}
        public double FRadInt {get; set;}
        public double ET {get; set;}
        public double ES {get; set;}
        public double PET {get; set;}
        public double LAI {get; set;}
        public double Height {get; set;}
        public double RootDepth {get; set;}
        public double PlantWidth {get; set;}
        public double InterceptedRadiation {get; set;}
        public double TreeRadInt {get; set;}


        [EventSubscribe("StartOfSimulation")]
        private void DoStartOfSimulation(object sender, EventArgs e)
        {
               AreaWidth = zone.Width;
               PlantWidth = 0;
        }
        
        [EventSubscribe("DoReportCalculations")]
        private void OnDoReportCalculations(object sender, EventArgs e)
        {
		   if (zone.Name == "Row")
                {
                TreeRadInt = (double)zone.Get("STRUM.Leaf.RadiationIntercepted") + (double)zone.Get("STRUM.Trunk.EnergyBalance.RadiationInterceptedByDead");
                FRadInt = (TreeRadInt * zone.Width)/(weather.Radn * AreaWidth);
                InterceptedRadiation = (double)zone.Get("STRUM.Leaf.RadiationIntercepted");
                ET = (double)zone.Get("STRUM.Leaf.Transpiration") * zone.Width/AreaWidth;
                LAI = (double)zone.Get("STRUM.Leaf.LAI");
                Height = (double)zone.Get("STRUM.Leaf.Height");
                RootDepth = (double)zone.Get("STRUM.Root.Depth");
                PlantWidth = (double)zone.Get("STRUM.Leaf.Width");
                }
           
			TotRadn = weather.Radn * AreaWidth; 
            ES = (double)zone.Get("[Soil].SoilWater.Es") * zone.Width/AreaWidth;
            double PETWidth = Math.Min(Math.Max(PlantWidth,zone.Width),AreaWidth);
            PET = (double)zone.Get("[Soil].SoilWater.Eo") * PETWidth/AreaWidth;
        }
    }
}
```
          Manager HarvestNPrune: same as PatternsTest.Row.HarvestNPrune
          Manager AnnualReset
            ResetDate = 1-Jul
```csharp
using System;
using Models.Core;
using Models.Interfaces;
using Models.PMF;
using APSIM.Shared.Utilities;
using Models.Zones;

namespace Models
{
    [Serializable]
    public class Script : Model
    {
        [Link] IClock Clock;
        [Link] ISummary Summary;
         private RectangularZone RowZone {get; set;}
       
       
        [Description("Reset Date")]
        public string ResetDate { get; set; }
        public double AccumFW { get; set; }
        
        [EventSubscribe("StartOfSimulation")]
        private void DoStartOfSimulation(object sender, EventArgs e)
        {
        RowZone = this.Parent.Parent.Parent.FindInScope("Row") as RectangularZone;
        }
        
        [EventSubscribe("DoManagement")]
         private void DoDailyCalculations(object sender, EventArgs e)
        {
            if (DateUtilities.DatesEqual(ResetDate, Clock.Today))
            
            {AccumFW=0;}
            else 
            {
            AccumFW+=(double)RowZone.Get("STRUM.Leaf.Fw");
            }
            
        }
    }
}
```
          Manager ClimateControl
            StartDate = 20-oct
            EndDate = 15-apr
```csharp
using Models.Soils;
using System.Xml.Serialization;
using Models;
using Models.PMF;
using System.Text;
using System.Collections.Generic;
using APSIM.Shared.Utilities;
using Models.Core;
using System;
using Models.Climate;

namespace Models
{
    [Serializable] 
    [System.Xml.Serialization.XmlInclude(typeof(Model))]
    public class Script : Model
    {
        [Link] Weather Met;
        [Link] Clock Clock;
    
        [Description("Start Date (d-mmm)")]
        public string StartDate { get; set; }
        
        [Description("End Date (d-mmm)")]
        public string EndDate { get; set; }
 
    
        [EventSubscribe("PreparingNewWeatherData")]
        private void OnPreparingNewWeatherData(object sender, EventArgs e)
        {
            if (DateUtilities.WithinDates(StartDate, Clock.Today, EndDate))
                Met.Rain = 0;        
        }
    }
}
```
          Operations IrrigationOperations
            1986-06-01  [Irrigation].Apply(70);
            1986-06-15  [Irrigation].Apply(70);
            1986-06-29  [Irrigation].Apply(70);
            1986-07-13  [Irrigation].Apply(70);
            1986-07-27  [Irrigation].Apply(70);
            1986-08-10  [Irrigation].Apply(70);
            1986-08-24  [Irrigation].Apply(70);
            1986-09-07  [Irrigation].Apply(70);
          Operations NitrogenOperations
            1993-09-15  [Fertiliser].Apply(25, [Fertiliser].Types.UreaN, 10);
            1993-11-15  [Fertiliser].Apply(25, [Fertiliser].Types.UreaN, 10);
            1994-02-15  [Fertiliser].Apply(50, [Fertiliser].Types.UreaN, 10);
          Soil Silt loam (Palmerston North, Massey University 1 No1365): SoilType=Silt loam; LocalName=Tokomaru; Site=Massey University 1; NearestTown=Palmerston North, Massey University 1; Region=Manawatu; Country=New Zealand; ApsoilNumber=1365; Latitude=-40.395; Longitude=175.609; LocationAccuracy=+/-50 m; YearOfSampling=2010
            DataSource=The database of New Zealand soils was compiled by AgResearch (www.agresearch.co.nz) and based on soil properties gathered, mainly from publications, in the course of conducting several simulation-based research projects but particularly from the Pastoral 21 Environment program which was funded by the New Zealand Ministry for Business, Innovation and Employment,  Dairy NZ, Fonterra and Meat & Wool NZ.
            Comments=Lowered BD value in layer 5 to make run in APSIM. Original values in rb column.The data is a combination of published or supplied measurements, pedotransfer functions, and expert opinion. See Cichota et al. (2013; Soil Research 51: 92-111, http://dx.doi.org/10.1071/SR12338) for a description of the pedotransfer functions. The soil carbon and fresh organic matter settings have been set as those broadly appropriate for permanent productive pastoral systems, see Cichota el al. (2012; Soil Research 50: 694-707, http://dx.doi.org/10.1071/SR12208). Users should take care to adapt these to local conditions before using the data in simulations. FOM values estimated to be 900 kg/ha of FOM in top 600mm of soil and another 100 kg/ha below. Soil C:N ratios taken from soil Silt loam (Marton NoXXXX).
            Physical
              Thickness  ParticleSizeClay  ParticleSizeSand  ParticleSizeSilt  Rocks  BD   AirDry  LL15  DUL   SAT  KS
              200        20                50                30                0      1.4  0.02    0.05  0.15  0.2  198.563
              200        20                50                30                0      1.4  0.05    0.05  0.15  0.2  231.474
              200        20                50                30                0      1.4  0.05    0.05  0.15  0.2  109.84
              400        10                70                20                40     1.6  0.02    0.02  0.15  0.2  1000
              200        0                 95                5                 0      1.6  0.03    0.03  0.15  0.2  500
              BD source: Field measured and checked for sensibility
              AirDry source: Estimated based on local knowledge
              LL15, DUL source: Laboratory measured
              SAT source: Calculated from measured, estimated or calculated BD
              SoilCrop STRUMSoil: LL=[0.05, 0.05, 0.05, 0.02, 0.03]; KL=[0.1, 0.1, 0.1, 0.1, 0.1]; XF=[1, 1, 1, 1, 1]
                LL source: Estimated based on local knowledge
            WaterBalance SoilWater: SummerDate=1-nov; SummerU=0; SummerCona=0; WinterDate=1-apr; WinterU=0; WinterCona=0; DiffusConst=88; DiffusSlope=35; Salb=1; CN2Bare=0; CNRed=20; CNCov=0.8; PSIDul=-100; Thickness=[100, 150, 200, 350, 700]; SWCON=[0.57, 0.9, 0.9, 0.9, 0.9]
            Organic: FOMCNRatio=40; CarbonUnits=Total
              Thickness  Carbon  SoilCNRatio  FBiom  FInert  FOM
              100        4.5     11.026       0.08   0.47    58.943
              150        2       11.026       0.05   0.457   43.666
              200        0.75    11.026       0.008  0.77    29.27
              350        0.35    11.026       0.008  0.928   14.535
              700        0.1     11.026       0.008  0.982   3.584
            Chemical: Thickness=[100, 150, 200, 350, 700]; PH=[6.5, 6.5, 6.5, 6.5, 6.5]; PHUnits=Water
              PH source: Estimated based on local knowledge
            Water: Thickness=[200, 200, 200, 400, 200]; InitialValues=[0.15, 0.15, 0.15, 0.15, 0.15]; InitialPAWmm=136; RelativeTo=LL15; FilledFromTop=false
            CERESSoilTemperature
            SoilNitrogen: fom_types=[default, manure, mucuna, lablab, shemp, stable]; fract_carb=[0.2, 0.3, 0.54, 0.57, 0.45, 0]; fract_cell=[0.7, 0.3, 0.37, 0.37, 0.47, 0.1]; fract_lign=[0.1, 0.4, 0.09, 0.06, 0.08, 0.9]; NPartitionApproach=0
            SoilNitrogenNO3 NO3: Thickness=[100, 150, 200, 350, 700]; InitialValues=[217, 15, 1.667, 1.667, 0]; InitialValuesUnits=ppm; WaterTableConcentration=0; D0=0; DepthConstant=0; MaxDepthSoluteAccessible=0; RunoffEffectivenessAtMovingSolute=0; MaxEffectiveRunoff=0
            SoilNitrogenNH4 NH4: Thickness=[100, 150, 200, 350, 700]; InitialValues=[0, 0, 0, 0, 0]; InitialValuesUnits=ppm; WaterTableConcentration=0; D0=0; DepthConstant=0; MaxDepthSoluteAccessible=0; RunoffEffectivenessAtMovingSolute=0; MaxEffectiveRunoff=0
            SoilNitrogenUrea Urea: Thickness=[100, 150, 200, 350, 700]; InitialValues=[0, 0, 0, 0, 0]; InitialValuesUnits=kg/ha; WaterTableConcentration=0; D0=0; DepthConstant=0; MaxDepthSoluteAccessible=0; RunoffEffectivenessAtMovingSolute=0; MaxEffectiveRunoff=0
            OutputLayers: Thickness=[200, 200, 200, 200, 200, 200, 200]
            LayerStructure: Thickness=[200, 200, 200, 200, 200, 200, 100]
    Experiment Manawatu_1997
      Factors
        Permutation
          Factor _Irr_
            CompositeFactor Control: Specifications=[IrrigationOperations]
              Operations IrrigationOperations
                1997-10-20  [Irrigation].Apply(4)
                1997-10-21  [Irrigation].Apply(4)
                1997-10-22  [Irrigation].Apply(4)
                1997-10-23  [Irrigation].Apply(4)
                1997-10-24  [Irrigation].Apply(4)
                1997-10-25  [Irrigation].Apply(4)
                1997-10-26  [Irrigation].Apply(4)
                1997-10-27  [Irrigation].Apply(4)
                1997-10-28  [Irrigation].Apply(4)
                1997-10-29  [Irrigation].Apply(4)
                1997-10-30  [Irrigation].Apply(4)
                1997-10-31  [Irrigation].Apply(4)
                1997-11-01  [Irrigation].Apply(4)
                1997-11-02  [Irrigation].Apply(4)
                1997-11-03  [Irrigation].Apply(4)
                1997-11-04  [Irrigation].Apply(4)
                1997-11-05  [Irrigation].Apply(4)
                1997-11-06  [Irrigation].Apply(4)
                1997-11-07  [Irrigation].Apply(4)
                1997-11-08  [Irrigation].Apply(4)
                1997-11-09  [Irrigation].Apply(4)
                1997-11-10  [Irrigation].Apply(4)
                1997-11-11  [Irrigation].Apply(4)
                1997-11-12  [Irrigation].Apply(4)
                1997-11-13  [Irrigation].Apply(4)
                1997-11-14  [Irrigation].Apply(4)
                1997-11-15  [Irrigation].Apply(4)
                1997-11-16  [Irrigation].Apply(4)
                1997-11-17  [Irrigation].Apply(4)
                1997-11-18  [Irrigation].Apply(4)
                1997-11-19  [Irrigation].Apply(4)
                1997-11-20  [Irrigation].Apply(4)
                1997-11-21  [Irrigation].Apply(4)
                1997-11-22  [Irrigation].Apply(4)
                1997-11-23  [Irrigation].Apply(4)
                1997-11-24  [Irrigation].Apply(4)
                1997-11-25  [Irrigation].Apply(4)
                1997-11-26  [Irrigation].Apply(4)
                1997-11-27  [Irrigation].Apply(4)
                1997-11-28  [Irrigation].Apply(4)
                1997-11-29  [Irrigation].Apply(4)
                1997-11-30  [Irrigation].Apply(4)
                1997-12-01  [Irrigation].Apply(4)
                1997-12-02  [Irrigation].Apply(4)
                1997-12-03  [Irrigation].Apply(4)
                1997-12-04  [Irrigation].Apply(4)
                1997-12-05  [Irrigation].Apply(4)
                1997-12-06  [Irrigation].Apply(4)
                1997-12-07  [Irrigation].Apply(4)
                1997-12-08  [Irrigation].Apply(4)
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            CompositeFactor Deficit: Specifications=[IrrigationOperations]
              Operations IrrigationOperations
                1997-10-20  [Irrigation].Apply(4)
                1997-10-21  [Irrigation].Apply(4)
                1997-10-22  [Irrigation].Apply(4)
                1997-10-23  [Irrigation].Apply(4)
                1997-10-24  [Irrigation].Apply(4)
                1997-10-25  [Irrigation].Apply(4)
                1997-10-26  [Irrigation].Apply(4)
                1997-10-27  [Irrigation].Apply(4)
                1997-10-28  [Irrigation].Apply(4)
                1997-10-29  [Irrigation].Apply(4)
                1997-10-30  [Irrigation].Apply(4)
                1997-10-31  [Irrigation].Apply(4)
                1997-11-01  [Irrigation].Apply(4)
                1997-11-02  [Irrigation].Apply(4)
                1997-11-03  [Irrigation].Apply(4)
                1997-11-04  [Irrigation].Apply(4)
                1997-11-05  [Irrigation].Apply(4)
                1997-11-06  [Irrigation].Apply(4)
                1997-11-07  [Irrigation].Apply(4)
                1997-11-08  [Irrigation].Apply(4)
                1997-11-09  [Irrigation].Apply(4)
                1997-11-10  [Irrigation].Apply(4)
                1997-11-11  [Irrigation].Apply(4)
                1997-11-12  [Irrigation].Apply(4)
                1997-11-13  [Irrigation].Apply(4)
                1997-11-14  [Irrigation].Apply(4)
                1997-11-15  [Irrigation].Apply(4)
                1997-11-16  [Irrigation].Apply(4)
                1997-11-17  [Irrigation].Apply(4)
                1997-11-18  [Irrigation].Apply(4)
                1997-11-19  [Irrigation].Apply(4)
                1997-11-20  [Irrigation].Apply(4)
                1997-11-21  [Irrigation].Apply(4)
                1997-11-22  [Irrigation].Apply(4)
                1997-11-23  [Irrigation].Apply(4)
                1997-11-24  [Irrigation].Apply(4)
                1997-11-25  [Irrigation].Apply(4)
                1997-11-26  [Irrigation].Apply(4)
                1997-11-27  [Irrigation].Apply(4)
                1997-11-28  [Irrigation].Apply(4)
                1997-11-29  [Irrigation].Apply(4)
                1997-11-30  [Irrigation].Apply(4)
                1997-12-01  [Irrigation].Apply(4)
                1997-12-02  [Irrigation].Apply(4)
                1997-12-03  [Irrigation].Apply(4)
                1997-12-04  [Irrigation].Apply(4)
                1997-12-05  [Irrigation].Apply(4)
                1997-12-06  [Irrigation].Apply(4)
                1997-12-07  [Irrigation].Apply(4)
                1997-12-08  [Irrigation].Apply(4)
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                1998-02-12  [Irrigation].Apply(1.6)
                1998-02-19  [Irrigation].Apply(10.6)
      Simulation Manawatu_97
        Memo Experiment description
          *	Based on Mpelasako et 2001.

          *	Lysimeter (1.2 m deep by 1 m wide) trial conducted during the 1997/98 season.

          *	Location: Massey University, Palmerston North (40°2'S, 175°4'E.

          *	Soil: Manawatu fine sandy loam.

          *	Plant material: 4-year-old 'Braeburn' on MM106 rootstock

          *	Full bloom assumed to be 20/10/1997 - date estimated to be similar to Mills et al (1997)
        Clock: Start=1997-07-01; End=1998-06-30
        Summary SummaryFile
        Weather: FileName=PalmerstonNorth-Turitea.met
        MicroClimate: a_interception=0; b_interception=1; c_interception=0; d_interception=0; SoilHeatFluxFraction=0.4; MinimumHeightDiffForNewLayer=0; NightInterceptionFraction=0.5; ReferenceHeight=2
        SoilArbitrator Soil Arbitrator
        RectangularZone Row: Length=100; Width=1.3; Slope=0; AspectAngle=0; Altitude=50
          Report ReportOneZone: EventNames=[Clock].DoReport
            VariableNames:
              [Clock].Today
              [PlantVariables].Script.FRadInt as f.rad.int
              [Soil].OutputLayers.SW
              sum([Soil].OutputLayers.SWmm) as psw
              [Weather].DaysSinceWinterSolstice
              [Weather].Rain
              [Irrigation].IrrigationApplied
              [Soil].SoilWater.Drainage
              [Weather].DaysSinceWinterSolstice
              [Row].STRUM.Leaf.Transpiration
              [Row].STRUM.Leaf.Height
              [Row].STRUM.Leaf.CoverGreen
              [Row].STRUM.Leaf.LAI
              [Row].STRUM.Leaf.WaterDemand
              [Row].STRUM.Leaf.Width
              [Row].STRUM.Leaf.RadiationIntercepted
              [Weather].Radn
              [Row].STRUM.Trunk.EnergyBalance.RadiationInterceptedByDead
              [Row].STRUM.Phenology.Age.Years
              [Row].STRUM.Phenology.Stage
              [Row].STRUM.Leaf.Wt
              [Row].STRUM.Fruit.Wt
              [Row].STRUM.Trunk.Wt
              [Row].STRUM.Root.Wt
              [Row].STRUM.Trunk.EnergyBalance.LAIDead
              [Row].STRUM.Leaf.Fw
              [AnnualReset].Script.AccumFW
              ([Row].STRUM.Leaf.Wt + [Row].STRUM.Fruit.Wt + [Row].STRUM.Trunk.Wt) as AboveGroundWt
              ([Soil].OutputLayers.SWmm[1]+[Soil].OutputLayers.SWmm[2]+[Soil].OutputLayers.SWmm[3]+[Soil].OutputLayers.SWmm[4]+[Soil].OutputLayers.SWmm[5]+[Soil].OutputLayers.SWmm[6]) as ProfileSWmm
              [Soil].SoilNitrogen.MineralN
          SurfaceOrganicMatter: InitialResidueName=wheat_stubble; InitialResidueType=wheat; InitialResidueMass=500; InitialStandingFraction=0; InitialCPR=0; InitialCNR=100
          Plant STRUM: IsEnding=false; DaysAfterEnding=0
          Fertiliser
          Irrigation
          Manager TreeInitialisation
            CultivarName = Apple
            SowingDate = 07/01/1997 00:00:00
            StartAge = 4
```csharp
using Models.Interfaces;
using Models.Soils;
using APSIM.Shared.Utilities;
using Models.PMF;
using Models.Core;
using System;
using Models.PMF.Organs;
using Models.PMF.Phen;
        
namespace Models
{
    [Serializable] 
    [System.Xml.Serialization.XmlInclude(typeof(Model))]
    public class Script : Model
    {
        [Link] private Plant STRUM;
        [Link] private Clock Clock;
        [Link] private Soil Soil;
        [Link] private Zone zone;
        [Link(Type = LinkType.Path, Path = "[STRUM].Root")]
        private Root root;
        [Link(Type = LinkType.Path, Path = "[STRUM].Phenology")]
        private Phenology phenology;
        [Link]
        private IPhysical soilPhysical;

        [Display(Type = DisplayType.CultivarName)]
        [Description("Plant Type")]
        public string CultivarName { get; set; }
        [Description("Initialisation Date")]
        public DateTime SowingDate { get; set; }
        [Description("Age of trees (in Years) at start of simulation)")]
        public int StartAge {get;set;}

       
        public double[] YKLModifiers { get; set; }
        public double[] XDepth { get; set; }
        private double Depth { get; set; }
        
        [EventSubscribe("DoManagement")]
        private void OnDoManagement(object sender, EventArgs e)
        {
            if (Clock.Today.Date == SowingDate)
            {
                STRUM.Sow(cultivar: CultivarName, population: 1, depth: 1200, rowSpacing: 3000);
                object StartAgeValue = StartAge;
                zone.Set("STRUM.Phenology.Age.Years",StartAgeValue);
            }
        }
    }
}
```
          Manager PlantVariables: same as NZ Experiments.Manawatu_1994.Manawatu_94.Row.PlantVariables
          Manager HarvestNPrune: same as PatternsTest.Row.HarvestNPrune
          Manager AnnualReset: same as NZ Experiments.Manawatu_1994.Manawatu_94.Row.AnnualReset
          Operations IrrigationOperations
          Soil Silt loam (Palmerston North, Massey University 1 No1365): SoilType=Silt loam; LocalName=Tokomaru; Site=Massey University 1; NearestTown=Palmerston North, Massey University 1; Region=Manawatu; Country=New Zealand; ApsoilNumber=1365; Latitude=-40.395; Longitude=175.609; LocationAccuracy=+/-50 m; YearOfSampling=2010
            DataSource=The database of New Zealand soils was compiled by AgResearch (www.agresearch.co.nz) and based on soil properties gathered, mainly from publications, in the course of conducting several simulation-based research projects but particularly from the Pastoral 21 Environment program which was funded by the New Zealand Ministry for Business, Innovation and Employment,  Dairy NZ, Fonterra and Meat & Wool NZ.
            Comments=Lowered BD value in layer 5 to make run in APSIM. Original values in rb column.The data is a combination of published or supplied measurements, pedotransfer functions, and expert opinion. See Cichota et al. (2013; Soil Research 51: 92-111, http://dx.doi.org/10.1071/SR12338) for a description of the pedotransfer functions. The soil carbon and fresh organic matter settings have been set as those broadly appropriate for permanent productive pastoral systems, see Cichota el al. (2012; Soil Research 50: 694-707, http://dx.doi.org/10.1071/SR12208). Users should take care to adapt these to local conditions before using the data in simulations. FOM values estimated to be 900 kg/ha of FOM in top 600mm of soil and another 100 kg/ha below. Soil C:N ratios taken from soil Silt loam (Marton NoXXXX).
            Physical
              Thickness  ParticleSizeClay  ParticleSizeSand  ParticleSizeSilt  Rocks  BD   AirDry  LL15  DUL   SAT  KS
              200        20                50                30                0      1.4  0.02    0.05  0.15  0.2  198.563
              200        20                50                30                0      1.4  0.05    0.05  0.15  0.2  231.474
              200        20                50                30                0      1.4  0.05    0.05  0.15  0.2  109.84
              400        10                70                20                40     1.6  0.02    0.02  0.15  0.2  1000
              200        0                 95                5                 0      1.6  0.03    0.03  0.15  0.2  500
              BD source: Field measured and checked for sensibility
              AirDry source: Estimated based on local knowledge
              LL15, DUL source: Laboratory measured
              SAT source: Calculated from measured, estimated or calculated BD
              SoilCrop STRUMSoil: LL=[0.05, 0.05, 0.05, 0.02, 0.03]; KL=[1, 1, 1, 1, 1]; XF=[1, 1, 1, 1, 1]
                LL source: Estimated based on local knowledge
            WaterBalance SoilWater: same as NZ Experiments.Manawatu_1994.Manawatu_94.Row.Silt loam (Palmerston North, Massey University 1 No1365).SoilWater
            Organic: same as NZ Experiments.Manawatu_1994.Manawatu_94.Row.Silt loam (Palmerston North, Massey University 1 No1365).Organic
            Chemical: same as NZ Experiments.Manawatu_1994.Manawatu_94.Row.Silt loam (Palmerston North, Massey University 1 No1365).Chemical
            Water: Thickness=[200, 200, 200, 400, 200]; InitialValues=[0.15, 0.15, 0.15, 0.15, 0.15]; InitialPAWmm=136; RelativeTo=LL15; FilledFromTop=false
            CERESSoilTemperature
            SoilNitrogen: fom_types=[default, manure, mucuna, lablab, shemp, stable]; fract_carb=[0.2, 0.3, 0.54, 0.57, 0.45, 0]; fract_cell=[0.7, 0.3, 0.37, 0.37, 0.47, 0.1]; fract_lign=[0.1, 0.4, 0.09, 0.06, 0.08, 0.9]; NPartitionApproach=0
            SoilNitrogenNO3 NO3: same as NZ Experiments.Manawatu_1994.Manawatu_94.Row.Silt loam (Palmerston North, Massey University 1 No1365).NO3
            SoilNitrogenNH4 NH4: same as NZ Experiments.Manawatu_1994.Manawatu_94.Row.Silt loam (Palmerston North, Massey University 1 No1365).NH4
            SoilNitrogenUrea Urea: same as NZ Experiments.Manawatu_1994.Manawatu_94.Row.Silt loam (Palmerston North, Massey University 1 No1365).Urea
            OutputLayers: Thickness=[200, 200, 200, 200, 200, 200, 200]
            LayerStructure: Thickness=[200, 200, 200, 200, 200, 200, 100]
          Manager ClimateControl: same as NZ Experiments.Manawatu_1994.Manawatu_94.Row.ClimateControl
  Folder USA Experiments
    Experiment Prosser_Apple_Deep
      Memo ExperimentDescription
        *	Based on Ebel e al (2001) - HORTSCIENCE, VOL. 36(7)

        *	Trial site: Roza irrigation district in the lower Yakima valley near Prosser, Wash. (lat. 45°N; long. 119°W and 380 m above sea level)

        *	Soil: Warden fine sandy loam (coarse, silty, mixed, mesic, Xerollic Camborthids) that was uniform down the profile and overlaid fractured basalt bedrock

        *	The permanent wilting and field capacity were 8% (80 mm·m–1) and 28% (280 mm·m–1 )by volume, respectively - total available soil water was 200 mm·m–1for the two orchards.

        *	The shallow soil (mean depth = 0.8 m) and deeper soil (average depth = 1.2 m) had 160 and 240 mm of total water available at field capacity (FC), respectively.

        *	Irrigation treatments: withholding irrigation all season or from 3, 5, 7, 9, 11, 13, 15 or 17 weeks before harvest.

        *	Total pan evaporation was 1005 mm and precipitation was negligible from May through Sept
      Memo Apples in this region
        *	Apples grown in Washington, e.g. Red/Golden Delicious, Gala, and Granny Smith, are in season from August to early November. You should sow apple trees in Washington in early spring.
      Factors
        Permutation
          Factor Soil
            CompositeFactor _
              Specifications:
                [Soil]
                [TreeInitialisation].Script.RootMaxDepth = 1200
                [SetupTreeRootZones].Script.RootZoneDepthToAdd =1200
              Soil: Latitude=0; Longitude=0
                LayerStructure: Thickness=[200, 200, 200, 200, 200, 200, 300, 300, 400, 800]
                Chemical: Thickness=[100, 200, 300, 300, 300, 300]; PH=[6.6, 6.2, 5.7, 5.5, 5.5, 5.5]; PHUnits=Water
                Water: Thickness=[300, 300, 300, 300, 300, 300, 1200]; InitialValues=[0.28, 0.28, 0.28, 0.28, 0.015, 0.015, 0.015]; InitialPAWmm=249; RelativeTo=LL15; FilledFromTop=false
                Physical
                  Thickness  BD  AirDry  LL15  DUL    SAT   KS
                  300        1   0.04    0.08  0.28   0.35  100
                  300        1   0.08    0.08  0.28   0.35  100
                  300        1   0.08    0.08  0.28   0.35  50
                  300        1   0.08    0.08  0.28   0.35  40
                  300        1   0.01    0.01  0.015  0.02  10
                  300        1   0.01    0.01  0.015  0.02  1
                  1200       1   0.01    0.01  0.015  0.02  0
                  SoilCrop STRUMSoil: LL=[0.04, 0.08, 0.08, 0.08, 0.01, 0.01, 0.01]; KL=[1, 1, 1, 1, 1, 1, 1]; XF=[1, 1, 1, 1, 1, 1, 1]
                  SoilCrop SlurpSoil: LL=[0.04, 0.08, 0.08, 0.08, 0.01, 0.01, 0.01]; KL=[0.11, 0.11, 0.11, 0.11, 0.11, 0.11, 0.11]; XF=[1, 1, 1, 1, 1, 1, 1]
                WaterBalance SoilWater: same as PatternsTest.Row.Soil.SoilWater
                SoilNitrogen: fom_types=[default, manure, mucuna, lablab, shemp, stable]; fract_carb=[0.2, 0.3, 0.54, 0.57, 0.45, 0]; fract_cell=[0.7, 0.3, 0.37, 0.37, 0.47, 0.1]; fract_lign=[0.1, 0.4, 0.09, 0.06, 0.08, 0.9]; NPartitionApproach=0
                Organic: same as PatternsTest.Row.Soil.Organic
                CERESSoilTemperature Temperature
                OutputLayers: Thickness=[200, 200, 200, 200, 200, 200, 200, 200]
                SoilNitrogenNO3 NO3: Thickness=[100, 200, 300, 300, 300, 300]; InitialValues=[217, 15, 1.667, 1.667, 0, 0]; InitialValuesUnits=ppm; WaterTableConcentration=0; D0=0; DepthConstant=0; MaxDepthSoluteAccessible=0; RunoffEffectivenessAtMovingSolute=0; MaxEffectiveRunoff=0
                SoilNitrogenNH4 NH4: same as PatternsTest.Row.Soil.NH4
                SoilNitrogenUrea Urea: same as PatternsTest.Row.Soil.Urea
            Memo Notes
              ### Notes about this factor

              _Rogerio Cichota_

              Eyre_23a3 is a Weathered Orthic Recent soil
              Darnley_4a2 is a Typic Argillic Pallic Soil
              Waikiwi_33a2 is a Typic Firm Brown Soil
              Windermere_16a1 is a Mellow Humic Organic Soil
              Patua_10a1 is a Typic Impeded Allophanic Soil

              ==========================================================================================

              **Summmaries, selected properties**

              | SoilName | RootingDepth | BD_TopLayer | BDMax_AnyLayer | PAW_Top100cm | PAW_Total | KSat_TopLayer | KSatMin_AnyLayer | Carbon_TopLayer | CN2Bare | CNReduction |
              |:-------- | ------------:| -----------:| --------------:| ------------:| ---------:| -------------:| ----------------:| ---------------:| -------:| -----------:|
              |          |         (mm) |     (kg/m³) |        (kg/m³) |         (mm) |      (mm) |        (mm/h) |           (mm/h) |             (%) |     (-) |         (-) |
              | Eyre_23a3 | 710 | 0.841 | 0.841 | 53.5 | 79.5 | 1440 | 1440 | 2.97 | 99.0 | 39.0 |
              | Darnley_4a2 | 700 | 1.254 | 1.388 | 102.0 | 160.0 | 1440 | 1.2 | 3.90 | 89.0 | 20.0 |
              | Waikiwi_33a2 | 2000 | 1.189 | 1.441 | 156.5 | 295.5 | 1440 | 192 | 4.78 | 88.0 | 20.0 |
              | Windermere_16a1 | 2000 | 0.300 | 1.476 | 242.3 | 391.3 | 960 | 192 | 28.65 | 90.0 | 16.0 |
              | Patua_10a1 | 800 | 0.801 | 0.801 | 127.5 | 207.5 | 1920 | 960 | 10.00 | 92.0 | 18.0 |
              | Templeton_1a2 | 2000 | 1.332 | 1.693 | 171.3 | 328.3 | 1440 | 24 | 3.72 | 88.0 | 20.0 |
              | Flaxton_4a1 | 2000 | 1.186 | 1.414 | 171.2 | 405.2 | 1440 | 24 | 5.43 | 93.0 | 16.0 |
          Factor Irr: Specification=[IrrigationOperations]
            Operations 0
            Operations 1
              1986-06-01  [Irrigation].Apply(70);
            Operations 2
              1986-06-01  [Irrigation].Apply(70);
              1986-06-15  [Irrigation].Apply(70);
            Operations 3
              1986-06-01  [Irrigation].Apply(70);
              1986-06-15  [Irrigation].Apply(70);
              1986-06-29  [Irrigation].Apply(70);
            Operations 4
              1986-06-01  [Irrigation].Apply(70);
              1986-06-15  [Irrigation].Apply(70);
              1986-06-29  [Irrigation].Apply(70);
              1986-07-13  [Irrigation].Apply(70);
            Operations 5
              1986-06-01  [Irrigation].Apply(70);
              1986-06-15  [Irrigation].Apply(70);
              1986-06-29  [Irrigation].Apply(70);
              1986-07-13  [Irrigation].Apply(70);
              1986-07-27  [Irrigation].Apply(70);
            Operations 6
              1986-06-01  [Irrigation].Apply(70);
              1986-06-15  [Irrigation].Apply(70);
              1986-06-29  [Irrigation].Apply(70);
              1986-07-13  [Irrigation].Apply(70);
              1986-07-27  [Irrigation].Apply(70);
              1986-08-10  [Irrigation].Apply(70);
            Operations 7
              1986-06-01  [Irrigation].Apply(70);
              1986-06-15  [Irrigation].Apply(70);
              1986-06-29  [Irrigation].Apply(70);
              1986-07-13  [Irrigation].Apply(70);
              1986-07-27  [Irrigation].Apply(70);
              1986-08-10  [Irrigation].Apply(70);
              1986-08-24  [Irrigation].Apply(70);
            Operations 8: same as NZ Experiments.Manawatu_1994.Manawatu_94.Row.IrrigationOperations
      Simulation DeepSoil
        Clock: Start=1986-05-01; End=1987-10-28
        Summary SummaryFile
        Weather: FileName=Pendleton.met
        MicroClimate: a_interception=0; b_interception=1; c_interception=0; d_interception=0; SoilHeatFluxFraction=0.4; MinimumHeightDiffForNewLayer=0; NightInterceptionFraction=0.5; ReferenceHeight=2
        SoilArbitrator Soil Arbitrator
        RectangularZone Row: Length=100; Width=1.3; Slope=0; AspectAngle=0; Altitude=50
          Report: EventNames=[Clock].DoReport
          Soil: Latitude=0; Longitude=0
            LayerStructure: Thickness=[200, 200, 200, 200, 200, 200, 100]
            Chemical: Thickness=[100, 200, 300, 300, 300]; PH=[6.6, 6.2, 5.7, 5.5, 5.5]; PHUnits=Water
            Water: Thickness=[300, 300, 300, 300, 100]; InitialValues=[0.497, 0.356, 0.145, 0.092, 0.092]; InitialPAWmm=98.1; RelativeTo=LL15; FilledFromTop=true
            Physical
              Thickness  ParticleSizeClay  ParticleSizeSand  ParticleSizeSilt  BD     AirDry  LL15   DUL    SAT    KS
              300        17.5              35                47.5              0.801  0.116   0.232  0.497  0.607  100
              300        22.5              35                42.5              0.765  0.191   0.294  0.447  0.621  100
              300        5                 85                10                0.575  0.145   0.145  0.274  0.45   50
              300        5                 85                10                0.369  0.092   0.092  0.172  0.266  40
              100        5                 85                10                0.369  0.092   0.092  0.172  0.266  0.001
              SoilCrop STRUMSoil: LL=[0.2, 0.2, 0.2, 0.2, 0]; KL=[0.1, 0.1, 0.1, 0.1, 0.1]; XF=[1, 1, 1, 1, 0]
              SoilCrop SlurpSoil: LL=[0.2, 0.2, 0.2, 0.2, 0]; KL=[0.11, 0.11, 0.11, 0.11, 0]; XF=[1, 1, 1, 1, 0]
            WaterBalance SoilWater: SummerDate=1-Nov; SummerU=9; SummerCona=4.4; WinterDate=1-Apr; WinterU=9; WinterCona=4.4; DiffusConst=88; DiffusSlope=35.4; Salb=0.3; CN2Bare=68; CNRed=20; CNCov=0.8; DischargeWidth=0; CatchmentArea=0; PSIDul=-100
              Thickness  SWCON  KLAT
              300        0.55   0
              300        0.55   0
              300        0.55   0
              300        0.55   0
              100        0.1    0
            SoilNitrogen: fom_types=[default, manure, mucuna, lablab, shemp, stable]; fract_carb=[0.2, 0.3, 0.54, 0.57, 0.45, 0]; fract_cell=[0.7, 0.3, 0.37, 0.37, 0.47, 0.1]; fract_lign=[0.1, 0.4, 0.09, 0.06, 0.08, 0.9]; NPartitionApproach=0
            Organic: FOMCNRatio=30; CarbonUnits=Total
              Thickness  Carbon  SoilCNRatio  FBiom  FInert  FOM
              100        1.82    11.5         0.025  0.3     1243.931
              200        1.47    11.5         0.025  0.4     833.832
              300        1.2     11.5         0.015  0.75    457.617
              300        1.03    11.5         0.01   0.9     251.145
              300        0.47    11.5         0.01   0.96    137.831
              100        0.47    11.5         0.01   0.96    75.644
            CERESSoilTemperature Temperature
            OutputLayers: Thickness=[200, 200, 200, 200, 200, 200, 200]
            SoilNitrogenNO3 NO3: Thickness=[100, 200, 300, 300, 300]; InitialValues=[117, 15, 1.667, 1.667, 0]; InitialValuesUnits=ppm; WaterTableConcentration=0; D0=0; DepthConstant=0; MaxDepthSoluteAccessible=0; RunoffEffectivenessAtMovingSolute=0; MaxEffectiveRunoff=0
            SoilNitrogenNH4 NH4: Thickness=[100, 200, 300, 300, 300]; InitialValues=[0, 0, 0, 0, 0]; InitialValuesUnits=ppm; WaterTableConcentration=0; D0=0; DepthConstant=0; MaxDepthSoluteAccessible=0; RunoffEffectivenessAtMovingSolute=0; MaxEffectiveRunoff=0
            SoilNitrogenUrea Urea: Thickness=[100, 200, 300, 300, 300]; InitialValues=[0, 0, 0, 0, 0]; InitialValuesUnits=kg/ha; WaterTableConcentration=0; D0=0; DepthConstant=0; MaxDepthSoluteAccessible=0; RunoffEffectivenessAtMovingSolute=0; MaxEffectiveRunoff=0
          SurfaceOrganicMatter: InitialResidueName=wheat_stubble; InitialResidueType=wheat; InitialResidueMass=500; InitialStandingFraction=0; InitialCPR=0; InitialCNR=100
          Plant STRUM: IsEnding=false; DaysAfterEnding=0
          Fertiliser
          Irrigation
          Manager TreeInitialisation
            RootMaxDepth = 1200
            CultivarName = AppleWS
            SowingDate = 05/01/1986 00:00:00
            StartAge = 6
            SurfaceKL = 0.13
            KLReductionFactor = 0.003
            KLReductionDepth = 150
```csharp
using Models.Interfaces;
using Models.Soils;
using APSIM.Shared.Utilities;
using Models.PMF;
using Models.Core;
using System;
using Models.PMF.Organs;
using Models.PMF.Phen;
        
namespace Models
{
    [Serializable] 
    [System.Xml.Serialization.XmlInclude(typeof(Model))]
    public class Script : Model
    {
        [Link] private Plant STRUM;
        [Link] private Clock Clock;
        [Link] private Soil Soil;
        [Link] private Zone zone;
        [Link] private ISummary summary;
        [Link(Type = LinkType.Path, Path = "[STRUM].Root")]
        private Root root;
        [Link(Type = LinkType.Path, Path = "[STRUM].Phenology")]
        private Phenology phenology;
        [Link]
        private IPhysical soilPhysical;

        [Display(Type = DisplayType.CultivarName)]
        [Description("Plant Type")]
        public string CultivarName { get; set; }
        [Description("Initialisation Date")]
        public DateTime SowingDate { get; set; }
        [Description("Age of trees (in Years) at start of simulation)")]
        public int StartAge {get;set;}

        [Description("Kl in the shallowest layer")]
        public double SurfaceKL { get; set; }
        [Description("Factor to change Kl modifier with Depth")]
        public double KLReductionFactor { get; set; }
        [Description("Depth that KL starts to decline")]
        public double KLReductionDepth { get; set; }
        
        [Description("Maximum Root Depth (mm)")]
        public double RootMaxDepth {get;set;}
        
        public double[] YKLModifiers { get; set; }
        public double[] XDepth { get; set; }
        private double Depth { get; set; }
        
        [EventSubscribe("DoManagement")]
        private void OnDoManagement(object sender, EventArgs e)
        {
            if (Clock.Today.Date == SowingDate)
            {
                zone.Set("STRUM.Root.MaximumRootDepth.FixedValue", RootMaxDepth);
                double maxRootDepth = (double)zone.Get("STRUM.Root.MaximumRootDepth.FixedValue");
                double initialRootDepth = Math.Min(1,StartAge/6) * maxRootDepth;
                STRUM.Sow(cultivar: CultivarName, population: 1, depth: initialRootDepth, rowSpacing: 3700);
                object StartAgeValue = StartAge;
                zone.Set("STRUM.Phenology.Age.Years",StartAgeValue);
                YKLModifiers = new double[soilPhysical.Thickness.Length];
                XDepth = new double[soilPhysical.Thickness.Length];
                Depth = 0;
                for (int layer = 0; layer < soilPhysical.Thickness.Length; layer++)
                {
                    Depth += soilPhysical.Thickness[layer] / 2;  //Add half of the thickness of the current layer so depth is the mid depth of that layer
                    if (Depth <= KLReductionDepth)
                    {
                        YKLModifiers[layer] = SurfaceKL;
                        XDepth[layer] = Depth;
                    }
                    else
                    {
                        double KLMod = SurfaceKL * Math.Exp(-KLReductionFactor * (Depth - KLReductionDepth));
                        YKLModifiers[layer] = KLMod;
                        XDepth[layer] = Depth;
                    }
                    summary.WriteMessage(this, " Depth: " + Depth.ToString(), MessageType.Diagnostic);
                    summary.WriteMessage(this, " KLMod: " + YKLModifiers[layer].ToString(), MessageType.Diagnostic);
                    Depth += soilPhysical.Thickness[layer] / 2;  //Add the other half of the current layer so depth is the top of the next layer
                }
                object KLMods = YKLModifiers;
                //zone.Set("STRUM.Root.KLModifier.XYPairs.Y", KLMods);
                object Depths = XDepth;
                //zone.Set("STRUM.Root.KLModifier.XYPairs.X", Depths);
            }
        }
    }
}
```
          Manager SetupTreeRootZones
            RootZoneDepthToAdd = 1200
            UseExtraZone = True
```csharp
using Models.Soils;
using Models.Functions;
using APSIM.Shared.Utilities;
using System.Xml.Serialization;
using Models;
using Models.PMF;
using System.Text;
using System.Collections.Generic;
using Models.Core;
using System;
using Models.PMF.Organs;

namespace Models
{
    [Serializable] 
    public class Script : Model
    {
        [Link] private Plant STRUM;
        [Link] private Clock Clock;
        [Link] private Zone zone;
        [Link(Type = LinkType.Path, Path = "[STRUM].Root")]
        private Root root;

        [Description("Use extra root zone")]
        public bool UseExtraZone { get; set; }
        
        [Description("RootZoneDepthToAdd (mm)")]
        public double RootZoneDepthToAdd {get;set;}

        
        [EventSubscribe("StartOfSimulation")]
        private void OnSimulationCommencing(object sender, EventArgs e)
        {
            if (UseExtraZone)
            {
            root.ZoneNamesToGrowRootsIn.Add("Alley");
            root.ZoneRootDepths.Add(RootZoneDepthToAdd);
NutrientPoolFunctions InitialDM = new NutrientPoolFunctions();
Constant InitStruct = new Constant();
InitStruct.FixedValue = 10;
InitialDM.Structural = InitStruct;
Constant InitMetab = new Constant();
InitMetab.FixedValue = 0;
InitialDM.Metabolic = InitMetab;
Constant InitStor = new Constant();
InitStor.FixedValue = 0;
InitialDM.Storage = InitStor;
            root.ZoneInitialDM.Add(InitialDM);

            }
        }
    }
}
```
          Manager HarvestNPrune
            HarvestDate = 15-Sep
            PruneDate = 1-Nov
            script: same as in PatternsTest.Row.HarvestNPrune
          Manager AnnualReset
            ResetDate = 1-Jan
            script: same as in NZ Experiments.Manawatu_1994.Manawatu_94.Row.AnnualReset
          Operations IrrigationOperations: same as NZ Experiments.Manawatu_1994.Manawatu_94.Row.IrrigationOperations
          Manager PlantVariables
```csharp
using Models.Climate;
using System;
using Models.Core;
using Models.PMF;
using System.Collections.Generic;
using Models.Soils;
using APSIM.Shared.Utilities;
using Models.Zones;
using Models.PMF.Organs;

namespace Models
{
    [Serializable]
    public class Script : Model
    {
        [Link] private Weather weather;
        private RectangularZone AlleyZone {get; set; }
        private RectangularZone RowZone {get; set;}
        private RectangularZone ThisZone {get; set;}
        private double AreaWidth {get; set;}
        public double TotRadn {get; set;}
        public double FRadInt {get; set;}
        public double ET {get; set;}
        public double ES {get; set;}
        public double PET {get; set;}
        public double LAI {get; set;}
        public double Height {get; set;}
        public double RootDepth {get; set;}
        public double PlantWidth {get; set;}
        public double InterceptedRadiation {get; set;}
        public double TreeRadInt {get; set;}


        [EventSubscribe("StartOfSimulation")]
        private void DoStartOfSimulation(object sender, EventArgs e)
        {
               
               ThisZone = this.Parent.Parent as RectangularZone;
               RowZone = this.Parent.Parent.Parent.FindInScope("Row") as RectangularZone;
               AlleyZone = (RectangularZone)this.Parent.Parent.Parent.FindInScope("Alley") as RectangularZone;
               AreaWidth = AlleyZone.Width + RowZone.Width;
               PlantWidth = 0;
        }
        
        [EventSubscribe("DoReportCalculations")]
        private void OnDoReportCalculations(object sender, EventArgs e)
        {

            if (ThisZone.Name == "Row")
                {
                TreeRadInt = (double)RowZone.Get("STRUM.Leaf.RadiationIntercepted") + (double)RowZone.Get("STRUM.Trunk.EnergyBalance.RadiationInterceptedByDead");
                FRadInt = (TreeRadInt * RowZone.Width)/(weather.Radn * AreaWidth);
                InterceptedRadiation = (double)RowZone.Get("STRUM.Leaf.RadiationIntercepted");
                ET = (double)RowZone.Get("STRUM.Leaf.Transpiration") * RowZone.Width/AreaWidth;
                LAI = (double)RowZone.Get("STRUM.Leaf.LAI");
                Height = (double)RowZone.Get("STRUM.Leaf.Height");
                RootDepth = (double)RowZone.Get("STRUM.Root.Depth");
                PlantWidth = (double)RowZone.Get("STRUM.Leaf.Width");
                }
            else
                {
                FRadInt = ((double)AlleyZone.Get("Slurp.Leaf.RadiationIntercepted") * AlleyZone.Width)/(weather.Radn * AreaWidth);
                InterceptedRadiation = (double)AlleyZone.Get("Slurp.Leaf.RadiationIntercepted");
                ET = (double)AlleyZone.Get("Slurp.Leaf.Transpiration") * ThisZone.Width/AreaWidth;
                LAI = (double)AlleyZone.Get("Slurp.Leaf.LAI");
                Height = (double)AlleyZone.Get("Slurp.Leaf.Height");
                RootDepth = (double)AlleyZone.Get("Slurp.Root.Depth");
                }
			TotRadn = weather.Radn * AreaWidth; 
            ES = (double)ThisZone.Get("Soil.SoilWater.Es") * ThisZone.Width/AreaWidth;
            double PETWidth = Math.Min(Math.Max(PlantWidth,ThisZone.Width),AreaWidth);
            PET = (double)ThisZone.Get("Soil.SoilWater.Eo") * PETWidth/AreaWidth;
        }
    }
}
```
          Operations NitrogenOperations
            1986-05-31  [Fertiliser].Apply(10, [Fertiliser].Types.UreaN, 10);
            1986-06-14  [Fertiliser].Apply(10, [Fertiliser].Types.UreaN, 10);
            1986-06-28  [Fertiliser].Apply(10, [Fertiliser].Types.UreaN, 10);
            1986-07-12  [Fertiliser].Apply(10, [Fertiliser].Types.UreaN, 10);
            1986-07-26  [Fertiliser].Apply(10, [Fertiliser].Types.UreaN, 10);
            1986-08-09  [Fertiliser].Apply(10, [Fertiliser].Types.UreaN, 10);
            1986-08-23  [Fertiliser].Apply(10, [Fertiliser].Types.UreaN, 10);
            1986-09-06  [Fertiliser].Apply(10, [Fertiliser].Types.UreaN, 10);
        RectangularZone Alley: Length=100; Width=2.2; Slope=0; AspectAngle=0; Altitude=50
          Report: EventNames=[Clock].DoReport
          SurfaceOrganicMatter: InitialResidueName=wheat_stubble; InitialResidueType=wheat; InitialResidueMass=500; InitialStandingFraction=0; InitialCPR=0; InitialCNR=100
          Plant Slurp
          Fertiliser
          Irrigation
          Manager PastureInitialisation
            CultivarName = StaticCrop
            InitialRootDepth = 2000
            SowingDate = 05/01/1986 00:00:00
            RootDepth = 2000
            RFV = 10
            KLReductionFactor = -0.001
            KLReductionDepth = 150
            MaxG = 0.004
            R50 = 150
            script: same as in PatternsTest.Alley.PastureInitialisation
          Manager SetPastureVariables: same as PatternsTest.Alley.SetPastureVariables
          Manager SetupPastureRootZones: same as PatternsTest.Alley.SetupPastureRootZones
          Manager AnnualReset: same as USA Experiments.Prosser_Apple_Deep.DeepSoil.Row.AnnualReset
          Manager PlantVariables: same as USA Experiments.Prosser_Apple_Deep.DeepSoil.Row.PlantVariables
          Operations NitrogenOperations: same as NZ Experiments.Manawatu_1994.Manawatu_94.Row.NitrogenOperations
          Soil: Latitude=0; Longitude=0
            LayerStructure: Thickness=[200, 200, 200, 200, 200, 200, 100]
            Chemical: Thickness=[100, 200, 300, 300, 300]; PH=[6.6, 6.2, 5.7, 5.5, 5.5]; PHUnits=Water
            Water: Thickness=[300, 300, 300, 300, 100]; InitialValues=[0.497, 0.356, 0.145, 0.092, 0.092]; InitialPAWmm=98.1; RelativeTo=LL15; FilledFromTop=true
            Physical
              Thickness  ParticleSizeClay  ParticleSizeSand  ParticleSizeSilt  BD     AirDry  LL15   DUL    SAT    KS
              300        17.5              35                47.5              0.801  0.116   0.232  0.497  0.607  100
              300        22.5              35                42.5              0.765  0.191   0.294  0.447  0.621  100
              300        5                 85                10                0.575  0.145   0.145  0.274  0.45   50
              300        5                 85                10                0.369  0.092   0.092  0.172  0.266  40
              100        5                 85                10                0.369  0.092   0.092  0.172  0.266  0.001
              SoilCrop STRUMSoil: LL=[0.2, 0.2, 0.2, 0.2, 0]; KL=[1, 1, 1, 1, 0]; XF=[1, 1, 1, 1, 0]
              SoilCrop SlurpSoil: LL=[0.2, 0.2, 0.2, 0.2, 0]; KL=[0.11, 0.11, 0.11, 0.11, 0]; XF=[1, 1, 1, 1, 0]
            WaterBalance SoilWater: same as USA Experiments.Prosser_Apple_Deep.DeepSoil.Row.Soil.SoilWater
            SoilNitrogen: fom_types=[default, manure, mucuna, lablab, shemp, stable]; fract_carb=[0.2, 0.3, 0.54, 0.57, 0.45, 0]; fract_cell=[0.7, 0.3, 0.37, 0.37, 0.47, 0.1]; fract_lign=[0.1, 0.4, 0.09, 0.06, 0.08, 0.9]; NPartitionApproach=0
            Organic: same as USA Experiments.Prosser_Apple_Deep.DeepSoil.Row.Soil.Organic
            CERESSoilTemperature Temperature
            OutputLayers: Thickness=[200, 200, 200, 200, 200, 200, 200]
            Solute NO3: Thickness=[1800]; InitialValues=[3]; InitialValuesUnits=ppm; WaterTableConcentration=0; D0=0; DepthConstant=0; MaxDepthSoluteAccessible=0; RunoffEffectivenessAtMovingSolute=0; MaxEffectiveRunoff=0
              SoilNitrogenNO3 NO3: same as USA Experiments.Prosser_Apple_Deep.DeepSoil.Row.Soil.NO3
            Solute NH4: Thickness=[1800]; InitialValues=[1]; InitialValuesUnits=ppm; WaterTableConcentration=0; D0=0; DepthConstant=0; MaxDepthSoluteAccessible=0; RunoffEffectivenessAtMovingSolute=0; MaxEffectiveRunoff=0
            Solute Urea: Thickness=[1800]; InitialValues=[0]; InitialValuesUnits=ppm; WaterTableConcentration=0; D0=0; DepthConstant=0; MaxDepthSoluteAccessible=0; RunoffEffectivenessAtMovingSolute=0; MaxEffectiveRunoff=0
    Experiment Prosser_Apple_Shallow
      Memo ExperimentDescription: same as USA Experiments.Prosser_Apple_Deep.ExperimentDescription
      Factors
        Permutation
          Factor Soil
            CompositeFactor _
              Specifications:
                [Soil]
                [TreeInitialisation].Script.RootMaxDepth = 800
                [SetupTreeRootZones].Script.RootZoneDepthToAdd =800
              Soil: Latitude=0; Longitude=0
                LayerStructure: Thickness=[200, 200, 200, 200, 200, 200, 300, 300, 400, 800]
                Chemical: Thickness=[100, 200, 300, 300, 300, 300]; PH=[6.6, 6.2, 5.7, 5.5, 5.5, 5.5]; PHUnits=Water
                Water: Thickness=[300, 300, 200, 300, 300, 300, 1200]; InitialValues=[0.28, 0.28, 0.28, 0.015, 0.015, 0.015, 0.015]; InitialPAWmm=170.5; RelativeTo=LL15; FilledFromTop=false
                Physical
                  Thickness  BD  AirDry  LL15  DUL    SAT    KS
                  300        1   0.04    0.08  0.28   0.35   100
                  300        1   0.08    0.08  0.28   0.35   100
                  200        1   0.08    0.08  0.28   0.35   50
                  300        1   0.01    0.01  0.015  0.02   40
                  300        1   0.01    0.01  0.015  0.02   10
                  300        1   0.01    0.01  0.015  0.022  1
                  1200       1   0.01    0.01  0.015  0.02   0
                  SoilCrop STRUMSoil: LL=[0.04, 0.08, 0.08, 0.08, 0.01, 0.01, 0.01]; KL=[1, 1, 1, 1, 0, 0, 0]; XF=[1, 1, 1, 1, 1, 1, 1]
                  SoilCrop SlurpSoil: LL=[0.04, 0.08, 0.08, 0.08, 0, 0, 0]; KL=[0.11, 0.11, 0.11, 0.11, 0.11, 0.11, 0.11]; XF=[1, 1, 1, 1, 1, 1, 1]
                WaterBalance SoilWater: same as PatternsTest.Row.Soil.SoilWater
                SoilNitrogen: fom_types=[default, manure, mucuna, lablab, shemp, stable]; fract_carb=[0.2, 0.3, 0.54, 0.57, 0.45, 0]; fract_cell=[0.7, 0.3, 0.37, 0.37, 0.47, 0.1]; fract_lign=[0.1, 0.4, 0.09, 0.06, 0.08, 0.9]; NPartitionApproach=0
                Organic: same as PatternsTest.Row.Soil.Organic
                CERESSoilTemperature Temperature
                OutputLayers: Thickness=[200, 200, 200, 200, 200, 200, 200, 200]
                SoilNitrogenNO3 NO3: same as USA Experiments.Prosser_Apple_Deep.Factors.Permutation.Soil._.Soil.NO3
                SoilNitrogenNH4 NH4: same as PatternsTest.Row.Soil.NH4
                SoilNitrogenUrea Urea: same as PatternsTest.Row.Soil.Urea
            Memo Notes: same as USA Experiments.Prosser_Apple_Deep.Factors.Permutation.Soil.Notes
          Factor Irr: same as USA Experiments.Prosser_Apple_Deep.Factors.Permutation.Irr
      Simulation ShallowSoil
        Clock: Start=1986-05-01; End=1987-10-28
        Summary SummaryFile
        Weather: FileName=Pendleton.met
        MicroClimate: a_interception=0; b_interception=1; c_interception=0; d_interception=0; SoilHeatFluxFraction=0.4; MinimumHeightDiffForNewLayer=0; NightInterceptionFraction=0.5; ReferenceHeight=2
        SoilArbitrator Soil Arbitrator
        RectangularZone Row: Length=100; Width=1.3; Slope=0; AspectAngle=0; Altitude=50
          Report: EventNames=[Clock].DoReport
          Report Drainage (disabled): EventNames=[Clock].DoReport
            VariableNames:
              [Clock].Today
              sum of [Soil].SoilWater.Flux[6] from 2008-10-01 to 2011-03-08 as drainage
              [Soil].Water.MM[9] + [Soil].Water.MM[10] as SW_belowRoots
          Soil: Latitude=0; Longitude=0
            LayerStructure: Thickness=[200, 200, 200, 200, 200, 200, 100]
            Chemical: Thickness=[100, 200, 300, 300, 300]; PH=[6.6, 6.2, 5.7, 5.5, 5.5]; PHUnits=Water
            Water: Thickness=[300, 300, 300, 300, 100]; InitialValues=[0.4, 0.39, 0.43, 0.46, 0.001]; InitialPAWmm=264.1; RelativeTo=LL15; FilledFromTop=false
            Physical
              Thickness  BD   AirDry  LL15  DUL    SAT    KS
              300        1    0.2     0.2   0.4    0.5    100
              300        1    0.2     0.2   0.39   0.5    100
              300        1    0.2     0.2   0.43   0.5    50
              300        1    0.2     0.2   0.46   0.5    40
              100        2.5  0       0     0.001  0.001  0.001
              SoilCrop STRUMSoil: LL=[0.2, 0.2, 0.2, 0.2, 0]; KL=[0.1, 0.1, 0.1, 0.1, 0.1]; XF=[1, 1, 1, 1, 0]
              SoilCrop SlurpSoil: LL=[0.2, 0.2, 0.2, 0.2, 0]; KL=[0.11, 0.11, 0.11, 0.11, 0]; XF=[1, 1, 1, 1, 0]
            WaterBalance SoilWater: same as USA Experiments.Prosser_Apple_Deep.DeepSoil.Row.Soil.SoilWater
            SoilNitrogen: fom_types=[default, manure, mucuna, lablab, shemp, stable]; fract_carb=[0.2, 0.3, 0.54, 0.57, 0.45, 0]; fract_cell=[0.7, 0.3, 0.37, 0.37, 0.47, 0.1]; fract_lign=[0.1, 0.4, 0.09, 0.06, 0.08, 0.9]; NPartitionApproach=0
            Organic: same as USA Experiments.Prosser_Apple_Deep.DeepSoil.Row.Soil.Organic
            CERESSoilTemperature Temperature
            OutputLayers: Thickness=[200, 200, 200, 200, 200, 200, 200]
            SoilNitrogenNO3 NO3: Thickness=[100, 200, 300, 300, 300]; InitialValues=[217, 15, 1.667, 1.667, 0]; InitialValuesUnits=ppm; WaterTableConcentration=0; D0=0; DepthConstant=0; MaxDepthSoluteAccessible=0; RunoffEffectivenessAtMovingSolute=0; MaxEffectiveRunoff=0
            SoilNitrogenNH4 NH4: same as USA Experiments.Prosser_Apple_Deep.DeepSoil.Row.Soil.NH4
            SoilNitrogenUrea Urea: same as USA Experiments.Prosser_Apple_Deep.DeepSoil.Row.Soil.Urea
          SurfaceOrganicMatter: InitialResidueName=wheat_stubble; InitialResidueType=wheat; InitialResidueMass=500; InitialStandingFraction=0; InitialCPR=0; InitialCNR=100
          Plant STRUM: IsEnding=false; DaysAfterEnding=0
          Fertiliser
          Irrigation
          Manager TreeInitialisation
            CultivarName = AppleWS
            SowingDate = 05/01/1986 00:00:00
            StartAge = 6
            SurfaceKL = 0.13
            KLReductionFactor = 0.003
            KLReductionDepth = 150
            RootMaxDepth = 1200
```csharp
using Models.Interfaces;
using Models.Soils;
using APSIM.Shared.Utilities;
using Models.PMF;
using Models.Core;
using System;
using Models.PMF.Organs;
using Models.PMF.Phen;
        
namespace Models
{
    [Serializable] 
    [System.Xml.Serialization.XmlInclude(typeof(Model))]
    public class Script : Model
    {
        [Link] private Plant STRUM;
        [Link] private Clock Clock;
        [Link] private Soil Soil;
        [Link] private Zone zone;
        [Link] private ISummary summary;
        [Link(Type = LinkType.Path, Path = "[STRUM].Root")]
        private Root root;
        [Link(Type = LinkType.Path, Path = "[STRUM].Phenology")]
        private Phenology phenology;
        [Link]
        private IPhysical soilPhysical;

        [Display(Type = DisplayType.CultivarName)]
        [Description("Plant Type")]
        public string CultivarName { get; set; }
        [Description("Initialisation Date")]
        public DateTime SowingDate { get; set; }
        [Description("Age of trees (in Years) at start of simulation)")]
        public int StartAge {get;set;}

        [Description("Kl in the shallowest layer")]
        public double SurfaceKL { get; set; }
        [Description("Factor to change Kl modifier with Depth")]
        public double KLReductionFactor { get; set; }
        [Description("Depth that KL starts to decline")]
        public double KLReductionDepth { get; set; }
        
        [Description("Maximum Root Depth (mm)")]
        public double RootMaxDepth {get;set;}
        
        public double[] YKLModifiers { get; set; }
        public double[] XDepth { get; set; }
        private double Depth { get; set; }
        
        [EventSubscribe("DoManagement")]
        private void OnDoManagement(object sender, EventArgs e)
        {
            if (Clock.Today.Date == SowingDate)
            {
                zone.Set("STRUM.Root.MaximumRootDepth.FixedValue", RootMaxDepth);
                double maxRootDepth = (double)zone.Get("STRUM.Root.MaximumRootDepth.FixedValue");
                double initialRootDepth = Math.Min(1,StartAge/6) * maxRootDepth;
                STRUM.Sow(cultivar: CultivarName, population: 1, depth: initialRootDepth, rowSpacing: 3000);
                object StartAgeValue = StartAge;
                zone.Set("STRUM.Phenology.Age.Years",StartAgeValue);
                YKLModifiers = new double[soilPhysical.Thickness.Length];
                XDepth = new double[soilPhysical.Thickness.Length];
                Depth = 0;
                for (int layer = 0; layer < soilPhysical.Thickness.Length; layer++)
                {
                    Depth += soilPhysical.Thickness[layer] / 2;  //Add half of the thickness of the current layer so depth is the mid depth of that layer
                    if (Depth <= KLReductionDepth)
                    {
                        YKLModifiers[layer] = SurfaceKL;
                        XDepth[layer] = Depth;
                    }
                    else
                    {
                        double KLMod = SurfaceKL * Math.Exp(-KLReductionFactor * (Depth - KLReductionDepth));
                        YKLModifiers[layer] = KLMod;
                        XDepth[layer] = Depth;
                    }
                    summary.WriteMessage(this, " Depth: " + Depth.ToString(), MessageType.Diagnostic);
                    summary.WriteMessage(this, " KLMod: " + YKLModifiers[layer].ToString(), MessageType.Diagnostic);
                    Depth += soilPhysical.Thickness[layer] / 2;  //Add the other half of the current layer so depth is the top of the next layer
                }
                object KLMods = YKLModifiers;
                //zone.Set("STRUM.Root.KLModifier.XYPairs.Y", KLMods);
                object Depths = XDepth;
                //zone.Set("STRUM.Root.KLModifier.XYPairs.X", Depths);
            }
        }
    }
}
```
          Manager SetupTreeRootZones: same as USA Experiments.Prosser_Apple_Deep.DeepSoil.Row.SetupTreeRootZones
          Manager WaterTable (disabled): same as Apple_Dwarf.Row.WaterTable
          Manager HarvestNPrune: same as USA Experiments.Prosser_Apple_Deep.DeepSoil.Row.HarvestNPrune
          Manager AnnualReset: same as USA Experiments.Prosser_Apple_Deep.DeepSoil.Row.AnnualReset
          Operations IrrigationOperations: same as NZ Experiments.Manawatu_1994.Manawatu_94.Row.IrrigationOperations
          Manager PlantVariables: same as USA Experiments.Prosser_Apple_Deep.DeepSoil.Row.PlantVariables
        RectangularZone Alley: Length=100; Width=2.2; Slope=0; AspectAngle=0; Altitude=50
          Report: EventNames=[Clock].DoReport
          Report Drainage (disabled): EventNames=[Clock].DoReport
            VariableNames:
              [Clock].Today
              sum of [Soil].SoilWater.Flux[6] from 1986-06-01 to 1986-09-28 as drainage
              [Soil].Water.MM[9] + [Soil].Water.MM[10] as SW_belowRoots
          Soil: Latitude=0; Longitude=0
            LayerStructure: Thickness=[200, 200, 200, 200, 200, 200, 300, 300, 400, 800]
            Chemical: Thickness=[100, 200, 300, 300, 300, 300]; PH=[6.6, 6.2, 5.7, 5.5, 5.5, 5.5]; PHUnits=Water
            Water: Thickness=[300, 300, 300, 300, 300, 300, 1200]; InitialValues=[0.4, 0.39, 0.43, 0.46, 0.45, 0.43, 0.43]; InitialPAWmm=684; RelativeTo=LL15; FilledFromTop=false
            Physical
              Thickness  BD  AirDry  LL15  DUL   SAT   KS
              300        1   0.2     0.2   0.4   0.5   100
              300        1   0.2     0.2   0.39  0.5   100
              300        1   0.2     0.2   0.43  0.5   50
              300        1   0.2     0.2   0.46  0.5   40
              300        1   0.2     0.2   0.45  0.5   10
              300        1   0.2     0.2   0.43  0.53  1
              1200       1   0.2     0.2   0.43  0.53  0
              SoilCrop STRUMSoil: LL=[0.2, 0.2, 0.2, 0.2, 0.2, 0.2, 0.2]; KL=[1, 1, 1, 1, 1, 1, 1]; XF=[1, 1, 1, 1, 1, 1, 1]
              SoilCrop SlurpSoil: LL=[0.2, 0.2, 0.2, 0.2, 0.2, 0.2, 0.2]; KL=[0.11, 0.11, 0.11, 0.11, 0.11, 0.11, 0.11]; XF=[1, 1, 1, 1, 1, 1, 1]
            WaterBalance SoilWater: same as PatternsTest.Row.Soil.SoilWater
            SoilNitrogen: fom_types=[default, manure, mucuna, lablab, shemp, stable]; fract_carb=[0.2, 0.3, 0.54, 0.57, 0.45, 0]; fract_cell=[0.7, 0.3, 0.37, 0.37, 0.47, 0.1]; fract_lign=[0.1, 0.4, 0.09, 0.06, 0.08, 0.9]; NPartitionApproach=0
            Organic: same as PatternsTest.Row.Soil.Organic
            CERESSoilTemperature Temperature
            OutputLayers: Thickness=[300, 300, 300, 300, 300, 300]
            SoilNitrogenNO3 NO3: same as PatternsTest.Row.Soil.NO3
            SoilNitrogenNH4 NH4: same as PatternsTest.Row.Soil.NH4
            SoilNitrogenUrea Urea: same as PatternsTest.Row.Soil.Urea
          SurfaceOrganicMatter: InitialResidueName=wheat_stubble; InitialResidueType=wheat; InitialResidueMass=500; InitialStandingFraction=0; InitialCPR=0; InitialCNR=100
          Plant Slurp
          Fertiliser
          Irrigation
          Manager PastureInitialisation: same as USA Experiments.Prosser_Apple_Deep.DeepSoil.Alley.PastureInitialisation
          Manager SetPastureVariables: same as PatternsTest.Alley.SetPastureVariables
          Manager SetupPastureRootZones: same as PatternsTest.Alley.SetupPastureRootZones
          Manager AnnualReset: same as USA Experiments.Prosser_Apple_Deep.DeepSoil.Row.AnnualReset
          Manager PlantVariables: same as USA Experiments.Prosser_Apple_Deep.DeepSoil.Row.PlantVariables
  Folder NZ Scenarios
    Experiment Apple_Dwarf_RS
      Factors
        Permutation
          Factor Irr: Specification=[AutoIrrigationDeficitBased]
            CompositeFactor 0: Specifications=[AutoIrrigationDeficitBased].Script.ProportionApplied = 0
            CompositeFactor 1: Specifications=AutoIrrigationDeficitBased].Script.ProportionApplied = 0.2
            CompositeFactor 2: Specifications=AutoIrrigationDeficitBased].Script.ProportionApplied = 0.4
            CompositeFactor 3: Specifications=AutoIrrigationDeficitBased].Script.ProportionApplied = 0.6
            CompositeFactor 4: Specifications=AutoIrrigationDeficitBased].Script.ProportionApplied = 0.8
            CompositeFactor 5: Specifications=AutoIrrigationDeficitBased].Script.ProportionApplied = 1.0
            CompositeFactor 6: Specifications=AutoIrrigationDeficitBased].Script.ProportionApplied = 1.2
            CompositeFactor 7: Specifications=[AutoIrrigationDeficitBased].Script.ProportionApplied = 1.4
            CompositeFactor 8: Specifications=[AutoIrrigationDeficitBased].Script.ProportionApplied = 1.6
            CompositeFactor 9: Specifications=[AutoIrrigationDeficitBased].Script.ProportionApplied = 1.8
            CompositeFactor 10: Specifications=[AutoIrrigationDeficitBased].Script.ProportionApplied = 2.0
      Simulation AppleDwarf_RS
        Clock: Start=1998-07-01; End=2018-08-28
        Summary SummaryFile
        Weather: FileName=Whakatu.met
        MicroClimate: a_interception=0; b_interception=1; c_interception=0; d_interception=0; SoilHeatFluxFraction=0.4; MinimumHeightDiffForNewLayer=0; NightInterceptionFraction=0.5; ReferenceHeight=2
        SoilArbitrator Soil Arbitrator
        RectangularZone Row: Length=100; Width=1.3; Slope=0; AspectAngle=0; Altitude=50
          Report: EventNames=[Clock].DoReport
          Report Drainage: EventNames=[Clock].DoReport
            VariableNames:
              [Clock].Today
              sum of [Soil].SoilWater.Flux[6] from 2008-10-01 to 2011-03-08 as drainage
              [Soil].Water.MM[9] + [Soil].Water.MM[10] as SW_belowRoots
          Soil: same as USA Experiments.Prosser_Apple_Shallow.ShallowSoil.Alley.Soil
          SurfaceOrganicMatter: InitialResidueName=wheat_stubble; InitialResidueType=wheat; InitialResidueMass=500; InitialStandingFraction=0; InitialCPR=0; InitialCNR=100
          Plant STRUM: IsEnding=false; DaysAfterEnding=0
          Fertiliser
          Irrigation
          Manager TreeInitialisation
            CultivarName = Apple
            SowingDate = 07/01/1998 00:00:00
            StartAge = 6
            SurfaceKL = 0.13
            KLReductionFactor = 0.003
            KLReductionDepth = 150
```csharp
using Models.Interfaces;
using Models.Soils;
using APSIM.Shared.Utilities;
using Models.PMF;
using Models.Core;
using System;
using Models.PMF.Organs;
using Models.PMF.Phen;
        
namespace Models
{
    [Serializable] 
    [System.Xml.Serialization.XmlInclude(typeof(Model))]
    public class Script : Model
    {
        [Link] private Plant STRUM;
        [Link] private Clock Clock;
        [Link] private Soil Soil;
        [Link] private Zone zone;
        [Link(Type = LinkType.Path, Path = "[STRUM].Root")]
        private Root root;
        [Link(Type = LinkType.Path, Path = "[STRUM].Phenology")]
        private Phenology phenology;
        [Link]
        private IPhysical soilPhysical;

        [Display(Type = DisplayType.CultivarName)]
        [Description("Plant Type")]
        public string CultivarName { get; set; }
        [Description("Initialisation Date")]
        public DateTime SowingDate { get; set; }
        [Description("Age of trees (in Years) at start of simulation)")]
        public int StartAge {get;set;}

        [Description("Kl in the shallowest layer")]
        public double SurfaceKL { get; set; }
        [Description("Factor to change Kl modifier with Depth")]
        public double KLReductionFactor { get; set; }
        [Description("Depth that KL starts to decline")]
        public double KLReductionDepth { get; set; }
        
        public double[] YKLModifiers { get; set; }
        public double[] XDepth { get; set; }
        private double Depth { get; set; }
        
        [EventSubscribe("DoManagement")]
        private void OnDoManagement(object sender, EventArgs e)
        {
            if (Clock.Today.Date == SowingDate)
            {
                double maxRootDepth = (double)zone.Get("STRUM.Root.MaximumRootDepth.FixedValue");
                double initialRootDepth = Math.Min(1,StartAge/6) * maxRootDepth;
                STRUM.Sow(cultivar: CultivarName, population: 1, depth: initialRootDepth, rowSpacing: 3000);
                object StartAgeValue = StartAge;
                zone.Set("STRUM.Phenology.Age.Years",StartAgeValue);
                YKLModifiers = new double[soilPhysical.Thickness.Length];
                XDepth = new double[soilPhysical.Thickness.Length];
                Depth = 0;
                for (int layer = 0; layer < soilPhysical.Thickness.Length; layer++)
                {
                    Depth += soilPhysical.Thickness[layer] / 2;  //Add half of the thickness of the current layer so depth is the mid depth of that layer
                    if (Depth <= KLReductionDepth)
                    {
                        YKLModifiers[layer] = SurfaceKL;
                        XDepth[layer] = Depth;
                    }
                    else
                    {
                        double KLMod = SurfaceKL * Math.Exp(-KLReductionFactor * (Depth - KLReductionDepth));
                        YKLModifiers[layer] = KLMod;
                        XDepth[layer] = Depth;
                    }
                    Depth += soilPhysical.Thickness[layer] / 2;  //Add the other half of the current layer so depth is the top of the next layer
                }
                object KLMods = YKLModifiers;
                zone.Set("STRUM.Root.KLModifier.XYPairs.Y", KLMods);
                object Depths = XDepth;
                zone.Set("STRUM.Root.KLModifier.XYPairs.X", Depths);
            }
        }
    }
}
```
          Manager SetupTreeRootZones: same as PatternsTest.Row.SetupTreeRootZones
          Manager WaterTable: same as Apple_Dwarf.Alley.WaterTable
          Manager HarvestNPrune: same as PatternsTest.Row.HarvestNPrune
          Manager AnnualReset: same as NZ Experiments.Manawatu_1994.Manawatu_94.Row.AnnualReset
          Manager AutoIrrigationDeficitBased
            StartDate = 1-oct
            EndDate = 1-apr
            FASWThreshold = 0.7
            FASWDepth = 2000
            Amount = 20
            ProportionApplied = 1
```csharp
using Models.Interfaces;
using System;
using Models.Core;
using System.Collections.Generic;
using System.Text;
using Models.Soils;
using Models.PMF;
using Models;
using System.Xml.Serialization;
using APSIM.Shared.Utilities;

namespace Models
{
    [Serializable] 
    public class Script : Model
    {
        [Link] private Zone zone;
        [Link] private Irrigation irrigation;
        [Link] private Soil soil;
        [Link] private Clock clock;
        [Link]
        private IPhysical soilPhysical;
        [Link]
        private ISoilWater waterBalance;
        public double FASW { get; set; }
        public double WaterDeficit  { get; set; } 
        
        [Description("Irrigation start window (d-mmm)")]
        public string StartDate { get; set; }
        [Description("Irrigation end window (d-mmm)")]
        public string EndDate { get; set; }

        [Description("Threshold fraction available water (0-1)")]
        public double FASWThreshold { get; set; }

        [Description("Soil depth (mm) to which fraction available water is calculated")]
        public double FASWDepth { get; set; }

        [Description("Amount of water (mm) applied each irrigation")]
        public double Amount { get; set; }
        
        [Description("ProportionOfAppliedWater)")]
        public double ProportionApplied { get; set; }

        [EventSubscribe("DoManagement")]
        private void OnDoManagement(object sender, EventArgs e)
        {
            CalculateFASW();
            if (DateUtilities.WithinDates(StartDate, clock.Today, EndDate))
            {
                if (FASW < FASWThreshold)
                {
                    irrigation.Apply(Amount * ProportionApplied , depth: 0);
                }
            }
        }
        
        private void CalculateFASW()
        {
            double[] LL15 = MathUtilities.Multiply(soilPhysical.LL15, soilPhysical.Thickness);
            double[] DUL = MathUtilities.Multiply(soilPhysical.DUL, soilPhysical.Thickness);
        
            int nlayr = GetLayerIndex();
            double cumdep = MathUtilities.Sum(soilPhysical.Thickness, 0, nlayr, 0.0);

            double excess_fr = MathUtilities.Divide((cumdep - FASWDepth), soilPhysical.Thickness[nlayr], 0.0);

            // note that results may be strange if swdep < ll15
            double avail_sw = (MathUtilities.Sum(waterBalance.SWmm, 0, nlayr, 0.0)
                              - excess_fr * waterBalance.SWmm[nlayr])
                              - (MathUtilities.Sum(LL15, 0, nlayr, 0.0)
                              - excess_fr * LL15[nlayr]);


            double pot_avail_sw = (MathUtilities.Sum(DUL, 0, nlayr, 0.0)
                                  - excess_fr * DUL[nlayr])
                                  - (MathUtilities.Sum(LL15, 0, nlayr, 0.0)
                                  - excess_fr * LL15[nlayr]);

            FASW = MathUtilities.Divide(avail_sw, pot_avail_sw, 0.0);
            WaterDeficit = MathUtilities.Constrain(pot_avail_sw - avail_sw, 0.0, 100000);
        }

        private int GetLayerIndex()
        {
            double[] cumThickness = soilPhysical.ThicknessCumulative;
            for (int i = 1; i < cumThickness.Length; i++)
            {
                if (FASWDepth < cumThickness[i])
                    return i - 1;
            }
            
            return cumThickness.Length - 1;
        }

    }
}
```
          Manager ClimateControl
            StartDate = 1-oct
            EndDate = 1-apr
            script: same as in NZ Experiments.Manawatu_1994.Manawatu_94.Row.ClimateControl
          Manager PlantVariables: same as USA Experiments.Prosser_Apple_Deep.DeepSoil.Row.PlantVariables
          Manager AutomaticFertiliser
            AllowFertiliser = yes
            Depth2SoilN = 500
            CriticalSoilN = 5
            FertNAmount = 25
            FertType = UreaN
            FertApplicationDepth = 10
            FertMinimumDays = 15
```csharp
using Newtonsoft.Json;
using Models.Soils.Nutrients;
using Models.Interfaces;
using System.Xml.Serialization;
using APSIM.Shared.Utilities;
using Models.Soils;
using Models.PMF;
using Models.Core;
using System;

namespace Models
{
    [Serializable]
    public class Script : Model
    {
        [Link] private Clock Clock;
        [Link] private Fertiliser fertiliser;
        [Link] private ISummary summary;
        [Link] private Soil Soil;
        private DateTime lastApplicationDate;
        private bool fertiliserIsAllowed;
        private int nLayers;
        [Link(ByName = true)]
        private ISolute NO3;
        [Link(ByName = true)]
        private ISolute NH4;
        [Link(ByName = true)]
        private ISolute Urea;
        [Link]
        private IPhysical soilPhysical;

        //User inputs from properties tab
        [Description("Turn fertiliser applications on? ")]
        public yesnoType AllowFertiliser { get; set; }
        
        [Description("Depth to calculate available soil N (mm): ")]
        public double Depth2SoilN { get; set; }

        [Description("Minimum available N, triggers an application (kgN/ha): ")]
        public double CriticalSoilN { get; set; }

        [Description("Amount of N fertiliser for each application (kgN/ha): ")]
        public double FertNAmount { get; set; }

        [Description("Type of N fertiliser to apply: ")]
        public Fertiliser.Types FertType { get; set; }

        [Description("Depth at which to apply the fertiliser (mm): ")]
        public double FertApplicationDepth { get; set; }
       
        [Description("Minimum period between applications (days): ")]
        public double FertMinimumDays { get; set; }
       
        public enum yesnoType
        {
            /// <summary>a positive answer</summary>
            yes,
            /// <summary>a negative answer</summary>
            no
        }

        [JsonIgnore] public double TopMineralN { get; set; }
        

        [EventSubscribe("StartOfSimulation")]
        private void OnStartOfSimulation(object sender, EventArgs e)
        {
            fertiliserIsAllowed = (AllowFertiliser == yesnoType.yes);
            nLayers = soilPhysical.Thickness.Length;
        }

        [EventSubscribe("DoManagement")]
        private void OnDoManagement(object sender, EventArgs e)
        {
            double daysSinceLastApplication = (Clock.Today - lastApplicationDate).TotalDays;
            
            // get the N stored in the soil
            double depthFromSurface = 0.0;
            double fracLayer = 0.0;
            TopMineralN = 0.0;
            for (int layer = 0; layer < nLayers; layer++)
            {
                fracLayer = Math.Min(1.0, (Depth2SoilN - depthFromSurface) / soilPhysical.Thickness[layer]);
                TopMineralN += (NO3.kgha[layer]
                + NH4.kgha[layer]
                + Urea.kgha[layer])
                * fracLayer;
                depthFromSurface += soilPhysical.Thickness[layer];
                if (depthFromSurface >= Depth2SoilN)
                    layer = nLayers;
            }

            if (fertiliserIsAllowed && (daysSinceLastApplication >= FertMinimumDays) && (TopMineralN <= CriticalSoilN))
            {
                fertiliser.Apply(FertNAmount, FertType, FertApplicationDepth);
                lastApplicationDate = Clock.Today;
            }
        }
    }
}
```
        RectangularZone Alley: Length=100; Width=2.2; Slope=0; AspectAngle=0; Altitude=50
          Report: EventNames=[Clock].DoReport
          Report Drainage: EventNames=[Clock].DoReport
            VariableNames:
              [Clock].Today
              sum of [Soil].SoilWater.Flux[6] from 2008-10-01 to 2011-03-08 as drainage
              [Soil].Water.MM[9] + [Soil].Water.MM[10] as SW_belowRoots
          Soil: same as USA Experiments.Prosser_Apple_Shallow.ShallowSoil.Alley.Soil
          SurfaceOrganicMatter: InitialResidueName=wheat_stubble; InitialResidueType=wheat; InitialResidueMass=500; InitialStandingFraction=0; InitialCPR=0; InitialCNR=100
          Plant Slurp
          Fertiliser
          Irrigation
          Manager PastureInitialisation
            CultivarName = StaticCrop
            InitialRootDepth = 2000
            SowingDate = 07/01/1998 00:00:00
            RootDepth = 2000
            RFV = 10
            KLReductionFactor = -0.001
            KLReductionDepth = 150
            MaxG = 0.004
            R50 = 150
            script: same as in PatternsTest.Alley.PastureInitialisation
          Manager SetPastureVariables: same as PatternsTest.Alley.SetPastureVariables
          Manager SetupPastureRootZones: same as PatternsTest.Alley.SetupPastureRootZones
          Manager WaterTable: same as Apple_Dwarf.Alley.WaterTable
          Manager AnnualReset: same as NZ Experiments.Manawatu_1994.Manawatu_94.Row.AnnualReset
          Manager AutoIrrigationDeficitBased
            StartDate = 1-oct
            EndDate = 1-apr
            FASWThreshold = 0.7
            FASWDepth = 2000
            Amount = 20
```csharp
using Models.Interfaces;
using System;
using Models.Core;
using System.Collections.Generic;
using System.Text;
using Models.Soils;
using Models.PMF;
using Models;
using System.Xml.Serialization;
using APSIM.Shared.Utilities;

namespace Models
{
    [Serializable] 
    public class Script : Model
    {
        [Link] private Zone zone;
        [Link] private Irrigation irrigation;
        [Link] private Soil soil;
        [Link] private Clock clock;
        [Link]
        private IPhysical soilPhysical;
        [Link]
        private ISoilWater waterBalance;
        public double FASW { get; set; }
        public double WaterDeficit  { get; set; } 
        
        [Description("Irrigation start window (d-mmm)")]
        public string StartDate { get; set; }
        [Description("Irrigation end window (d-mmm)")]
        public string EndDate { get; set; }

        [Description("Threshold fraction available water (0-1)")]
        public double FASWThreshold { get; set; }

        [Description("Soil depth (mm) to which fraction available water is calculated")]
        public double FASWDepth { get; set; }

        [Description("Amount of water (mm) applied each irrigation")]
        public double Amount { get; set; }

        [EventSubscribe("DoManagement")]
        private void OnDoManagement(object sender, EventArgs e)
        {
            CalculateFASW();
            if (DateUtilities.WithinDates(StartDate, clock.Today, EndDate))
            {
                if (FASW < FASWThreshold)
                {
                    irrigation.Apply(Amount, depth: 0);
                }
            }
        }
        
        private void CalculateFASW()
        {
            double[] LL15 = MathUtilities.Multiply(soilPhysical.LL15, soilPhysical.Thickness);
            double[] DUL = MathUtilities.Multiply(soilPhysical.DUL, soilPhysical.Thickness);
        
            int nlayr = GetLayerIndex();
            double cumdep = MathUtilities.Sum(soilPhysical.Thickness, 0, nlayr, 0.0);

            double excess_fr = MathUtilities.Divide((cumdep - FASWDepth), soilPhysical.Thickness[nlayr], 0.0);

            // note that results may be strange if swdep < ll15
            double avail_sw = (MathUtilities.Sum(waterBalance.SWmm, 0, nlayr, 0.0)
                              - excess_fr * waterBalance.SWmm[nlayr])
                              - (MathUtilities.Sum(LL15, 0, nlayr, 0.0)
                              - excess_fr * LL15[nlayr]);


            double pot_avail_sw = (MathUtilities.Sum(DUL, 0, nlayr, 0.0)
                                  - excess_fr * DUL[nlayr])
                                  - (MathUtilities.Sum(LL15, 0, nlayr, 0.0)
                                  - excess_fr * LL15[nlayr]);

            FASW = MathUtilities.Divide(avail_sw, pot_avail_sw, 0.0);
            WaterDeficit = MathUtilities.Constrain(pot_avail_sw - avail_sw, 0.0, 100000);
        }

        private int GetLayerIndex()
        {
            double[] cumThickness = soilPhysical.ThicknessCumulative;
            for (int i = 1; i < cumThickness.Length; i++)
            {
                if (FASWDepth < cumThickness[i])
                    return i - 1;
            }
            
            return cumThickness.Length - 1;
        }

    }
}
```
          Manager ClimateControl: same as NZ Scenarios.Apple_Dwarf_RS.AppleDwarf_RS.Row.ClimateControl
          Manager PlantVariables: same as USA Experiments.Prosser_Apple_Deep.DeepSoil.Row.PlantVariables
          Manager AutomaticFertiliser
            AllowFertiliser = yes
            Depth2SoilN = 500
            CriticalSoilN = 30
            FertNAmount = 25
            FertType = UreaN
            FertApplicationDepth = 10
            FertMinimumDays = 15
            script: same as in NZ Scenarios.Apple_Dwarf_RS.AppleDwarf_RS.Row.AutomaticFertiliser
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