Simulations: Version=168
  Memo TitlePage
    # The APSIM Pasture Model
  DataStore
  Folder Replacements
    Report DailyReport: EventNames=[Clock].DoReport
      VariableNames:
        [Clock].Today
        [Clock].Today.Year
        [Pasture].CoverTotal
        [Pasture].ShootDM
        [Pasture].Height
        [SurfaceOrganicMatter].Wt
        [Pasture].DeadDM
        [Pasture].GreenDM
        [Pasture].PotentialEP
        [Pasture].CoverGreen
        [Pasture].GAI
        [Pasture].LAI
        [Pasture].LAITotal
        [MicroClimate].PetAerodynamicTerm
        [MicroClimate].PetRadiationTerm
        [MicroClimate].PetTotal
  Folder Validation
    Memo
      A test dataset has been developed to test the APSIM Pasture model for a range of environmental (soil and climate) conditions, management options (grazing/cutting, nitrogen rates, irrigation) and regions.  These tests have been grouped by pasture species.  Graphs of model performance are provided for biomass production, canopy development, water and nitrogen uptake.
    Folder Perennial Ryegrass
  Folder Sensibility
    Experiment Rotation
      Memo
        Test that cutting and removing of pasture biomass works correctly with correct amount of DM moving to Surface Organic Matter
      Factors
        Factor Treatment: Specification=[Management]
          Operations WheatPasture
            1993-02-01  [Pasture].Kill();
            1993-02-02  [Pasture].Cut(cutHeight: 0, gathered: 0);
            1993-05-01  [Wheat].Sow(population: 120, cultivar: hartog, depth: 30, rowSpacing: 250);
            1994-05-01  [Wheat].Sow(population: 120, cultivar: hartog, depth: 30, rowSpacing: 250);
            1995-05-01  [Wheat].Sow(population: 120, cultivar: hartog, depth: 30, rowSpacing: 250);
            1996-03-01  [Pasture].Sow(400);
            1999-02-01  [Pasture].Kill();
            1999-02-02  [Pasture].Cut(cutHeight: 0, gathered: 0);
            1999-05-01  [Wheat].Sow(population: 120, cultivar: hartog, depth: 30, rowSpacing: 250);
            2000-05-01  [Wheat].Sow(population: 120, cultivar: hartog, depth: 30, rowSpacing: 250);
      Simulation RotationBase
        Weather: FileName=WaggaWagga.met
        Clock: Start=1990-01-01; End=2000-12-31
        Summary summaryfile
        SoilArbitrator Soil Arbitrator
        MicroClimate: a_interception=0; b_interception=1; c_interception=0; d_interception=0; SoilHeatFluxFraction=0.4; MinimumHeightDiffForNewLayer=0; NightInterceptionFraction=0.5; ReferenceHeight=2
        Zone Paddock: Area=1; Slope=0; AspectAngle=0; Altitude=50
          Operations Management
          Manager CutOnDate
            CuttingDates = 01-Sep
            HeightFraction = 0
            GatherFraction = 0
```csharp
using Models.Soils.Nutrients;
using APSIM.Shared.Utilities;
using Models.Surface;
using Models.Utilities;
using Models.Soils.Nutrients;
using Models.Soils;
using Models.PMF;
using Models.Core;
using System;
using System.Linq;
using Models.Interfaces;
using Models.GrazPlan;

namespace Models
{
    [Serializable]
    public class Script : Model
    {
        [Link] private Clock Clock;
        [Link] private Summary Summary;
        [Link] private Pasture pasture;
        
        [Description("Cutting Dates:")]
        public string[] CuttingDates { get; set; } 
        
        [Description("Fraction of Height to Remove):")]
        public double HeightFraction {get;set;}

        [Description("Fraction of Cut Biomass to Gather into Storage):")]
        public double GatherFraction {get;set;}

        [EventSubscribe("DoManagement")]
        private void OnDoManagement(object sender, EventArgs e)
        {
            foreach (string ddMMM in CuttingDates)
            {
                if (DateUtilities.DatesEqual(ddMMM, Clock.Today))
                   if (HeightFraction>0)
                   {
                      pasture.Cut(cutHeight: pasture.Height*HeightFraction, gathered: GatherFraction);
                      
                   }

            }
       }
    }
}
```
          Manager Fertilise at wheat sowing
            Crop = [Wheat]
            FertiliserType = UreaN
            Amount = 160
```csharp
using Models.Soils;
using System;
using System.Linq;
using Models.Core;
using Models.PMF;
namespace Models
{
    [Serializable]
    public class Script : Model
    {
        [Link] Clock Clock;
        [Link] Fertiliser Fertiliser;
        
        [Description("Crop to be fertilised")]
        public IPlant Crop { get; set; }

        [Description("Type of fertiliser to apply? ")] 
        public Fertiliser.Types FertiliserType { get; set; }
    
        [Description("Amount of fertiliser to be applied (kg/ha)")]
        public double Amount { get; set; }
        
        [EventSubscribe("Sowing")]
        private void OnSowing(object sender, EventArgs e)
        {
            Model crop = sender as Model;
            if (Crop != null && crop.Name.ToLower() == (Crop as IModel).Name.ToLower())
                Fertiliser.Apply(Amount: Amount, Type: FertiliserType);
        }
    }
}
```
          Manager Harvesting
            Crop = [Wheat]
```csharp
using APSIM.Shared.Utilities;
using Models.Utilities;
using Models.Soils;
using Models.PMF;
using Models.Core;
using System;
using System.Linq;

namespace Models
{
    [Serializable] 
    public class Script : Model
    {
        [Description("Crop")]
        public IPlant Crop { get; set; }
        
        [EventSubscribe("DoManagement")]
        private void OnDoManagement(object sender, EventArgs e)
        {
            if (Crop.IsReadyForHarvesting)
            {
                Crop.Harvest();
                Crop.EndCrop();
            }
        }
    }
}
```
          SurfaceOrganicMatter Surface Organic Matter: InitialResidueName=Barley_stubble; InitialResidueType=Barley; InitialResidueMass=0; InitialStandingFraction=0; InitialCPR=0; InitialCNR=80; FractionFaecesAdded=1
          Irrigation
          Fertiliser
            Definitions:
              Name         Description                            FractionNO3  FractionNH4  FractionUrea  FractionRockP  FractionBandedP  FractionLabileP  FractionCa
              CalciteCA    Ca as finely ground Agricultural Lime  0            0            0             0              0                0                1
              CalciteFine  finely ground Agricultural Lime        0            0            0             0              0                0                0.4
              Dolomite     finely ground dolomite                 0            0            0             0              0                0                0.22
              NO3N         N as nitrate                           1            0            0             0              0                0                0
              NH4N         N as ammonium                          0            1            0             0              0                0                0
              NH4NO3N      ammonium nitrate                       0.5          0.5          0             0              0                0                0
              DAP          di-ammonium phosphate                  0            0.18         0             0              0                0                0
              MAP          mono-ammonium phosphate                0            0.11         0             0              0                0                0
              UAN_N        N as Urea-AmmoniumNitrate              0.25         0.25         0.5           0              0                0                0
              UreaN        N as urea                              0            0            1             0              0                0                0
              UreaNO3      N as urea                              0.5          0            0.5           0              0                0                0
              Urea         Urea fertiliser                        0            0            0.46          0              0                0                0
              NH4SO4N      ammonium sulphate                      0            1            0             0              0                0                0
              RockP        Rock phosphorus                        0            0            0             0.8            0                0.2              0
              BandedP      Banded phosphorus                      0            0            0             0              1                0                0
              BroadcastP   Broadcast phosphorus                   0            0            0             0              0                1                0
          Report RotationReport: EventNames=[Clock].DoReport
            VariableNames:
              [Clock].Today
              [Pasture].ShootDM/10 as PastureAboveGroundWt
              [Pasture].GLF_N
              [Pasture].GLF_SM
              [Pasture].PotentialEP
              [Pasture].WaterDemand
              sum([Pasture].SWUptake) as SWUptake
              [Wheat].AboveGround.Wt
              [Wheat].Grain.Wt
              sum([NO3].kgha) as TotalNO3
              sum([NH4].kgha) as TotalNH4
              sum([Water].MM) as TotalSW
              sum([Soil].Water.PAWmm) as TotalESW
          Plant Wheat: PlantType=Wheat
          Pasture: Species=Perennial RyeGrass; Nutrients=N; MaxRtDep=650; LaggedDayT=-999.9; Phenology=1.0015; FlowerLen=0; FlowerTime=0; SencIndex=0; DormIndex=0; DormT=-999.9; ExtinctCoeff=[0, 0, 0.55]; SeedDormTime=0; GermIndex=0; Albedo=0.23; Gsmax=0.011; R50=200; WaterDemand=0; LAI=0
            GreenCohortInitialise: RootWeight=[400, 400]; RootDepth=650; Status=established; LeafDMD=[0.825]; LeafWeight=[800]; LeafNConc=[0.01]; LeafSpecificArea=[430]; StemDMD=[0.825]; StemWeight=[800]; StemNConc=[0.01]; StemSpecificArea=[10]
            DryCohortInitialise: Status=Established; LeafDMD=[0.6]; LeafWeight=[500]; LeafNConc=[0]; LeafSpecificArea=[430]; StemDMD=[0.35]; StemWeight=[1500]; StemNConc=[0]; StemSpecificArea=[80]
          Soil Red Kandosol (No498-Generic): ASCOrder=Kandosol; ASCSubOrder=Red; SoilType=Other; Site=Generic-NSW; State=Generic; Country=Australia; ApsoilNumber=498-GENERIC; Latitude=-35.115549; Longitude=147.369477; LocationAccuracy=Regional Soil Type; YearOfSampling=0; DataSource=Generic soil; Comments=Generic soil developed for CSU.
            Physical
              Thickness  BD    AirDry  LL15  DUL   SAT
              100        1.48  0.055   0.11  0.29  0.35
              150        1.5   0.104   0.13  0.27  0.34
              150        1.45  0.15    0.15  0.25  0.32
              150        1.37  0.15    0.15  0.28  0.36
              150        1.43  0.15    0.15  0.29  0.35
              300        1.55  0.15    0.15  0.31  0.34
              300        1.67  0.15    0.15  0.31  0.34
              300        1.62  0.15    0.15  0.32  0.35
              BD, AirDry, LL15, DUL, SAT source: Estimated based on local knowledge
              SoilCrop wheatSoil: LL=[0.11, 0.13, 0.15, 0.17, 0.19, 0.22, 0.26, 0.28]; KL=[0.06, 0.06, 0.04, 0.04, 0.04, 0.04, 0.02, 0.02]; XF=[1, 1, 1, 0.9, 0.9, 0.9, 0.9, 0.8]
                LL source: Estimated based on local knowledge
              SoilCrop Perennial RyeGrassSoil: LL=[0.11, 0.13, 0.15, 0.17, 0.19, 0.22, 0.26, 0.28]; KL=[0.06, 0.06, 0.04, 0.04, 0.04, 0.04, 0.02, 0.02]; XF=[1, 1, 1, 0.9, 0.9, 0.9, 0.9, 0.9]
                LL source: Estimated based on local knowledge
            WaterBalance SoilWater: SummerDate=1-Nov; SummerU=6; SummerCona=3.5; WinterDate=1-Apr; WinterU=2; WinterCona=2; DiffusConst=44; DiffusSlope=16; Salb=0.13; CN2Bare=84; CNRed=20; CNCov=0.8; PSIDul=-100; Thickness=[100, 150, 150, 150, 150, 300, 300, 300]; SWCON=[0.5, 0.4, 0.3, 0.3, 0.2, 0.1, 0.1, 0.1]
            Organic: FOMCNRatio=45; CarbonUnits=WalkleyBlack
              Thickness  Carbon  SoilCNRatio  FBiom  FInert  FOM
              100        1       12.5         0.03   0.4     437.343
              150        0.5     12.5         0.02   0.6     330.124
              150        0.5     12.5         0.02   0.7     249.19
              150        0.5     12.5         0.02   0.8     188.099
              150        0.5     12.5         0.01   0.9     141.984
              300        0.5     12.5         0.01   0.9     80.9003
              300        0.5     12.5         0.01   1       46.0956
              300        0.5     12.5         0.01   1       26.2645
            Chemical: Thickness=[100, 150, 150, 150, 150, 300, 300, 300]; PH=[6, 6, 6, 6, 6, 6, 6, 6]; PHUnits=Water
              PH source: Estimated based on local knowledge
            Nutrient
              DirectedGraphInfo={Nodes=[{Name=Inert, OutlineColour=Black}, {Name=FOMLignin, OutlineColour=Black}, {Name=FOMCellulose, OutlineColour=Black}, {Name=FOMCarbohydrate, OutlineColour=Black}, {Name=Microbial, OutlineColour=Black}, {Name=Humic, OutlineColour=Black}, {Name=Urea, OutlineColour=Black}, {Name=NO3, OutlineColour=Black}, {Name=NH4, OutlineColour=Black}, {Name=Atmosphere, OutlineColour=Black}, {Name=SurfaceResidue, OutlineColour=Black}], Arcs=[{SourceName=FOMLignin, DestinationName=Microbial}, {SourceName=FOMLignin, DestinationName=Humic}, {SourceName=FOMCellulose, DestinationName=Microbial}, {SourceName=FOMCellulose, DestinationName=Humic}, {SourceName=FOMCarbohydrate, DestinationName=Microbial}, {SourceName=FOMCarbohydrate, DestinationName=Humic}, {SourceName=Microbial, DestinationName=Microbial}, {SourceName=Microbial, DestinationName=Humic}, {SourceName=Humic, DestinationName=Microbial}, {SourceName=Urea, DestinationName=NH4}, {SourceName=NO3, DestinationName=Atmosphere}, {SourceName=NH4, DestinationName=NO3}, {SourceName=SurfaceResidue, DestinationName=Microbial}, {SourceName=SurfaceResidue, DestinationName=Humic}]}
            Solute NO3: Thickness=[1600]; InitialValues=[2]; InitialValuesUnits=ppm; WaterTableConcentration=0; D0=0; DepthConstant=0; MaxDepthSoluteAccessible=0; RunoffEffectivenessAtMovingSolute=0; MaxEffectiveRunoff=0
            Solute NH4: Thickness=[1600]; InitialValues=[0.1]; InitialValuesUnits=ppm; WaterTableConcentration=0; D0=0; DepthConstant=0; MaxDepthSoluteAccessible=0; RunoffEffectivenessAtMovingSolute=0; MaxEffectiveRunoff=0
            Solute Urea: Thickness=[100, 150, 150, 150, 150, 300, 300, 300]; InitialValues=[0, 0, 0, 0, 0, 0, 0, 0]; InitialValuesUnits=kg/ha; WaterTableConcentration=0; D0=0; DepthConstant=0; MaxDepthSoluteAccessible=0; RunoffEffectivenessAtMovingSolute=0; MaxEffectiveRunoff=0
            Water: Thickness=[100, 150, 150, 150, 150, 300, 300, 300]; InitialValues=[0.2, 0.2, 0.2, 0.2, 0.2, 0.2, 0.2, 0.2]; InitialPAWmm=87; RelativeTo=LL15; FilledFromTop=true
            CERESSoilTemperature
  Folder MethodTests
    Experiment Cutting
      Memo
        Test that cutting and removing of pasture biomass works correctly with correct amount of DM moving to Surface Organic Matter
      Factors
        Factor Treatment
          CompositeFactor None: Specifications=[CutOnDate].Script.HeightFraction = 0
          CompositeFactor Remove
            Specifications:
              [CutOnDate].Script.HeightFraction = 0.5
              [CutOnDate].Script.GatherFraction = 1.0
          CompositeFactor Retain
            Specifications:
              [CutOnDate].Script.HeightFraction = 0.5
              [CutOnDate].Script.GatherFraction = 0.0
      Simulation CuttingBase
        Weather: FileName=cbr_70014.met
        Clock: Start=1990-08-01; End=1991-02-01
        Summary summaryfile
        SoilArbitrator Soil Arbitrator
        MicroClimate: a_interception=0; b_interception=1; c_interception=0; d_interception=0; SoilHeatFluxFraction=0.4; MinimumHeightDiffForNewLayer=0; NightInterceptionFraction=0.5; ReferenceHeight=2
        Zone Paddock: Area=1; Slope=0; AspectAngle=0; Altitude=50
          Manager CutOnDate
            CuttingDates = 01-Sep
            HeightFraction = 0.5
            GatherFraction = 0
```csharp
using Models.Soils.Nutrients;
using APSIM.Shared.Utilities;
using Models.Surface;
using Models.Utilities;
using Models.Soils.Nutrients;
using Models.Soils;
using Models.PMF;
using Models.Core;
using System;
using System.Linq;
using Models.Interfaces;
using Models.GrazPlan;

namespace Models
{
    [Serializable]
    public class Script : Model
    {
        [Link] private Clock Clock;
        [Link] private Summary Summary;
        [Link] private Pasture pasture;
        [Link] private SurfaceOrganicMatter SOM;
        
        [Description("Cutting Dates:")]
        public string[] CuttingDates { get; set; } 
        
        [Description("Fraction of Height to Remove):")]
        public double HeightFraction {get;set;}

        [Description("Fraction of Cut Biomass to Gather into Storage):")]
        public double GatherFraction {get;set;}

        [EventSubscribe("DoManagement")]
        private void OnDoManagement(object sender, EventArgs e)
        {
            foreach (string ddMMM in CuttingDates)
            {
                if (DateUtilities.DatesEqual(ddMMM, Clock.Today))
                   if (HeightFraction>0)
                   {
                      double initialSOMWt = SOM.Wt;
                      double initialPastureWt = pasture.ShootDM;
                      pasture.Cut(cutHeight: pasture.Height*HeightFraction, gathered: GatherFraction);
                      double deltaSOMWt = SOM.Wt - initialSOMWt;
                      double deltaPastureWt = initialPastureWt - pasture.ShootDM;
                      double Err = deltaPastureWt - deltaSOMWt;
                      //if (Math.Abs(Err) > 1)
                         //throw new Exception ("Error in Pasture/Surface Organic Matter masses after cutting");
                   }

            }
       }
    }
}
```
          Soil: SoilType=NZ_sedementary; Region=Plains; State=Canterbury; Country=New Zealnd; Latitude=0; Longitude=0
            Chemical: Thickness=[150, 150, 300, 300, 300, 300]; PH=[6.6, 6.2, 5.7, 5.5, 5.5, 5.5]; PHUnits=Water
            Physical
              Thickness  BD   AirDry  LL15  DUL   SAT   KS
              200        1.1  0.05    0.07  0.33  0.48  4832.039
              200        1.1  0.1     0.1   0.28  0.48  389.229
              200        1.3  0.08    0.08  0.26  0.4   97
              200        1.2  0.1     0.1   0.27  0.38  97.995
              200        1.2  0.12    0.12  0.28  0.37  97.995
              200        1.2  0.12    0.12  0.28  0.36  97.995
              200        1.2  0.12    0.12  0.26  0.36  98
              200        1.2  0.12    0.12  0.25  0.36  98
              400        1.2  0.12    0.12  0.25  0.36  98
              SoilCrop BarleySoil: LL=[0.07, 0.1, 0.08, 0.1, 0.12, 0.12, 0.12, 0.12, 0.12]; KL=[0.1, 0.07, 0.06, 0.05, 0.04, 0.03, 0.03, 0.03, 0.02]; XF=[1, 1, 1, 1, 1, 1, 1, 1, 1]
              SoilCrop PhalarisSoil: LL=[0.15, 0.14, 0.08, 0.12, 0.12, 0.12, 0.12, 0.12, 0.12]; KL=[0.1, 0.1, 0.08, 0.04, 0.01, 0, 0, 0, 0]; XF=[1, 1, 1, 1, 1, 0, 0, 0, 0]
              SoilCrop Perennial RyeGrassSoil: LL=[0.15, 0.14, 0.08, 0.12, 0.12, 0.12, 0.12, 0.12, 0.12]; KL=[0.1, 0.1, 0.08, 0.04, 0.01, 0, 0, 0, 0]; XF=[1, 1, 1, 1, 1, 0, 0, 0, 0]
            WaterBalance SoilWater: SummerDate=1-Nov; SummerU=6; SummerCona=2; WinterDate=1-Apr; WinterU=9; WinterCona=4.4; DiffusConst=0; DiffusSlope=0; Salb=0.18; CN2Bare=68; CNRed=20; CNCov=0.8; DischargeWidth=0; CatchmentArea=0; PSIDul=-100
              Thickness  SWCON  KLAT
              150        0.9    0
              150        0.9    0
              300        0.9    0
              300        0.9    0
              300        0.9    0
              300        0.9    0
            Organic: FOMCNRatio=20; CarbonUnits=Total
              Thickness  Carbon  SoilCNRatio  FBiom  FInert  FOM
              150        2.7     11           0.025  0.45    390.598
              150        2.5     11           0.025  0.6     289.362
              300        1.45    11           0.015  0.75    158.805
              300        0.32    11           0.01   0.9     87.154
              300        0.24    11           0.01   0.96    47.831
              300        0.24    11           0.01   0.96    26.25
            CERESSoilTemperature Temperature
            Water: Thickness=[200, 200, 200, 200, 200, 200, 200, 200, 400]; InitialValues=[0.31, 0.28, 0.26, 0.27, 0.28, 0.28, 0.26, 0.25, 0.25]; InitialPAWmm=324; RelativeTo=LL15; FilledFromTop=false
            Nutrient: same as Sensibility.Rotation.RotationBase.Paddock.Red Kandosol (No498-Generic).Nutrient
            Solute Urea: Thickness=[150, 150, 300, 300, 300, 300]; InitialValues=[0, 0, 0, 0, 0, 0]; InitialValuesUnits=ppm; WaterTableConcentration=0; D0=0; DepthConstant=0; MaxDepthSoluteAccessible=0; RunoffEffectivenessAtMovingSolute=0; MaxEffectiveRunoff=0
            Solute NH4: Thickness=[150, 150, 300, 300, 300, 300]; InitialValues=[1.8, 1.9, 1.5, 1.3, 1.3, 0.9]; InitialValuesUnits=ppm; WaterTableConcentration=0; D0=0; DepthConstant=0; MaxDepthSoluteAccessible=0; RunoffEffectivenessAtMovingSolute=0; MaxEffectiveRunoff=0
            Solute NO3: Thickness=[150, 150, 300, 300, 300, 300]; InitialValues=[14.6, 17.8, 6.8, 7.6, 10.2, 11.2]; InitialValuesUnits=ppm; WaterTableConcentration=0; D0=0; DepthConstant=0; MaxDepthSoluteAccessible=0; RunoffEffectivenessAtMovingSolute=0; MaxEffectiveRunoff=0
          SurfaceOrganicMatter Surface Organic Matter: InitialResidueName=Barley_stubble; InitialResidueType=Barley; InitialResidueMass=0; InitialStandingFraction=0; InitialCPR=0; InitialCNR=80; FractionFaecesAdded=1
          Irrigation
          Fertiliser: same as Sensibility.Rotation.RotationBase.Paddock.Fertiliser
          Report DailyReport: EventNames=[Clock].DoReport
            VariableNames:
              [Clock].Today
              sum([Pasture].Uptake_NH4) as NH4Uptake
              sum([Pasture].Uptake_NO3) as NO3Uptake
              sum([Pasture].SWUptake)
              [Pasture].Growth
              [Pasture].GreenDM
              [Pasture].AvailGreen
              [Pasture].AvailDM
              [Pasture].DryDM
              [Pasture].LitterDM
              [Pasture].WaterDemand
              [Pasture].WaterDemandSupply
              (sum([Soil].Urea.kgha) + sum([Soil].NH4.kgha) + sum([Soil].NO3.kgha)) as SoilNContent_kgha
          Pasture: Species=Perennial RyeGrass; Nutrients=N; MaxRtDep=650; LaggedDayT=-999.9; Phenology=1.0015; FlowerLen=0; FlowerTime=0; SencIndex=0; DormIndex=0; DormT=-999.9; ExtinctCoeff=[0, 0, 0.55]; SeedDormTime=0; GermIndex=0; Albedo=0.23; Gsmax=0.011; R50=200; WaterDemand=0; LAI=0
            GreenCohortInitialise: RootWeight=[400, 400]; RootDepth=650; Status=established; LeafDMD=[0.825]; LeafWeight=[800]; LeafNConc=[0.01]; LeafSpecificArea=[430]; StemDMD=[0.825]; StemWeight=[800]; StemNConc=[0.01]; StemSpecificArea=[10]
            DryCohortInitialise: Status=litter; LeafDMD=[0.6]; LeafWeight=[500]; LeafNConc=[0]; LeafSpecificArea=[430]; StemDMD=[0.35]; StemWeight=[1500]; StemNConc=[0]; StemSpecificArea=[80]
    Experiment Killing
      Memo
        Test that killing of pasture biomass works correctly with correct amount of DM moving from green to dead pools
      Factors
        Factor Fraction: Specification=[KillOnDate].Script.KillFraction=0,0.9,1.0
      Simulation KillingBase
        Weather: FileName=cbr_70014.met
        Clock: Start=1990-08-01; End=1991-02-01
        Summary summaryfile
        SoilArbitrator Soil Arbitrator
        MicroClimate: a_interception=0; b_interception=1; c_interception=0; d_interception=0; SoilHeatFluxFraction=0.4; MinimumHeightDiffForNewLayer=0; NightInterceptionFraction=0.5; ReferenceHeight=2
        Zone Paddock: Area=1; Slope=0; AspectAngle=0; Altitude=50
          Manager KillOnDate
            KillingDates = 1-sep
            KillFraction = 0
```csharp
using Models.Soils.Nutrients;
using APSIM.Shared.Utilities;
using Models.Surface;
using Models.Utilities;
using Models.Soils.Nutrients;
using Models.Soils;
using Models.PMF;
using Models.Core;
using System;
using System.Linq;
using Models.Interfaces;
using Models.GrazPlan;

namespace Models
{
    [Serializable]
    public class Script : Model
    {
        [Link] private Clock Clock;
        [Link] private Summary Summary;
        [Link] private Pasture pasture;
        [Link] private SurfaceOrganicMatter SOM;
        
        [Description("Killing Dates:")]
        public string[] KillingDates { get; set; } 
        
        [Description("Fraction of Pasture to Kill):")]
        public double KillFraction {get;set;}

        [EventSubscribe("DoManagement")]
        private void OnDoManagement(object sender, EventArgs e)
        {
            foreach (string ddMMM in KillingDates)
            {
                if (DateUtilities.DatesEqual(ddMMM, Clock.Today))
                {
                      double initialGreenWt = pasture.GreenDM;
                      double initialDeadWt = pasture.DeadDM;
                      pasture.Kill(propnHerbage: KillFraction);
                      double deltaGreenWt = pasture.GreenDM - initialGreenWt;
                      double deltaDeadWt = initialDeadWt - pasture.DeadDM;
                      double Err = deltaGreenWt - deltaDeadWt;
                      if (Math.Abs(Err) > 1)
                         throw new Exception ("Error in Pasture Live/Green masses after killing");
                 }
            }
       }
    }
}
```
          Soil: same as MethodTests.Cutting.CuttingBase.Paddock.Soil
          SurfaceOrganicMatter Surface Organic Matter: InitialResidueName=Barley_stubble; InitialResidueType=Barley; InitialResidueMass=0; InitialStandingFraction=0; InitialCPR=0; InitialCNR=80; FractionFaecesAdded=1
          Irrigation
          Fertiliser: same as Sensibility.Rotation.RotationBase.Paddock.Fertiliser
          Report DailyReport: same as MethodTests.Cutting.CuttingBase.Paddock.DailyReport
          Pasture: same as Sensibility.Rotation.RotationBase.Paddock.Pasture
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