Simulations: Version=2
  Replacements
    Plant Potato: CropType=Potato
      Memo TitlePage
        # The APSIM Potato Model

        _Brown, H.E., Huth, N.I. and Holzworth, D.P._

        ##Building the model.
        The APSIM potato model has been described in part by [Brown_etal_2011] and developed using the Plant Modelling Framework (PMF) of [brown_plant_2014]. This new framework provides a library of plant organ and process submodels that can be coupled, at runtime, to construct a model in much the same way that models can be coupled to construct a simulation. This means that dynamic composition of lower level process and organ classes (e.g. photosynthesis, leaf) into larger constructions (e.g. maize, wheat, sorghum) can be achieved by the model developer without additional coding.

        The model consists of:

        * a phenology model to simulate development between growth phases
        * a structure model to simulate plant morphology
        * a collection of organs to simulate the various plant parts
        * an arbitrator to allocate resources (N, biomass) to the various plant organs

        ##Pecularities of potato
        Potato is a challenging crop to model because it is vegetatviely propigated.  For seed propigate crops, plants are always equally dormant at planting and their development begins there on.  With potato the physiological status of the seed tubers vary depending on:
        * the conditions the mother plant encountered late in its life (Stress, Desication etc)
        * the conditions that the tuber was stored (Cool store, ground store, dry store etc)
        * treatment of the seed prior to planting (chitting, cutting etc)
        All of these factors infuence the developmental behaviour of the crop that is produced including
        * The timing of emergence
        * The number of stems produced per plant and subsequent tuber number and canopy development
        * The timing of tuber initiation and subsequent growth and partitioning
        * The duration of haulm growth and subsequent tuber filling duration

        There are an enormous number of potato cultivars and they, they all differ in their responses of post planting behavour due to pre planting seed conditions, there is not a good quantitative understanding of how environment and managemet of seed potato prior to planting influences post planting behaviour and it is beyond the scope of the current APSIM infrastructure to provide environmental conditions during storage of seed.  We have tried but with a list of excuses this long we have not yet succeeded in building the effects of seed physiology into the potato model in anything other than a very elementry way.  However, it is possible to set the model up to capture seed effects for specific simulations.

        ##Including a potato crop in an APSIM simulation
        There is a Potato example simulation available by clicking the 'Open an Example' icon available on the first tab displayed when APSIM Next Gen is opened.  This provides a useful demonstration of how to simulate a potato crop and provides some useful graphs for viewing models predictions.
        To incluce a potato crop in a simulation the 'Potato' model needs to be added to the paddock, field or zone in which it is to be grown.  This can be done by right clicking on the 'Paddock', selecting 'Add' from the drop down menu and then selecting 'Potato' from the list that comes up.  A sowing action also needs to be set to start the crop off and a harvest event to remove the potato crop so the next crop can be simulated.  The 'PotatoPlantAndHarvest' manager module that is included in the 'Potato, example simulation has script written to instigate these events and can be copied from the example simulation into other simulations.
        ###Setting sowing depth (emergence date)
        The potato model predicts emergence date as a function of sowing depth and all subsequent phenology is dependent on this timing.  Because this date is effected by seed physiology and can't yet be modeled we recommend that planting depth is not set at the actual planting depth, but varied to ensure the model predicts a realistic emergence date.  Planting depth is set in the 'PotatoPlantAndHarvest' module
        ###Setting stem number (tuber number and early canopy growth)
        The 'PotatoPlantAndHarvest' script sets the number of stems that will appear from each seed piece.  This varies enormiously due to seed physiology and variety and should be set to a number that is realistic for the cultivar being simulated and the pre-planting treatment of the seed tubers.  This parameter influences tuber number and the early development of the canopy so should be set carefully.
        ###Setting final leaf number (Crop duration)
        The duration of a potato crop is determined by the number of leaves that the mainstem produces and how long it takes for these to appear and seness.  This responds to photoperiod in many varieties and is influenced by the pre-planting treatment of seed tubers.  As such this parameter is given a default value for each cultivar but can also be set in the'PotatoPlantAndHarvest' script if more is know about the expected determinany of the potatoes under the circumstances being simulated.  Please read  [Brown_etal_2011] for a clear definition of final leaf number.
      Phenology
        AirTemperatureFunction ThermalTime
          XYPairs: X=[2, 20, 30]; Y=[0, 18, 0]
        GenericPhase Dormant: Start=Planting; End=Peeping
          Memo
            This phase is currenttly set with a very short duration and is a place holder until we have a suitalbe method for modelling tuber dormancy
          VariableReference ThermalTime: VariableName=[Phenology].ThermalTime.Value
          Constant Target: Value=1
        EmergingPhase Sprouting: Start=Peeping; End=Emergence; ShootLag=72; ShootRate=1.35
          Memo
            The sprouting phase controls when the crop emerges.  In potato this is influenced by the physiological stage of the seed tuber when it is planted.  This is difficult to model as the seed tubers physiological status begins when it is still on the mother plant and is influenced by the treatment of the mother plant, the storage conditions of the tuber, conditions when the seed is being prepared for planting and the variety of potato.  There is currently no good way of modelling this as it would require environmental information from beyond the field where the crop is to be grown which is currently beyond the scope of APSIM.  In the absence of something more elegent, we recommend that the user adjusts sowing depth to achieve a realistic emergence date and let the model deal with phenological develpment there after.
          VariableReference ThermalTime: VariableName=[Phenology].ThermalTime.Value
        GenericPhase Vegetative: Start=Emergence; End=TuberInitiation
          Constant Target: Value=300
          Memo
            During the vegetative phase the crop is only growing stem, root and leaf.  Tuber initiation usually occurs soon after emergence and the duration of this phase can be influenced by the physiological status of the seed tuber at planting.  As discussed above, we do not have a suitable method for modelling this yet so we have treated the time from emergence to tuber initiation as a thermal time constant.
          VariableReference ThermalTime: VariableName=[Phenology].ThermalTime.Value
        LeafAppearancePhase EarlyTuber: Start=TuberInitiation; End=FinalLeaf
          Memo: same as Replacements.Potato.Phenology.Vegetative.Memo
          VariableReference ThermalTime: VariableName=[Phenology].ThermalTime.Value
        LeafDeathPhase LateTuber: Start=FinalLeaf; End=FullSenescence
          VariableReference ThermalTime: VariableName=[Phenology].ThermalTime.Value
        GenericPhase Senesced: Start=FullSenescence; End=Maturity
          Constant Target: Value=200
          VariableReference ThermalTime: VariableName=[Phenology].ThermalTime.Value
        EndPhase Maturity: Start=Maturity; End=Unused
          VariableReference ThermalTime: VariableName=[Phenology].ThermalTime.Value
      OrganArbitrator Arbitrator: NArbitrationOption=PriorityThenRelativeAllocation; DMArbitrationOption=RelativeAllocation
      Structure: InitialiseStage=Emergence; PrimaryBudNo=2.2
        VariableReference ThermalTime: VariableName=[Phenology].ThermalTime.Value
        PhaseLookupValue MainStemPrimordiaInitiationRate: Start=Emergence; End=FinalLeaf
          DivideFunction NodeInitiationRateFunction
            VariableReference Phyllochron: VariableName=[Structure].MainStemNodeAppearanceRate.Phyllochron.Value
            Constant PrimordiaPerMainstemNode: Value=2
        PhaseLookupValue MainStemNodeAppearanceRate: Start=Emergence; End=FinalLeaf
          LinearInterpolationFunction Phyllochron: XProperty=[Structure].RelativeNodeApperance
            XYPairs: X=[0, 0.15, 0.74, 0.75, 1]; Y=[5, 30, 30, 60, 60]
        Constant MainStemFinalNodeNumber: Value=34
        LinearInterpolationFunction HeightModel: XProperty=[Stem].Live.Wt
          XYPairs: X=[0, 200, 1200, 4000]; Y=[20, 300, 700, 900]
        MultiplyFunction BranchingRate
          LinearInterpolationFunction Potential_Branching_Rate: XProperty=[Structure].MainStemNodeNo
            XYPairs: X=[0, 7, 8, 13, 14, 34]; Y=[0, 0, 0.5, 0.5, 0, 0]
          LinearInterpolationFunction: XProperty=[Leaf].CoverGreen
            XYPairs: X=[0, 0.4, 0.55, 0.8, 1]; Y=[1, 1, 0.45, 0, 0]
        Constant BranchMortality: Value=0
      GenericAboveGroundOrgan Tuber
        PotentialSizeDemandFunction DMDemandFunction: StartStageName=TuberInitiation; EndStageName=Maturity
          LinearInterpolationFunction PotentialGrowthIncrement: XProperty=[Phenology].Stage
            XYPairs: X=[4, 4.04, 4.32, 4.52, 4.95, 6.54]; Y=[0.017, 0.017, 0.06, 0.06, 0.018, 0]
          MultiplyFunction OrganNumber
            Constant OrganNumberPerStem: Value=5
            VariableReference: VariableName=[Structure].MainStemPopn
          AirTemperatureFunction ThermalTime
            XYPairs: X=[2, 20, 35]; Y=[0, 18, 0]
          AccumulateFunction AccumThermalTime: StartStageName=TuberInitiation; EndStageName=Maturity
            VariableReference: VariableName=[Structure].ThermalTime.Value
        Constant StructuralFraction: Value=1
        LinearInterpolationFunction DryMatterContent: XProperty=[Phenology].Stage
          XYPairs: X=[4, 4.5]; Y=[0.13, 0.22]
        LinearInterpolationFunction MaximumNConc: XProperty=[Phenology].Stage
          XYPairs: X=[3, 4, 5, 6]; Y=[0.023, 0.023, 0.018, 0.015]
        LinearInterpolationFunction MinimumNConc: XProperty=[Phenology].Stage
          XYPairs: X=[4, 4.1, 7]; Y=[0.02, 0.006, 0.006]
        Biomass Live
        Biomass Dead
        Folder BiomassRemovalDefaults
          OrganBiomassRemovalType Harvest: FractionRemoved=0.5; FractionToResidue=0.1
          OrganBiomassRemovalType Cut: FractionRemoved=0.8; FractionToResidue=0
          OrganBiomassRemovalType Prune: FractionRemoved=0; FractionToResidue=0.6
          OrganBiomassRemovalType Graze: FractionRemoved=0.6; FractionToResidue=0.2
      Root: InitialDM=5; SpecificRootLength=40000; NuptakeSupply=0
        CompositeBiomass Live: Propertys=[[Root].LayerLive]
        CompositeBiomass Dead: Propertys=[[Root].LayerDead]
        PhaseBasedSwitch NitrogenDemandSwitch: Start=Planting; End=FinalLeaf
        AirTemperatureFunction TemperatureEffect
          XYPairs: X=[0, 26, 35]; Y=[1, 1, 1]
        PhaseLookup RootFrontVelocity
          PhaseLookupValue: Start=Peeping; End=FinalLeaf
            Constant: Value=10
        PhaseLookup PartitionFraction
          PhaseLookupValue: Start=Emergence; End=TuberInitiation
            Constant: Value=0.3
          PhaseLookupValue: Start=TuberInitiation; End=FinalLeaf
            Constant: Value=0.05
          PhaseLookupValue: Start=FinalLeaf; End=FullSenescence
            Constant: Value=0
        Constant MaximumNConc: Value=0.01
        LinearInterpolationFunction MaxDailyNUptake: XProperty=[Root].Length
          XYPairs: X=[0, 0.02]; Y=[0, 6]
        Constant MinimumNConc: Value=0.01
        LinearInterpolationFunction KLModifier: XProperty=[Leaf].LAI
          XYPairs: X=[0, 3]; Y=[1, 1]
        LinearInterpolationFunction SenescenceRate: XProperty=[Leaf].FractionDied
          XYPairs: X=[0, 1]; Y=[0, 0.1]
        LinearInterpolationFunction NUptakeSWFactor: XProperty=[Root].RWC
          XYPairs: X=[0, 0.25, 1]; Y=[0, 1, 1]
        LinearInterpolationFunction KNO3: XProperty=[Root].RootLengthDenisty
          XYPairs: X=[0, 0.003]; Y=[0.03, 0.03]
        LinearInterpolationFunction KNH4: XProperty=[Root].RootLengthDenisty
          XYPairs: X=[0, 0.003]; Y=[0.03, 0.03]
        Folder BiomassRemovalDefaults
          OrganBiomassRemovalType Harvest: FractionRemoved=0; FractionToResidue=0.2
          OrganBiomassRemovalType Cut: FractionRemoved=0; FractionToResidue=0.3
          OrganBiomassRemovalType Prune: FractionRemoved=0; FractionToResidue=0.1
          OrganBiomassRemovalType Graze: FractionRemoved=0; FractionToResidue=0.15
          OrganBiomassRemovalType Thin: FractionRemoved=0; FractionToResidue=0.05
      Leaf: CurrentExpandingLeaf=34; StartFractionExpanded=0.83819; FractionNextleafExpanded=0.926641; _ExpandedNodeNo=34.9266; DeadNodesYesterday=0; MaxCover=1; Albedo=0.26; Gsmax=0.03; R50=200; FRGR=0; PotentialEP=0; KDead=0.3; FractionDied=0
        VariableReference ThermalTime: VariableName=[Phenology].ThermalTime.Value
        LeafCohort InitialLeaf1: Rank=1; Area=900
        LeafCohort InitialLeaf2: Rank=2; Area=600
        LeafCohort InitialLeaf3: Rank=3; Area=300
        LeafCohortParameters CohortParameters
          Constant SenessingLeafRelativeSize: Value=1; Units=0-1
          LinearInterpolationFunction MaxArea: XProperty=[Structure].RelativeNodeApperance
            XYPairs: X=[0, 0.15, 0.3, 0.44, 0.59, 0.73]; Y=[2000, 18000, 27000, 15000, 6000, 1500]
          LinearInterpolationFunction GrowthDuration: XProperty=[Structure].RelativeNodeApperance
            XYPairs: X=[0, 0.3, 0.4, 1]; Y=[200, 400, 400, 400]
          LinearInterpolationFunction LagDuration: XProperty=[Structure].RelativeNodeApperance
            XYPairs: X=[0, 0.15, 0.3, 0.4, 0.73, 1]; Y=[350, 350, 350, 350, 350, 20]
          LinearInterpolationFunction SenescenceDuration: XProperty=[Structure].RelativeNodeApperance
            XYPairs: X=[0, 0.15, 0.3, 0.4, 0.73, 1]; Y=[350, 350, 350, 350, 350, 100]
          Constant DetachmentLagDuration: Value=1000000
          Constant DetachmentDuration: Value=1000000
          LinearInterpolationFunction SpecificLeafAreaMax: XProperty=[Structure].RelativeNodeApperance
            XYPairs: X=[0, 1]; Y=[40000, 25000]
          Constant SpecificLeafAreaMin: Value=25000
          Constant StructuralFraction: Value=0.5
          Constant MaximumNConc: Value=0.07
          Constant MinimumNConc: Value=0.03
          Constant InitialNConc: Value=0
          Constant NReallocationFactor: Value=1
          Constant NRetranslocationFactor: Value=0.01
          LinearInterpolationFunction ExpansionStress: XProperty=[Potato].WaterSupplyDemandRatio
            XYPairs: X=[0.5, 1]; Y=[0, 1]
          Constant CriticalNConc: Value=0.05
          Constant DMRetranslocationFactor: Value=0.5
          LinearInterpolationFunction ShadeInducedSenescenceRate: XProperty=[Leaf].CohortCurrentRankCoverAbove
            XYPairs: X=[0, 0.5, 0.8, 1]; Y=[0, 0, 0, 0.03]
          Constant NonStructuralFraction: Value=0.2
        RUEModel Photosynthesis
          Constant RUE: Value=1.2
          RUECO2Function FCO2: PhotosyntheticPathway=C3
          LinearInterpolationFunction FN: XProperty=[Leaf].Fn
            XYPairs: X=[0, 1, 1.5]; Y=[1, 1, 1]
          WeightedTemperatureFunction FT: MaximumTemperatureWeighting=0.5
            XYPairs: X=[2, 12, 24, 34]; Y=[0, 1, 1, 0]
          LinearInterpolationFunction FW: XProperty=[Leaf].Fw
            XYPairs: X=[0, 0.4, 1.5]; Y=[0, 1, 1]
          LinearInterpolationFunction FVPD: XProperty=[Leaf].Photosynthesis.VPD
            XYPairs: X=[0, 10, 50]; Y=[1, 1, 1]
          VariableReference RadnInt: VariableName=[Leaf].RadIntTot
        MinimumFunction FRGRFunction
          VariableReference RUE_FT: VariableName=[Leaf].Photosynthesis.FT.Value
          MinimumFunction Others
            VariableReference RUE_FN: VariableName=[Leaf].Photosynthesis.FN.Value
            VariableReference RUE_FVPD: VariableName=[Leaf].Photosynthesis.FVPD.Value
        MultiplyFunction ExtinctionCoeff
          Constant: Value=0.8
          LinearInterpolationFunction: XProperty=[Potato].WaterSupplyDemandRatio
            XYPairs: X=[0, 1]; Y=[0.5, 1]
        LinearInterpolationFunction FrostFraction: XProperty=[Weather].MinT
          XYPairs: X=[-1, 0]; Y=[0, 0]
        CompositeBiomass Live: Propertys=[[Leaf].CohortLive]
        CompositeBiomass Dead: Propertys=[[Leaf].CohortDead]
        CompositeBiomass Total: Propertys=[[Leaf].Live, [Leaf].Dead]
        ArrayBiomass CohortArrayLive: Propertys=[[Leaf].Live]; ArraySize=[Leaf].MaxNodeNo
        ArrayBiomass CohortArrayDead: Propertys=[[Leaf].Dead]; ArraySize=[Leaf].MaxNodeNo
        Folder BiomassRemovalDefaults: same as Replacements.Potato.Root.BiomassRemovalDefaults
      GenericAboveGroundOrgan Stem
        InternodeDemandFunction DMDemandFunction
          Constant InterNodeWt: Value=0.2
        Constant NReallocationFactor: Value=0
        Constant NRetranslocationFactor: Value=0.05
        PhaseBasedSwitch NitrogenDemandSwitch: Start=Planting; End=FinalLeaf
        Constant DMRetranslocationFactor: Value=0
        Constant StructuralFraction: Value=1
        LinearInterpolationFunction MaximumNConc: XProperty=[Phenology].Stage
          XYPairs: X=[3, 4, 5.3]; Y=[0.06, 0.05, 0.025]
        Constant MinimumNConc: Value=0.006
        Biomass Live
        Biomass Dead
        Folder BiomassRemovalDefaults: same as Replacements.Potato.Root.BiomassRemovalDefaults
      CompositeBiomass AboveGround: Propertys=[[Leaf].Live, [Leaf].Dead, [Stem].Live, [Stem].Dead]
      CompositeBiomass BelowGround: Propertys=[[Root].Live, [Root].Dead, [Tuber].Live, [Tuber].Dead]
      CompositeBiomass Total
        Propertys=[[Leaf].Live, [Leaf].Dead, [Stem].Live, [Stem].Dead, [Root].Live, [Root].Dead, [Tuber].Live, [Tuber].Dead]
      CompositeBiomass TotalLive: Propertys=[[Leaf].Live, [Stem].Live, [Root].Live, [Tuber].Live]
      CompositeBiomass TotalDead: Propertys=[[Leaf].Dead, [Stem].Dead, [Root].Dead, [Tuber].Dead]
      Cultivar JerseyBenny
        Command:
          [Structure].MainStemFinalNodeNumber.Value = 19
          [Structure].BranchingRate.Potential_Branching_Rate.XYPairs.X = 0,6,7,10,11
          [Structure].BranchingRate.Potential_Branching_Rate.XYPairs.Y = 0,0,0.5,0.5,0
          [Tuber].DMDemandFunction.OrganNumber.OrganNumberPerStem.Value = 3
          [Tuber].DryMatterContent.XYPairs.Y = 0.13,0.2
      Cultivar IlamHardy
        Command:
          [Structure].MainStemFinalNodeNumber.Value = 26
          [Tuber].DryMatterContent.XYPairs.Y = 0.13,0.18
          [Phenology].Vegetative.Target.Value = 200
      Cultivar Horizon
        Command:
          [Structure].MainStemFinalNodeNumber.Value = 28
          [Tuber].DryMatterContent.XYPairs.Y = 0.12,0.16
      Cultivar Karaka
        Command:
          [Structure].MainStemFinalNodeNumber.Value = 29
          [Tuber].DryMatterContent.XYPairs.Y = 0.13,0.2
      Cultivar Nooksac
        Command:
          [Structure].MainStemFinalNodeNumber.Value = 36
          [Tuber].DryMatterContent.XYPairs.Y = 0.13,0.21
      Cultivar RedRascal
        Command:
          [Tuber].DryMatterContent.XYPairs.Y = 0.13,0.2
      Cultivar Rua
        Command:
          [Structure].MainStemFinalNodeNumber.Value = 29
          [Tuber].DryMatterContent.XYPairs.Y = 0.13,0.21
          [Structure].MainStemNodeAppearanceRate.Phyllochron.XYPairs.X = 0,0.15,0.74,0.75,1
          [Structure].MainStemNodeAppearanceRate.Phyllochron.XYPairs.Y = 5,40,40,60,60
          [Structure].BranchingRate.Potential_Branching_Rate.XYPairs.X = 0,6,7,20,21
          [Structure].BranchingRate.Potential_Branching_Rate.XYPairs.Y = 0,0,0.5,0.5,0
      Cultivar Nadine
        Command:
          [Structure].MainStemFinalNodeNumber.Value = 29
          [Tuber].DryMatterContent.XYPairs.Y = 0.11,0.15
      Cultivar RussetBurbank: Command=[Structure].MainStemFinalNodeNumber.Value = 34
      Cultivar Coliban
        Command:
          [Tuber].DryMatterContent.XYPairs.Y = 0.10,0.19
          [Phenology].Vegetative.Target.Value = 200
      Cultivar Others
        Alias Fianna
        Alias RussetRanger
        Alias Moonlight
        Alias Agria
        Alias Bondi
        Alias Crop39
    Report: EventNames=[Clock].DoReport
      VariableNames:
        [Clock].Today
        [ExtraVariables].Script.AccumDenit
        [ExtraVariables].Script.AccumDetach
        [ExtraVariables].Script.AccumDrainage
        [ExtraVariables].Script.AccumEO
        [ExtraVariables].Script.AccumEP
        [ExtraVariables].Script.AccumES
        [ExtraVariables].Script.AccumFert
        [ExtraVariables].Script.AccumIrrigation
        [ExtraVariables].Script.AccumLeach
        [ExtraVariables].Script.AccumMineralisation
        [ExtraVariables].Script.AccumOutflowLat
        [ExtraVariables].Script.AccumPlantN
        [ExtraVariables].Script.AccumRainfall
        [ExtraVariables].Script.AccumRunoff
        [ExtraVariables].Script.AccumTtemerg
        [ExtraVariables].Script.BiomN
        [ExtraVariables].Script.DeltaSoilMineralN
        [ExtraVariables].Script.DeltaSoilOMN
        [ExtraVariables].Script.DeltaSurfaceOMN
        [ExtraVariables].Script.DltNMinRes
        [ExtraVariables].Script.DltNMinTot
        [ExtraVariables].Script.DUL
        [ExtraVariables].Script.FomN
        [ExtraVariables].Script.HumN
        [ExtraVariables].Script.OutFlowLat
        [ExtraVariables].Script.MineralN
        [ExtraVariables].Script.SoilNitrogenContent
        [ExtraVariables].Script.SoilWaterDeficit
        [ExtraVariables].Script.SWC
        [MicroClimate].net_radn
        [MicroClimate].peta
        [MicroClimate].petr
        [Potato].AboveGround.N
        [Potato].Arbitrator.NDemand
        [Potato].Arbitrator.TotalPotentialNO3Uptake
        [Potato].Arbitrator.DMDemand
        [Potato].Arbitrator.DMSupply
        [Potato].Arbitrator.DMSinkLimitation
        [Potato].Arbitrator.DMNutrientLimitation
        [Potato].BelowGround.N
        [Potato].Leaf.AppearedCohortNo
        [Potato].Leaf.CoverDead
        [Potato].Leaf.CoverGreen
        [Potato].Leaf.CoverTotal
        [Potato].Leaf.Dead.N
        [Potato].Leaf.Dead.NConc
        [Potato].Leaf.DeadCohortNo
        [Potato].Leaf.ExpandedCohortNo
        [Potato].Leaf.ExpandingCohortNo
        [Potato].Leaf.Fn
        [Potato].Leaf.Fw
        [Potato].Leaf.LAI
        [Potato].Leaf.LAIDead
        [Potato].Leaf.LeafCohortParameters.MaximumNConc.Value
        [Potato].Leaf.LeafCohortParameters.MinimumNConc.Value
        [Potato].Leaf.Live.N
        [Potato].Leaf.Live.Wt
        [Potato].Leaf.Live.NConc
        [Potato].Leaf.Photosynthesis.FT.Value
        [Potato].Leaf.Photosynthesis.FVPD.Value
        [Potato].Leaf.PlantAppearedGreenLeafNo
        [Potato].Leaf.SenescingCohortNo
        [Potato].Leaf.SpecificArea
        [Potato].Leaf.Transpiration
        [Potato].Leaf.WaterDemand
        [Potato].Phenology.CurrentPhaseName
        [Potato].Phenology.Stage
        [Potato].Phenology.Stage
        [Potato].Root.Dead.N
        [Potato].Root.Dead.NConc
        [Potato].Root.Dead.Wt
        [Potato].Root.Depth
        [Potato].Root.Live.N
        [Potato].Root.Live.NConc
        [Potato].Root.Live.Wt
        [Potato].Root.MaximumNConc.Value
        [Potato].Root.MinimumNConc.Value
        [Potato].Root.NUptake
        [Potato].Root.WaterSupply
        [Potato].Root.WaterUptake
        [Potato].Stem.Dead.N
        [Potato].Stem.Dead.NConc
        [Potato].Stem.Live.N
        [Potato].Stem.Live.NConc
        [Potato].Stem.Live.NonStructuralWt
        [Potato].Stem.Live.StructuralWt
        [Potato].Stem.Live.Wt
        [Potato].Stem.MaximumNConc.Value
        [Potato].Stem.MinimumNConc.Value
        [Potato].Structure.Height
        [Potato].Structure.MainStemNodeNo
        [Potato].Structure.PlantTotalNodeNo
        [Potato].Structure.PrimaryBudTotalNodeNo
        [Potato].Structure.TotalStemPopn
        [Potato].Total.N
        [Potato].TotalDead.N
        [Potato].TotalLive.N
        [Potato].TotalLive.Wt
        [Potato].Tuber.Dead.N
        [Potato].Tuber.Dead.NConc
        [Potato].Tuber.Dead.Wt
        [Potato].Tuber.DryMatterContent.Value
        [Potato].Tuber.Live.N
        [Potato].Tuber.Live.NConc
        [Potato].Tuber.Live.Wt
        [Potato].Tuber.LiveFWt
        [Potato].Tuber.MaximumNConc.Value
        [Potato].Tuber.MinimumNConc.Value
        [PotatoPlantAndHarvest].Script.FinalTag
        [PotatoPlantAndHarvest].Script.Harvested
        [PotatoPlantAndHarvest].Script.ReadyForHarvest
        [Soil].NO3N
        [Soil].SoilWater.Drainage
        [Soil].SoilWater.Eo
        [Soil].SoilWater.Es
        [Soil].SoilWater.pond
        [Soil].SoilWater.Runoff
        [Soil].SoilWater.SWmm
        [Weather].MaxT
        [Weather].MinT
  DataStore
    Input: FileName=Observed\potato_observations.txt
    Input InputRadInd: FileName=Observed\Potato_radint_observations.txt
    Input InputNodeNo: FileName=Observed\cultivar_nodenumber.txt
    PredictedObserved TimeCoarseData: PredictedTableName=Report; ObservedTableName=Input; FieldNameUsedForMatch=Clock.Today
      Tests: POName=TimeCoarseData
        AcceptedStats:
          Name                                n    Slope      Intercept   SEslope     SEintercept  R2          RMSE     NSE        ME          MAE       RSR
          ExtraVariables.Script.AccumTtemerg  208  0.968272   -24.8445    0.00687395  6.28883      0.989725    69.0927  0.977531   -49.9183    51.9667   0.149535
          Potato.Leaf.LAI                     146  1.00657    -0.0679376  0.0510226   0.164832     0.729927    1.0088   0.624169   -0.0496804  0.785553  0.610947
          Potato.Leaf.Live.Wt                 234  0.324854   33.893      0.0411379   5.4456       0.211844    80.43    -0.111899  -39.1507    51.2517   1.05221
          Potato.Leaf.SpecificArea            146  0.0315589  30470.2     0.0594766   1746.53      0.00195138  6198.34  -0.704057  2406.12     4369.79   1.30092
          Potato.Stem.Live.N                  144  0.17417    1.98424     0.0649169   0.201429     0.0482465   2.07431  -0.282521  -0.0841173  1.48616   1.12855
          Potato.Stem.Live.Wt                 243  0.232286   67.0603     0.0334485   5.10363      0.166745    88.1311  0.0498105  -27.2996    59.4032   0.972769
          Potato.TotalLive.N                  184  1.05366    0.699188    0.0570314   1.07342      0.652228    6.81724  0.370575   1.59782     5.09222   0.791204
          Potato.TotalLive.Wt                 281  0.764182   373.423     0.0364719   39.7963      0.611428    488.409  0.509929   175.581     298.294   0.698804
          Potato.Tuber.Live.N                 190  1.10076    -0.192913   0.027401    0.373974     0.89566     3.28058  0.835966   0.913869    2.53023   0.403944
          Potato.Tuber.Live.Wt                295  0.99244    -5.06545    0.016117    15.4308      0.92827     162.831  0.923499   -10.7732    115.543   0.276119
          Potato.Tuber.LiveFWt                259  0.992006   20.8768     0.0192459   89.6059      0.911798    861.108  0.904732   -8.91992    601.18    0.308059
        AcceptedStatsName=Name n Slope Intercept SEslope SEintercept R2 RMSE NSE ME MAE RSR
    PredictedObserved FinalYieldData: PredictedTableName=Report; ObservedTableName=Input; FieldNameUsedForMatch=PotatoPlantAndHarvest.Script.FinalTag
      Tests: POName=FinalYieldData
        AcceptedStats:
          Name                                n   Slope     Intercept  SEslope    SEintercept  R2        RMSE     NSE        ME        MAE      RSR
          ExtraVariables.Script.AccumTtemerg  29  1.13909   -275.823   0.0345519  49.2628      0.97576   105.171  0.869928   -81.6987  84.2757  0.354382
          Potato.Stem.Live.Wt                 4   0.97517   55.7067    0.456704   47.8303      0.695086  55.2089  -4.76201   53.1698   53.1698  2.07882
          Potato.TotalLive.N                  25  1.10813   5.61426    0.1749     3.01256      0.63574   9.32593  -0.866457  7.32415   8.4374   1.33858
          Potato.TotalLive.Wt                 35  0.394676  1148.91    0.0976749  116.483      0.330999  771.23   -0.371318  547.092   547.092  1.15418
          Potato.Tuber.Live.N                 33  1.11799   1.43926    0.0869272  1.51599      0.842169  4.75705  0.512366   3.33358   4.43709  0.687646
          Potato.Tuber.Live.Wt                39  1.0581    -5.70034   0.0506308  62.1228      0.921898  153.341  0.883571   60.634    128.621  0.336814
          Potato.Tuber.LiveFWt                39  1.06881   -83.4377   0.052064   307.597      0.91929   730.46   0.874061   297.636   557.645  0.350299
        AcceptedStatsName=Name n Slope Intercept SEslope SEintercept R2 RMSE NSE ME MAE RSR
    TimeSeriesStats: TableName=PredictedObserved
    PredictedObserved NodeAppearance: PredictedTableName=Report; ObservedTableName=InputNodeNo; FieldNameUsedForMatch=Clock.Today
      Tests: POName=NodeAppearance
        AcceptedStats:
          {Name=Potato.Leaf.AppearedCohortNo, n=120, Slope=0.984051, Intercept=-1.0557, SEslope=0.0139366, SEintercept=0.324257, R2=0.976879, RMSE=1.88545, NSE=0.948121, ME=-1.4025, MAE=1.56583, RSR=0.226819}
        AcceptedStatsName=Name n Slope Intercept SEslope SEintercept R2 RMSE NSE ME MAE RSR
    PredictedObserved RadnInt: PredictedTableName=Report; ObservedTableName=InputRadInd; FieldNameUsedForMatch=Clock.Today
  Memo Development Experiments
    #Model development

    A range of excelent experimental data has been collected by Plant and Food Research over a long period and was available for fitting thet growth and development parameters for the potato model.

    * **ABlock** experiment was used for fitting leaf appearance and size parameters and biomass production and partitioning
    * **Baxters** experiment was used for fitting branching parameters
    * **FUE** experiment was used for fitting nitrogen responses
    * **FSP** experiment was used for fitting growth and development parameters in cooler situations
    * **Parilla** experiment was used for fitting growth and development parameters in hotter situations

    In combination these experiments provide an excelent data set for quantifying the growth and development of potato crops in response to environment.  The major gap in the development of the potato model is good data sets quantifying water stress responses.
  Experiment ABlock
    Memo
      #The Potato Cultivar Experiment

      This trial was run in A Block of the Plant and Food Research farm on a templeton silt loam, which is a deep, stone free soil of high plant available water capacity (160 mm/m).  8 cultivars of potato were planted representing a range of commercially important varieties in New Zealand:

      * Russet Burbank is a main crop variety grown for processing into fries
      * Jersey is a short variety grown for early table potato production
      * Red Rascal is a main crop table potato variety
      * Horizon is a main crop tabel variety
      * Ilam hardy is commonly grown as an early table variety
      * Karaka is a crisping variety
      * Nooksac is a potato variety
      * Rua is also a potato variety

      All potatoes were planted on 20/10/2003 and irrigated, fertiliser and pesticide were applied to ensure the crop remaind unstressed and healthy.  Each variety was intensively sampled throughout the growth period to provide data for developing cultivar parameters for different varieties.
    Factors
      Factor Cv
        Factor Burbank
          Specifications:
            [PotatoPlantAndHarvest].Script.CultivarName=RussetBurbank
            [PotatoPlantAndHarvest].Script.StemNumberPerSeedTuber=2.2
            [PotatoPlantAndHarvest].Script.PlantingDepth=120
        Factor Horizon
          Specifications:
            [PotatoPlantAndHarvest].Script.CultivarName=Horizon
            [PotatoPlantAndHarvest].Script.StemNumberPerSeedTuber=3.2
            [PotatoPlantAndHarvest].Script.PlantingDepth=135
        Factor IlamHardy
          Specifications:
            [PotatoPlantAndHarvest].Script.CultivarName=IlamHardy
            [PotatoPlantAndHarvest].Script.StemNumberPerSeedTuber=4.63
            [PotatoPlantAndHarvest].Script.PlantingDepth=135
        Factor JerseyBenny
          Specifications:
            [PotatoPlantAndHarvest].Script.CultivarName=JerseyBenny
            [PotatoPlantAndHarvest].Script.StemNumberPerSeedTuber=3.6
            [PotatoPlantAndHarvest].Script.PlantingDepth=160
        Factor Karaka
          Specifications:
            [PotatoPlantAndHarvest].Script.CultivarName=Karaka
            [PotatoPlantAndHarvest].Script.StemNumberPerSeedTuber=3
            [PotatoPlantAndHarvest].Script.PlantingDepth=135
        Factor Nooksac
          Specifications:
            [PotatoPlantAndHarvest].Script.CultivarName=Nooksac
            [PotatoPlantAndHarvest].Script.StemNumberPerSeedTuber=2.3
            [PotatoPlantAndHarvest].Script.PlantingDepth=165
        Factor RedRascal
          Specifications:
            [PotatoPlantAndHarvest].Script.CultivarName=RedRascal
            [PotatoPlantAndHarvest].Script.StemNumberPerSeedTuber=4.87
            [PotatoPlantAndHarvest].Script.PlantingDepth=140
        Factor Rua
          Specifications:
            [PotatoPlantAndHarvest].Script.CultivarName=Rua
            [PotatoPlantAndHarvest].Script.StemNumberPerSeedTuber=2.55
            [PotatoPlantAndHarvest].Script.PlantingDepth=140
    Simulation RussetBurbank: Area=0; Slope=0
      Weather: FileName=lincoln.met
      Clock: StartDate=2003-10-20; EndDate=2004-06-05
      Summary
      SoilArbitrator Soil Arbitrator
      Zone Field: Area=0; Slope=0
        Soil: SoilType=Sedementary; LocalName=Lincoln; Latitude=0; Longitude=0
          Water
            Thickness  BD   AirDry  LL15  DUL   SAT
            100        1.2  0.08    0.16  0.33  0.5
            200        1.2  0.16    0.16  0.33  0.5
            300        1.2  0.15    0.15  0.31  0.44
            300        1.2  0.13    0.13  0.27  0.46
            300        1.2  0.15    0.15  0.3   0.44
            300        1.2  0.15    0.15  0.3   0.44
            SoilCrop PotatoSoil: LL=[0.13, 0.13, 0.1, 0.15, 0.3, 0.3]; KL=[0.1, 0.06, 0.04, 0.01, 0, 0]; XF=[1, 1, 1, 1, 0, 0]
          SoilWater: residueinterception=0; SummerDate=1-Nov; SummerU=9; SummerCona=4.4; WinterDate=1-Apr; WinterU=9; WinterCona=4.4; DiffusConst=88; DiffusSlope=35.4; Salb=0.18; CN2Bare=0; CNRed=-9E-05; CNCov=0; slope=0; discharge_width=0; catchment_area=0; max_pond=0
            Thickness  SWCON  KLAT
            100        0.55   0
            200        0.55   0
            300        0.55   0
            300        0.55   0
            300        0.55   0
            300        0.55   0
          SoilNitrogen: fom_type=[default, manure, mucuna, lablab, shemp, stable]; fract_carb=[0.2, 0.3, 0.54, 0.57, 0.45, 0]; fract_cell=[0.7, 0.3, 0.37, 0.37, 0.47, 0.1]; fract_lign=[0.1, 0.4, 0.09, 0.06, 0.08, 0.9]; wfpsN2N2O_x=[22, 88]; wfpsN2N2O_y=[0.1, 1]; oc=[3.51204, 2.4888, 1.19986, 1.03067, 0.470328, 0.470127]
          SoilOrganicMatter: RootCN=30; RootWt=3000; SoilCN=11.5; EnrACoeff=7.4; EnrBCoeff=0.2; OCUnits=Total
            Thickness  OC    FBiom  FInert
            100        3.5   0.025  0.3
            200        2.5   0.025  0.4
            300        1.2   0.015  0.75
            300        1.03  0.01   0.9
            300        0.47  0.01   0.96
            300        0.47  0.01   0.96
          Analysis: Thickness=[100, 200, 300, 300, 300, 300]; PH=[6.6, 6.2, 5.7, 5.5, 5.5, 5.5]; PHUnits=Water; BoronUnits=HotWater
          InitialWater Initial water: PercentMethod=FilledFromTop; FractionFull=1
          Sample: NO3Units=kgha; NH4Units=kgha; SWUnits=Volumetric; OCUnits=Total; PHUnits=Water
            Thickness  NO3   NH4
            100        40    0.1
            200        30    0.1
            300        14    0.1
            300        14    0.1
            300        1.38  0.1
            300        1.38  0.1
        SurfaceOrganicMatter: PondActive=no; ReportAdditions=no; ReportRemovals=no; PoolName=Wheat; type=Wheat; mass=2000; standing_fraction=0; cnr=80; CriticalResidueWeight=2000; OptimumDecompTemp=20; MaxCumulativeEOS=20; CNRatioDecompCoeff=0.277; CNRatioDecompThreshold=25; TotalLeachRain=25; MinRainToLeach=10; CriticalMinimumOrganicC=0.004; DefaultCPRatio=0; DefaultStandingFraction=0; StandingExtinctCoeff=0.5; FractionFaecesAdded=0.5
          Pools:
            {PoolName=Wheat, ResidueType=Wheat, Mass=2000, CNRatio=80, StandingFraction=0}
          ResidueTypes: LoadFromResource=ResidueTypes
          TillageTypes TillageTypesList
        Irrigation
        Fertiliser
        MicroClimate: a_interception=0; b_interception=1; c_interception=0; d_interception=0; soil_albedo=0.23; air_pressure=1010; soil_emissivity=0.96; sun_angle=15; soil_heat_flux_fraction=0.4; night_interception_fraction=0.5; windspeed_default=3; refheight=2; albedo=0.26; emissivity=0.96; gsmax=0.01; r50=200
        Plant Potato: CropType=Potato
        Folder Management
          Manager ExtraVariables
```csharp
using System;
using Models.Core;
using System.Collections.Generic;
using System.Text;
using Models.Soils;
using Models.PMF;
using Models;
using System.Xml.Serialization;
using APSIM.Shared.Utilities;

namespace Models
{
	[Serializable] 
	public class Script : Model
	{
		[Link] Clock Clock;
		[Link] Soils.Soil Soil;
		[Link] Models.SurfaceOM.SurfaceOrganicMatter SOM;
		[Link] Weather Met;
		[Link] Fertiliser Fert;
		[Link] Irrigation Irrig;
		[Link] Plant Potato;
		[Link] Zone zone;
					
		[XmlIgnore] public bool InitialDay { get; set; }
		
		[XmlIgnore] public double AccumPlantN { get; set; }
		[XmlIgnore] public double AccumMineralisation { get; set; }
		[XmlIgnore] public double AccumDenit { get; set; }
		[XmlIgnore] public double AccumFert { get; set; }
		[XmlIgnore] public double AccumLeach { get; set; }
		[XmlIgnore] public double AccumDetach { get; set; }
		[XmlIgnore] public double DeltaSoilOMN { get; set; }
		[XmlIgnore] public double DeltaSurfaceOMN { get; set; }
		[XmlIgnore] public double DeltaSoilMineralN { get; set; }
		[XmlIgnore] public double SoilNitrogenContent { get; set; }
		
		[XmlIgnore] public double AccumEO { get; set; }
		[XmlIgnore] public double AccumEP { get; set; }
		[XmlIgnore] public double AccumES { get; set; }
		[XmlIgnore] public double AccumDrainage { get; set; }
		[XmlIgnore] public double AccumRunoff { get; set; }
		[XmlIgnore] public double AccumOutflowLat { get; set; }
		[XmlIgnore] public double AccumIrrigation { get; set; }
		[XmlIgnore] public double AccumRainfall { get; set; }
		[XmlIgnore] public double SoilWaterDeficit { get; set; }
		
		[XmlIgnore] public double AccumTtemerg { get; set; }
		
		[XmlIgnore] public double  InitialSoilOMN { get; set; }
		[XmlIgnore] public double  InitialSurfaceOMN { get; set; }
		[XmlIgnore] public double  InitialMineralN { get; set; }
		
		[XmlIgnore] public double SWC { get; set; }
		[XmlIgnore] public double DUL { get; set; }
		[XmlIgnore] public double OutFlowLat { get; set; }

		[XmlIgnore] public double FomN { get; set; }
		[XmlIgnore] public double BiomN { get; set; }
		[XmlIgnore] public double HumN { get; set; }
		[XmlIgnore] public double OrganicN { get; set; }
		[XmlIgnore] public double NO3N { get; set; }
		[XmlIgnore] public double NH4N { get; set; }
		[XmlIgnore] public double UreaN { get; set; }
		[XmlIgnore] public double MineralN { get; set; }
		[XmlIgnore] public double DltNMinRes { get; set; }
		[XmlIgnore] public double DltNMinTot { get; set; }
		
		[EventSubscribe("Commencing")]
		private void OnSimulationCommencing(object sender, EventArgs e)
		{
			InitialDay = true;
		}
		
		[EventSubscribe("DoManagement")]
		private void OnDoManagement(object sender, EventArgs e)
		{
			//!!!!!! Nitrogen balance components !!!!!!
			//!!!!!!^^^^^^^^^^^^^^^^^^^^^^^^^^^^^!!!!!!
			FomN = MathUtilities.Sum(Soil.SoilNitrogen.FOMN);
			HumN = MathUtilities.Sum(Soil.SoilNitrogen.HumicN);
			BiomN = MathUtilities.Sum(Soil.SoilNitrogen.MicrobialN);
			OrganicN = FomN + HumN + BiomN;
			NO3N = MathUtilities.Sum(Soil.NO3N);
			NH4N = MathUtilities.Sum(Soil.NH4N);
			UreaN = MathUtilities.Sum(Soil.SoilNitrogen.urea);
			MineralN = NO3N + NH4N + UreaN; 
			DltNMinRes = MathUtilities.Sum(Soil.SoilNitrogen.dlt_n_min_res);
			DltNMinTot = MathUtilities.Sum(Soil.SoilNitrogen.MineralisedN);
			int layers = Soil.Thickness.Length;
			if (InitialDay == true)
			{
				InitialSurfaceOMN = SOM.N;
				InitialSoilOMN = OrganicN;
				InitialMineralN = MineralN;
				InitialDay = false;
			}
			AccumFert += Fert.NitrogenApplied;
			DeltaSurfaceOMN = SOM.N - InitialSurfaceOMN;
			AccumLeach = AccumLeach - Soil.SoilWater.LeachNH4 - Soil.SoilWater.LeachNO3 - Soil.SoilWater.LeachUrea; //Fails
			AccumMineralisation += MathUtilities.Sum(Soil.SoilNitrogen.MineralisedN);
			AccumDenit -= MathUtilities.Sum(Soil.SoilNitrogen.Denitrification);
			AccumPlantN -= (double)zone.Get("Potato.Root.NUptake");
			DeltaSoilOMN = OrganicN - InitialSoilOMN;
			DeltaSoilMineralN = MineralN - InitialMineralN;
			SoilNitrogenContent = MineralN;
			
			//!!!!!! Water balance components !!!!!!
			//!!!!!!^^^^^^^^^^^^^^^^^^^^^^^^^^!!!!!!

			AccumIrrigation += Irrig.IrrigationApplied;
			AccumRainfall += Met.Rain;
			AccumEP -= (double)zone.Get("Potato.Leaf.Transpiration");
			SoilWaterDeficit = (SWC - DUL);
			double OutFlowLat = MathUtilities.Sum(Soil.SoilWater.outflow_lat);
			AccumOutflowLat -= OutFlowLat;
			
			//!!!!!! Thermal time calculation !!!!!!
			//!!!!!! ^^^^^^^^^^^^^^^^^^^^^^^^ !!!!!!
			if (Potato.Phenology.Stage >= 3)
				AccumTtemerg += Potato.Phenology.ThermalTime.Value;
		}
		
		[EventSubscribe("DoManagementCalculations")]
		private void OnDoManagementCalculations(object sender, EventArgs e)
		{
			FomN = MathUtilities.Sum(Soil.SoilNitrogen.FOMN);
			HumN = MathUtilities.Sum(Soil.SoilNitrogen.HumicN);
			BiomN = MathUtilities.Sum(Soil.SoilNitrogen.MicrobialN);
			
			
			AccumEO -= Soil.SoilWater.Eo;
			AccumES -= Soil.SoilWater.Es; 
			AccumDrainage -= Soil.SoilWater.Drainage;
			AccumRunoff -= Soil.SoilWater.Runoff;
			SWC = MathUtilities.Sum(Soil.SoilWater.SWmm);
			DUL = MathUtilities.Sum(Soil.SoilWater.DULmm);
		}
	}
}
```
          Operations
            2003-10-20  [Fertiliser].Apply(100, Fertiliser.Types.UreaN, 0);
            2003-11-25  [Fertiliser].Apply(69, Fertiliser.Types.UreaN,0);
            2003-11-26  [Irrigation].Apply(15);
            2003-12-04  [Irrigation].Apply(50);
            2003-12-16  [Irrigation].Apply(15);
            2003-12-22  [Irrigation].Apply(50);
            2003-12-30  [Irrigation].Apply(50);
            2004-01-08  [Irrigation].Apply(50);
            2004-01-21  [Irrigation].Apply(50);
            2004-01-31  [Irrigation].Apply(50);
            2004-02-27  [Irrigation].Apply(25);
          Manager PotatoPlantAndHarvest
            PlantingDate = 2003-10-20
            CultivarName = RussetBurbank
            RowSpace = 280
            RowWidth = 770
            PlantingDepth = 120
            StemNumberPerSeedTuber = 2.2
            SetFinalLeafNumber = 0
            HarvestDate = 2004-06-01
```csharp
using System;
using Models.Core;
using Models.PMF;
using APSIM.Shared.Utilities;
using System.Xml.Serialization;
using Models.PMF.Interfaces;
        
namespace Models
{
	[Serializable] 
	[System.Xml.Serialization.XmlInclude(typeof(Model))]
	public class Script : Model
	{
		[Link] Plant Potato;
		[Link] Clock Clock;
		[Link] Zone zone;
		[Link] Summary Summary;
		
		[Description("Planting Date")]
		public DateTime PlantingDate { get; set; }
		[Description("Cultivar")]
		[Display(DisplayType = DisplayAttribute.DisplayTypeEnum.CultivarName)]
		public string CultivarName { get; set; }
		[Description("Spacing (mm) between plants within rows")]
		public double RowSpace { get; set; }
		[Description("Spacing (mm) between rows")]
		public double RowWidth { get; set; }
		[Description("Depth (mm) tubers are planted")]
		public double PlantingDepth { get; set; }
		[Description("Number of stems per seed tuber")]
		public double StemNumberPerSeedTuber { get; set; }
		[Description("Final leaf number.  Leave at 0 if not known")]
		public double SetFinalLeafNumber { get; set; }
		[Description("HarvestDate Date")]
		public DateTime HarvestDate { get; set; }
		
		[XmlIgnore] public string FinalTag { get; set; }
		[XmlIgnore] public bool Harvested { get; set; }
		[XmlIgnore] public bool ReadyForHarvest { get; set; }
		
		[XmlIgnore] private RemovalFractions Remove { get; set; }
		
		[EventSubscribe("Commencing")]
		private void OnSimulationCommencing(object sender, EventArgs e)
		{
			Remove = new RemovalFractions();
			FinalTag = "";
			Harvested = false;
			ReadyForHarvest = false;
		}
		
		[EventSubscribe("DoManagement")]
		private void OnDoManagement(object sender, EventArgs e)
		{
			double PlantPopulation = 1 / ((RowWidth / 1000) * (RowSpace / 1000));

			if (Clock.Today.Date == PlantingDate)
				Potato.Sow(population: PlantPopulation, cultivar: CultivarName, depth: PlantingDepth, rowSpacing: 150, budNumber: StemNumberPerSeedTuber);
			
			if (ReadyForHarvest == true)
			{
				//Remove.SetFractionRemoved("Leaf", 0);
				//Remove.SetFractionToResidue("Leaf", 1);
				Remove.SetFractionRemoved("Stem", 0);
				Remove.SetFractionToResidue("Stem", 1);
				Remove.SetFractionRemoved("Root", 0.0);
				Remove.SetFractionToResidue("Root", 0.5);
				Remove.SetFractionRemoved("Tuber", 1);
				Remove.SetFractionToResidue("Tuber", 0);
				Potato.RemoveBiomass("Harvest", Remove);
				Potato.EndCrop();
				ReadyForHarvest = false;
				Harvested = true;
				Summary.WriteMessage(this, "is working");
			}
			FinalTag = "";   
			
			if (SetFinalLeafNumber > 0)
				zone.Set("Potato.Structure.MainStemFinalNodeNumber.Value", SetFinalLeafNumber);
			if (SetFinalLeafNumber > 80)
				Summary.WriteWarning(this, "Model is producing > 80 leaves which is guite alot.  Is this expected?  If not check you haven't set a invalid number in the Final Leaf Number box in" + this.Name);
		}
		
		[EventSubscribe("DoManagementCalculations")]
		private void OnDoManagementCalculations(object sender, EventArgs e)
		{
			if ((Clock.Today == HarvestDate) && (Harvested == false))
			{
				FinalTag = "yield";
				ReadyForHarvest = true;
			}
			//if ((Potato.Phenology.Stage >= 7) && (Harvested == false))
			//{
			//	FinalTag = "yield";
			//	ReadyForHarvest = true;
			//}
		}
	}
}
```
        Report: EventNames=[Clock].DoReport
          VariableNames:
            [Clock].Today
            [ExtraVariables].Script.AccumTtemerg
            Potato.Phenology.CurrentPhaseName
            Potato.Phenology.Stage
            Potato.Phenology.Stage
            [ExtraVariables].Script.AccumPlantN
            [ExtraVariables].Script.AccumMineralisation
            [ExtraVariables].Script.AccumDenit
            [ExtraVariables].Script.AccumFert
            [ExtraVariables].Script.AccumLeach
            [ExtraVariables].Script.AccumDetach
            [ExtraVariables].Script.DeltaSoilOMN
            [ExtraVariables].Script.DeltaSurfaceOMN
            [ExtraVariables].Script.DeltaSoilMineralN
            Potato.Root.NSupplyUptake
            [Soil].SoilWater.Eo
            [Soil].SoilWater.Es
            [ExtraVariables].Script.SWC
            [ExtraVariables].Script.DUL
            [Soil].SoilWater.Drainage
            [Soil].SoilWater.Runoff
            [ExtraVariables].Script.OutFlowLat
            [Soil].SoilWater.pond
            [ExtraVariables].Script.AccumEO
            [ExtraVariables].Script.AccumEP
            [ExtraVariables].Script.AccumES
            [ExtraVariables].Script.AccumDrainage
            [ExtraVariables].Script.AccumRunoff
            [ExtraVariables].Script.AccumRainfall
            [ExtraVariables].Script.AccumIrrigation
            [ExtraVariables].Script.AccumOutflowLat
            [ExtraVariables].Script.SoilWaterDeficit
            Potato.AboveGround.Wt
            Potato.BelowGround.Wt
            Potato.Total.Wt
            Potato.TotalDead.Wt
            Potato.TotalLive.Wt
            Potato.Leaf.Dead.Wt
            Potato.Leaf.Live.Wt
            Potato.Stem.Dead.Wt
            Potato.Stem.Live.Wt
            Potato.Tuber.Dead.Wt
            Potato.Tuber.Live.Wt
            Potato.Root.Dead.Wt
            Potato.Root.Live.Wt
            Potato.AboveGround.N
            Potato.BelowGround.N
            Potato.Total.N
            Potato.TotalLive.N
            Potato.TotalDead.N
            Potato.Leaf.Dead.N
            Potato.Leaf.Live.N
            Potato.Stem.Dead.N
            Potato.Stem.Live.N
            Potato.Tuber.Dead.N
            Potato.Tuber.Live.N
            Potato.Root.Live.N
            Potato.Root.Dead.N
            Potato.Leaf.Live.NConc
            Potato.Leaf.Dead.NConc
            Potato.Stem.Live.NConc
            Potato.Stem.Dead.NConc
            Potato.Tuber.Live.NConc
            Potato.Tuber.Dead.NConc
            Potato.Root.Live.NConc
            Potato.Root.Dead.NConc
            Potato.Root.WaterSupply
            Potato.Root.WaterUptake
            Potato.Leaf.Transpiration
            Potato.Leaf.WaterDemand
            Potato.Root.Depth
            Potato.Leaf.CoverGreen
            Potato.Leaf.CoverTotal
            Potato.Leaf.CoverDead
            Potato.Leaf.LAI
            Potato.Leaf.LAIDead
            Potato.Structure.Height
            Potato.Leaf.Fn
            Potato.Leaf.Fw
            Potato.Leaf.Photosynthesis.FT.Value
            Potato.Leaf.Photosynthesis.FVPD.Value
            Potato.Structure.PlantTotalNodeNo
            Potato.Structure.TotalStemPopn
            Potato.Leaf.PlantAppearedGreenLeafNo
            Potato.Leaf.ExpandingCohortNo
            Potato.Leaf.AppearedCohortNo
            Potato.Leaf.DeadCohortNo
            Potato.Structure.MainStemNodeNo
            Potato.Leaf.SenescingCohortNo
            Potato.Structure.PrimaryBudTotalNodeNo
            Potato.Leaf.LeafCohortParameters.MinimumNConc.Value
            Potato.Stem.MinimumNConc.Value
            Potato.Tuber.MinimumNConc.Value
            Potato.Root.MinimumNConc.Value
            Potato.Leaf.LeafCohortParameters.MaximumNConc.Value
            Potato.Stem.MaximumNConc.Value
            Potato.Tuber.MaximumNConc.Value
            Potato.Root.MaximumNConc.Value
            Potato.Stem.Live.StructuralWt
            Potato.Stem.Live.NonStructuralWt
            Potato.Leaf.SpecificArea
            Potato.Leaf.ExpandedCohortNo
            [Soil].SoilWater.SWmm
            [Soil].NO3N
            [ExtraVariables].Script.SoilNitrogenContent
            Potato.Arbitrator.NDemand
            [MicroClimate].net_radn
            [MicroClimate].peta
            [MicroClimate].petr
            [ExtraVariables].Script.FomN
            [ExtraVariables].Script.HumN
            [ExtraVariables].Script.BiomN
            [ExtraVariables].Script.DltNMinRes
            [ExtraVariables].Script.DltNMinTot
            [PotatoPlantAndHarvest].Script.FinalTag
            Potato.Tuber.LiveFWt
            Potato.Tuber.DryMatterContent.Value
            [Potato].Arbitrator.NO3NSupply
            [Potato].Arbitrator.NH4NSupply
            [Potato].Root.NUptake
            [PotatoPlantAndHarvest].Script.Harvested
            [PotatoPlantAndHarvest].Script.ReadyForHarvest
  Experiment Baxters
    Memo
      #Sowing date and Sowing Density Experiment

      This trial was run in Baxters block of the Plant and Food Research farm on a shallow templeton silt loam, which had a compacted layer from 30-60 cm above a stony sub soil below 60cm.  Russet Burbank potatoes were planted on 3 dates:

      * 14 October 1999
      * 2 November 1999
      * 23 November 1999

      Two populations were established at each planting:

      * 2 Plants/m<sup>2</sup>
      * 4 Plants/m<sup>2</sup>

      Fertiliser and pesticide were applied to ensure the crop remaind unstressed and healthy but irrigation was somewhat limited and did constrain growth at times.  Each treatment intensively sampled throughout the growth period to provide data for developing cultivar parameters for different varieties.  The same seed line was used for each sowing date so seed was becoming progressively more mature with leater plantings.  As such the stem number per plant increaesed from 3 - 5.7 from the early to the late sowing and and the final leaf number decreased.  The differences in canopy and production between the population treatments were very small becasue the low population treatment branched extensively.  This combination of different stem numbers and populations provided an excelent data set for parameterising branching.
    Factors
      Factor Sow
        Factor 14Oct
          Specifications:
            [PotatoPlantAndHarvest].Script.PlantingDate=1998-10-14
            [PotatoPlantAndHarvest].Script.PlantingDepth=200
            [PotatoPlantAndHarvest].Script.StemNumberPerSeedTuber=3.0
            [PotatoPlantAndHarvest].Script.SetFinalLeafNumber=40
        Factor 2Nov
          Specifications:
            [PotatoPlantAndHarvest].Script.PlantingDate=1998-11-02
            [PotatoPlantAndHarvest].Script.PlantingDepth=160
            [PotatoPlantAndHarvest].Script.StemNumberPerSeedTuber=3.8
            [PotatoPlantAndHarvest].Script.SetFinalLeafNumber=34
        Factor 23Nov
          Specifications:
            [PotatoPlantAndHarvest].Script.PlantingDate=1998-11-23
            [PotatoPlantAndHarvest].Script.PlantingDepth=120
            [PotatoPlantAndHarvest].Script.StemNumberPerSeedTuber=5.7
            [PotatoPlantAndHarvest].Script.SetFinalLeafNumber=28
      Factor Pop
        Factor 4: Specifications=[PotatoPlantAndHarvest].Script.RowSpace=300
        Factor 2: Specifications=[PotatoPlantAndHarvest].Script.RowSpace=600
    Simulation BaxtersBase: Area=0; Slope=0
      Weather: FileName=lincoln.met
      Clock: StartDate=1998-10-14; EndDate=1999-05-01
      Summary
      SoilArbitrator Soil Arbitrator
      Zone Field: Area=0; Slope=0
        Soil: Latitude=0; Longitude=0
          Analysis: Thickness=[100, 200, 300, 300, 300, 300]; PH=[6.6, 6.2, 5.7, 5.5, 5.5, 5.5]; PHUnits=Water; BoronUnits=HotWater
          InitialWater Initial water: PercentMethod=EvenlyDistributed; FractionFull=1
          Water
            Thickness  BD   AirDry  LL15  DUL   SAT
            100        1.2  0.08    0.13  0.33  0.5
            200        1.2  0.13    0.13  0.33  0.5
            300        1.2  0.1     0.1   0.31  0.44
            300        1.2  0.06    0.06  0.15  0.46
            300        1.2  0.04    0.04  0.1   0.44
            300        1.2  0.02    0.02  0.06  0.44
            SoilCrop wheatSoil: LL=[0.13, 0.13, 0.1, 0.08, 0.11, 0.11]; KL=[0.06, 0.06, 0.06, 0.06, 0.06, 0.06]; XF=[1, 1, 1, 1, 1, 1]
            SoilCrop PotatoSoil: LL=[0.13, 0.13, 0.27, 0.27, 0.3, 0.3]; KL=[0.1, 0.06, 0.03, 0.01, 0, 0]; XF=[1, 1, 0.1, 0, 0, 0]
          SoilWater: residueinterception=0; SummerDate=1-Nov; SummerU=9; SummerCona=4.4; WinterDate=1-Apr; WinterU=9; WinterCona=4.4; DiffusConst=88; DiffusSlope=35.4; Salb=0.18; CN2Bare=68; CNRed=20; CNCov=0.8; slope=0; discharge_width=0; catchment_area=0; max_pond=0
            Thickness  SWCON  KLAT
            100        0.55   0
            200        0.55   0
            300        0.55   0
            300        0.55   0
            300        0.55   0
            300        0.55   0
          SoilNitrogen: fom_type=[default, manure, mucuna, lablab, shemp, stable]; fract_carb=[0.2, 0.3, 0.54, 0.57, 0.45, 0]; fract_cell=[0.7, 0.3, 0.37, 0.37, 0.47, 0.1]; fract_lign=[0.1, 0.4, 0.09, 0.06, 0.08, 0.9]; wfpsN2N2O_x=[22, 88]; wfpsN2N2O_y=[0.1, 1]; oc=[1.84181, 1.46521, 1.1998, 1.03011, 0.470339, 0.470139]
          SoilOrganicMatter: RootCN=30; RootWt=3000; SoilCN=11.5; EnrACoeff=7.4; EnrBCoeff=0.2; OCUnits=Total
            Thickness  OC    FBiom  FInert
            100        1.82  0.025  0.3
            200        1.47  0.025  0.4
            300        1.2   0.015  0.75
            300        1.03  0.01   0.9
            300        0.47  0.01   0.96
            300        0.47  0.01   0.96
          Sample Initial nitrogen: NO3Units=kgha; NH4Units=ppm; SWUnits=Volumetric; OCUnits=Total; PHUnits=Water
            Thickness  NO3  NH4
            100        217  0
            200        30   0
            300        5    0
            300        5    0
            300        0    0
            300        0    0
        Irrigation
        Fertiliser
        MicroClimate: same as ABlock.RussetBurbank.Field.MicroClimate
        Plant Potato: CropType=Potato
        Report: EventNames=[Clock].DoReport
          VariableNames:
            [Clock].Today
            [ExtraVariables].Script.AccumTtemerg
            Potato.Phenology.CurrentPhaseName
            Potato.Phenology.Stage
            [ExtraVariables].Script.AccumPlantN
            [ExtraVariables].Script.AccumMineralisation
            [ExtraVariables].Script.AccumDenit
            [ExtraVariables].Script.AccumFert
            [ExtraVariables].Script.AccumLeach
            [ExtraVariables].Script.AccumDetach
            [ExtraVariables].Script.DeltaSoilOMN
            [ExtraVariables].Script.DeltaSurfaceOMN
            [ExtraVariables].Script.DeltaSoilMineralN
            Potato.Root.NSupplyUptake
            [Soil].SoilWater.Eo
            [Soil].SoilWater.Es
            [ExtraVariables].Script.SWC
            [ExtraVariables].Script.DUL
            [Soil].SoilWater.Drainage
            [Soil].SoilWater.Runoff
            [ExtraVariables].Script.OutFlowLat
            [Soil].SoilWater.pond
            [ExtraVariables].Script.AccumEO
            [ExtraVariables].Script.AccumEP
            [ExtraVariables].Script.AccumES
            [ExtraVariables].Script.AccumDrainage
            [ExtraVariables].Script.AccumRunoff
            [ExtraVariables].Script.AccumRainfall
            [ExtraVariables].Script.AccumIrrigation
            [ExtraVariables].Script.AccumOutflowLat
            [ExtraVariables].Script.SoilWaterDeficit
            Potato.AboveGround.Wt
            Potato.BelowGround.Wt
            Potato.Total.Wt
            Potato.TotalDead.Wt
            Potato.TotalLive.Wt
            Potato.Leaf.Dead.Wt
            Potato.Leaf.Live.Wt
            Potato.Stem.Dead.Wt
            Potato.Stem.Live.Wt
            Potato.Tuber.Dead.Wt
            Potato.Tuber.Live.Wt
            Potato.Root.Dead.Wt
            Potato.Root.Live.Wt
            Potato.AboveGround.N
            Potato.BelowGround.N
            Potato.Total.N
            Potato.TotalLive.N
            Potato.TotalDead.N
            Potato.Leaf.Dead.N
            Potato.Leaf.Live.N
            Potato.Stem.Dead.N
            Potato.Stem.Live.N
            Potato.Tuber.Dead.N
            Potato.Tuber.Live.N
            Potato.Root.Live.N
            Potato.Root.Dead.N
            Potato.Leaf.Live.NConc
            Potato.Leaf.Dead.NConc
            Potato.Stem.Live.NConc
            Potato.Stem.Dead.NConc
            Potato.Tuber.Live.NConc
            Potato.Tuber.Dead.NConc
            Potato.Root.Live.NConc
            Potato.Root.Dead.NConc
            Potato.Root.WaterSupply
            Potato.Root.WaterUptake
            Potato.Leaf.Transpiration
            Potato.Leaf.WaterDemand
            Potato.Root.Depth
            Potato.Leaf.CoverGreen
            Potato.Leaf.CoverTotal
            Potato.Leaf.CoverDead
            Potato.Leaf.LAI
            Potato.Leaf.LAIDead
            Potato.Structure.Height
            Potato.Leaf.Fn
            Potato.Leaf.Fw
            Potato.Leaf.Photosynthesis.FT.Value
            Potato.Leaf.Photosynthesis.FVPD.Value
            Potato.Structure.PlantTotalNodeNo
            Potato.Structure.TotalStemPopn
            Potato.Leaf.PlantAppearedGreenLeafNo
            Potato.Leaf.ExpandingCohortNo
            Potato.Leaf.AppearedCohortNo
            Potato.Leaf.DeadCohortNo
            Potato.Structure.MainStemNodeNo
            Potato.Leaf.SenescingCohortNo
            Potato.Structure.PrimaryBudTotalNodeNo
            Potato.Leaf.LeafCohortParameters.MinimumNConc.Value
            Potato.Stem.MinimumNConc.Value
            Potato.Tuber.MinimumNConc.Value
            Potato.Root.MinimumNConc.Value
            Potato.Leaf.LeafCohortParameters.MaximumNConc.Value
            Potato.Stem.MaximumNConc.Value
            Potato.Tuber.MaximumNConc.Value
            Potato.Root.MaximumNConc.Value
            Potato.Stem.Live.StructuralWt
            Potato.Stem.Live.NonStructuralWt
            Potato.Leaf.SpecificArea
            Potato.Leaf.ExpandedCohortNo
            [Soil].SoilWater.SWmm
            [Soil].NO3N
            [ExtraVariables].Script.SoilNitrogenContent
            Potato.Arbitrator.NDemand
            [MicroClimate].net_radn
            [MicroClimate].peta
            [MicroClimate].petr
            [ExtraVariables].Script.FomN
            [ExtraVariables].Script.HumN
            [ExtraVariables].Script.BiomN
            [ExtraVariables].Script.DltNMinRes
            [ExtraVariables].Script.DltNMinTot
            [PotatoHarvestRule].Script.FinalTag
            Potato.Tuber.LiveFWt
            Potato.Tuber.DryMatterContent.Value
        SurfaceOrganicMatter surface organic matter: ReportAdditions=no; ReportRemovals=no; PoolName=wheat; type=wheat; mass=2000; standing_fraction=0; cnr=80; CriticalResidueWeight=2000; OptimumDecompTemp=20; MaxCumulativeEOS=20; CNRatioDecompCoeff=0.277; CNRatioDecompThreshold=25; TotalLeachRain=25; MinRainToLeach=10; CriticalMinimumOrganicC=0.004; DefaultCPRatio=0; DefaultStandingFraction=0; StandingExtinctCoeff=0.5; FractionFaecesAdded=0.5
          Pools:
            {PoolName=wheat, ResidueType=wheat, Mass=2000, CNRatio=80, StandingFraction=0}
          ResidueTypes: LoadFromResource=ResidueTypes
        Folder Management
          Operations
            1998-10-02  [Irrigation].Apply(40);
            1998-10-26  [Irrigation].Apply(70);
            1998-12-15  [Irrigation].Apply(70);
            1998-12-29  [Irrigation].Apply(10);
            1998-12-30  [Irrigation].Apply(55);
            1999-01-07  [Irrigation].Apply(50);
            1999-01-21  [Irrigation].Apply(40);
            1999-02-10  [Irrigation].Apply(28);
            1999-02-19  [Irrigation].Apply(15);
            1999-03-09  [Irrigation].Apply(25);
            1998-12-29  [Fertiliser].Apply(150, Fertiliser.Types.UreaN, 10);
          Manager ExtraVariables
            script: same as in ABlock.RussetBurbank.Field.Management.ExtraVariables
          Manager PotatoPlantAndHarvest
            PlantingDate = 1998-10-14
            CultivarName = RussetBurbank
            RowSpace = 300
            RowWidth = 770
            PlantingDepth = 200
            StemNumberPerSeedTuber = 3
            SetFinalLeafNumber = 34
            HarvestDate = 1999-04-27
```csharp
using System;
using Models.Core;
using Models.PMF;
using APSIM.Shared.Utilities;
using System.Xml.Serialization;
        
namespace Models
{
	[Serializable] 
	[System.Xml.Serialization.XmlInclude(typeof(Model))]
	public class Script : Model
	{
		[Link] Plant Potato;
		[Link] Clock Clock;
		[Link] Zone zone;
		[Link] Summary Summary;
		
		[Description("Planting Date")]
		public DateTime PlantingDate { get; set; }
		[Description("Cultivar")]
		[Display(DisplayType = DisplayAttribute.DisplayTypeEnum.CultivarName)]
		public string CultivarName { get; set; }
		[Description("Spacing (mm) between plants within rows")]
		public double RowSpace { get; set; }
		[Description("Spacing (mm) between rows")]
		public double RowWidth { get; set; }
		[Description("Depth (mm) tubers are planted")]
		public double PlantingDepth { get; set; }
		[Description("Number of stems per seed tuber")]
		public double StemNumberPerSeedTuber { get; set; }
		[Description("Final leaf number.  Leave at 0 if not known")]
		public int SetFinalLeafNumber { get; set; }
		[Description("HarvestDate Date")]
		public DateTime HarvestDate { get; set; }
		
		[XmlIgnore] public string FinalTag { get; set; }
		[XmlIgnore] public bool Harvested { get; set; }
		[XmlIgnore] public bool ReadyForHarvest { get; set; }
		
		[EventSubscribe("Commencing")]
		private void OnSimulationCommencing(object sender, EventArgs e)
		{
			FinalTag = "";
			Harvested = false;
			ReadyForHarvest = false;
		}
		
		[EventSubscribe("DoManagement")]
		private void OnDoManagement(object sender, EventArgs e)
		{
			double PlantPopulation = 1 / ((RowWidth / 1000) * (RowSpace / 1000));

			if (Clock.Today.Date == PlantingDate)
				Potato.Sow(population: PlantPopulation, cultivar: CultivarName, depth: PlantingDepth, rowSpacing: 150, budNumber: StemNumberPerSeedTuber);
			
			if (ReadyForHarvest == true)
			{
				Potato.Harvest();
				Potato.EndCrop();
				ReadyForHarvest = false;
				Harvested = true;
				Summary.WriteMessage(this, "is working");
			}
			FinalTag = "";   
			
			if (SetFinalLeafNumber > 0)
				zone.Set("Potato.Structure.MaximumNodeNumber", SetFinalLeafNumber);
			if (SetFinalLeafNumber > 80)
				Summary.WriteWarning(this, "Model is producing > 80 leaves which is guite alot.  Is this expected?  If not check you haven't set a invalid number in the Final Leaf Number box in" + this.Name);
		}
		
		[EventSubscribe("DoManagementCalculations")]
		private void OnDoManagementCalculations(object sender, EventArgs e)
		{
			if ((Clock.Today == HarvestDate) && (Harvested == false))
			{
				FinalTag = "yield";
				ReadyForHarvest = true;
			}
			if ((Potato.Phenology.Stage >= 7) && (Harvested == false))
			{
				FinalTag = "yield";
				ReadyForHarvest = true;
			}
		}
	}
}
```
  Experiment FUE
    Memo
      #Fertiliser Use Efficiency experiment (FUE)

      This trial was run in A Block of the Plant and Food Research farm on a templeton silt loam, which is a deep, stone free soil of high plant available water capacity (160 mm/m).  Russet burbank potatos were planted on the 21st of October 1999 and irrigation and pesticide were applied to avoid stresses.  Different nitrogen fertiliser treatments were applied:

      * Nil
      * 150 kg/ha applied at planting
      * 300 kg/ha applied at planting
      * 275 kg/ha in split application of 25kg/ha weekly
    Factors
      Factor Fertiliser: Specifications=[FertiliserApplications]
        Operations 300early
          1999-10-19  [Fertiliser].Apply(150, Fertiliser.Types.UreaN, 10);
          1999-12-01  [Fertiliser].Apply(150, Fertiliser.Types.UreaN, 10);
        Operations 150early
          1999-10-19  [Fertiliser].Apply(150, Fertiliser.Types.UreaN, 10);
        Operations 275split
          1999-10-19  [Fertiliser].Apply(100, Fertiliser.Types.UreaN, 10);
          1999-12-01  [Fertiliser].Apply(25, Fertiliser.Types.UreaN, 10);
          1999-12-13  [Fertiliser].Apply(25, Fertiliser.Types.UreaN, 10);
          2000-01-17  [Fertiliser].Apply(13, Fertiliser.Types.UreaN, 10);
          2000-01-21  [Fertiliser].Apply(13, Fertiliser.Types.UreaN, 10);
          2000-01-24  [Fertiliser].Apply(13, Fertiliser.Types.UreaN, 10);
          2000-01-31  [Fertiliser].Apply(13, Fertiliser.Types.UreaN, 10);
          2000-02-07  [Fertiliser].Apply(13, Fertiliser.Types.UreaN, 10);
          2000-02-14  [Fertiliser].Apply(13, Fertiliser.Types.UreaN, 10);
          2000-02-21  [Fertiliser].Apply(13, Fertiliser.Types.UreaN, 10);
          2000-02-28  [Fertiliser].Apply(13, Fertiliser.Types.UreaN, 10);
          2000-03-06  [Fertiliser].Apply(13, Fertiliser.Types.UreaN, 10);
          2000-03-13  [Fertiliser].Apply(13, Fertiliser.Types.UreaN, 10);
          2000-03-20  [Fertiliser].Apply(13, Fertiliser.Types.UreaN, 10);
          2000-03-27  [Fertiliser].Apply(13, Fertiliser.Types.UreaN, 10);
        Operations Nil
    Simulation FUE_base: Area=0; Slope=0
      Weather: FileName=lincoln.met
      Clock: StartDate=1999-10-19; EndDate=2000-06-30
      Summary
      SoilArbitrator Soil Arbitrator
      Zone paddock: Area=1; Slope=0
        Soil: Latitude=0; Longitude=0
          Analysis: Thickness=[100, 200, 300, 300, 300, 300]; PH=[6.6, 6.2, 5.7, 5.5, 5.5, 5.5]; PHUnits=Water; BoronUnits=HotWater
          InitialWater Initial water: PercentMethod=EvenlyDistributed; FractionFull=1
          Water
            Thickness  BD   AirDry  LL15  DUL   SAT
            100        1.2  0.08    0.16  0.33  0.5
            200        1.2  0.16    0.16  0.33  0.5
            300        1.2  0.14    0.14  0.31  0.44
            300        1.2  0.11    0.11  0.27  0.46
            300        1.2  0.16    0.16  0.3   0.44
            300        1.2  0.15    0.15  0.3   0.44
            SoilCrop wheatSoil: LL=[0.13, 0.13, 0.1, 0.08, 0.11, 0.11]; KL=[0.06, 0.06, 0.06, 0.06, 0.06, 0.06]; XF=[1, 1, 1, 1, 1, 1]
            SoilCrop PotatoSoil: LL=[0.13, 0.13, 0.1, 0.15, 0.3, 0.3]; KL=[0.1, 0.06, 0.04, 0.01, 0, 0]; XF=[1, 1, 1, 1, 0, 0]
          SoilWater: same as Baxters.BaxtersBase.Field.Soil.SoilWater
          SoilNitrogen: fom_type=[default, manure, mucuna, lablab, shemp, stable]; fract_carb=[0.2, 0.3, 0.54, 0.57, 0.45, 0]; fract_cell=[0.7, 0.3, 0.37, 0.37, 0.47, 0.1]; fract_lign=[0.1, 0.4, 0.09, 0.06, 0.08, 0.9]; wfpsN2N2O_x=[22, 88]; wfpsN2N2O_y=[0.1, 1]; oc=[4.48224, 3.47597, 1.1998, 1.03068, 0.470324, 0.470122]
          SoilOrganicMatter: RootCN=30; RootWt=3000; SoilCN=11.5; EnrACoeff=7.4; EnrBCoeff=0.2; OCUnits=Total
            Thickness  OC    FBiom  FInert
            100        4.5   0.025  0.3
            200        3.5   0.025  0.3
            300        1.2   0.015  0.75
            300        1.03  0.01   0.9
            300        0.47  0.01   0.96
            300        0.47  0.01   0.96
          Sample Initial nitrogen: NO3Units=kgha; NH4Units=kgha; SWUnits=Volumetric; OCUnits=Total; PHUnits=Water
            Thickness  NO3  NH4
            100        15   0.12
            100        15   0.24
            200        41   0.36
            200        10   0.36
            200        40   0.36
            700        5    0.36
        Fertiliser
        Irrigation
        SurfaceOrganicMatter surface organic matter: PoolName=wheat; type=wheat; mass=0; standing_fraction=0; cnr=60; CriticalResidueWeight=2000; OptimumDecompTemp=20; MaxCumulativeEOS=20; CNRatioDecompCoeff=0.277; CNRatioDecompThreshold=25; TotalLeachRain=25; MinRainToLeach=10; CriticalMinimumOrganicC=0.004; DefaultCPRatio=0; DefaultStandingFraction=0; StandingExtinctCoeff=0.5; FractionFaecesAdded=0.5
          Pools:
            {PoolName=wheat, ResidueType=wheat, Mass=0, CNRatio=60, StandingFraction=0}
          ResidueTypes: LoadFromResource=ResidueTypes
        MicroClimate: a_interception=0; b_interception=0; c_interception=0; d_interception=0; soil_albedo=0.23; air_pressure=1010; soil_emissivity=0.96; sun_angle=15; soil_heat_flux_fraction=0.4; night_interception_fraction=0.5; windspeed_default=3; refheight=2; albedo=0.15; emissivity=0.96; gsmax=0.01; r50=200
        Plant Potato: CropType=Potato
        Folder Manager folder
          Operations IrrigationApplications
            1999-12-09  [Irrigation].Apply(55);
            1999-12-23  [Irrigation].Apply(25);
            1999-12-30  [Irrigation].Apply(25);
            2000-01-21  [Irrigation].Apply(38);
            2000-02-10  [Irrigation].Apply(50);
            2000-02-16  [Irrigation].Apply(25);
            2000-03-01  [Irrigation].Apply(38);
          Operations FertiliserApplications: same as FUE.Factors.Fertiliser.275split
          Manager PotatoPlantAndHarvest
            PlantingDate = 1999-10-21
            CultivarName = RussetBurbank
            RowSpace = 280
            RowWidth = 770
            PlantingDepth = 170
            StemNumberPerSeedTuber = 5
            SetFinalLeafNumber = 28
            HarvestDate = 2000-04-03
```csharp
using System;
using Models.Core;
using Models.PMF;
using APSIM.Shared.Utilities;
using System.Xml.Serialization;
        
namespace Models
{
	[Serializable] 
	[System.Xml.Serialization.XmlInclude(typeof(Model))]
	public class Script : Model
	{
		[Link] Plant Potato;
		[Link] Clock Clock;
		[Link] Zone zone;
		[Link] Summary Summary;
		
		[Description("Planting Date")]
		public DateTime PlantingDate { get; set; }
		[Description("Cultivar")]
		[Display(DisplayType = DisplayAttribute.DisplayTypeEnum.CultivarName)]
		public string CultivarName { get; set; }
		[Description("Spacing (mm) between plants within rows")]
		public double RowSpace { get; set; }
		[Description("Spacing (mm) between rows")]
		public double RowWidth { get; set; }
		[Description("Depth (mm) tubers are planted")]
		public double PlantingDepth { get; set; }
		[Description("Number of stems per seed tuber")]
		public double StemNumberPerSeedTuber { get; set; }
		[Description("Final leaf number.  Leave at 0 if not known")]
		public double SetFinalLeafNumber { get; set; }
		[Description("HarvestDate Date")]
		public DateTime HarvestDate { get; set; }
		
		[XmlIgnore] public string FinalTag { get; set; }
		[XmlIgnore] public bool Harvested { get; set; }
		[XmlIgnore] public bool ReadyForHarvest { get; set; }
		
		
		[EventSubscribe("Commencing")]
		private void OnSimulationCommencing(object sender, EventArgs e)
		{
			FinalTag = "";
			Harvested = false;
			ReadyForHarvest = false;
		}
		
		[EventSubscribe("DoManagement")]
		private void OnDoManagement(object sender, EventArgs e)
		{
			double PlantPopulation = 1 / ((RowWidth / 1000) * (RowSpace / 1000));

			if (Clock.Today.Date == PlantingDate)
				Potato.Sow(population: PlantPopulation, cultivar: CultivarName, depth: PlantingDepth, rowSpacing: 150, budNumber: StemNumberPerSeedTuber);
			
			if (ReadyForHarvest == true)
			{
				Potato.Harvest();
				Potato.EndCrop();
				ReadyForHarvest = false;
				Harvested = true;
				Summary.WriteMessage(this, "is working");
			}
			FinalTag = "";   
			
			if (SetFinalLeafNumber > 0)
				zone.Set("Potato.Structure.MainStemFinalNodeNumber.Value", SetFinalLeafNumber);
			if (SetFinalLeafNumber > 80)
				Summary.WriteWarning(this, "Model is producing > 80 leaves which is guite alot.  Is this expected?  If not check you haven't set a invalid number in the Final Leaf Number box in" + this.Name);
		}
		
		[EventSubscribe("DoManagementCalculations")]
		private void OnDoManagementCalculations(object sender, EventArgs e)
		{
			if ((Clock.Today == HarvestDate) && (Harvested == false))
			{
				FinalTag = "yield";
				ReadyForHarvest = true;
			}
			if ((Potato.Phenology.Stage >= 7) && (Harvested == false))
			{
				FinalTag = "yield";
				ReadyForHarvest = true;
			}
		}
	}
}
```
        Manager ExtraVariables
          script: same as in ABlock.RussetBurbank.Field.Management.ExtraVariables
        Report: same as Baxters.BaxtersBase.Field.Report
  Experiment FSP
    Memo: same as FUE.Memo
    Factors
      Factor Nitrogen: Specifications=[operations]
        Operations 472
          2000-05-02  [Fertiliser].Apply(300, Fertiliser.Types.UreaN, 10);
          2000-06-14  [Fertiliser].Apply(170, Fertiliser.Types.UreaN, 10);
        Operations 350
          2000-05-02  [Fertiliser].Apply(180, Fertiliser.Types.UreaN, 10);
          2000-06-14  [Fertiliser].Apply(57, Fertiliser.Types.UreaN, 10);
          2000-07-10  [Fertiliser].Apply(57, Fertiliser.Types.UreaN, 10);
          2000-08-03  [Fertiliser].Apply(57, Fertiliser.Types.UreaN, 10);
        Operations 242
          2000-05-02  [Fertiliser].Apply(180, Fertiliser.Types.UreaN, 10);
          2000-06-14  [Fertiliser].Apply(46, Fertiliser.Types.UreaN, 10);
          2000-07-10  [Fertiliser].Apply(46, Fertiliser.Types.UreaN, 10);
        Operations 0
          2000-05-02  [Fertiliser].Apply(0, Fertiliser.Types.UreaN, 10);
          2000-06-14  [Fertiliser].Apply(0, Fertiliser.Types.UreaN, 10);
    Simulation FSPBase: Area=0; Slope=0
      Weather: FileName=Pukehohe.met
      Clock: StartDate=2000-05-01; EndDate=2000-12-01
      Summary
      SoilArbitrator Soil Arbitrator
      Zone Field: Area=0; Slope=0
        Soil: Latitude=0; Longitude=0
          Analysis: Thickness=[100, 200, 300, 300, 300, 300]; PH=[6.6, 6.2, 5.7, 5.5, 5.5, 5.5]; PHUnits=Water; BoronUnits=HotWater
          InitialWater Initial water: PercentMethod=EvenlyDistributed; FractionFull=1
          Water
            Thickness  BD   AirDry  LL15  DUL   SAT
            100        1.2  0.08    0.13  0.33  0.5
            200        1.2  0.08    0.13  0.33  0.5
            300        1.2  0.05    0.1   0.31  0.44
            300        1.2  0.04    0.08  0.27  0.46
            300        1.2  0.06    0.11  0.3   0.44
            300        1.2  0.06    0.11  0.3   0.44
            SoilCrop wheatSoil: LL=[0.13, 0.13, 0.1, 0.08, 0.11, 0.11]; KL=[0.06, 0.06, 0.06, 0.06, 0.06, 0.06]; XF=[1, 1, 1, 1, 1, 1]
            SoilCrop PotatoSoil: LL=[0.13, 0.13, 0.1, 0.08, 0.11, 0.11]; KL=[0.1, 0.1, 0.07, 0.05, 0.05, 0.05]; XF=[1, 1, 1, 1, 1, 1]
          SoilWater: same as Baxters.BaxtersBase.Field.Soil.SoilWater
          SoilNitrogen: fom_type=[default, manure, mucuna, lablab, shemp, stable]; fract_carb=[0.2, 0.3, 0.54, 0.57, 0.45, 0]; fract_cell=[0.7, 0.3, 0.37, 0.37, 0.47, 0.1]; fract_lign=[0.1, 0.4, 0.09, 0.06, 0.08, 0.9]; wfpsN2N2O_x=[22, 88]; wfpsN2N2O_y=[0.1, 1]; oc=[1.8494, 1.4708, 1.19956, 1.03027, 0.470379, 0.470164]
          SoilOrganicMatter: RootCN=30; RootWt=3000; SoilCN=11.5; EnrACoeff=7.4; EnrBCoeff=0.2; OCUnits=Total
            Thickness  OC    FBiom  FInert
            100        1.82  0.025  0.6
            200        1.47  0.025  0.7
            300        1.2   0.015  0.75
            300        1.03  0.01   0.9
            300        0.47  0.01   0.96
            300        0.47  0.01   0.96
          Sample Initial nitrogen: NO3Units=ppm; NH4Units=ppm; SWUnits=Volumetric; OCUnits=Total; PHUnits=Water
            Thickness  NO3  NH4
            100        15   0.1
            200        7    0.1
            300        7    0.1
            300        1    0.1
            300        1    0.1
            300        1    0.1
        Irrigation
        Fertiliser
        MicroClimate: same as ABlock.RussetBurbank.Field.MicroClimate
        Plant Potato: CropType=Potato
        Folder
          Manager PotatoPlantAndHarvest
            PlantingDate = 2000-05-02
            CultivarName = IlamHardy
            RowSpace = 280
            RowWidth = 770
            PlantingDepth = 170
            StemNumberPerSeedTuber = 3
            SetFinalLeafNumber = 34
            HarvestDate = 2000-10-16
            script: same as in FUE.FUE_base.paddock.Manager folder.PotatoPlantAndHarvest
          Manager ExtraVariables: same as ABlock.RussetBurbank.Field.Management.ExtraVariables
          Operations
            2000-05-02  [Fertiliser].Apply(300, Fertiliser.Types.UreaN, 10);
            2000-06-14  [Fertiliser].Apply(170, Fertiliser.Types.UreaN, 10);
        Report: same as Baxters.BaxtersBase.Field.Report
        SurfaceOrganicMatter surface organic matter: PoolName=wheat; type=wheat; mass=2000; standing_fraction=0; cnr=80; CriticalResidueWeight=2000; OptimumDecompTemp=20; MaxCumulativeEOS=20; CNRatioDecompCoeff=0.277; CNRatioDecompThreshold=25; TotalLeachRain=25; MinRainToLeach=10; CriticalMinimumOrganicC=0.004; DefaultCPRatio=0; DefaultStandingFraction=0; StandingExtinctCoeff=0.5; FractionFaecesAdded=0.5
          Pools:
            {PoolName=wheat, ResidueType=wheat, Mass=2000, CNRatio=80, StandingFraction=0}
          ResidueTypes: LoadFromResource=ResidueTypes
  Experiment Parilla
    Factors
      Factor Sowing
        Factor 23Nov
          Specifications:
            [PotatoPlantAndHarvest].Script.PlantingDate=2007-11-23
            [FertigationEvents]
            [FertiliserRule].Script.Day1=27
            [FertiliserRule].Script.Day2=52
            [FertiliserRule].Script.Day3=67
            [PotatoPlantAndHarvest].Script.HarvestDate=2008-03-05
          Operations FertigationEvents
            2007-11-23  [Fertiliser].Apply(0, Fertiliser.Types.UreaN, 10);
            2008-01-10  [Fertiliser].Apply(48, Fertiliser.Types.UreaN, 10);
            2008-01-29  [Fertiliser].Apply(40, Fertiliser.Types.UreaN, 10);
            2008-02-12  [Fertiliser].Apply(40, Fertiliser.Types.UreaN, 10);
            2008-02-28  [Fertiliser].Apply(40, Fertiliser.Types.UreaN, 10);
            2008-02-29  [Fertiliser].Apply(20, Fertiliser.Types.UreaN, 10);
            2008-03-06  [Fertiliser].Apply(40, Fertiliser.Types.UreaN, 10);
            2008-03-16  [Fertiliser].Apply(40, Fertiliser.Types.UreaN, 10);
        Factor 3Dec
          Specifications:
            [PotatoPlantAndHarvest].Script.PlantingDate=2007-12-03
            [FertigationEvents]
            [FertiliserRule].Script.Day1=42
            [FertiliserRule].Script.Day2=57
            [FertiliserRule].Script.Day3=72
            [PotatoPlantAndHarvest].Script.HarvestDate=2008-04-14
          Operations FertigationEvents
            2008-01-27  [Fertiliser].Apply(44, Fertiliser.Types.UreaN, 10);
            2008-02-05  [Fertiliser].Apply(44, Fertiliser.Types.UreaN, 10);
            2008-02-13  [Fertiliser].Apply(40, Fertiliser.Types.UreaN, 10);
            2008-02-27  [Fertiliser].Apply(40, Fertiliser.Types.UreaN, 10);
            2008-03-06  [Fertiliser].Apply(40, Fertiliser.Types.UreaN, 10);
            2008-03-13  [Fertiliser].Apply(40, Fertiliser.Types.UreaN, 10);
            2008-03-21  [Fertiliser].Apply(40, Fertiliser.Types.UreaN, 10);
        Factor 17Dec
          Specifications:
            [PotatoPlantAndHarvest].Script.PlantingDate=2007-12-17
            [FertigationEvents]
            [FertiliserRule].Script.Day1=28
            [FertiliserRule].Script.Day2=43
            [FertiliserRule].Script.Day3=58
            [PotatoPlantAndHarvest].Script.HarvestDate=2008-04-14
          Operations FertigationEvents: same as Parilla.Factors.Sowing.3Dec.FertigationEvents
      Factor Nitrogen
        Factor lowN
          Specifications:
            [FertiliserRule].Script.Fert1=0
            [FertiliserRule].Script.Fert2=0
            [FertiliserRule].Script.Fert3=0
        Factor medN
          Specifications:
            [FertiliserRule].Script.Fert1=37
            [FertiliserRule].Script.Fert2=38
            [FertiliserRule].Script.Fert3=25
        Factor highN
          Specifications:
            [FertiliserRule].Script.Fert1=75
            [FertiliserRule].Script.Fert2=75
            [FertiliserRule].Script.Fert3=50
    Simulation Parilla_base: Area=0; Slope=0
      Weather: FileName=Lameroo.met
      Clock: StartDate=2007-11-22; EndDate=2008-06-30
      Summary
      SoilArbitrator Soil Arbitrator
      Zone paddock: Area=1; Slope=0
        Soil: Latitude=0; Longitude=0
          Analysis: Thickness=[100, 200, 300, 300, 300, 300]; PH=[6.6, 6.2, 5.7, 5.5, 5.5, 5.5]; PHUnits=Water; BoronUnits=HotWater
          InitialWater Initial water: PercentMethod=EvenlyDistributed; FractionFull=1
          Water
            Thickness  BD   AirDry  LL15  DUL   SAT
            100        1.2  0.03    0.06  0.16  0.25
            200        1.2  0.05    0.06  0.16  0.25
            300        1.2  0.06    0.06  0.12  0.25
            300        1.2  0.06    0.06  0.12  0.25
            300        1.2  0.06    0.06  0.12  0.25
            300        1.2  0.06    0.06  0.12  0.25
            SoilCrop potatoSoil: LL=[0.06, 0.06, 0.12, 0.12, 0.12, 0.12]; KL=[0.1, 0.1, 0.07, 0.05, 0.05, 0.05]; XF=[1, 1, 1, 1, 1, 1]
          SoilWater: residueinterception=0; SummerDate=1-Nov; SummerU=9; SummerCona=4.4; WinterDate=1-Apr; WinterU=9; WinterCona=4.4; DiffusConst=88; DiffusSlope=35.4; Salb=0.18; CN2Bare=68; CNRed=20; CNCov=0.8; slope=0; discharge_width=0; catchment_area=0; max_pond=0
            Thickness  SWCON  KLAT
            100        0.9    0
            200        0.9    0
            300        0.9    0
            300        0.9    0
            300        0.9    0
            300        0.9    0
          SoilNitrogen: fom_type=[default, manure, mucuna, lablab, shemp, stable]; fract_carb=[0.2, 0.3, 0.54, 0.57, 0.45, 0]; fract_cell=[0.7, 0.3, 0.37, 0.37, 0.47, 0.1]; fract_lign=[0.1, 0.4, 0.09, 0.06, 0.08, 0.9]; wfpsN2N2O_x=[22, 88]; wfpsN2N2O_y=[0.1, 1]
            oc=[0.701784, 0.497464, 0.300229, 0.300522, 0.300326, 0.300105]
          SoilOrganicMatter: RootCN=30; RootWt=3000; SoilCN=11.5; EnrACoeff=7.4; EnrBCoeff=0.2; OCUnits=Total
            Thickness  OC   FBiom  FInert
            100        0.7  0.025  0.3
            200        0.5  0.025  0.4
            300        0.3  0.015  0.75
            300        0.3  0.01   0.9
            300        0.3  0.01   0.96
            300        0.3  0.01   0.96
          Sample Initial nitrogen: NO3Units=ppm; NH4Units=ppm; SWUnits=Volumetric; OCUnits=Total; PHUnits=Water
            Thickness  NO3       NH4
            100        21.25     0.1
            200        19.125    0.1
            300        0.555556  0.1
            300        0.555556  0.1
            300        0.555556  0.1
            300        0.555556  0.1
        Fertiliser
        Irrigation
        SurfaceOrganicMatter surface organic matter: ReportAdditions=no; ReportRemovals=no; PoolName=wheat; type=wheat; mass=0; standing_fraction=0; cnr=60; CriticalResidueWeight=2000; OptimumDecompTemp=20; MaxCumulativeEOS=20; CNRatioDecompCoeff=0.277; CNRatioDecompThreshold=25; TotalLeachRain=25; MinRainToLeach=10; CriticalMinimumOrganicC=0.004; DefaultCPRatio=0; DefaultStandingFraction=0; StandingExtinctCoeff=0.5; FractionFaecesAdded=0.5
          Pools:
            {PoolName=wheat, ResidueType=wheat, Mass=0, CNRatio=60, StandingFraction=0}
          ResidueTypes: LoadFromResource=ResidueTypes
        MicroClimate: same as FUE.FUE_base.paddock.MicroClimate
        Plant Potato: CropType=Potato
        Folder Manager folder
          Manager PotatoPlantAndHarvest
            PlantingDate = 2007-11-23
            CultivarName = Coliban
            RowSpace = 280
            RowWidth = 770
            PlantingDepth = 170
            StemNumberPerSeedTuber = 2.4
            SetFinalLeafNumber = 28
            HarvestDate = 2008-03-05
            script: same as in FUE.FUE_base.paddock.Manager folder.PotatoPlantAndHarvest
          Operations FertigationEvents
            2008-01-10  [Fertiliser].Apply(48, Fertiliser.Types.UreaN, 10);
            2008-01-29  [Fertiliser].Apply(40, Fertiliser.Types.UreaN, 10);
            2008-02-12  [Fertiliser].Apply(40, Fertiliser.Types.UreaN, 10);
            2008-02-28  [Fertiliser].Apply(40, Fertiliser.Types.UreaN, 10);
            2008-02-29  [Fertiliser].Apply(20, Fertiliser.Types.UreaN, 10);
            2008-03-06  [Fertiliser].Apply(40, Fertiliser.Types.UreaN, 10);
            2008-03-16  [Fertiliser].Apply(40, Fertiliser.Types.UreaN, 10);
          Operations IrrigationEvents
            2007-11-23  [Irrigation].Apply(9);
            2007-11-24  [Irrigation].Apply(9);
            2007-11-25  [Irrigation].Apply(9);
            2007-11-26  [Irrigation].Apply(9);
            2007-11-27  [Irrigation].Apply(9);
            2007-11-28  [Irrigation].Apply(9);
            2007-11-29  [Irrigation].Apply(9);
            2007-12-01  [Irrigation].Apply(9);
            2007-12-02  [Irrigation].Apply(9);
            2007-12-03  [Irrigation].Apply(9);
            2007-12-04  [Irrigation].Apply(9);
            2007-12-05  [Irrigation].Apply(9);
            2007-12-06  [Irrigation].Apply(9);
            2007-12-07  [Irrigation].Apply(9);
            2007-12-08  [Irrigation].Apply(9);
            2007-12-09  [Irrigation].Apply(9);
            2007-12-10  [Irrigation].Apply(9);
            2007-12-11  [Irrigation].Apply(9);
            2007-12-12  [Irrigation].Apply(9);
            2007-12-13  [Irrigation].Apply(9);
            2007-12-14  [Irrigation].Apply(9);
            2007-12-16  [Irrigation].Apply(9);
            2007-12-17  [Irrigation].Apply(9);
            2007-12-18  [Irrigation].Apply(9);
            2007-12-19  [Irrigation].Apply(9);
            2007-12-20  [Irrigation].Apply(9);
            2007-12-21  [Irrigation].Apply(9);
            2007-12-22  [Irrigation].Apply(9);
            2007-12-23  [Irrigation].Apply(9);
            2007-12-24  [Irrigation].Apply(9);
            2007-12-25  [Irrigation].Apply(9);
            2007-12-26  [Irrigation].Apply(9);
            2007-12-27  [Irrigation].Apply(9);
            2007-12-28  [Irrigation].Apply(9);
            2007-12-29  [Irrigation].Apply(9);
            2007-12-30  [Irrigation].Apply(9);
            2007-12-31  [Irrigation].Apply(9);
            2008-01-01  [Irrigation].Apply(9);
            2008-01-02  [Irrigation].Apply(9);
            2008-01-03  [Irrigation].Apply(9);
            2008-01-04  [Irrigation].Apply(9);
            2008-01-05  [Irrigation].Apply(9);
            2008-01-06  [Irrigation].Apply(9);
            2008-01-07  [Irrigation].Apply(9);
            2008-01-08  [Irrigation].Apply(9);
            2008-01-09  [Irrigation].Apply(9);
            2008-01-10  [Irrigation].Apply(9);
            2008-01-11  [Irrigation].Apply(9);
            2008-01-12  [Irrigation].Apply(9);
            2008-01-13  [Irrigation].Apply(9);
            2008-01-14  [Irrigation].Apply(9);
            2008-01-15  [Irrigation].Apply(9);
            2008-01-16  [Irrigation].Apply(9);
            2008-01-17  [Irrigation].Apply(9);
            2008-01-18  [Irrigation].Apply(9);
            2008-01-20  [Irrigation].Apply(9);
            2008-01-21  [Irrigation].Apply(9);
            2008-01-22  [Irrigation].Apply(9);
            2008-01-23  [Irrigation].Apply(9);
            2008-01-24  [Irrigation].Apply(9);
            2008-01-25  [Irrigation].Apply(9);
            2008-01-26  [Irrigation].Apply(9);
            2008-01-27  [Irrigation].Apply(9);
            2008-01-28  [Irrigation].Apply(9);
            2008-01-29  [Irrigation].Apply(9);
            2008-01-30  [Irrigation].Apply(9);
            2008-01-31  [Irrigation].Apply(9);
            2008-02-01  [Irrigation].Apply(9);
            2008-02-02  [Irrigation].Apply(9);
            2008-02-03  [Irrigation].Apply(9);
            2008-02-04  [Irrigation].Apply(9);
            2008-02-05  [Irrigation].Apply(9);
            2008-02-06  [Irrigation].Apply(9);
            2008-02-07  [Irrigation].Apply(9);
            2008-02-08  [Irrigation].Apply(9);
            2008-02-09  [Irrigation].Apply(9);
            2008-02-10  [Irrigation].Apply(9);
            2008-02-11  [Irrigation].Apply(9);
            2008-02-12  [Irrigation].Apply(9);
            2008-02-13  [Irrigation].Apply(9);
            2008-02-14  [Irrigation].Apply(9);
            2008-02-15  [Irrigation].Apply(9);
            2008-02-16  [Irrigation].Apply(9);
            2008-02-17  [Irrigation].Apply(9);
            2008-02-18  [Irrigation].Apply(9);
            2008-02-19  [Irrigation].Apply(9);
            2008-02-20  [Irrigation].Apply(9);
            2008-02-21  [Irrigation].Apply(9);
            2008-02-22  [Irrigation].Apply(9);
            2008-02-23  [Irrigation].Apply(9);
            2008-02-24  [Irrigation].Apply(9);
            2008-02-25  [Irrigation].Apply(9);
            2008-02-26  [Irrigation].Apply(9);
            2008-02-27  [Irrigation].Apply(9);
            2008-02-28  [Irrigation].Apply(9);
            2008-02-29  [Irrigation].Apply(9);
            2008-03-01  [Irrigation].Apply(9);
            2008-03-02  [Irrigation].Apply(9);
            2008-03-03  [Irrigation].Apply(9);
            2008-03-04  [Irrigation].Apply(9);
            2008-03-05  [Irrigation].Apply(9);
            2008-03-06  [Irrigation].Apply(9);
            2008-03-07  [Irrigation].Apply(9);
            2008-03-08  [Irrigation].Apply(9);
            2008-03-09  [Irrigation].Apply(9);
            2008-03-10  [Irrigation].Apply(9);
            2008-03-11  [Irrigation].Apply(9);
            2008-03-12  [Irrigation].Apply(9);
            2008-03-13  [Irrigation].Apply(9);
            2008-03-14  [Irrigation].Apply(9);
            2008-03-15  [Irrigation].Apply(9);
            2008-03-16  [Irrigation].Apply(9);
            2008-03-17  [Irrigation].Apply(9);
            2008-03-18  [Irrigation].Apply(9);
            2008-03-19  [Irrigation].Apply(9);
            2008-03-20  [Irrigation].Apply(9);
            2008-03-22  [Irrigation].Apply(9);
            2008-03-23  [Irrigation].Apply(9);
            2008-03-25  [Irrigation].Apply(9);
            2008-03-26  [Irrigation].Apply(9);
            2008-03-28  [Irrigation].Apply(9);
            2008-03-29  [Irrigation].Apply(9);
            2008-03-31  [Irrigation].Apply(9);
            2008-04-01  [Irrigation].Apply(9);
            2008-04-03  [Irrigation].Apply(9);
            2008-04-04  [Irrigation].Apply(9);
            2008-04-06  [Irrigation].Apply(9);
            2008-04-07  [Irrigation].Apply(9);
            2008-04-09  [Irrigation].Apply(9);
            2008-04-10  [Irrigation].Apply(9);
            2008-04-12  [Irrigation].Apply(9);
            2008-04-13  [Irrigation].Apply(9);
            2008-04-15  [Irrigation].Apply(9);
            2008-04-16  [Irrigation].Apply(9);
            2008-04-18  [Irrigation].Apply(9);
            2008-04-19  [Irrigation].Apply(9);
            2008-04-21  [Irrigation].Apply(9);
            2008-04-22  [Irrigation].Apply(9);
            2008-04-24  [Irrigation].Apply(9);
            2008-04-25  [Irrigation].Apply(9);
            2008-04-27  [Irrigation].Apply(9);
            2008-04-28  [Irrigation].Apply(9);
            2008-04-30  [Irrigation].Apply(9);
            2008-05-01  [Irrigation].Apply(9);
            2008-05-03  [Irrigation].Apply(9);
            2008-05-04  [Irrigation].Apply(9);
            2008-05-06  [Irrigation].Apply(9);
            2008-05-07  [Irrigation].Apply(9);
          Operations
            2000-05-02  [Fertiliser].Apply(300, Fertiliser.Types.UreaN, 10);
            2000-06-14  [Fertiliser].Apply(170, Fertiliser.Types.UreaN, 10);
          Manager FertiliserRule
            Fert1 = 37.5
            Fert2 = 37.5
            Fert3 = 25
            Day1 = 27
            Day2 = 52
            Day3 = 67
```csharp
using System;
using Models.Core;
using Models.PMF;
using APSIM.Shared.Utilities;
        
namespace Models
{
	[Serializable] 
	[System.Xml.Serialization.XmlInclude(typeof(Model))]
	public class Script : Model
	{
		[Link] Clock Clock;
		[Link] Fertiliser Fertiliser;
		[Description("N applied (kg/ha) on first fertiliser event")]
		public double Fert1 { get; set; }
		[Description("N applied (kg/ha) on 2nd fertiliser event")]
		public double Fert2 { get; set; }
		[Description("N applied (kg/ha) on 3rd fertiliser event")]
		public double Fert3 { get; set; }
		[Description("Days after sowing for first N application")]
		public double Day1 { get; set; }
		[Description("Days after sowing for second N application")]
		public double Day2 { get; set; }
		[Description("Days after sowing for third N application")]
		public double Day3 { get; set; }
                
		private double DaysAfterSowing = 0;
               
		[EventSubscribe("Sowing")]
		private void OnSowing(object sender, EventArgs e)
		{
			DaysAfterSowing = 0;
		}
		[EventSubscribe("DoManagement")]
		private void OnDoManagement(object sender, EventArgs e)
		{
			DaysAfterSowing += 1;
			if (DaysAfterSowing == Day1)
				Fertiliser.Apply(Fert1, Fertiliser.Types.UreaN, 10);
			if (DaysAfterSowing == Day2)
				Fertiliser.Apply(Fert2, Fertiliser.Types.UreaN, 10);
			if (DaysAfterSowing == Day3)
				Fertiliser.Apply(Fert3, Fertiliser.Types.UreaN, 10);
		}
	}
}
```
          Manager ExtraVariables
            script: same as in ABlock.RussetBurbank.Field.Management.ExtraVariables
        Report: same as Baxters.BaxtersBase.Field.Report
  Memo Validation Experiments
    #Model development

    A range of excelent experimental data has been collected by Plant and Food Research over a long period and was available for fitting thet growth and development parameters for the potato model.

    * **ABlock** experiment was used for fitting leaf appearance and size parameters and biomass production and partitioning
    * **Baxters** experiment was used for fitting branching parameters
    * **FUE** experiment was used for fitting nitrogen responses
    * **FSP** experiment was used for fitting growth and development parameters in cooler situations
    * **Parilla** experiment was used for fitting growth and development parameters in hotter situations
  Experiment FUE_NI
    Factors
      Factor Nitrogen: Specifications=[operations]
        Operations 368
          2004-05-10  [Fertiliser].Apply(230, Fertiliser.Types.UreaN, 10);
          2004-07-17  [Fertiliser].Apply(69, Fertiliser.Types.UreaN, 10);
          2004-08-26  [Fertiliser].Apply(69, Fertiliser.Types.UreaN, 10);
        Operations 253
          2004-05-10  [Fertiliser].Apply(115, Fertiliser.Types.UreaN, 10);
          2004-07-17  [Fertiliser].Apply(69, Fertiliser.Types.UreaN, 10);
          2004-08-26  [Fertiliser].Apply(69, Fertiliser.Types.UreaN, 10);
        Operations 0
          2004-05-10  [Fertiliser].Apply(0, Fertiliser.Types.UreaN, 10);
          2004-07-17  [Fertiliser].Apply(0, Fertiliser.Types.UreaN, 10);
          2004-08-26  [Fertiliser].Apply(0, Fertiliser.Types.UreaN, 10);
    Simulation FUE_NI_base: Area=0; Slope=0
      Weather: FileName=Pukehohe.met
      Clock: StartDate=2004-05-10; EndDate=2004-12-31
      Summary
      SoilArbitrator Soil Arbitrator
      Zone paddock: Area=1; Slope=0
        Soil: Latitude=0; Longitude=0
          Analysis: Thickness=[100, 200, 300, 300, 300, 300]; PH=[6.6, 6.2, 5.7, 5.5, 5.5, 5.5]; PHUnits=Water; BoronUnits=HotWater
          InitialWater Initial water: PercentMethod=EvenlyDistributed; FractionFull=1
          Water
            Thickness  BD   AirDry  LL15  DUL   SAT
            100        1.2  0.08    0.13  0.33  0.5
            200        1.2  0.08    0.13  0.33  0.5
            300        1.2  0.05    0.1   0.31  0.44
            300        1.2  0.04    0.08  0.27  0.46
            300        1.2  0.06    0.11  0.3   0.44
            300        1.2  0.06    0.11  0.3   0.44
            SoilCrop wheatSoil: LL=[0.13, 0.13, 0.1, 0.08, 0.11, 0.11]; KL=[0.06, 0.06, 0.06, 0.06, 0.06, 0.06]; XF=[1, 1, 1, 1, 1, 1]
            SoilCrop potato2Soil: LL=[0.13, 0.13, 0.1, 0.15, 0.3, 0.3]; KL=[0.1, 0.1, 0.07, 0.05, 0.05, 0.05]; XF=[1, 1, 1, 1, 0, 0]
            SoilCrop PotatoSoil: LL=[0.13, 0.13, 0.1, 0.15, 0.3, 0.3]; KL=[0.1, 0.1, 0.07, 0.05, 0.05, 0.05]; XF=[1, 1, 1, 1, 0, 0]
          SoilWater: same as Baxters.BaxtersBase.Field.Soil.SoilWater
          SoilNitrogen: fom_type=[default, manure, mucuna, lablab, shemp, stable]; fract_carb=[0.2, 0.3, 0.54, 0.57, 0.45, 0]; fract_cell=[0.7, 0.3, 0.37, 0.37, 0.47, 0.1]; fract_lign=[0.1, 0.4, 0.09, 0.06, 0.08, 0.9]; wfpsN2N2O_x=[22, 88]; wfpsN2N2O_y=[0.1, 1]; oc=[1.83396, 1.4699, 1.19945, 1.03026, 0.470345, 0.470137]
          SoilOrganicMatter: same as Baxters.BaxtersBase.Field.Soil.SoilOrganicMatter
          Sample Initial nitrogen: NO3Units=ppm; NH4Units=ppm; SWUnits=Volumetric; OCUnits=Total; PHUnits=Water
            Thickness  NO3      NH4
            100        5        0.1
            200        3        0.1
            300        8        0.1
            300        7        0.1
            300        1.38889  0.1
            300        1.38889  0.1
        Fertiliser
        Irrigation
        SurfaceOrganicMatter surface organic matter: same as FSP.FSPBase.Field.surface organic matter
        MicroClimate: same as FUE.FUE_base.paddock.MicroClimate
        Plant Potato: CropType=Potato
        Folder Manager folder
          Operations
            2004-05-10  [Fertiliser].Apply(0, Fertiliser.Types.UreaN, 10);
            2004-07-17  [Fertiliser].Apply(0, Fertiliser.Types.UreaN, 10);
            2004-08-26  [Fertiliser].Apply(0, Fertiliser.Types.UreaN, 10);
          Manager PotatoSowingRule
            RowSpace = 30
            RowWidth = 810
            PlantingDepth = 170
            StemNumberPerSeedTuber = 2.4
            CultivarName = Nadine
            SowingDate = 2004-05-10
```csharp
using System;
using Models.Core;
using Models.PMF;
using APSIM.Shared.Utilities;
        
namespace Models
{
	[Serializable] 
	[System.Xml.Serialization.XmlInclude(typeof(Model))]
	public class Script : Model
	{
		[Link] Plant Potato;
		[Link] Clock Clock;

		[Description("Spacing (mm) between plants within rows")]
		public double RowSpace { get; set; }
		[Description("Spacing (mm) between rows")]
		public double RowWidth { get; set; }
		[Description("Depth (mm) tubers are planted")]
		public double PlantingDepth { get; set; }
		[Description("Number of stems per seed tuber")]
		public double StemNumberPerSeedTuber { get; set; }
		[Description("Cultivar")]
		public string CultivarName { get; set; }
		[Description("Sowing Date")]
		public DateTime SowingDate { get; set; }

		[EventSubscribe("DoManagement")]
		private void OnDoManagement(object sender, EventArgs e)
		{
			double PlantPopulation = 1 / ((RowWidth / 1000) * (RowSpace / 1000));

			if (Clock.Today.Date == SowingDate)
				Potato.Sow(population: PlantPopulation, cultivar: CultivarName, depth: PlantingDepth, rowSpacing: 150, budNumber: StemNumberPerSeedTuber);
			//Potato.Sow(... Contains the following arguements:
			//Population  double  Required  Seeds sowing/m2
			//Cultivar    string  Required  "NameOfCultivar"
			//Depth       double  Optional  Depth (mm) seed sown.   Default is 100mm 
			//MaxCover    double  Optional  Proportion (0-1) of the ground row crop will cover.   Default is 1.0
			//BudNumber   double  Optional  Number of mainstems per seed sown.  Default is 1.0
			//RowSpacing  double  Optional  Spaceing (mm) between drill rows when crop is sown.  Default is 150mm
			//CropClass   string  Optional  Crop class to instantiate when crop is sown.  Default is "Plant"
		}
	}
}
```
        Manager ExtraVariables
          script: same as in ABlock.RussetBurbank.Field.Management.ExtraVariables
        Report: same as Baxters.BaxtersBase.Field.Report
        Manager PotatoHarvestRule
          HarvestDate = 2004-11-09
```csharp
using System;
using Models.Core;
using Models.PMF;
using System.Xml.Serialization;
using APSIM.Shared.Utilities;
        
namespace Models
{
	[Serializable] 
	[System.Xml.Serialization.XmlInclude(typeof(Model))]
	public class Script : Model
	{
		[Link] Plant Potato;
		[Link] Clock Clock;
		[Link] Summary Summary;
		[Description("HarvestDate Date")]
		public DateTime HarvestDate { get; set; }
		[XmlIgnore] public string FinalTag { get; set; }
		[XmlIgnore] public bool Harvested { get; set; }
		[XmlIgnore] public bool ReadyForHarvest { get; set; }
               
		[EventSubscribe("Commencing")]
		private void OnSimulationCommencing(object sender, EventArgs e)
		{
			FinalTag = "";
			Harvested = false;
			ReadyForHarvest = false;
		}
               
		[EventSubscribe("DoManagement")]
		private void OnDoManagement(object sender, EventArgs e)
		{
			if (ReadyForHarvest == true)
			{
				Potato.Harvest();
				ReadyForHarvest = false;
				Harvested = true;
			}
			FinalTag = "";    
		}
               
		[EventSubscribe("DoManagementCalculations")]
		private void OnDoManagementCalculations(object sender, EventArgs e)
		{
			if ((Clock.Today == HarvestDate) && (Harvested == false))
			{
				FinalTag = "yield";
				ReadyForHarvest = true;
			}
		}
	}
}
```
        Manager SetIntergerCropParameter
          OverRidePath = Potato.Structure.MainStemFinalNodeNumber.Value
          OverRideInterger = 10
```csharp
using System;
using Models.Core;
using System.Collections.Generic;
using System.Text;
using Models.PMF;
using Models;
using System.Xml.Serialization;
using APSIM.Shared.Utilities;

namespace Models
{
	[Serializable] 
	public class Script : Model
	{      
        [Link] Plant Plant;          
		[Link] Zone zone;			
		[Description("Path for coefficient to be Overwritten")]
		public string OverRidePath { get; set; }
		[Description("Value for new coefficient Interger")]
        public int OverRideInterger { get; set; }
        
		[EventSubscribe("Sowing")]
		private void OnSowing(object sender, EventArgs e)
		{
			object ResetValue = OverRideInterger;
			zone.Set(OverRidePath, ResetValue);
	    }
	}
}
```
  Experiment Penola_0607
    Factors
      Factor Fertiliser: Specifications=[FertiliserApplications]
        Operations 0
          2006-10-10  [Fertiliser].Apply(90, Fertiliser.Types.UreaN, 10);
        Operations 250
          2006-10-10  [Fertiliser].Apply(90, Fertiliser.Types.UreaN, 10);
          2006-11-19  [Fertiliser].Apply(25, Fertiliser.Types.UreaN, 10);
          2006-12-03  [Fertiliser].Apply(50, Fertiliser.Types.UreaN, 10);
          2006-12-17  [Fertiliser].Apply(50, Fertiliser.Types.UreaN, 10);
          2006-12-31  [Fertiliser].Apply(38, Fertiliser.Types.UreaN, 10);
          2007-01-14  [Fertiliser].Apply(38, Fertiliser.Types.UreaN, 10);
          2007-01-28  [Fertiliser].Apply(25, Fertiliser.Types.UreaN, 10);
          2007-02-11  [Fertiliser].Apply(25, Fertiliser.Types.UreaN, 10);
        Operations 500
          2006-10-10  [Fertiliser].Apply(90, Fertiliser.Types.UreaN, 10);
          2006-11-19  [Fertiliser].Apply(50, Fertiliser.Types.UreaN, 10);
          2006-12-03  [Fertiliser].Apply(100, Fertiliser.Types.UreaN, 10);
          2006-12-17  [Fertiliser].Apply(100, Fertiliser.Types.UreaN, 10);
          2006-12-31  [Fertiliser].Apply(75, Fertiliser.Types.UreaN, 10);
          2007-01-14  [Fertiliser].Apply(75, Fertiliser.Types.UreaN, 10);
          2007-01-28  [Fertiliser].Apply(50, Fertiliser.Types.UreaN, 10);
          2007-02-11  [Fertiliser].Apply(50, Fertiliser.Types.UreaN, 10);
        Operations 750
          2006-10-10  [Fertiliser].Apply(90, Fertiliser.Types.UreaN, 10);
          2006-11-19  [Fertiliser].Apply(75, Fertiliser.Types.UreaN, 10);
          2006-12-03  [Fertiliser].Apply(150, Fertiliser.Types.UreaN, 10);
          2006-12-17  [Fertiliser].Apply(150, Fertiliser.Types.UreaN, 10);
          2006-12-31  [Fertiliser].Apply(113, Fertiliser.Types.UreaN, 10);
          2007-01-14  [Fertiliser].Apply(113, Fertiliser.Types.UreaN, 10);
          2007-01-28  [Fertiliser].Apply(75, Fertiliser.Types.UreaN, 10);
          2007-02-11  [Fertiliser].Apply(75, Fertiliser.Types.UreaN, 10);
    Simulation Penola_0506Base: Area=0; Slope=0
      Weather: FileName=Kalangadoo.met
      Clock: StartDate=2006-10-10; EndDate=2007-06-01
      Summary
      SoilArbitrator Soil Arbitrator
      Zone paddock: Area=1; Slope=0
        Soil: Latitude=0; Longitude=0
          Analysis: Thickness=[100, 200, 300, 300, 300, 300]; PH=[6.6, 6.2, 5.7, 5.5, 5.5, 5.5]; PHUnits=Water; BoronUnits=HotWater
          InitialWater Initial water: PercentMethod=EvenlyDistributed; FractionFull=1
          Water
            Thickness  BD   AirDry  LL15  DUL   SAT
            100        1.2  0.03    0.06  0.18  0.35
            200        1.2  0.03    0.03  0.18  0.35
            300        1.2  0.03    0.03  0.12  0.3
            300        1.2  0.03    0.03  0.07  0.25
            300        1.2  0.03    0.03  0.07  0.25
            300        1.2  0.03    0.03  0.07  0.25
            SoilCrop wheatSoil: LL=[0.13, 0.13, 0.1, 0.08, 0.11, 0.11]; KL=[0.06, 0.06, 0.06, 0.06, 0.06, 0.06]; XF=[1, 1, 1, 1, 1, 1]
            SoilCrop potato2Soil: LL=[0.06, 0.03, 0.03, 0.03, 0.03, 0.03]; KL=[0.1, 0.1, 0.07, 0.05, 0.05, 0.05]; XF=[1, 1, 1, 1, 0, 0]
            SoilCrop PotatoSoil: LL=[0.13, 0.13, 0.1, 0.15, 0.3, 0.3]; KL=[0.1, 0.1, 0.07, 0.05, 0.05, 0.05]; XF=[1, 1, 1, 1, 0, 0]
          SoilWater: residueinterception=0; SummerDate=1-Nov; SummerU=9; SummerCona=4.4; WinterDate=1-Apr; WinterU=9; WinterCona=4.4; DiffusConst=88; DiffusSlope=35.4; Salb=0.18; CN2Bare=68; CNRed=20; CNCov=0.8; slope=0; discharge_width=0; catchment_area=0; max_pond=0
            Thickness  SWCON  KLAT
            100        0.9    0
            200        0.9    0
            300        0.9    0
            300        0.01   0
            300        0.01   0
            300        0.01   0
          SoilNitrogen: fom_type=[default, manure, mucuna, lablab, shemp, stable]; fract_carb=[0.2, 0.3, 0.54, 0.57, 0.45, 0]; fract_cell=[0.7, 0.3, 0.37, 0.37, 0.47, 0.1]; fract_lign=[0.1, 0.4, 0.09, 0.06, 0.08, 0.9]; urea_min=[0, 0, 0, 0, 0, 0]; nh4_min=[0, 0, 0, 0, 0, 0]; no3_min=[0, 0, 0, 0, 0, 0]; wfpsN2N2O_x=[22, 88]; wfpsN2N2O_y=[0.1, 1]; oc=[1.93073, 1.48504, 1.20788, 1.03679, 0.473726, 0.471984]
          SoilOrganicMatter: RootCN=20; RootWt=25000; SoilCN=11.5; EnrACoeff=7.4; EnrBCoeff=0.2; OCUnits=Total
            Thickness  OC    FBiom  FInert
            100        1.82  0.025  0.3
            200        1.47  0.025  0.4
            300        1.2   0.015  0.75
            300        1.03  0.01   0.9
            300        0.47  0.01   0.96
            300        0.47  0.01   0.96
          Sample Initial nitrogen: NO3Units=kgha; NH4Units=kgha; SWUnits=Volumetric; OCUnits=Total; PHUnits=Water
            Thickness  NO3   NH4
            100        15.6  0.12
            200        24    0.24
            300        30    0.36
            300        30    0.36
            300        5     0.36
            300        5     0.36
        Fertiliser
        Irrigation
        SurfaceOrganicMatter surface organic matter: PondActive=no; ReportAdditions=no; ReportRemovals=no; PoolName=wheat; type=wheat; mass=2000; standing_fraction=0; cnr=80; CriticalResidueWeight=2000; OptimumDecompTemp=20; MaxCumulativeEOS=20; CNRatioDecompCoeff=0.277; CNRatioDecompThreshold=25; TotalLeachRain=25; MinRainToLeach=10; CriticalMinimumOrganicC=0.004; DefaultCPRatio=0; DefaultStandingFraction=0; StandingExtinctCoeff=0.5; FractionFaecesAdded=0.5
          Pools:
            {PoolName=wheat, ResidueType=wheat, Mass=2000, CNRatio=80, StandingFraction=0}
          ResidueTypes: LoadFromResource=ResidueTypes
          TillageTypes TillageTypesList
        MicroClimate: a_interception=0; b_interception=1; c_interception=0; d_interception=0; soil_albedo=0.23; air_pressure=1010; soil_emissivity=0.96; sun_angle=15; soil_heat_flux_fraction=0.4; night_interception_fraction=0.5; windspeed_default=3; refheight=2; albedo=0.15; emissivity=0.96; gsmax=0.01; r50=200
        Plant Potato: CropType=Potato
          Memo TitlePage: same as Replacements.Potato.TitlePage
          Phenology: same as Replacements.Potato.Phenology
          OrganArbitrator Arbitrator: NArbitrationOption=PriorityThenRelativeAllocation; DMArbitrationOption=RelativeAllocation
          Structure: InitialiseStage=Emergence; PrimaryBudNo=4
            VariableReference ThermalTime: VariableName=[Phenology].ThermalTime.Value
            PhaseLookupValue MainStemPrimordiaInitiationRate: same as Replacements.Potato.Structure.MainStemPrimordiaInitiationRate
            PhaseLookupValue MainStemNodeAppearanceRate: same as Replacements.Potato.Structure.MainStemNodeAppearanceRate
            Constant MainStemFinalNodeNumber: Value=34
            LinearInterpolationFunction HeightModel: XProperty=[Stem].Live.Wt
              XYPairs: X=[0, 200, 1200, 4000]; Y=[20, 300, 700, 900]
            MultiplyFunction BranchingRate: same as Replacements.Potato.Structure.BranchingRate
          GenericAboveGroundOrgan Tuber
            PotentialSizeDemandFunction DMDemandFunction: same as Replacements.Potato.Tuber.DMDemandFunction
            Constant StructuralFraction: Value=1
            LinearInterpolationFunction DryMatterContent: XProperty=[Phenology].Stage
              XYPairs: X=[4, 4.5]; Y=[0.13, 0.22]
            LinearInterpolationFunction MaximumNConc: XProperty=[Phenology].Stage
              XYPairs: X=[3, 4, 5, 6]; Y=[0.023, 0.023, 0.018, 0.015]
            LinearInterpolationFunction MinimumNConc: XProperty=[Phenology].Stage
              XYPairs: X=[4, 4.1, 7]; Y=[0.02, 0.006, 0.006]
            Biomass Live
            Biomass Dead
          Root: InitialDM=5; SpecificRootLength=40000; NuptakeSupply=0
            CompositeBiomass Live: Propertys=[[Root].LayerLive]
            CompositeBiomass Dead: Propertys=[[Root].LayerDead]
            PhaseBasedSwitch NitrogenDemandSwitch: Start=Planting; End=FinalLeaf
            AirTemperatureFunction TemperatureEffect
              XYPairs: X=[0, 26, 35]; Y=[1, 1, 1]
            PhaseLookup RootFrontVelocity
              PhaseLookupValue: Start=Peeping; End=FinalLeaf
                Constant: Value=10
            PhaseLookup PartitionFraction: same as Replacements.Potato.Root.PartitionFraction
            Constant MaximumNConc: Value=0.01
            LinearInterpolationFunction MaxDailyNUptake: XProperty=[Root].Length
              XYPairs: X=[0, 0.02]; Y=[0, 6]
            Constant MinimumNConc: Value=0.01
            LinearInterpolationFunction KLModifier: XProperty=[Leaf].LAI
              XYPairs: X=[0, 3]; Y=[1, 1]
            LinearInterpolationFunction SenescenceRate: XProperty=[Leaf].FractionDied
              XYPairs: X=[0, 1]; Y=[0, 0.1]
          Leaf: CurrentExpandingLeaf=10; StartFractionExpanded=0.886089; FractionNextleafExpanded=0.890947; _ExpandedNodeNo=10.8909; DeadNodesYesterday=9; MaxCover=1; Albedo=0.26; Gsmax=0.03; R50=200; FRGR=1; PotentialEP=0; KDead=0.3; FractionDied=0
            LightProfile:
              {thickness=0.0795492, amount=0}
            VariableReference ThermalTime: VariableName=[Phenology].ThermalTime.Value
            LeafCohort InitialLeaf1: Rank=1; Area=900
            LeafCohort InitialLeaf2: Rank=2; Area=600
            LeafCohort InitialLeaf3: Rank=3; Area=300
            LeafCohortParameters CohortParameters
              LinearInterpolationFunction MaxArea: XProperty=[Structure].RelativeNodeApperance
                XYPairs: X=[0, 0.15, 0.3, 0.44, 0.59, 0.73]; Y=[2000, 18000, 27000, 15000, 6000, 1500]
              LinearInterpolationFunction GrowthDuration: XProperty=[Structure].RelativeNodeApperance
                XYPairs: X=[0, 0.3, 0.4, 1]; Y=[200, 400, 400, 400]
              LinearInterpolationFunction LagDuration: XProperty=[Structure].RelativeNodeApperance
                XYPairs: X=[0, 0.15, 0.3, 0.4, 0.73, 1]; Y=[350, 350, 350, 350, 350, 20]
              LinearInterpolationFunction SenescenceDuration: XProperty=[Structure].RelativeNodeApperance
                XYPairs: X=[0, 0.15, 0.3, 0.4, 0.73, 1]; Y=[350, 350, 350, 350, 350, 100]
              Constant DetachmentLagDuration: Value=1000000
              Constant DetachmentDuration: Value=1000000
              LinearInterpolationFunction SpecificLeafAreaMax: XProperty=[Structure].RelativeNodeApperance
                XYPairs: X=[0, 1]; Y=[40000, 25000]
              Constant SpecificLeafAreaMin: Value=25000
              Constant StructuralFraction: Value=0.5
              Constant MaximumNConc: Value=0.07
              Constant MinimumNConc: Value=0.03
              Constant InitialNConc: Value=0
              Constant NReallocationFactor: Value=1
              Constant NRetranslocationFactor: Value=0.01
              LinearInterpolationFunction ExpansionStress: XProperty=[Potato].WaterSupplyDemandRatio
                XYPairs: X=[0.5, 1]; Y=[0, 1]
              Constant CriticalNConc: Value=0.05
              Constant DMRetranslocationFactor: Value=0.5
              LinearInterpolationFunction ShadeInducedSenescenceRate: XProperty=[Leaf].CohortCurrentRankCoverAbove
                XYPairs: X=[0, 0.5, 0.8, 1]; Y=[0, 0, 0, 0.03]
              Constant NonStructuralFraction: Value=0.2
            RUEModel Photosynthesis: same as Replacements.Potato.Leaf.Photosynthesis
            MinimumFunction FRGRFunction: same as Replacements.Potato.Leaf.FRGRFunction
            MultiplyFunction ExtinctionCoeff
              Constant: Value=0.8
              LinearInterpolationFunction: XProperty=[Potato].WaterSupplyDemandRatio
                XYPairs: X=[0, 1]; Y=[0.5, 1]
            LinearInterpolationFunction FrostFraction: XProperty=[Weather].MinT
              XYPairs: X=[-1, 0]; Y=[0, 0]
            CompositeBiomass Live: Propertys=[[Leaf].CohortLive]
            CompositeBiomass Dead: Propertys=[[Leaf].CohortDead]
            CompositeBiomass Total: Propertys=[[Leaf].Live, [Leaf].Dead]
            ArrayBiomass CohortArrayLive: Propertys=[[Leaf].Live]; ArraySize=[Leaf].MaxNodeNo
            ArrayBiomass CohortArrayDead: Propertys=[[Leaf].Dead]; ArraySize=[Leaf].MaxNodeNo
          GenericAboveGroundOrgan Stem
            InternodeDemandFunction DMDemandFunction
              Constant InterNodeWt: Value=0.2
            Constant NReallocationFactor: Value=0
            Constant NRetranslocationFactor: Value=0.05
            PhaseBasedSwitch NitrogenDemandSwitch: Start=Planting; End=FinalLeaf
            Constant DMRetranslocationFactor: Value=0
            Constant StructuralFraction: Value=1
            LinearInterpolationFunction MaximumNConc: XProperty=[Phenology].Stage
              XYPairs: X=[3, 4, 5.3]; Y=[0.06, 0.05, 0.025]
            Constant MinimumNConc: Value=0.006
            Biomass Live
            Biomass Dead
          CompositeBiomass AboveGround: Propertys=[[Leaf].Live, [Leaf].Dead, [Stem].Live, [Stem].Dead]
          CompositeBiomass BelowGround: Propertys=[[Root].Live, [Root].Dead, [Tuber].Live, [Tuber].Dead]
          CompositeBiomass Total
            Propertys=[[Leaf].Live, [Leaf].Dead, [Stem].Live, [Stem].Dead, [Root].Live, [Root].Dead, [Tuber].Live, [Tuber].Dead]
          CompositeBiomass TotalLive: Propertys=[[Leaf].Live, [Stem].Live, [Root].Live, [Tuber].Live]
          CompositeBiomass TotalDead: Propertys=[[Leaf].Dead, [Stem].Dead, [Root].Dead, [Tuber].Dead]
          Cultivar JerseyBenny
            Command:
              [Structure].MainStemFinalNodeNumber.Value = 19
              [Structure].BranchingRate.Potential_Branching_Rate.XYPairs.X = 0,6,7,10,11
              [Structure].BranchingRate.Potential_Branching_Rate.XYPairs.Y = 0,0,0.5,0.5,0
              [Tuber].DMDemandFunction.OrganNumber.OrganNumberPerStem.Value = 3
              [Tuber].DryMatterContent.XYPairs.Y = 0.13,0.2
          Cultivar IlamHardy
            Command:
              [Structure].MainStemFinalNodeNumber.Value = 26
              [Tuber].DryMatterContent.XYPairs.Y = 0.13,0.18
              [Phenology].Vegetative.Target.Value = 200
          Cultivar Horizon
            Command:
              [Structure].MainStemFinalNodeNumber.Value = 28
              [Tuber].DryMatterContent.XYPairs.Y = 0.12,0.16
          Cultivar Karaka
            Command:
              [Structure].MainStemFinalNodeNumber.Value = 29
              [Tuber].DryMatterContent.XYPairs.Y = 0.13,0.2
          Cultivar Nooksac
            Command:
              [Structure].MainStemFinalNodeNumber.Value = 36
              [Tuber].DryMatterContent.XYPairs.Y = 0.13,0.21
          Cultivar RedRascal
            Command:
              [Tuber].DryMatterContent.XYPairs.Y = 0.13,0.2
          Cultivar Rua: same as Replacements.Potato.Rua
          Cultivar Nadine
            Command:
              [Structure].MainStemFinalNodeNumber.Value = 29
              [Tuber].DryMatterContent.XYPairs.Y = 0.11,0.15
          Cultivar RussetBurbank: Command=[Structure].MainStemFinalNodeNumber.Value = 34
          Cultivar Coliban
            Command:
              [Tuber].DryMatterContent.XYPairs.Y = 0.10,0.19
              [Phenology].Vegetative.Target.Value = 200
          Cultivar Others
            Alias Fianna
            Alias RussetRanger
            Alias Moonlight
            Alias Agria
            Alias Bondi
            Alias Crop39
        Folder Manager folder
          Operations FertiliserApplications: same as Penola_0607.Factors.Fertiliser.750
          Operations Irrigation
            2006-10-05  [Irrigation].Apply(5.4)
            2006-10-17  [Irrigation].Apply(3.8)
            2006-11-04  [Irrigation].Apply(6.8)
            2006-11-08  [Irrigation].Apply(3.6)
            2006-11-10  [Irrigation].Apply(3.8)
            2006-11-14  [Irrigation].Apply(4.2)
            2006-11-17  [Irrigation].Apply(5.6)
            2006-11-18  [Irrigation].Apply(11)
            2006-11-19  [Irrigation].Apply(5.6)
            2006-11-20  [Irrigation].Apply(5.6)
            2006-11-21  [Irrigation].Apply(4.2)
            2006-11-22  [Irrigation].Apply(5.4)
            2006-11-23  [Irrigation].Apply(5)
            2006-11-24  [Irrigation].Apply(5.6)
            2006-11-25  [Irrigation].Apply(5.4)
            2006-11-26  [Irrigation].Apply(6.2)
            2006-11-27  [Irrigation].Apply(8.4)
            2006-11-28  [Irrigation].Apply(13.2)
            2006-11-29  [Irrigation].Apply(6.6)
            2006-11-30  [Irrigation].Apply(13.8)
            2006-12-01  [Irrigation].Apply(10.6)
            2006-12-02  [Irrigation].Apply(5.6)
            2006-12-03  [Irrigation].Apply(5.8)
            2006-12-04  [Irrigation].Apply(9.7)
            2006-12-05  [Irrigation].Apply(9.6)
            2006-12-06  [Irrigation].Apply(6)
            2006-12-07  [Irrigation].Apply(6)
            2006-12-08  [Irrigation].Apply(11.6)
            2006-12-09  [Irrigation].Apply(10)
            2006-12-10  [Irrigation].Apply(10.4)
            2006-12-12  [Irrigation].Apply(11.2)
            2006-12-13  [Irrigation].Apply(5.8)
            2006-12-14  [Irrigation].Apply(11.4)
            2006-12-15  [Irrigation].Apply(6.2)
            2006-12-16  [Irrigation].Apply(13)
            2006-12-18  [Irrigation].Apply(12.6)
            2006-12-19  [Irrigation].Apply(6)
            2006-12-20  [Irrigation].Apply(6.2)
            2006-12-21  [Irrigation].Apply(11.4)
            2006-12-25  [Irrigation].Apply(4.3)
            2006-12-26  [Irrigation].Apply(4.6)
            2006-12-27  [Irrigation].Apply(6.8)
            2006-12-28  [Irrigation].Apply(6.2)
            2006-12-29  [Irrigation].Apply(13.2)
            2006-12-31  [Irrigation].Apply(6.8)
            2007-01-01  [Irrigation].Apply(6.6)
            2007-01-02  [Irrigation].Apply(11.8)
            2007-01-03  [Irrigation].Apply(6)
            2007-01-04  [Irrigation].Apply(12.4)
            2007-01-05  [Irrigation].Apply(5)
            2007-01-08  [Irrigation].Apply(5.5)
            2007-01-09  [Irrigation].Apply(13.8)
            2007-01-10  [Irrigation].Apply(5.4)
            2007-01-11  [Irrigation].Apply(6.2)
            2007-01-12  [Irrigation].Apply(6.2)
            2007-01-13  [Irrigation].Apply(13.4)
            2007-01-14  [Irrigation].Apply(5.6)
            2007-01-15  [Irrigation].Apply(13.6)
            2007-01-16  [Irrigation].Apply(6.2)
            2007-01-17  [Irrigation].Apply(6.2)
            2007-01-19  [Irrigation].Apply(40.4)
            2007-01-23  [Irrigation].Apply(5.8)
            2007-01-24  [Irrigation].Apply(7)
            2007-01-26  [Irrigation].Apply(14.8)
            2007-01-28  [Irrigation].Apply(9.2)
            2007-01-29  [Irrigation].Apply(5.6)
            2007-01-31  [Irrigation].Apply(13.4)
            2007-02-01  [Irrigation].Apply(7)
            2007-02-03  [Irrigation].Apply(12.4)
            2007-02-05  [Irrigation].Apply(8.6)
            2007-02-07  [Irrigation].Apply(12)
            2007-02-08  [Irrigation].Apply(5.8)
            2007-02-09  [Irrigation].Apply(5.8)
            2007-02-11  [Irrigation].Apply(5.4)
            2007-02-13  [Irrigation].Apply(7.4)
            2007-02-14  [Irrigation].Apply(3.8)
            2007-02-15  [Irrigation].Apply(6.8)
            2007-02-16  [Irrigation].Apply(6.2)
            2007-02-17  [Irrigation].Apply(5.8)
            2007-02-18  [Irrigation].Apply(5.2)
            2007-02-19  [Irrigation].Apply(5.6)
            2007-02-20  [Irrigation].Apply(6.2)
            2007-02-21  [Irrigation].Apply(6.2)
            2007-02-23  [Irrigation].Apply(6.4)
            2007-02-24  [Irrigation].Apply(5.8)
            2007-02-26  [Irrigation].Apply(12)
            2007-02-28  [Irrigation].Apply(6)
            2007-03-01  [Irrigation].Apply(11)
            2007-03-02  [Irrigation].Apply(5.2)
            2007-03-03  [Irrigation].Apply(5.8)
          Manager PotatoPlantAndHarvest
            PlantingDate = 2006-10-10
            CultivarName = RussetBurbank
            RowSpace = 370
            RowWidth = 860
            PlantingDepth = 170
            StemNumberPerSeedTuber = 4.12
            SetFinalLeafNumber = 0
            HarvestDate = 2007-03-31
            script: same as in FUE.FUE_base.paddock.Manager folder.PotatoPlantAndHarvest
          Manager RemoveRainfall
            StartDate = 2006-10-05
            EndDate = 2007-03-03
```csharp
using System;
using Models.Core;
using APSIM.Shared.Utilities;



using System.Collections.Generic;
using System.Text;
using Models.PMF;
using Models;
using System.Xml.Serialization;

namespace Models
{
	[Serializable] 
	[System.Xml.Serialization.XmlInclude(typeof(Model))]
	public class Script : Model
	{
		[Link] Weather Met;
		[Link] Clock Clock;
    
		[Description("Start Date")]
		public DateTime StartDate { get; set; }
        
		[Description("End Date")]
		public DateTime EndDate { get; set; }
 
    
		[EventSubscribe("PreparingNewWeatherData")]
		private void OnPreparingNewWeatherData(object sender, EventArgs e)
		{
			if ((Clock.Today.Date >= StartDate) && (Clock.Today.Date <= EndDate))
				Met.Rain = 0;		
		}
	}
}
```
            Memo
              Rainfall is included in Irrigation applications
        Manager ExtraVariables: same as FUE_NI.FUE_NI_base.paddock.ExtraVariables
        Report: EventNames=[Clock].DoReport
          VariableNames:
            Name as ZoneName
            [Clock].Today
            [ExtraVariables].Script.AccumTtemerg
            Potato.Phenology.CurrentPhaseName
            Potato.Phenology.Stage
            [ExtraVariables].Script.AccumPlantN
            [ExtraVariables].Script.AccumMineralisation
            [ExtraVariables].Script.AccumDenit
            [ExtraVariables].Script.AccumFert
            [ExtraVariables].Script.AccumLeach
            [ExtraVariables].Script.AccumDetach
            [ExtraVariables].Script.DeltaSoilOMN
            [ExtraVariables].Script.DeltaSurfaceOMN
            [ExtraVariables].Script.DeltaSoilMineralN
            Potato.Root.NSupplyUptake
            [Soil].SoilWater.Eo
            [Soil].SoilWater.Es
            [ExtraVariables].Script.SWC
            [ExtraVariables].Script.DUL
            [Soil].SoilWater.Drainage
            [Soil].SoilWater.Runoff
            [ExtraVariables].Script.OutFlowLat
            [Soil].SoilWater.pond
            [ExtraVariables].Script.AccumEO
            [ExtraVariables].Script.AccumEP
            [ExtraVariables].Script.AccumES
            [ExtraVariables].Script.AccumDrainage
            [ExtraVariables].Script.AccumRunoff
            [ExtraVariables].Script.AccumRainfall
            [ExtraVariables].Script.AccumIrrigation
            [ExtraVariables].Script.AccumOutflowLat
            [ExtraVariables].Script.SoilWaterDeficit
            Potato.AboveGround.Wt
            Potato.BelowGround.Wt
            Potato.Total.Wt
            Potato.TotalDead.Wt
            Potato.TotalLive.Wt
            Potato.Leaf.Dead.Wt
            Potato.Leaf.Live.Wt
            Potato.Stem.Dead.Wt
            Potato.Stem.Live.Wt
            Potato.Tuber.Dead.Wt
            Potato.Tuber.Live.Wt
            Potato.Root.Dead.Wt
            Potato.Root.Live.Wt
            Potato.AboveGround.N
            Potato.BelowGround.N
            Potato.Total.N
            Potato.TotalLive.N
            Potato.TotalDead.N
            Potato.Leaf.Dead.N
            Potato.Leaf.Live.N
            Potato.Stem.Dead.N
            Potato.Stem.Live.N
            Potato.Tuber.Dead.N
            Potato.Tuber.Live.N
            Potato.Root.Live.N
            Potato.Root.Dead.N
            Potato.Leaf.Live.NConc
            Potato.Leaf.Dead.NConc
            Potato.Stem.Live.NConc
            Potato.Stem.Dead.NConc
            Potato.Tuber.Live.NConc
            Potato.Tuber.Dead.NConc
            Potato.Root.Live.NConc
            Potato.Root.Dead.NConc
            Potato.Root.WaterSupply
            Potato.Root.WaterUptake
            Potato.Leaf.Transpiration
            Potato.Leaf.WaterDemand
            Potato.Root.Depth
            Potato.Leaf.CoverGreen
            Potato.Leaf.CoverTotal
            Potato.Leaf.CoverDead
            Potato.Leaf.LAI
            Potato.Leaf.LAIDead
            Potato.Structure.Height
            Potato.Leaf.Fn
            Potato.Leaf.Fw
            Potato.Leaf.Photosynthesis.FT.Value
            Potato.Leaf.Photosynthesis.FVPD.Value
            Potato.Structure.PlantTotalNodeNo
            Potato.Structure.TotalStemPopn
            Potato.Leaf.PlantAppearedGreenLeafNo
            Potato.Leaf.ExpandingCohortNo
            Potato.Leaf.AppearedCohortNo
            Potato.Leaf.DeadCohortNo
            Potato.Structure.MainStemNodeNo
            Potato.Leaf.SenescingCohortNo
            Potato.Structure.PrimaryBudTotalNodeNo
            Potato.Leaf.LeafCohortParameters.MinimumNConc.Value
            Potato.Stem.MinimumNConc.Value
            Potato.Tuber.MinimumNConc.Value
            Potato.Root.MinimumNConc.Value
            Potato.Leaf.LeafCohortParameters.MaximumNConc.Value
            Potato.Stem.MaximumNConc.Value
            Potato.Tuber.MaximumNConc.Value
            Potato.Root.MaximumNConc.Value
            Potato.Stem.Live.StructuralWt
            Potato.Stem.Live.NonStructuralWt
            Potato.Leaf.SpecificArea
            Potato.Leaf.ExpandedCohortNo
            [Soil].SoilWater.SWmm
            [Soil].NO3N
            [ExtraVariables].Script.SoilNitrogenContent
            Potato.Arbitrator.NDemand
            [MicroClimate].net_radn
            [MicroClimate].peta
            [MicroClimate].petr
            [ExtraVariables].Script.FomN
            [ExtraVariables].Script.HumN
            [ExtraVariables].Script.BiomN
            [ExtraVariables].Script.DltNMinRes
            [ExtraVariables].Script.DltNMinTot
            [PotatoPlantAndHarvest].Script.FinalTag
            Potato.Tuber.LiveFWt
            Potato.Tuber.DryMatterContent.Value
            [Potato].Arbitrator.NO3NSupply
            [Potato].Arbitrator.NH4NSupply
            [Potato].Root.NUptake
            [PotatoPlantAndHarvest].Script.Harvested
            [PotatoPlantAndHarvest].Script.ReadyForHarvest
            [Weather].MaxT
            [Weather].MinT
  Experiment GlenRoy_0607
    Factors
      Factor Fertiliser: Specifications=[FertiliserApplications]
        Operations 0
          2006-10-10  [Fertiliser].Apply(90, Fertiliser.Types.UreaN, 10);
          2006-11-14  [Fertiliser].Apply(5, Fertiliser.Types.UreaN, 10);
          2006-11-28  [Fertiliser].Apply(10, Fertiliser.Types.UreaN, 10);
          2006-12-08  [Fertiliser].Apply(10, Fertiliser.Types.UreaN, 10);
          2006-12-20  [Fertiliser].Apply(8, Fertiliser.Types.UreaN, 10);
          2007-01-05  [Fertiliser].Apply(8, Fertiliser.Types.UreaN, 10);
          2007-01-15  [Fertiliser].Apply(5, Fertiliser.Types.UreaN, 10);
          0001-01-01  [Fertiliser].Apply(5, Fertiliser.Types.UreaN, 10);
        Operations 125
          2006-10-10  [Fertiliser].Apply(90, Fertiliser.Types.UreaN, 10);
          2006-11-14  [Fertiliser].Apply(17.5, Fertiliser.Types.UreaN, 10);
          2006-11-28  [Fertiliser].Apply(35, Fertiliser.Types.UreaN, 10);
          2006-12-08  [Fertiliser].Apply(35, Fertiliser.Types.UreaN, 10);
          2006-12-20  [Fertiliser].Apply(26, Fertiliser.Types.UreaN, 10);
          2007-01-05  [Fertiliser].Apply(26, Fertiliser.Types.UreaN, 10);
          2007-01-15  [Fertiliser].Apply(18, Fertiliser.Types.UreaN, 10);
          0001-01-01  [Fertiliser].Apply(18, Fertiliser.Types.UreaN, 10);
        Operations 250
          2006-10-10  [Fertiliser].Apply(90, Fertiliser.Types.UreaN, 10);
          2006-11-14  [Fertiliser].Apply(30, Fertiliser.Types.UreaN, 10);
          2006-11-28  [Fertiliser].Apply(60, Fertiliser.Types.UreaN, 10);
          2006-12-08  [Fertiliser].Apply(60, Fertiliser.Types.UreaN, 10);
          2006-12-20  [Fertiliser].Apply(45, Fertiliser.Types.UreaN, 10);
          2007-01-05  [Fertiliser].Apply(45, Fertiliser.Types.UreaN, 10);
          2007-01-15  [Fertiliser].Apply(30, Fertiliser.Types.UreaN, 10);
          0001-01-01  [Fertiliser].Apply(30, Fertiliser.Types.UreaN, 10);
        Operations 500
          2006-10-10  [Fertiliser].Apply(90, Fertiliser.Types.UreaN, 10);
          2006-11-14  [Fertiliser].Apply(55, Fertiliser.Types.UreaN, 10);
          2006-11-28  [Fertiliser].Apply(110, Fertiliser.Types.UreaN, 10);
          2006-12-08  [Fertiliser].Apply(110, Fertiliser.Types.UreaN, 10);
          2006-12-20  [Fertiliser].Apply(83, Fertiliser.Types.UreaN, 10);
          2007-01-05  [Fertiliser].Apply(83, Fertiliser.Types.UreaN, 10);
          2007-01-15  [Fertiliser].Apply(55, Fertiliser.Types.UreaN, 10);
          0001-01-01  [Fertiliser].Apply(55, Fertiliser.Types.UreaN, 10);
    Simulation GlenRoy_0506Base: Area=0; Slope=0
      Weather: FileName=Coonawarra.met
      Clock: StartDate=2006-10-10; EndDate=2007-06-01
      Summary
      SoilArbitrator Soil Arbitrator
      Zone paddock: Area=1; Slope=0
        Soil: Latitude=0; Longitude=0
          Analysis: Thickness=[100, 200, 300, 300, 300, 300]; PH=[6.6, 6.2, 5.7, 5.5, 5.5, 5.5]; PHUnits=Water; BoronUnits=HotWater
          InitialWater Initial water: PercentMethod=EvenlyDistributed; FractionFull=1
          Water
            Thickness  BD   AirDry  LL15  DUL   SAT
            100        1.2  0.15    0.32  0.4   0.52
            200        1.2  0.26    0.26  0.3   0.52
            300        1.2  0.1     0.1   0.2   0.3
            300        1.2  0.01    0.01  0.02  0.03
            300        1.2  0.01    0.01  0.02  0.03
            300        1.2  0.01    0.01  0.02  0.03
            SoilCrop PotatoSoil: LL=[0.15, 0.26, 0.1, 0.01, 0.01, 0.01]; KL=[0.1, 0.1, 0.07, 0.05, 0.05, 0.05]; XF=[1, 1, 1, 1, 0, 0]
          SoilWater: same as Baxters.BaxtersBase.Field.Soil.SoilWater
          SoilNitrogen: fom_type=[default, manure, mucuna, lablab, shemp, stable]; fract_carb=[0.2, 0.3, 0.54, 0.57, 0.45, 0]; fract_cell=[0.7, 0.3, 0.37, 0.37, 0.47, 0.1]; fract_lign=[0.1, 0.4, 0.09, 0.06, 0.08, 0.9]; urea_min=[0, 0, 0, 0, 0, 0]; nh4_min=[0, 0, 0, 0, 0, 0]; no3_min=[0, 0, 0, 0, 0, 0]; wfpsN2N2O_x=[22, 88]; wfpsN2N2O_y=[0.1, 1]; oc=[1.82, 1.47, 1.2, 1.03, 0.47, 0.47]
          SoilOrganicMatter: same as Penola_0607.Penola_0506Base.paddock.Soil.SoilOrganicMatter
          Sample Initial nitrogen: NO3Units=kgha; NH4Units=kgha; SWUnits=Volumetric; OCUnits=Total; PHUnits=Water
            Thickness  NO3    NH4
            100        33.33  0.12
            200        22.5   0.1
            300        1.39   0.1
            300        1.39   0.1
            300        1.39   0.1
            300        1.39   0.1
        Fertiliser
        Irrigation
        SurfaceOrganicMatter surface organic matter: same as Penola_0607.Penola_0506Base.paddock.surface organic matter
        MicroClimate: same as Penola_0607.Penola_0506Base.paddock.MicroClimate
        Plant Potato: CropType=Potato
          Memo TitlePage: same as Replacements.Potato.TitlePage
          Phenology: same as Replacements.Potato.Phenology
          OrganArbitrator Arbitrator: NArbitrationOption=PriorityThenRelativeAllocation; DMArbitrationOption=RelativeAllocation
          Structure: InitialiseStage=Emergence; PrimaryBudNo=2.2
            VariableReference ThermalTime: VariableName=[Phenology].ThermalTime.Value
            PhaseLookupValue MainStemPrimordiaInitiationRate: same as Replacements.Potato.Structure.MainStemPrimordiaInitiationRate
            PhaseLookupValue MainStemNodeAppearanceRate: same as Replacements.Potato.Structure.MainStemNodeAppearanceRate
            Constant MainStemFinalNodeNumber: Value=34
            LinearInterpolationFunction HeightModel: XProperty=[Stem].Live.Wt
              XYPairs: X=[0, 200, 1200, 4000]; Y=[20, 300, 700, 900]
            MultiplyFunction BranchingRate: same as Replacements.Potato.Structure.BranchingRate
          GenericAboveGroundOrgan Tuber: same as Penola_0607.Penola_0506Base.paddock.Potato.Tuber
          Root: same as Penola_0607.Penola_0506Base.paddock.Potato.Root
          Leaf: CurrentExpandingLeaf=34; StartFractionExpanded=0.83819; FractionNextleafExpanded=0.926641; _ExpandedNodeNo=34.9266; DeadNodesYesterday=0; MaxCover=1; Albedo=0.26; Gsmax=0.03; R50=200; FRGR=0; PotentialEP=0; KDead=0.3; FractionDied=0
            VariableReference ThermalTime: VariableName=[Phenology].ThermalTime.Value
            LeafCohort InitialLeaf1: Rank=1; Area=900
            LeafCohort InitialLeaf2: Rank=2; Area=600
            LeafCohort InitialLeaf3: Rank=3; Area=300
            LeafCohortParameters CohortParameters: same as Penola_0607.Penola_0506Base.paddock.Potato.Leaf.CohortParameters
            RUEModel Photosynthesis: same as Replacements.Potato.Leaf.Photosynthesis
            MinimumFunction FRGRFunction: same as Replacements.Potato.Leaf.FRGRFunction
            MultiplyFunction ExtinctionCoeff
              Constant: Value=0.8
              LinearInterpolationFunction: XProperty=[Potato].WaterSupplyDemandRatio
                XYPairs: X=[0, 1]; Y=[0.5, 1]
            LinearInterpolationFunction FrostFraction: XProperty=[Weather].MinT
              XYPairs: X=[-1, 0]; Y=[0, 0]
            CompositeBiomass Live: Propertys=[[Leaf].CohortLive]
            CompositeBiomass Dead: Propertys=[[Leaf].CohortDead]
            CompositeBiomass Total: Propertys=[[Leaf].Live, [Leaf].Dead]
            ArrayBiomass CohortArrayLive: Propertys=[[Leaf].Live]; ArraySize=[Leaf].MaxNodeNo
            ArrayBiomass CohortArrayDead: Propertys=[[Leaf].Dead]; ArraySize=[Leaf].MaxNodeNo
          GenericAboveGroundOrgan Stem: same as Penola_0607.Penola_0506Base.paddock.Potato.Stem
          CompositeBiomass AboveGround: Propertys=[[Leaf].Live, [Leaf].Dead, [Stem].Live, [Stem].Dead]
          CompositeBiomass BelowGround: Propertys=[[Root].Live, [Root].Dead, [Tuber].Live, [Tuber].Dead]
          CompositeBiomass Total
            Propertys=[[Leaf].Live, [Leaf].Dead, [Stem].Live, [Stem].Dead, [Root].Live, [Root].Dead, [Tuber].Live, [Tuber].Dead]
          CompositeBiomass TotalLive: Propertys=[[Leaf].Live, [Stem].Live, [Root].Live, [Tuber].Live]
          CompositeBiomass TotalDead: Propertys=[[Leaf].Dead, [Stem].Dead, [Root].Dead, [Tuber].Dead]
          Cultivar JerseyBenny
            Command:
              [Structure].MainStemFinalNodeNumber.Value = 19
              [Structure].BranchingRate.Potential_Branching_Rate.XYPairs.X = 0,6,7,10,11
              [Structure].BranchingRate.Potential_Branching_Rate.XYPairs.Y = 0,0,0.5,0.5,0
              [Tuber].DMDemandFunction.OrganNumber.OrganNumberPerStem.Value = 3
              [Tuber].DryMatterContent.XYPairs.Y = 0.13,0.2
          Cultivar IlamHardy
            Command:
              [Structure].MainStemFinalNodeNumber.Value = 26
              [Tuber].DryMatterContent.XYPairs.Y = 0.13,0.18
              [Phenology].Vegetative.Target.Value = 200
          Cultivar Horizon
            Command:
              [Structure].MainStemFinalNodeNumber.Value = 28
              [Tuber].DryMatterContent.XYPairs.Y = 0.12,0.16
          Cultivar Karaka
            Command:
              [Structure].MainStemFinalNodeNumber.Value = 29
              [Tuber].DryMatterContent.XYPairs.Y = 0.13,0.2
          Cultivar Nooksac
            Command:
              [Structure].MainStemFinalNodeNumber.Value = 36
              [Tuber].DryMatterContent.XYPairs.Y = 0.13,0.21
          Cultivar RedRascal
            Command:
              [Tuber].DryMatterContent.XYPairs.Y = 0.13,0.2
          Cultivar Rua: same as Replacements.Potato.Rua
          Cultivar Nadine
            Command:
              [Structure].MainStemFinalNodeNumber.Value = 29
              [Tuber].DryMatterContent.XYPairs.Y = 0.11,0.15
          Cultivar RussetBurbank: Command=[Structure].MainStemFinalNodeNumber.Value = 34
          Cultivar Coliban
            Command:
              [Tuber].DryMatterContent.XYPairs.Y = 0.10,0.19
              [Phenology].Vegetative.Target.Value = 200
          Cultivar Others
            Alias Fianna
            Alias RussetRanger
            Alias Moonlight
            Alias Agria
            Alias Bondi
            Alias Crop39
        Folder Manager folder
          Operations FertiliserApplications: same as GlenRoy_0607.Factors.Fertiliser.125
          Operations Irrigation
            2006-10-18  [Irrigation].Apply(2.2)
            2006-10-19  [Irrigation].Apply(1.6)
            2006-10-20  [Irrigation].Apply(0.2)
            2006-10-22  [Irrigation].Apply(0.2)
            2006-10-25  [Irrigation].Apply(2.2)
            2006-10-26  [Irrigation].Apply(0.2)
            2006-10-27  [Irrigation].Apply(0.6)
            2006-10-28  [Irrigation].Apply(1.2)
            2006-10-29  [Irrigation].Apply(2.4)
            2006-11-01  [Irrigation].Apply(0.2)
            2006-11-02  [Irrigation].Apply(3.4)
            2006-11-04  [Irrigation].Apply(8.0)
            2006-11-06  [Irrigation].Apply(0.2)
            2006-11-07  [Irrigation].Apply(1.4)
            2006-11-08  [Irrigation].Apply(2.4)
            2006-11-09  [Irrigation].Apply(4.0)
            2006-11-10  [Irrigation].Apply(4.0)
            2006-11-11  [Irrigation].Apply(3.2)
            2006-11-12  [Irrigation].Apply(0.2)
            2006-11-13  [Irrigation].Apply(3.2)
            2006-11-14  [Irrigation].Apply(10.6)
            2006-11-15  [Irrigation].Apply(2.8)
            2006-11-16  [Irrigation].Apply(3.0)
            2006-11-17  [Irrigation].Apply(7.6)
            2006-11-19  [Irrigation].Apply(0.2)
            2006-11-20  [Irrigation].Apply(0.2)
            2006-11-21  [Irrigation].Apply(9.4)
            2006-11-22  [Irrigation].Apply(7.0)
            2006-11-23  [Irrigation].Apply(5.0)
            2006-11-24  [Irrigation].Apply(0.2)
            2006-11-25  [Irrigation].Apply(0.2)
            2006-11-26  [Irrigation].Apply(5.6)
            2006-11-28  [Irrigation].Apply(5.0)
            2006-11-29  [Irrigation].Apply(10.0)
            2006-11-30  [Irrigation].Apply(6.8)
            2006-12-01  [Irrigation].Apply(5.6)
            2006-12-02  [Irrigation].Apply(0.2)
            2006-12-03  [Irrigation].Apply(5.4)
            2006-12-04  [Irrigation].Apply(0.2)
            2006-12-05  [Irrigation].Apply(0.2)
            2006-12-06  [Irrigation].Apply(0.2)
            2006-12-07  [Irrigation].Apply(5.8)
            2006-12-08  [Irrigation].Apply(0.2)
            2006-12-09  [Irrigation].Apply(1.8)
            2006-12-10  [Irrigation].Apply(11.0)
            2006-12-11  [Irrigation].Apply(0.2)
            2006-12-12  [Irrigation].Apply(5.4)
            2006-12-14  [Irrigation].Apply(11.8)
            2006-12-15  [Irrigation].Apply(1.0)
            2006-12-16  [Irrigation].Apply(7.4)
            2006-12-17  [Irrigation].Apply(0.2)
            2006-12-18  [Irrigation].Apply(0.2)
            2006-12-19  [Irrigation].Apply(5.8)
            2006-12-20  [Irrigation].Apply(6.0)
            2006-12-21  [Irrigation].Apply(5.0)
            2006-12-22  [Irrigation].Apply(2.0)
            2006-12-23  [Irrigation].Apply(9.0)
            2006-12-24  [Irrigation].Apply(6.2)
            2006-12-25  [Irrigation].Apply(12.4)
            2006-12-27  [Irrigation].Apply(5.8)
            2006-12-29  [Irrigation].Apply(0.2)
            2006-12-31  [Irrigation].Apply(0.6)
            2007-01-01  [Irrigation].Apply(10.2)
            2007-01-02  [Irrigation].Apply(0.6)
            2007-01-03  [Irrigation].Apply(5.4)
            2007-01-04  [Irrigation].Apply(0.2)
            2007-01-05  [Irrigation].Apply(0.4)
            2007-01-06  [Irrigation].Apply(1.6)
            2007-01-07  [Irrigation].Apply(15.0)
            2007-01-09  [Irrigation].Apply(6.2)
            2007-01-10  [Irrigation].Apply(0.4)
            2007-01-11  [Irrigation].Apply(5.4)
            2007-01-12  [Irrigation].Apply(0.2)
            2007-01-13  [Irrigation].Apply(4.2)
            2007-01-14  [Irrigation].Apply(5.8)
            2007-01-15  [Irrigation].Apply(5.4)
            2007-01-16  [Irrigation].Apply(5.2)
            2007-01-17  [Irrigation].Apply(5.6)
            2007-01-19  [Irrigation].Apply(13.8)
            2007-01-20  [Irrigation].Apply(99.4)
            2007-01-21  [Irrigation].Apply(10.2)
            2007-01-22  [Irrigation].Apply(0.2)
            2007-01-25  [Irrigation].Apply(0.2)
            2007-01-26  [Irrigation].Apply(6.4)
            2007-01-27  [Irrigation].Apply(9.2)
            2007-01-28  [Irrigation].Apply(7.0)
            2007-01-29  [Irrigation].Apply(4.6)
            2007-01-30  [Irrigation].Apply(1.4)
            2007-01-31  [Irrigation].Apply(9.2)
            2007-02-01  [Irrigation].Apply(17.2)
            2007-02-02  [Irrigation].Apply(8.2)
            2007-02-03  [Irrigation].Apply(8.8)
            2007-02-04  [Irrigation].Apply(9.0)
            2007-02-05  [Irrigation].Apply(9.0)
            2007-02-07  [Irrigation].Apply(0.4)
            2007-02-08  [Irrigation].Apply(0.2)
            2007-02-11  [Irrigation].Apply(6.6)
            2007-02-12  [Irrigation].Apply(7.8)
            2007-02-14  [Irrigation].Apply(18.0)
            2007-02-15  [Irrigation].Apply(8.2)
            2007-02-16  [Irrigation].Apply(8.2)
            2007-02-18  [Irrigation].Apply(1.6)
            2007-02-19  [Irrigation].Apply(14.6)
            2007-02-20  [Irrigation].Apply(0.2)
            2007-02-21  [Irrigation].Apply(15.2)
            2007-02-24  [Irrigation].Apply(0.4)
            2007-02-25  [Irrigation].Apply(0.4)
            2007-02-28  [Irrigation].Apply(8.0)
            2007-03-01  [Irrigation].Apply(7.4)
            2007-03-02  [Irrigation].Apply(7.2)
            2007-03-03  [Irrigation].Apply(0.2)
            2007-03-06  [Irrigation].Apply(7.2)
            2007-03-16  [Irrigation].Apply(2.8)
            2007-03-17  [Irrigation].Apply(0.2)
          Manager PotatoPlantAndHarvest
            PlantingDate = 2006-10-10
            CultivarName = RussetBurbank
            RowSpace = 370
            RowWidth = 860
            PlantingDepth = 120
            StemNumberPerSeedTuber = 2
            SetFinalLeafNumber = 0
            HarvestDate = 2007-03-22
            script: same as in FUE.FUE_base.paddock.Manager folder.PotatoPlantAndHarvest
          Manager RemoveRainfall
            StartDate = 2006-10-18
            EndDate = 2007-03-17
            script: same as in Penola_0607.Penola_0506Base.paddock.Manager folder.RemoveRainfall
            Memo
              Rainfall is included in Irrigation applications
        Manager ExtraVariables
          script: same as in ABlock.RussetBurbank.Field.Management.ExtraVariables
        Report: EventNames=[Clock].DoReport
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