Simulations: Version=2
  Replacements
    Plant SCUM: CropType=SCUM
      Memo TitlePage
        # SCUM: the Simple Crop Uptake Model

        _Hamish Brown and Rob Zyskowski, Plant and Food Research, New Zealand_

        This model has been built using the Plant Modelling Framework (PMF) of [brown_plant_2014] to simulate a range of different crops in simulations where water and nitrogen balance are of interest but a fully mechanistic plant model is not needed. It is a daily time step implementation of the crop model that is used on the Overseer nutrient balance model [Cichota_etal_2010].  It uses simple sigmoidal functions for estimating daily cover and biomass deltas to give realistic water and nitrogen demands. It does not simulate potential yield, this is specified as an input. Yield will be reduced below the specified potential yield if N or water supplies from the soil are insufficient to meet demand. The model has been paramaterised for simulating water and nitrogen balances of cropping rotations in New Zealand (where over 50 different crop types are grown and it is not feasible to produce full crop models for each of these).  Because of this the model is not as generically applicable as full APSIM crop models.   It may be adapted for other purposes and other crop types may be added but the user will need to keep in mind that because it is a simple the the parameters might need changing for crops from different locations or for crops sown at different times of the year.  Some sensibility testing or validation is recommended before application in different sutuations.  .

        SCUM has a simple phenology model which divides the crop growth into three main phases; a vegetative phase when the canopy is expanding, a reproductive phase when product is being formed and a senescing phase when the canopy is contracting.  SCUM consists of 4 organs:
           1. Stover which represents the unharvested parts of the plant and is represented with a simple leaf class.
           2. Product which represents the plant parts that are harvested and removed from the filed.  It uses a generic organ class
           3. Root which extracts water and nitrogen from the soil for plant growth
           4. Nodule which is only activated, fixing nitrogen for the legume crops.
        An Arbitrator is also included which determines the allocation of drymatter and nitrogen biomass between each of these organs.

        ##Inclusion in APSIM simulations
        A scum crop is included in a simulation the same as any other APSIM crop
         * The SCUM object needs to be dragged or copied from the Crop folder in the tool box into the field of your simulation.
         * It is then planted with a sowing rule
        <pre><code class='language-cs'>
        SCUM.Sow(cultivar: Wheat_Autumn, population: 1, depth: 10, rowSpacing: 150);
        </code></pre>
          * Note that SCUM has no notion of population or rowSpacing but these parameters are required by the Sow method so filler values are provided
          * To specify the Expected Yield
        <pre><code class='language-cs'>
         zone.Set("[SCUM].Product.ExpectedYield.Value", ResetValue);
        </code></pre>
        * It can be Harvested, Cut, Grazed and Pruned like other crops.  Defalt proportions of the biomass in each organ are removed from the sysem and/or added to the fields residue pools.  If specific removal and residue fractions are required they can be specified as follows:
        <pre><code class='language-cs'>
        [EventSubscribe("Commencing")]
        private void OnSimulationCommencing(object sender, EventArgs e)
        {
          Remove = new RemovalFractions(SCUM.Organs);
        }
        [EventSubscribe("DoManagement")]
        private void OnDoManagement(object sender, EventArgs e)
        {
          if (Clock.Today.Date == HarvestDate2)
          {
            Remove.SetFractionRemoved("Product", 1.0);
            Remove.SetFractionRemoved("Stover", 0.05);
            Remove.SetFractionToResidue("Stover",0.95)
            SCUM.Harvest(Remove);
            SCUM.EndCrop();
          }
        }
         </code></pre>
          * A Remove class as shown above can be sent with Harvest, Cut, Graze and Prune events to specificy the proportions of removals

          * Once a crop has been ended the field is open to plant another crop using another APSIM crop model or sowing another SCUM crop.
      Phenology
        AirTemperatureFunction ThermalTime
          Memo Description
            Progression through each of the phenological stages is driven by thermal time.  As temperature increases from zero to 30 degrees, development acelerates and then slows down again above 30 degress
          XYPairs: X=[0, 30, 40]; Y=[0, 30, 0]
        Memo Description1
          As ThermalTime accumulates the crop progresses through the following phases:
        GerminatingPhase Germinating: Start=Sowing; End=Germination
        EmergingPhase Emerging: Start=Germination; End=Emergence; ShootLag=0; ShootRate=0
          VariableReference ThermalTime: VariableName=[Phenology].ThermalTime.Value
          Memo Description
            Currently the duration of the Emergence phase is set to zero because the period of zero cover and biomass production following sowing is accounted for in the cover and biomass accumulation functions.  However this phase is included if parameterisations of other crops in the future wish to give this phase a duration.
        GenericPhase CanopyExpanding: Start=Emergence; End=StartReproductive
          Memo Description
            During this phase the plant only partitions biomass to Root and Stover (leaf and stem) Organs
          Constant Target: Value=1000; Units=<sup>o</sup>Cd
          VariableReference ThermalTime: VariableName=[Phenology].ThermalTime.Value
        GenericPhase YieldIncreasing: Start=StartReproductive; End=StartSenescence
          Memo Description
            During this phase the plant is partitioning biomass to Root, Stover and Product organs.
          Constant Target: Value=600; Units=<sup>o</sup>Cd
          VariableReference ThermalTime: VariableName=[Phenology].ThermalTime.Value
        GenericPhase Senescing: Start=StartSenescence; End=EndReproductive
          Memo Description
            During this phase the plant is partitioning biomass to Root and Product organs and the canopy cover decreases from its maximum to zero
          Constant Target: Value=600; Units=<sup>o</sup>Cd
          VariableReference ThermalTime: VariableName=[Phenology].ThermalTime.Value
        GenericPhase Mature: Start=EndReproductive; End=Maturity
          Constant Target: Value=600; Units=<sup>o</sup>Cd
          VariableReference ThermalTime: VariableName=[Phenology].ThermalTime.Value
          Memo Description
            During this phase the plant has completed its growth and is drying ready for harvest.
        EndPhase ReadyForHarvest: Start=Maturity; End=Unused
          VariableReference ThermalTime: VariableName=[Phenology].ThermalTime.Value
      OrganArbitrator Arbitrator: NArbitrationOption=RelativeAllocation; DMArbitrationOption=RelativeAllocation
      GenericAboveGroundOrgan Product: FractionRemoved=0; FractionToResidue=0
        Memo Description
          It is the biomass that is removed from the crop at harvest and may include grain, root, leaf, stem, pod or any other organ type depending on the type of crop and how it is harvested.
        Biomass Live
        Biomass Dead
        Constant MaximumNConc: Value=0.012
        Constant MinimumNConc: Value=0.008
        PartitionFractionDemandFunction DMDemandFunction
          PhaseLookup PartitionFraction
            PhaseLookupValue YieldIncreasing: Start=StartReproductive; End=StartSenescence
              SubtractFunction ProductProportion
                Constant One: Value=1
                VariableReference RootFraction: VariableName=[Root].RootProportion.Value
                VariableReference StoverFraction
                  VariableName=[Stover].DMDemandFunction.PartitionFraction.YieldIncreasing.Value
            PhaseLookupValue Senescing: Start=StartSenescence; End=EndReproductive
              SubtractFunction StoverFraction
                Constant One: Value=1
                VariableReference RootFraction: VariableName=[Root].RootProportion.Value
        Constant ExpectedYield: Value=800
          Memo Description
            This is the Product yield (g/m2 fresh weight) that SCUM will predict provided nitrogen and water supply are non-limiting
        Constant DryMatterContent: Value=0.87
          Memo Description
            This is the dry matter content of the harvested yield and is used to convert fresh yield into *DryYield* which are subsequently used in determining *Ymax* (total biomass production), daily dry matter production, *HarvestIndex* and the *PartitioningFraction* of each organ
        MultiplyFunction DryYield
          Memo Description
            This variable is the product yield of the crop in g/m2 dry weight
          VariableReference FreshYld: VariableName=[Product].ExpectedYield.Value
          VariableReference DMPercent: VariableName=[Product].DryMatterContent.Value
        LinearInterpolationFunction HarvestIndex: XProperty=[Product].ExpectedYield.Value
          Memo Description
            The harvest index is related to the Expected Yield of the crop with higher yields giving a higer harvest index for some crops.  The Harvest index parameter is used with ExpectedYield to calculation total above ground produciton
          XYPairs: X=[0, 800, 1392]; Y=[0.14, 0.46, 0.78]
        SubtractFunction WaterContent
          Memo Description
            This is used to convert the total Dry Matter of this organ back to fresh mass once daily partitining is complete.
          Constant One: Value=1
          VariableReference DMcontent: VariableName=[Product].DryMatterContent.Value
      SimpleLeaf Stover
        zero: FractionRemoved, FractionToResidue, BiomassYesterday, LAI, Height, FRGR, PotentialEP, K, KDead, DeltaBiomass, LAIDead, WaterAllocation
        Memo Description
          Stover represents any part of the crop that is not removed at harvest (i.e not part of the product).
        Biomass Live
        Biomass Dead
        MultiplyFunction Photosynthesis
          DeltaFunction UnStressedBiomass: StartStageName=Emergence
            SigmoidFunction2 Integral
              VariableReference Ymax: VariableName=[Stover].Ymax.Value
              VariableReference XValue: VariableName=[Phenology].AccumulatedEmergedTT
              VariableReference Xo: VariableName=[Stover].XoBiomass.Value
              VariableReference b: VariableName=[Stover].bBiomass.Value
          LinearInterpolationFunction WaterStressFactor: XProperty=[Stover].Fw
            XYPairs: X=[0, 0.1, 0.7, 1]; Y=[0, 1, 1, 1]
        MinimumFunction FRGRFunction
          AirTemperatureFunction FRGRFunctionTemp
            XYPairs: X=[0, 10, 25, 40]; Y=[0, 1, 1, 0]
          LinearInterpolationFunction FRGRFunctionN: XProperty=[Arbitrator].FN
            XYPairs: X=[0, 0.8, 1]; Y=[0, 1, 1]
        PartitionFractionDemandFunction DMDemandFunction
          Memo Description
            DM demand is based on a simple partitioning coefficients.  At harvest the biomass partitioned to the stover = (1 - RootProportion) - Harvest index.  However the partitioningFraction is more complicated that this as it partitions more biomass to the stover in the CanopyExpanding Phase and less in the Yield increasing phase to give realistic patterns of accumulation of biomass in the Stover and Product
          PhaseLookup PartitionFraction
            PhaseLookupValue Expanding: Start=Emergence; End=StartReproductive
              SubtractFunction DMPartitionCoefficient
                Constant One: Value=1
                VariableReference RootFraction: VariableName=[Root].RootProportion.Value
            PhaseLookupValue YieldIncreasing: Start=StartReproductive; End=StartSenescence
              DivideFunction DMPartitionCoefficient
                SubtractFunction StoverBiomass
                  MultiplyFunction StoverAtMaturity
                    SubtractFunction AboveGroundProportion
                      Constant One: Value=1
                      VariableReference RootFraction: VariableName=[Root].RootProportion.Value
                    SubtractFunction StoverProportion
                      Constant One: Value=1
                      VariableReference HI: VariableName=[Product].HarvestIndex.Value
                    VariableReference BiomassAtMaturity: VariableName=[Stover].TotalBiomassAtMaturity.Value
                  MultiplyFunction StoverAtStartReproductive
                    VariableReference BiomassAtStartReproductive: VariableName=[Stover].TotalBiomassAtStartReproductive.Value
                    SubtractFunction AboveGroundProportion
                      Constant One: Value=1
                      VariableReference RootFraction: VariableName=[Root].RootProportion.Value
                SubtractFunction TotalBiomass
                  VariableReference BiomassAtStartSenescence: VariableName=[Stover].TotalBiomassAtStartSenescence.Value
                  VariableReference BiomassAtStartReproductive: VariableName=[Stover].TotalBiomassAtStartReproductive.Value
        PhaseLookup CoverFunction
          PhaseLookupValue Expanding: Start=Emergence; End=StartSenescence
            SigmoidFunction2 SigCoverFunction
              Constant Ymax: Value=0.97
              VariableReference XValue: VariableName=[Phenology].AccumulatedEmergedTT
              Constant Xo: Value=540
              Constant b: Value=120
          PhaseLookupValue Senescence: Start=StartSenescence; End=Maturity
            MultiplyFunction DecreasingCover
              HoldFunction MaxCover: WhenToHold=StartSenescence
                VariableReference ValueToHold: VariableName=[Stover].CoverGreen
              SubtractFunction ProportionLost
                Constant One: Value=1
                DivideFunction ProportionRemaining
                  SubtractFunction TTSenesce
                    VariableReference AccumulatedThermalTime: VariableName=[Phenology].AccumulatedEmergedTT
                    AddFunction ThermalTimeAtStartSenescence
                      VariableReference CanopyExpandingTT: VariableName=[Phenology].CanopyExpanding.Target.Value
                      VariableReference YieldIncreasingTT: VariableName=[Phenology].YieldIncreasing.Target.Value
                  VariableReference SenescentPhaseDuration: VariableName=[Phenology].Senescing.Target.Value
        Constant ExtinctionCoefficientFunction: Value=0.5
          Memo Description
            The extinction coefficient is used to calculate a LAI value (needed by MicroClimate) from the canopy cover
        LinearInterpolationFunction HeightFunction: XProperty=[Phenology].Stage
          XYPairs: X=[3, 5, 6]; Y=[100, 800, 1200]
        Constant NConc: Value=0.008
        PhaseLookupValue NitrogenDemandSwitch: Start=Emergence; End=StartSenescence
          Constant One: Value=1
        Constant XoBiomass: Value=800
          Memo Description
            Is a coefficient for the potential biomass accumulation function
        Constant bBiomass: Value=800
          Memo Description
            Is another coefficient for the potential biomass accumulation function
        DivideFunction Ymax
          Memo Description
            This variable is the total biomass (g/m2dry weight) that the crop will produce at maturity in the absence of stress
          VariableReference DryYield: VariableName=[Product].DryYield.Value
          SubtractFunction AboveGroundDMProportion
            Constant One: Value=1
            VariableReference RootFraction: VariableName=[Root].RootProportion.Value
          VariableReference HarvestIndex: VariableName=[Product].HarvestIndex.Value
        SigmoidFunction2 TotalBiomassAtStartReproductive
          VariableReference XValue: VariableName=[Phenology].CanopyExpanding.Target.Value
          VariableReference Ymax: VariableName=[Stover].Ymax.Value
          VariableReference Xo: VariableName=[Stover].XoBiomass.Value
          VariableReference b: VariableName=[Stover].bBiomass.Value
        SigmoidFunction2 TotalBiomassAtStartSenescence
          AddFunction XValue
            VariableReference CanopyExpandingTT: VariableName=[Phenology].CanopyExpanding.Target.Value
            VariableReference YieldIncreasingTT: VariableName=[Phenology].YieldIncreasing.Target.Value
          VariableReference Ymax: VariableName=[Stover].Ymax.Value
          VariableReference Xo: VariableName=[Stover].XoBiomass.Value
          VariableReference b: VariableName=[Stover].bBiomass.Value
        SigmoidFunction2 TotalBiomassAtMaturity
          AddFunction XValue
            VariableReference CanopyExpandingTT: VariableName=[Phenology].CanopyExpanding.Target.Value
            VariableReference YieldIncreasingTT: VariableName=[Phenology].YieldIncreasing.Target.Value
            VariableReference SenescingTT: VariableName=[Phenology].Senescing.Target.Value
          VariableReference Ymax: VariableName=[Stover].Ymax.Value
          VariableReference Xo: VariableName=[Stover].XoBiomass.Value
          VariableReference b: VariableName=[Stover].bBiomass.Value
      Root: FractionRemoved=0; FractionToResidue=0; InitialDM=0.2; SpecificRootLength=40000; KNO3_yProperty=[0.02, 0.02]; KNO3_xRootLength=[0, 0.003]; KNH4_yProperty=[0, 0]; KNH4_xRootLength=[0, 0.003]; NuptakeSupply=0
        Memo Description
          The root organ demands and is partitioned N and DM and its depth increases through time to provide a water uptake supply
        CompositeBiomass Live: Propertys=[[Root].LayerLive]
        CompositeBiomass Dead: Propertys=[[Root].LayerDead]
        LinearInterpolationFunction KLModifier: XProperty=[Root].LayerMidPointDepth
          XYPairs: X=[0, 200, 1500]; Y=[1, 1, 0]
          Memo Description
            This is important in SCUM as it is set for each species to represent their differences in rooting patterns between crop species
        Constant SoilWaterEffect: Value=1
        Constant MaxDailyNUptake: Value=12
        Constant SenescenceRate: Value=0
        Constant MaximumNConc: Value=0.009
        Constant MinimumNConc: Value=0.009
        PhaseBasedSwitch NitrogenDemandSwitch: Start=Germination; End=Maturity
        Constant TemperatureEffect: Value=1
        Constant MaximumRootDepth: Value=1500
        MultiplyFunction RootFrontVelocity
          LessThanFunction RootFrontVelocity
            VariableReference TestVariable: VariableName=[Phenology].AccumulatedEmergedTT
            AddFunction GrowthDuration
              VariableReference CanopyExpandingTT: VariableName=[Phenology].CanopyExpanding.Target.Value
              VariableReference YieldIncreasingTT: VariableName=[Phenology].YieldIncreasing.Target.Value
            DivideFunction IfTrue
              VariableReference MaxRootDepth: VariableName=[Root].MaximumRootDepth.Value
              VariableReference GrowthDuration
                VariableName=[Root].RootFrontVelocity.RootFrontVelocity.GrowthDuration.Value
            Constant IfFalse: Value=0
          VariableReference ThermalTime: VariableName=[Phenology].ThermalTime.Value
        PhaseLookupValue PartitionFraction: Start=Emergence; End=EndReproductive
          VariableReference RootProportion: VariableName=[Root].RootProportion.Value
        Constant RootProportion: Value=0.1
          Memo Description
            This is the proportion of total biomass that is paritioned into the roots and is used to set the partitioning fraction for the roots
      Nodule: FractionRemoved=0; FractionToResidue=0; NFixationOption=None
        Memo Description
          The nodule organ is unparameterised and simply has a switch that is turned on for legume crops (so they can fix what ever N the crop demands) and switched off for non legume crops (which fix no N)
        Biomass Live
        Biomass Dead
        Constant MaximumNConc: Value=0
        Constant MinimumNConc: Value=0
      Summariser
        CompositeBiomass Total
          Propertys=[[Stover].Live, [Stover].Dead, [Product].Live, [Product].Dead, [Root].Live, [Root].Dead]
        CompositeBiomass AboveGround
          Propertys=[[Stover].Live, [Stover].Dead, [Product].Live, [Product].Dead, [Root].Live, [Root].Dead]
          Memo
            The AboveGround composite biomass object includes Stover and Product organs.
      Cultivar Barley_Spring
        Command:
          [Root].MaximumRootDepth.Value = 1000
          [Root].KLModifier.XYPairs.X = 0, 200, 500, 1000, 1500
          [Root].KLModifier.XYPairs.Y = 1, 1, 0.8, 0.2, 0.0
          [Stover].CoverFunction.Expanding.SigCoverFunction.Xo.Value = 540
          [Stover].CoverFunction.Expanding.SigCoverFunction.b.Value = 120
          [Stover].CoverFunction.Expanding.SigCoverFunction.Ymax.Value = 0.97
          [Stover].XoBiomass.Value = 1080
          [Stover].bBiomass.Value = 216
          [Product].ExpectedYield.Value = 800
          [Root].RootProportion.Value = 0.1
          [Product].HarvestIndex.XYPairs.X = 0,1150
          [Product].HarvestIndex.XYPairs.Y = 0.14,0.6
          [Product].DryMatterContent.Value = 0.87
          [Phenology].CanopyExpanding.Target.Value = 1000
          [Phenology].YieldIncreasing.Target.Value= 500
          [Phenology].Senescing.Target.Value = 300
          [Phenology].Mature.Target.Value = 300
          [Stover].NConc.Value = 0.005
          [Product].MinimumNConc.Value = 0.005
          [Product].MaximumNConc.Value = 0.012
          [Root].MinimumNConc.Value = 0.009
          [Root].MaximumNConc.Value = 0.009
      Cultivar Wheat_Spring
        Command:
          [Root].MaximumRootDepth.Value = 1000
          [Root].KLModifier.XYPairs.X = 0, 200, 500, 1000, 1500
          [Root].KLModifier.XYPairs.Y = 1, 1, 0.8, 0.2, 0.0
          [Stover].CoverFunction.Expanding.SigCoverFunction.Xo.Value = 540
          [Stover].CoverFunction.Expanding.SigCoverFunction.b.Value = 120
          [Stover].CoverFunction.Expanding.SigCoverFunction.Ymax.Value = 0.97
          [Stover].XoBiomass.Value = 1080
          [Stover].bBiomass.Value = 216
          [Product].ExpectedYield.Value = 800
          [Root].RootProportion.Value = 0.1
          [Product].HarvestIndex.XYPairs.X = 0,1150
          [Product].HarvestIndex.XYPairs.Y = 0.14,0.6
          [Product].DryMatterContent.Value = 0.87
          [Phenology].CanopyExpanding.Target.Value = 1000
          [Phenology].YieldIncreasing.Target.Value= 500
          [Phenology].Senescing.Target.Value = 300
          [Phenology].Mature.Target.Value = 300
          [Stover].NConc.Value = 0.005
          [Product].MinimumNConc.Value = 0.005
          [Product].MaximumNConc.Value = 0.013
          [Root].MinimumNConc.Value = 0.009
          [Root].MaximumNConc.Value = 0.009
      Cultivar Wheat_Autumn
        Command:
          [Root].MaximumRootDepth.Value = 1500
          [Root].KLModifier.XYPairs.X = 0, 200, 500, 1000, 1500
          [Root].KLModifier.XYPairs.Y = 1, 1, 0.9, 0.6, 0.3
          [Stover].CoverFunction.Expanding.SigCoverFunction.Xo.Value = 540
          [Stover].CoverFunction.Expanding.SigCoverFunction.b.Value = 120
          [Stover].CoverFunction.Expanding.SigCoverFunction.Ymax.Value = 0.97
          [Stover].XoBiomass.Value = 1900
          [Stover].bBiomass.Value = 399
          [Product].ExpectedYield.Value = 1450
          [Root].RootProportion.Value = 0.1
          [Product].HarvestIndex.XYPairs.X = 0,1733
          [Product].HarvestIndex.XYPairs.Y = 0.08,0.6
          [Product].DryMatterContent.Value = 0.87
          [Phenology].CanopyExpanding.Target.Value = 1785
          [Phenology].YieldIncreasing.Target.Value= 615
          [Phenology].Senescing.Target.Value = 600
          [Phenology].Mature.Target.Value = 300
          [Stover].NConc.Value = 0.005
          [Product].MinimumNConc.Value = 0.005
          [Product].MaximumNConc.Value = 0.013
          [Root].MinimumNConc.Value = 0.009
          [Root].MaximumNConc.Value = 0.009
      Cultivar Potatoes_Long
        Command:
          [Root].MaximumRootDepth.Value = 500
          [Root].KLModifier.XYPairs.X = 0, 200, 500, 1000, 1500
          [Root].KLModifier.XYPairs.Y = 1, 1, 0.5, 0.1, 0.0
          [Stover].CoverFunction.Expanding.SigCoverFunction.Xo.Value = 690
          [Stover].CoverFunction.Expanding.SigCoverFunction.b.Value = 60
          [Stover].CoverFunction.Expanding.SigCoverFunction.Ymax.Value = 0.97
          [Stover].XoBiomass.Value = 1500
          [Stover].bBiomass.Value = 330
          [Product].ExpectedYield.Value = 5800
          [Root].RootProportion.Value = 0.1
          [Product].HarvestIndex.XYPairs.X = 0,11000
          [Product].HarvestIndex.XYPairs.Y = 0.84,0.97
          [Product].DryMatterContent.Value = 0.22
          [Phenology].CanopyExpanding.Target.Value = 652
          [Phenology].YieldIncreasing.Target.Value= 1200
          [Phenology].Senescing.Target.Value = 600
          [Phenology].Mature.Target.Value = 300
          [Stover].NConc.Value = 0.02
          [Product].MinimumNConc.Value = 0.012
          [Product].MaximumNConc.Value = 0.018
          [Root].MinimumNConc.Value = 0.01
          [Root].MaximumNConc.Value = 0.01
      Cultivar Green_Peas
        Command:
          [Root].MaximumRootDepth.Value = 800
          [Root].KLModifier.XYPairs.X = 0, 200, 500, 1000, 1500
          [Root].KLModifier.XYPairs.Y = 1, 1, 0.4, 0.2, 0.0
          [Stover].CoverFunction.Expanding.SigCoverFunction.Xo.Value = 690
          [Stover].CoverFunction.Expanding.SigCoverFunction.b.Value = 60
          [Stover].CoverFunction.Expanding.SigCoverFunction.Ymax.Value = 0.97
          [Stover].XoBiomass.Value = 750
          [Stover].bBiomass.Value = 180
          [Product].ExpectedYield.Value = 630
          [Root].RootProportion.Value = 0.1
          [Product].HarvestIndex.XYPairs.X = 0,1200
          [Product].HarvestIndex.XYPairs.Y = 0.45,0.45
          [Product].DryMatterContent.Value = 0.21
          [Phenology].CanopyExpanding.Target.Value = 707
          [Phenology].YieldIncreasing.Target.Value= 400
          [Phenology].Senescing.Target.Value = 200
          [Phenology].Mature.Target.Value = 100
          [Stover].NConc.Value = 0.03
          [Product].MinimumNConc.Value = 0.03
          [Product].MaximumNConc.Value = 0.035
          [Root].MinimumNConc.Value = 0.015
          [Root].MaximumNConc.Value = 0.015
          [Nodule].NFixationOption = Majic
      Cultivar Maize_Short
        Command:
          [Root].MaximumRootDepth.Value = 2500
          [Root].KLModifier.XYPairs.X = 0, 200, 500, 1000, 1500
          [Root].KLModifier.XYPairs.Y = 1, 1, 0.8, 0.6, 0.1
          [Stover].CoverFunction.Expanding.SigCoverFunction.Xo.Value = 900
          [Stover].CoverFunction.Expanding.SigCoverFunction.b.Value = 180
          [Stover].CoverFunction.Expanding.SigCoverFunction.Ymax.Value = 0.97
          [Stover].XoBiomass.Value = 1620
          [Stover].bBiomass.Value = 330
          [Product].ExpectedYield.Value = 1220
          [Root].RootProportion.Value = 0.1
          [Product].HarvestIndex.XYPairs.X = 0,1830
          [Product].HarvestIndex.XYPairs.Y = 0.5,0.6
          [Product].DryMatterContent.Value = 0.87
          [Phenology].CanopyExpanding.Target.Value = 1486
          [Phenology].YieldIncreasing.Target.Value= 614
          [Phenology].Senescing.Target.Value = 1500
          [Phenology].Mature.Target.Value = 300
          [Stover].NConc.Value = 0.007
          [Product].MinimumNConc.Value = 0.007
          [Product].MaximumNConc.Value = 0.014
          [Root].MinimumNConc.Value = 0.007
          [Root].MaximumNConc.Value = 0.007
      Cultivar Spinich
        Command:
          [Root].MaximumRootDepth.Value = 700
          [Root].KLModifier.XYPairs.X = 0, 200, 500, 1000, 1500
          [Root].KLModifier.XYPairs.Y = 1, 1, 0.3, 0.1, 0.0
          [Stover].CoverFunction.Expanding.SigCoverFunction.Xo.Value = 360
          [Stover].CoverFunction.Expanding.SigCoverFunction.b.Value = 120
          [Stover].CoverFunction.Expanding.SigCoverFunction.Ymax.Value = 0.8
          [Stover].XoBiomass.Value = 540
          [Stover].bBiomass.Value = 90
          [Product].ExpectedYield.Value = 2200
          [Root].RootProportion.Value = 0.1
          [Product].HarvestIndex.XYPairs.X = 0,3300
          [Product].HarvestIndex.XYPairs.Y = 0.7,0.7
          [Product].DryMatterContent.Value = 0.05
          [Phenology].CanopyExpanding.Target.Value = 436
          [Phenology].YieldIncreasing.Target.Value= 1664
          [Phenology].Senescing.Target.Value = 900
          [Phenology].Mature.Target.Value = 300
          [Stover].NConc.Value = 0.015
          [Product].MinimumNConc.Value = 0.015
          [Product].MaximumNConc.Value = 0.03
          [Root].MinimumNConc.Value = 0.009
          [Root].MaximumNConc.Value = 0.009
      Cultivar Kale
        Command:
          [Root].MaximumRootDepth.Value = 3000
          [Root].KLModifier.XYPairs.X = 0, 200, 500, 1000, 1500
          [Root].KLModifier.XYPairs.Y = 1, 1, 0.7, 0.3, 0.1
          [Stover].CoverFunction.Expanding.SigCoverFunction.Xo.Value = 867
          [Stover].CoverFunction.Expanding.SigCoverFunction.b.Value = 141
          [Stover].CoverFunction.Expanding.SigCoverFunction.Ymax.Value = 0.95
          [Stover].XoBiomass.Value = 1830
          [Stover].bBiomass.Value = 300
          [Product].ExpectedYield.Value = 7500
          [Root].RootProportion.Value = 0.1
          [Product].HarvestIndex.XYPairs.X = 0,10000
          [Product].HarvestIndex.XYPairs.Y = 0.9,0.5
          [Product].DryMatterContent.Value = 0.16
          [Phenology].CanopyExpanding.Target.Value = 0
          [Phenology].YieldIncreasing.Target.Value= 4000
          [Phenology].Senescing.Target.Value = 0
          [Phenology].Mature.Target.Value = 0
          [Stover].NConc.Value = 0.01
          [Product].MinimumNConc.Value = 0.02
          [Product].MaximumNConc.Value = 0.03
          [Root].MinimumNConc.Value = 0.008
          [Root].MaximumNConc.Value = 0.008
        Memo Forage quirks
          Kale has 0oCd duration canopy expanding, senescence and maturity targets with a long (4000) yield increasing phase.  This is so biomass is partitioned to the product (leaf and stem in this case) from emergence and so cover increases to a maximum and stays there.  Setting this phase so long meant the roots were growing to slow so the root depth parameter was increased to achieve faster root growth.
          </p>
          <p>
      Cultivar Rape
        Command:
          [Root].MaximumRootDepth.Value = 2400
          [Root].KLModifier.XYPairs.X = 0, 200, 500, 1000, 1500
          [Root].KLModifier.XYPairs.Y = 1, 1, 0.7, 0.3, 0.0
          [Stover].CoverFunction.Expanding.SigCoverFunction.Xo.Value = 770
          [Stover].CoverFunction.Expanding.SigCoverFunction.b.Value = 57
          [Stover].CoverFunction.Expanding.SigCoverFunction.Ymax.Value = 0.95
          [Stover].XoBiomass.Value = 1296
          [Stover].bBiomass.Value = 189
          [Product].ExpectedYield.Value = 4615
          [Root].RootProportion.Value = 0.1
          [Product].HarvestIndex.XYPairs.X = 0,6000
          [Product].HarvestIndex.XYPairs.Y = .95,0.5
          [Product].DryMatterContent.Value = 0.13
          [Phenology].CanopyExpanding.Target.Value = 0
          [Phenology].YieldIncreasing.Target.Value= 3000
          [Phenology].Senescing.Target.Value = 0
          [Phenology].Mature.Target.Value = 0
          [Stover].NConc.Value = 0.01
          [Product].MinimumNConc.Value = 0.02
          [Product].MaximumNConc.Value = 0.03
          [Root].MinimumNConc.Value = 0.008
          [Root].MaximumNConc.Value = 0.008
        Memo Forage quirks
          Rape has 0oCd duration canopy expanding, senescence and maturity targets with a long (4000) yield increasing phase.  This is so biomass is partitioned to the product (Stover and stem in this case) from emergence and so cover increases to a maximum and stays there.  Setting this phase so long meant the roots were growing to slow so the root depth parameter was increased to achieve faster root growth.
          </p>
          <p>
      Cultivar Dried_Peas
        Command:
          [Root].MaximumRootDepth.Value = 700
          [Root].KLModifier.XYPairs.X = 0, 200, 500, 1000, 1500
          [Root].KLModifier.XYPairs.Y = 1, 1, 0.4, 0.2, 0.0
          [Stover].CoverFunction.Expanding.SigCoverFunction.Xo.Value = 690
          [Stover].CoverFunction.Expanding.SigCoverFunction.b.Value = 60
          [Stover].CoverFunction.Expanding.SigCoverFunction.Ymax.Value = 0.97
          [Stover].XoBiomass.Value = 750
          [Stover].bBiomass.Value = 180
          [Product].ExpectedYield.Value = 630
          [Root].RootProportion.Value = 0.1
          [Product].HarvestIndex.XYPairs.X = 0,1200
          [Product].HarvestIndex.XYPairs.Y = 0.5,0.5
          [Product].DryMatterContent.Value = 0.86
          [Phenology].CanopyExpanding.Target.Value = 677
          [Phenology].YieldIncreasing.Target.Value= 673
          [Phenology].Senescing.Target.Value = 300
          [Phenology].Mature.Target.Value = 300
          [Stover].NConc.Value = 0.02
          [Product].MinimumNConc.Value = 0.03
          [Product].MaximumNConc.Value = 0.035
          [Root].MinimumNConc.Value = 0.015
          [Root].MaximumNConc.Value = 0.015
          [Nodule].NFixationOption = Majic
      Cultivar Potatoes_Short
        Command:
          [Root].MaximumRootDepth.Value = 500
          [Root].KLModifier.XYPairs.X = 0, 200, 500, 1000, 1500
          [Root].KLModifier.XYPairs.Y = 1, 1, 0.5, 0.1, 0.0
          [Stover].CoverFunction.Expanding.SigCoverFunction.Xo.Value = 690
          [Stover].CoverFunction.Expanding.SigCoverFunction.b.Value = 60
          [Stover].CoverFunction.Expanding.SigCoverFunction.Ymax.Value = 0.97
          [Stover].XoBiomass.Value = 1200
          [Stover].bBiomass.Value = 210
          [Product].ExpectedYield.Value = 5300
          [Root].RootProportion.Value = 0.1
          [Product].HarvestIndex.XYPairs.X = 0,11000
          [Product].HarvestIndex.XYPairs.Y = 0.84,0.95
          [Product].DryMatterContent.Value = 0.23
          [Phenology].CanopyExpanding.Target.Value = 652
          [Phenology].YieldIncreasing.Target.Value = 897
          [Phenology].Senescing.Target.Value = 600
          [Phenology].Mature.Target.Value = 300
          [Stover].NConc.Value = 0.02
          [Product].MinimumNConc.Value = 0.012
          [Product].MaximumNConc.Value = 0.018
          [Root].MinimumNConc.Value = 0.01
          [Root].MaximumNConc.Value = 0.01
  DataStore
    ExcelInput NZObserved: FileName=%root%\Prototypes\Maize\Observations\obsDataMaize_DB.xlsx; SheetNames=[observed]
    ExcelInput RainShelterN: FileName=%root%\Prototypes\Maize\Observations\obsDataMaize_DB.xlsx; SheetNames=[RainShelterNitrogen]
    ExcelInput RainShelterSW: FileName=%root%\Prototypes\Maize\Observations\SoilWater.xlsx; SheetNames=[SoilWater]
  Tests TestsBinary
    Test:
      SimulationName  TableName  Type       ColumnNames                        Parameters
      MCSPTestBase    Report     Tolerance  ExtraVariables.Script.AccumPlantN  1,1
      MCSPTestBase    Report     Tolerance  ExtraVariables.Script.AccumEP      1,1
      MCSPTestBase    Report     Tolerance  MCSP.Summariser.Total.Wt           1,1
  Experiment TestCrop
    Factors
      Factor SpringWheat
        Specifications:
          [SCUMSowingRule].Script.CultivarName = Wheat_Spring
          [SCUMSowingRule].Script.SowingDate = 1998-09-15
      Factor AutumnWheat
        Specifications:
          [SCUMSowingRule].Script.CultivarName = Wheat_Autumn
          [SCUMSowingRule].Script.SowingDate = 1998-05-15
      Factor Potatoes
        Specifications:
          [SCUMSowingRule].Script.CultivarName = Potatoes_Long
          [SCUMSowingRule].Script.SowingDate = 1998-10-15
      Factor Peas
        Specifications:
          [SCUMSowingRule].Script.CultivarName = Green_Peas
          [SCUMSowingRule].Script.SowingDate = 1998-10-15
      Factor Maize
        Specifications:
          [SCUMSowingRule].Script.CultivarName = Maize_Short
          [SCUMSowingRule].Script.SowingDate = 1998-11-15
      Factor Spinich
        Specifications:
          [SCUMSowingRule].Script.CultivarName = Spinich
          [SCUMSowingRule].Script.SowingDate = 1998-05-15
      Factor Kale
        Specifications:
          [SCUMSowingRule].Script.CultivarName = Kale
          [SCUMSowingRule].Script.SowingDate = 1998-10-15
      Factor Rape
        Specifications:
          [SCUMSowingRule].Script.CultivarName = Rape
          [SCUMSowingRule].Script.SowingDate = 1998-10-15
    Simulation CropCompBase: Area=0; Slope=0
      Weather: FileName=%root%\Tests\WeatherFiles\lincoln.met
      Clock: StartDate=1998-05-01; EndDate=1999-07-01
      Summary
      SoilArbitrator Soil Arbitrator
      Zone Field: Area=0; Slope=0
        Soil: Latitude=0; Longitude=0
          Analysis: Thickness=[100, 200, 300, 300, 300, 300]; PH=[6.6, 6.2, 5.7, 5.5, 5.5, 5.5]; PHUnits=Water; BoronUnits=HotWater
          InitialWater Initial water: PercentMethod=EvenlyDistributed; FractionFull=1
          Water
            Thickness  BD   AirDry  LL15  DUL   SAT
            100        1.2  0.08    0.13  0.33  0.5
            200        1.2  0.13    0.13  0.33  0.5
            300        1.2  0.1     0.1   0.31  0.44
            300        1.2  0.06    0.06  0.15  0.46
            300        1.2  0.04    0.04  0.1   0.44
            300        1.2  0.02    0.02  0.06  0.44
            SoilCrop SCUMSoil: LL=[0.13, 0.13, 0.1, 0.08, 0.11, 0.11]; KL=[0.08, 0.08, 0.08, 0.08, 0.08, 0.08]; XF=[1, 1, 1, 1, 1, 1]
            SoilCrop PotatoSoil: LL=[0.13, 0.13, 0.27, 0.27, 0.3, 0.3]; KL=[0.1, 0.06, 0.03, 0.01, 0, 0]; XF=[1, 1, 0.1, 0, 0, 0]
          SoilWater: residueinterception=0; SummerDate=1-Nov; SummerU=9; SummerCona=4.4; WinterDate=1-Apr; WinterU=9; WinterCona=4.4; DiffusConst=88; DiffusSlope=35.4; Salb=0.18; CN2Bare=68; CNRed=20; CNCov=0.8; slope=0; discharge_width=0; catchment_area=0; max_pond=0
            Thickness  SWCON  KLAT
            100        0.55   0
            200        0.55   0
            300        0.55   0
            300        0.55   0
            300        0.55   0
            300        0.55   0
          SoilNitrogen: fom_type=[default, manure, mucuna, lablab, shemp, stable]; fract_carb=[0.2, 0.3, 0.54, 0.57, 0.45, 0]; fract_cell=[0.7, 0.3, 0.37, 0.37, 0.47, 0.1]; fract_lign=[0.1, 0.4, 0.09, 0.06, 0.08, 0.9]; wfpsN2N2O_x=[22, 88]; wfpsN2N2O_y=[0.1, 1]; oc=[1.83566, 1.46334, 1.19884, 1.0301, 0.470338, 0.470138]
          SoilOrganicMatter: RootCN=30; RootWt=3000; SoilCN=11.5; EnrACoeff=7.4; EnrBCoeff=0.2; OCUnits=Total
            Thickness  OC    FBiom  FInert
            100        1.82  0.025  0.3
            200        1.47  0.025  0.4
            300        1.2   0.015  0.75
            300        1.03  0.01   0.9
            300        0.47  0.01   0.96
            300        0.47  0.01   0.96
          Sample Initial nitrogen: NO3Units=kgha; NH4Units=ppm; SWUnits=Volumetric; OCUnits=Total; PHUnits=Water
            Thickness  NO3  NH4
            100        270  0
            200        30   0
            300        5    0
            300        5    0
            300        0    0
            300        0    0
        MicroClimate: air_pressure=1010; soil_emissivity=0.96; sun_angle=15; soil_heat_flux_fraction=0.4; night_interception_fraction=0.5; windspeed_default=3; refheight=2; albedo=0.26; emissivity=0.96; gsmax=0.01; r50=200; a_interception=0; b_interception=1; c_interception=0; d_interception=0; soil_albedo=0.23
        Irrigation
        Fertiliser
        Manager SCUMSowingRule
          CultivarName = Barley_Spring
          InitialRootDepth = 10
          SowingDate = 1998-10-14
```csharp
using System;
using Models.Core;
using Models.PMF;
namespace Models
{
	[Serializable] 
	[System.Xml.Serialization.XmlInclude(typeof(Model))]
	public class Script : Model
	{
		[Link] Plant SCUM;
		[Link] Clock Clock;

		[Description("Cultivar")]
		public string CultivarName { get; set; }
		[Description("Initial Root Depth")]
		public double InitialRootDepth { get; set; }
		[Description("Sowing Date")]
		public DateTime SowingDate { get; set; }

               
		[EventSubscribe("DoManagement")]
		private void OnDoManagement(object sender, EventArgs e)
		{
			if (Clock.Today.Date == SowingDate)
				SCUM.Sow(cultivar: CultivarName, population: 1, depth: InitialRootDepth, rowSpacing: 150);
			//PMFCrop.Sow(... Contains the following arguements:
			//Population  double  Optional  Seeds sowing/m2.  Default is zero
			//Cultivar    string  Required  "NameOfCultivar"
			//Depth       double  Optional  Depth (mm) seed sown.   Default is 100mm 
			//MaxCover    double  Optional  Proportion (0-1) of the ground row crop will cover.   Default is 1.0
			//BudNumber   double  Optional  Number of mainstems per seed sown.  Default is 1.0
			//RowSpacing  double  Optional  Spaceing (mm) between drill rows when crop is sown.  Default is 150mm
			//CropClass   string  Optional  Crop class to instantiate when crop is sown.  Default is "Plant"
		}
	}
}
```
        Manager ExtraVariables
```csharp
using System;
using Models.Core;
using System.Collections.Generic;
using System.Text;
using Models.Soils;
using Models.PMF;
using Models;
using System.Xml.Serialization;
using APSIM.Shared.Utilities;

namespace Models
{
	[Serializable] 
	public class Script : Model
	{      
		[Link] Clock Clock;
		[Link] Soils.Soil Soil;
		[Link] Models.SurfaceOM.SurfaceOrganicMatter SOM;
		[Link] Weather Met;   
		[Link] Fertiliser Fert;
		[Link] Irrigation Irrig;  
		[Link] Plant SCUM;
        [Link] Zone zone;
					
		[XmlIgnore] public bool InitialDay { get; set; }
		
		[XmlIgnore] public double AccumPlantN { get; set; }
		[XmlIgnore] public double AccumMineralisation { get; set; }
		[XmlIgnore] public double AccumDenit { get; set; }
		[XmlIgnore] public double AccumFert { get; set; }
		[XmlIgnore] public double AccumLeach { get; set; }
		[XmlIgnore] public double AccumDetach { get; set; }
		[XmlIgnore] public double DeltaSoilOMN { get; set; }
		[XmlIgnore] public double DeltaSurfaceOMN { get; set; }
		[XmlIgnore] public double DeltaSoilMineralN { get; set; }
		[XmlIgnore] public double SoilNitrogenContent { get; set; }
		
		[XmlIgnore] public double AccumEO { get; set; }
		[XmlIgnore] public double AccumEP { get; set; }
		[XmlIgnore] public double AccumES { get; set; }
		[XmlIgnore] public double AccumDrainage { get; set; }
		[XmlIgnore] public double AccumRunoff { get; set; }
		[XmlIgnore] public double AccumOutflowLat { get; set; }
		[XmlIgnore] public double AccumIrrigation { get; set; }
		[XmlIgnore] public double AccumRainfall { get; set; }
		[XmlIgnore] public double SoilWaterDeficit { get; set; }
	
		[XmlIgnore] public double  InitialSoilOMN { get; set; }
		[XmlIgnore] public double  InitialSurfaceOMN { get; set; }
		[XmlIgnore] public double  InitialMineralN { get; set; }
		
		[XmlIgnore] public double SWC { get; set; }
		[XmlIgnore] public double DUL { get; set; }
		[XmlIgnore] public double OutFlowLat { get; set; }

		[XmlIgnore] public double FomN { get; set; }
		[XmlIgnore] public double BiomN { get; set; }
		[XmlIgnore] public double HumN { get; set; }
		[XmlIgnore] public double OrganicN { get; set; }
		[XmlIgnore] public double NO3N { get; set; }
		[XmlIgnore] public double NH4N { get; set; }
		[XmlIgnore] public double UreaN { get; set; }
		[XmlIgnore] public double MineralN { get; set; }
		[XmlIgnore] public double DltNMinRes { get; set; }
		[XmlIgnore] public double DltNMinTot { get; set; }
		
        [EventSubscribe("Commencing")]
        private void OnSimulationCommencing(object sender, EventArgs e)
        {
			InitialDay = true;
		}	   
		
		[EventSubscribe("DoManagement")]
		private void OnDoManagement(object sender, EventArgs e)
		{
			//!!!!!! Nitrogen balance components !!!!!!
			//!!!!!!^^^^^^^^^^^^^^^^^^^^^^^^^^^^^!!!!!!
           	FomN = MathUtilities.Sum(Soil.SoilNitrogen.FOMN);
			HumN = MathUtilities.Sum(Soil.SoilNitrogen.HumicN);
		    BiomN = MathUtilities.Sum(Soil.SoilNitrogen.MicrobialN);
			OrganicN = FomN + HumN + BiomN;
			NO3N = MathUtilities.Sum(Soil.NO3N);
			NH4N = MathUtilities.Sum(Soil.NH4N);
			UreaN = MathUtilities.Sum(Soil.SoilNitrogen.urea);
			MineralN = NO3N + NH4N + UreaN; 
			DltNMinRes = MathUtilities.Sum(Soil.SoilNitrogen.dlt_n_min_res);
			DltNMinTot = MathUtilities.Sum(Soil.SoilNitrogen.MineralisedN);
            int layers = Soil.Thickness.Length;
			if (InitialDay == true)
			{
				InitialSurfaceOMN = SOM.N;
				InitialSoilOMN = OrganicN;
				InitialMineralN = MineralN;
				InitialDay = false;
			}
			DeltaSurfaceOMN = SOM.N - InitialSurfaceOMN;
			AccumLeach = AccumLeach - Soil.SoilWater.LeachNH4 - Soil.SoilWater.LeachNO3 - Soil.SoilWater.LeachUrea; //Fails
            AccumMineralisation += MathUtilities.Sum(Soil.SoilNitrogen.MineralisedN);
            AccumDenit -= MathUtilities.Sum(Soil.SoilNitrogen.Denitrification);
			AccumPlantN -= (double)zone.Get("SCUM.Root.NUptake");
			DeltaSoilOMN = OrganicN - InitialSoilOMN;
			DeltaSoilMineralN = MineralN - InitialMineralN;
			SoilNitrogenContent = MineralN;
			
			//!!!!!! Water balance components !!!!!!
			//!!!!!!^^^^^^^^^^^^^^^^^^^^^^^^^^!!!!!!

			AccumRainfall += Met.Rain;
			//AccumEP -= (double)zone.Get("[SCUM].Stover.Transpiration");
            AccumEP -= (double)zone.Get("SCUM.Root.WaterUptake");
			SoilWaterDeficit =  (SWC - DUL);
			double OutFlowLat = MathUtilities.Sum(Soil.SoilWater.outflow_lat);
			AccumOutflowLat -= OutFlowLat;
		}
		
		[EventSubscribe("DoManagementCalculations")]
		private void OnDoManagementCalculations(object sender, EventArgs e)
		{
			FomN = MathUtilities.Sum(Soil.SoilNitrogen.FOMN);
			HumN = MathUtilities.Sum(Soil.SoilNitrogen.HumicN);
		    BiomN = MathUtilities.Sum(Soil.SoilNitrogen.MicrobialN);
			AccumFert += Fert.NitrogenApplied;
			AccumIrrigation += Irrig.IrrigationApplied;
			
			
			AccumEO -= Soil.SoilWater.Eo;
			AccumES -= Soil.SoilWater.Es; 
			AccumDrainage -= Soil.SoilWater.Drainage;
			AccumRunoff -= Soil.SoilWater.Runoff;
			SWC = MathUtilities.Sum(Soil.SoilWater.SWmm);
			DUL = MathUtilities.Sum(Soil.SoilWater.DULmm);
		}
	}
}
```
        SurfaceOrganicMatter surface organic matter: PondActive=no; ReportAdditions=no; ReportRemovals=no; PoolName=wheat; type=wheat; mass=2000; standing_fraction=0; cnr=80; CriticalResidueWeight=2000; OptimumDecompTemp=20; MaxCumulativeEOS=20; CNRatioDecompCoeff=0.277; CNRatioDecompThreshold=25; TotalLeachRain=25; MinRainToLeach=10; CriticalMinimumOrganicC=0.004; DefaultCPRatio=0; DefaultStandingFraction=0; StandingExtinctCoeff=0.5; FractionFaecesAdded=0.5
          Pools:
            {PoolName=wheat, ResidueType=wheat, Mass=2000, CNRatio=80, StandingFraction=0}
          ResidueTypes: LoadFromResource=ResidueTypes
          TillageTypes TillageTypesList
        Report: EventNames=[Clock].DoReport
          VariableNames:
            [Clock].Today
            [ExtraVariables].Script.AccumPlantN
            [ExtraVariables].Script.AccumMineralisation
            [ExtraVariables].Script.AccumDenit
            [ExtraVariables].Script.AccumFert
            [ExtraVariables].Script.AccumLeach
            [ExtraVariables].Script.AccumDetach
            [ExtraVariables].Script.DeltaSoilOMN
            [ExtraVariables].Script.DeltaSurfaceOMN
            [ExtraVariables].Script.DeltaSoilMineralN
            [ExtraVariables].Script.SWC
            [ExtraVariables].Script.DUL
            [ExtraVariables].Script.OutFlowLat
            [ExtraVariables].Script.AccumEO
            [ExtraVariables].Script.AccumEP
            [ExtraVariables].Script.AccumES
            [ExtraVariables].Script.AccumDrainage
            [ExtraVariables].Script.AccumRunoff
            [ExtraVariables].Script.AccumRainfall
            [ExtraVariables].Script.AccumIrrigation
            [ExtraVariables].Script.AccumOutflowLat
            [ExtraVariables].Script.SoilWaterDeficit
            [ExtraVariables].Script.SoilNitrogenContent
            [ExtraVariables].Script.FomN
            [ExtraVariables].Script.HumN
            [ExtraVariables].Script.BiomN
            [ExtraVariables].Script.DltNMinRes
            [ExtraVariables].Script.DltNMinTot
            [MicroClimate].net_radn
            [MicroClimate].peta
            [MicroClimate].petr
            [Soil].SoilWater.Drainage
            [Soil].SoilWater.Runoff
            [Soil].SoilWater.Eo
            [Soil].SoilWater.Es
            [Soil].SoilWater.pond
            [Soil].SoilWater.SWmm
            [Soil].NO3N
            [SCUM].Stover.Live.Wt
            [SCUM].Root.Live.Wt
            [SCUM].Product.Live.Wt
            [SCUM].Stover.Live.N
            [SCUM].Root.Live.N
            [SCUM].Product.Live.N
            [SCUM].Stover.Live.NConc
            [SCUM].Root.Live.NConc
            [SCUM].Product.Live.NConc
            [SCUM].Root.WaterSupply
            [SCUM].Root.WaterUptake
            [SCUM].Stover.Transpiration
            [SCUM].Stover.WaterDemand
            [SCUM].Root.Depth
            [SCUM].Stover.CoverTotal
            [SCUM].Stover.CoverDead
            [SCUM].Stover.LAI
            [SCUM].Stover.Height
            [SCUM].Stover.PotentialBiomass.Value
            [SCUM].Product.LiveFWt
            [SCUM].Arbitrator.NDemand
            [SCUM].Arbitrator.NSupply
            [SCUM].Stover.Fw
            [SCUM].Stover.Fn
            [SCUM].Summariser.Total.Wt
            [SCUM].ExpectedYield.Value
            [SCUM].DryYield.Value
            [SCUM].TotalBiomassAtStartReproductive.Value
            [SCUM].TotalBiomassAtStartSenescence.Value
            [SCUM].Ymax.Value
            [SCUM].Summariser.Total.N
            [SCUM].Arbitrator.DMSupply
            [SCUM].Arbitrator.DMDemand
            [SCUM].Phenology.AccumulatedEmergedTT
            [SCUM].Arbitrator.DMSinkLimitation
            [SCUM].Arbitrator.DMNutrientLimitation
            [SCUM].Phenology.ThermalTime.Value
            [SCUM].Phenology.CurrentPhaseName
            [SCUM].Phenology.Stage
        Plant SCUM: CropType=SCUM
        Manager AutomaticIrrigation
          Irrigation_Yes_No = yes
          Season_Start = 1-Oct
          Season_End = 30-Apr
          Season_Allocation = 1000
          Refull_Frac = 0.9
          Trigger_Frac = 0.7
          Return_days = 3
          Maximum_Irrigation_Amount = 40
          Top_Depth = 600
```csharp
using System;
using Models.Core;
using Models.PMF;
using Models.Soils;
using System.Xml.Serialization;
using Models.PMF;
using APSIM.Shared.Utilities;

        
namespace Models
{
   [Serializable] 
   [System.Xml.Serialization.XmlInclude(typeof(Model))]
    public class Script : Model
    {      
	   //Communication to other modules
	   [Link] ISummary summary = null;
	   [Link] Irrigation Irrigation;
	   [Link] Clock Clock;
	   [Link] Soil Soil;
	   [Link] Plant SCUM;
	   
	   //User inputs from properties tab
	   [Description("Irrigation on (yes or no)")]
	   public string Irrigation_Yes_No { get; set; }
	   [Description("SeasonStart (dd-MMM)")]
	   public string Season_Start { get; set; }
	   [Description("SeasonEnd (dd-MMM)")]
	   public string Season_End { get; set; }
	   [Description("Season Allocation (mm)")]
	   public double Season_Allocation { get; set; }
	   [Description("% PAWC to refill soil to (0-1)")]
	   public double Refull_Frac { get; set; }
	   [Description("% PAWC to trigger irrigation (0-1)")]
	   public double Trigger_Frac { get; set; }
	   [Description("Minimum days for irrigation to return")]
	   public double Return_days { get; set; }
	   [Description("Maximum irrigation application (mm)")]
	   public double Maximum_Irrigation_Amount { get; set; }
	   [Description("Depth to calculate PAWC (mm)")]
	   public double Top_Depth { get; set; }
	   
	   //Class members
	   [XmlIgnore] private bool IrrigationIsAvailable { get; set; }
	   [XmlIgnore] public bool SeasonIsOpen { get; set; }
	   [XmlIgnore] private bool CropIsActive { get; set; }
	   [XmlIgnore] private bool IrrigatorIsAvailable { get; set; }
	   [XmlIgnore] private bool SoilIsDry { get; set; }
	   [XmlIgnore] public double Top_DUL { get; set; }
	   [XmlIgnore] public double Top_Refull { get; set; }
	   [XmlIgnore] public double Top_Trigger { get; set; }
	   [XmlIgnore] public double Top_LL { get; set; }
	   [XmlIgnore] public double Top_SW { get; set; }
	   [XmlIgnore] public double Accumulated_depth { get; set; }   
	   [XmlIgnore] public double Days_since_irrigation { get; set; }
	   [XmlIgnore] public double Amount_to_apply { get; set; }
	   [XmlIgnore] public double Season_Application { get; set; }
		
	   //Variables for date logic testing
	   [XmlIgnore] public string StartString {get; set;}
	   [XmlIgnore] public string EndString {get; set;}
	   [XmlIgnore] public DateTime StartDate {get; set;}
	   [XmlIgnore] public DateTime EndDate {get; set;}
	   [XmlIgnore] public int TodayYear {get; set;}
	   [XmlIgnore] public int TodayMonth {get; set;}
	   [XmlIgnore] public int StartMonth {get; set;}
	   [XmlIgnore] public int EndMonth {get; set;}
	   [XmlIgnore] public int TodayDay {get; set;}
	   [XmlIgnore] public int StartDay {get; set;}
	   [XmlIgnore] public int EndDay {get; set;}
	   
	
	   //Calculate static soil variables
	   [EventSubscribe("StartOfSimulation")]
	   private void OnStartOfSimulation(object sender, EventArgs e)
	   {   
	      //Calculated soil water variables
	      Accumulated_depth = 0;
	      for (int layer = 0; Accumulated_depth < Top_Depth; layer++)
	      {
	         Top_LL += Soil.SoilWater.LL15mm[layer];
	         Top_DUL += Soil.SoilWater.DULmm[layer];
	         Accumulated_depth += Soil.SoilWater.Thickness[layer];
	      }
	      Top_Refull = Top_LL + (Top_DUL - Top_LL) * Refull_Frac;
	   }
	   
	  
	   //Determine daily requirement for irrigation
		[EventSubscribe("StartOfDay")]
	   	private void OnStartOfDay(object sender, EventArgs e)
	   	{ 
	      //Can we irrigate?
	      IrrigationIsAvailable = false; 
	      if (Irrigation_Yes_No == "yes")
	         IrrigationIsAvailable = true; 
	
	      //Are we Allowed to Irrigate?
	      TodayYear = Clock.Today.Year;
	      StartString = Season_Start + "-" + TodayYear.ToString();
	      EndString = Season_End + "-" + TodayYear.ToString();
	      StartDate = DateTime.Parse(StartString);
	      EndDate = DateTime.Parse(EndString);
		  TodayMonth = Clock.Today.Month;
		  TodayDay = Clock.Today.Day;
		  StartDay = StartDate.Day;
		  StartMonth = StartDate.Month;
		  EndDay = EndDate.Day;
		  EndMonth = EndDate.Month;
		  
		  SeasonIsOpen = false;
		  //if we are in the spring and after the start date then yes
		  if((Clock.Today.Month > 6) && (Clock.Today >= StartDate))
		  SeasonIsOpen = true;
		  //if we are in the autumn and before the end date then yes
		  if((Clock.Today.Month <= 6) && (Clock.Today <= EndDate))
		  SeasonIsOpen = true;
		  
	      //Is there a crop in the ground that needs irrigation?
	      CropIsActive = false;
	      if ((SCUM.Phenology.Stage >= 3.0) && (SCUM.Phenology.Stage < 6.0))
	            CropIsActive = true;
	      
	      //Is the irrigator available?
	      IrrigatorIsAvailable = false;
	      Days_since_irrigation += 1;
	      if (Days_since_irrigation >= Return_days)
	         IrrigatorIsAvailable = true;
	      
	      //Is the soil dry enough to require irrigation?
	      SoilIsDry = false;
	      double CurrentRootDepth = 0;
	      double RootDepth = SCUM.Root.Depth;
	      CurrentRootDepth = Math.Max(RootDepth, CurrentRootDepth);
	      
	      double RelativeRootDepth = Math.Min(1.0, CurrentRootDepth / Top_Depth);
	      Top_Trigger = Math.Min(Top_Refull, Top_DUL - (Top_DUL - Top_LL) * RelativeRootDepth * (1-Trigger_Frac)); 
	      
	      Accumulated_depth = 0;
	      Top_SW = 0;
	      for (int layer = 0; Accumulated_depth < Top_Depth; layer++)
	      {
	         Top_SW += Soil.SoilWater.SWmm[layer];
	         Accumulated_depth += Soil.SoilWater.Thickness[layer];
	      }
	      if (Top_SW <= Top_Trigger)
	         SoilIsDry = true;
	            
	      //Lets bloody well irrigate then!!!!
	      if((IrrigationIsAvailable) && (SeasonIsOpen) && (CropIsActive) && (IrrigatorIsAvailable) && (SoilIsDry)) //The conditions are rife for irrigation
	      {
	         Amount_to_apply = Math.Min(Top_Refull - Top_SW, Maximum_Irrigation_Amount);
	         Amount_to_apply = Math.Min(Amount_to_apply, Season_Allocation - Season_Application); 
	         Amount_to_apply = Math.Max(Amount_to_apply, 0.0);
	         Irrigation.Apply(Amount_to_apply);
	         Days_since_irrigation = 0;
	         Season_Application += Amount_to_apply;
	         summary.WriteMessage(this, "Automatic Irrigation");
            
	      }
	   }
	}
}
```
        Manager AutomaticFertiliser
          Fertiliser_Yes_No = yes
          Season_Start = 1-Aug
          Season_End = 30-Apr
          Season_Allocation = 1000
          TriggerN = 50
          NApplicationAmount = 25
          Return_days = 3
          Top_Depth = 300
```csharp
using System;
using Models.Core;
using Models.PMF;
using Models.Soils;
using System.Xml.Serialization;
using Models.PMF;
using APSIM.Shared.Utilities;

        
namespace Models
{
   [Serializable] 
   [System.Xml.Serialization.XmlInclude(typeof(Model))]
    public class Script : Model
    {      
	   //Communication to other modules
	   [Link] ISummary summary = null;
	   [Link] Fertiliser Fertiliser;
	   [Link] Clock Clock;
	   [Link] Soils.Soil Soil;
	   [Link] Plant SCUM;
	   
	   //User inputs from properties tab
	   [Description("Fertiliser on (yes or no)")]
	   public string Fertiliser_Yes_No { get; set; }
	   [Description("SeasonStart (dd-MMM)")]
	   public string Season_Start { get; set; }
	   [Description("SeasonEnd (dd-MMM)")]
	   public string Season_End { get; set; }
	   [Description("Season Allocation (kg/ha)")]
	   public double Season_Allocation { get; set; }
	   [Description("Mineral N to maintain soil above (kg/ha)")]
	   public double TriggerN { get; set; }
	   [Description("Amount of N to apply (kg/ha)")]
	   public double NApplicationAmount { get; set; }
	   [Description("Minimum days for Fertiliser spreader to return")]
	   public double Return_days { get; set; }
	   [Description("Depth to calculate mineral N (mm)")]
	   public double Top_Depth { get; set; }
	   
	   //Class members
	   [XmlIgnore] private bool FertiliserIsAvailable { get; set; }
	   [XmlIgnore] public bool SeasonIsOpen { get; set; }
	   [XmlIgnore] private bool CropIsActive { get; set; }
	   [XmlIgnore] private bool FertSpreaderIsAvailable { get; set; }
	   [XmlIgnore] private bool SoilNIsLow { get; set; }
	   [XmlIgnore] public double Top_SoilN { get; set; }
	   [XmlIgnore] public double Accumulated_depth { get; set; }   
	   [XmlIgnore] public double Days_since_fertiliser { get; set; }
	   [XmlIgnore] public double Season_Application { get; set; }
		
	   //Variables for date logic testing
	   [XmlIgnore] public string StartString {get; set;}
	   [XmlIgnore] public string EndString {get; set;}
	   [XmlIgnore] public DateTime StartDate {get; set;}
	   [XmlIgnore] public DateTime EndDate {get; set;}
	   [XmlIgnore] public int TodayYear {get; set;}
	   [XmlIgnore] public int TodayMonth {get; set;}
	   [XmlIgnore] public int StartMonth {get; set;}
	   [XmlIgnore] public int EndMonth {get; set;}
	   [XmlIgnore] public int TodayDay {get; set;}
	   [XmlIgnore] public int StartDay {get; set;}
	   [XmlIgnore] public int EndDay {get; set;}
	   	   
	   //Determine daily requirement for fertiliser
		[EventSubscribe("StartOfDay")]
	   	private void OnStartOfDay(object sender, EventArgs e)
	   	{ 
	      //Can we irrigate?
	      FertiliserIsAvailable = false; 
	      if (Fertiliser_Yes_No == "yes")
	         FertiliserIsAvailable = true; 
	
	      //Are we Allowed to Irrigate?
	      TodayYear = Clock.Today.Year;
	      StartString = Season_Start + "-" + TodayYear.ToString();
	      EndString = Season_End + "-" + TodayYear.ToString();
	      StartDate = DateTime.Parse(StartString);
	      EndDate = DateTime.Parse(EndString);
		  TodayMonth = Clock.Today.Month;
		  TodayDay = Clock.Today.Day;
		  StartDay = StartDate.Day;
		  StartMonth = StartDate.Month;
		  EndDay = EndDate.Day;
		  EndMonth = EndDate.Month;
		  
		  SeasonIsOpen = false;
		  //if we are in the spring and after the start date then yes
		  if((Clock.Today.Month > 6) && (Clock.Today >= StartDate))
		  SeasonIsOpen = true;
		  //if we are in the autumn and before the end date then yes
		  if((Clock.Today.Month <= 6) && (Clock.Today <= EndDate))
		  SeasonIsOpen = true;
		  
	      //Is there a crop in the ground that needs irrigation?
	      CropIsActive = false;
	      if ((SCUM.Phenology.Stage >= 3.0) && (SCUM.Phenology.Stage < 6.0))
	            CropIsActive = true;
	      
	      //Is the irrigator available?
	      FertSpreaderIsAvailable = false;
	      Days_since_fertiliser += 1;
	      if (Days_since_fertiliser >= Return_days)
	         FertSpreaderIsAvailable = true;
	      
	      //Is the soil N low enough to require fertiliser?
	      SoilNIsLow = false;
	      double CurrentRootDepth = 0;
	      double RootDepth = SCUM.Root.Depth;
	      CurrentRootDepth = Math.Max(RootDepth, CurrentRootDepth);
	      
	      Accumulated_depth = 0;
	      Top_SoilN = 0;
	      for (int layer = 0; Accumulated_depth < Top_Depth; layer++)
	      {
	         Top_SoilN += Soil.NO3N[layer];
	         Accumulated_depth += Soil.SoilWater.Thickness[layer];
	      }
	      if (Top_SoilN <= TriggerN)
	         SoilNIsLow = true;
	            
	      //Lets bloody well irrigate then!!!!
	      if((FertiliserIsAvailable) && (SeasonIsOpen) && (CropIsActive) && (FertSpreaderIsAvailable) && (SoilNIsLow)) //The conditions are rife for irrigation
	      {
	         Fertiliser.Apply(NApplicationAmount, Fertiliser.Types.UreaN, 10);
	         Days_since_fertiliser = 0;
	         Season_Application += NApplicationAmount;
	         summary.WriteMessage(this, "Automatic Fertiliser");
            
	      }
	   }
	}
}
```
  Simulation SCUMTestBase: Area=0; Slope=0
    Weather: FileName=%root%\Tests\WeatherFiles\lincoln.met
    Clock: StartDate=1998-10-14; EndDate=1999-07-01
    Summary
    SoilArbitrator Soil Arbitrator
    Zone Field: Area=0; Slope=0
      Soil: Latitude=0; Longitude=0
        Analysis: Thickness=[100, 200, 300, 300, 300, 300]; PH=[6.6, 6.2, 5.7, 5.5, 5.5, 5.5]; PHUnits=Water; BoronUnits=HotWater
        InitialWater Initial water: PercentMethod=EvenlyDistributed; FractionFull=1
        Water
          Thickness  BD   AirDry  LL15  DUL   SAT
          100        1.2  0.08    0.13  0.33  0.5
          200        1.2  0.13    0.13  0.33  0.5
          300        1.2  0.1     0.1   0.31  0.44
          300        1.2  0.06    0.06  0.15  0.46
          300        1.2  0.04    0.04  0.1   0.44
          300        1.2  0.02    0.02  0.06  0.44
          SoilCrop SCUMSoil: LL=[0.13, 0.13, 0.1, 0.08, 0.11, 0.11]; KL=[0.1, 0.1, 0.1, 0.1, 0.1, 0.1]; XF=[1, 1, 1, 1, 1, 1]
          SoilCrop PotatoSoil: LL=[0.13, 0.13, 0.27, 0.27, 0.3, 0.3]; KL=[0.1, 0.06, 0.03, 0.01, 0, 0]; XF=[1, 1, 0.1, 0, 0, 0]
        SoilWater: same as TestCrop.CropCompBase.Field.Soil.SoilWater
        SoilNitrogen: same as TestCrop.CropCompBase.Field.Soil.SoilNitrogen
        SoilOrganicMatter: same as TestCrop.CropCompBase.Field.Soil.SoilOrganicMatter
        Sample Initial nitrogen: NO3Units=kgha; NH4Units=ppm; SWUnits=Volumetric; OCUnits=Total; PHUnits=Water
          Thickness  NO3  NH4
          100        270  0
          200        30   0
          300        5    0
          300        5    0
          300        0    0
          300        0    0
      SurfaceOrganicMatter surface organic matter: same as TestCrop.CropCompBase.Field.surface organic matter
      MicroClimate: same as TestCrop.CropCompBase.Field.MicroClimate
      Plant SCUM: CropType=MCSP
      Irrigation
      Fertiliser
      Manager MCSPSowingRule
        CultivarName = Maize_Short
        InitialRootDepth = 10
        SowingDate = 1998-10-14
```csharp
using System;
using Models.Core;
using Models.PMF;
namespace Models
{
	[Serializable] 
	[System.Xml.Serialization.XmlInclude(typeof(Model))]
	public class Script : Model
	{
		[Link] Plant MCSP;
		[Link] Clock Clock;

		[Description("Cultivar")]
		public string CultivarName { get; set; }
		[Description("Initial Root Depth")]
		public double InitialRootDepth { get; set; }
		[Description("Sowing Date")]
		public DateTime SowingDate { get; set; }

               
		[EventSubscribe("DoManagement")]
		private void OnDoManagement(object sender, EventArgs e)
		{
			if (Clock.Today.Date == SowingDate)
				MCSP.Sow(cultivar: CultivarName, population: 1, depth: InitialRootDepth, rowSpacing: 150);
                
			//PMFCrop.Sow(... Contains the following arguements:
			//Population  double  Optional  Seeds sowing/m2.  Default is zero
			//Cultivar    string  Required  "NameOfCultivar"
			//Depth       double  Optional  Depth (mm) seed sown.   Default is 100mm 
			//MaxCover    double  Optional  Proportion (0-1) of the ground row crop will cover.   Default is 1.0
			//BudNumber   double  Optional  Number of mainstems per seed sown.  Default is 1.0
			//RowSpacing  double  Optional  Spaceing (mm) between drill rows when crop is sown.  Default is 150mm
			//CropClass   string  Optional  Crop class to instantiate when crop is sown.  Default is "Plant"
		}
	}
}
```
      Manager ExtraVariables
        script: same as in TestCrop.CropCompBase.Field.ExtraVariables
      Manager AutomaticIrrigation
        Irrigation_Yes_No = yes
        Season_Start = 1-Oct
        Season_End = 30-Apr
        Season_Allocation = 1000
        Refull_Frac = 0.9
        Trigger_Frac = 0.7
        Return_days = 3
        Maximum_Irrigation_Amount = 40
        Top_Depth = 600
        script: same as in TestCrop.CropCompBase.Field.AutomaticIrrigation
      Manager AutomaticFertiliser
        Fertiliser_Yes_No = no
        Season_Start = 1-Aug
        Season_End = 30-Apr
        Season_Allocation = 1000
        TriggerN = 50
        NApplicationAmount = 25
        Return_days = 3
        Top_Depth = 300
        script: same as in TestCrop.CropCompBase.Field.AutomaticFertiliser
      Report: EventNames=[Clock].DoReport
        VariableNames:
          [Clock].Today
          [ExtraVariables].Script.AccumPlantN
          [ExtraVariables].Script.AccumMineralisation
          [ExtraVariables].Script.AccumDenit
          [ExtraVariables].Script.AccumFert
          [ExtraVariables].Script.AccumLeach
          [ExtraVariables].Script.AccumDetach
          [ExtraVariables].Script.DeltaSoilOMN
          [ExtraVariables].Script.DeltaSurfaceOMN
          [ExtraVariables].Script.DeltaSoilMineralN
          [ExtraVariables].Script.SWC
          [ExtraVariables].Script.DUL
          [ExtraVariables].Script.OutFlowLat
          [ExtraVariables].Script.AccumEO
          [ExtraVariables].Script.AccumEP
          [ExtraVariables].Script.AccumES
          [ExtraVariables].Script.AccumDrainage
          [ExtraVariables].Script.AccumRunoff
          [ExtraVariables].Script.AccumRainfall
          [ExtraVariables].Script.AccumIrrigation
          [ExtraVariables].Script.AccumOutflowLat
          [ExtraVariables].Script.SoilWaterDeficit
          [ExtraVariables].Script.SoilNitrogenContent
          [ExtraVariables].Script.FomN
          [ExtraVariables].Script.HumN
          [ExtraVariables].Script.BiomN
          [ExtraVariables].Script.DltNMinRes
          [ExtraVariables].Script.DltNMinTot
          [MicroClimate].net_radn
          [MicroClimate].peta
          [MicroClimate].petr
          [Soil].SoilWater.Drainage
          [Soil].SoilWater.Runoff
          [Soil].SoilWater.Eo
          [Soil].SoilWater.Es
          [Soil].SoilWater.pond
          [Soil].SoilWater.SWmm
          [Soil].NO3N
          [SCUM].Stover.Live.Wt
          [SCUM].Root.Live.Wt
          [SCUM].Product.Live.Wt
          [SCUM].Stover.Live.N
          [SCUM].Root.Live.N
          [SCUM].Product.Live.N
          [SCUM].Stover.Live.NConc
          [SCUM].Root.Live.NConc
          [SCUM].Product.Live.NConc
          [SCUM].Root.WaterSupply
          [SCUM].Root.WaterUptake
          [SCUM].Stover.Transpiration
          [SCUM].Stover.WaterDemand
          [SCUM].Root.Depth
          [SCUM].Stover.CoverTotal
          [SCUM].Stover.CoverDead
          [SCUM].Stover.LAI
          [SCUM].Stover.Height
          [SCUM].Stover.PotentialBiomass.Value
          [SCUM].Product.LiveFWt
          [SCUM].Arbitrator.NDemand
          [SCUM].Arbitrator.NSupply
          [SCUM].Stover.Fw
          [SCUM].Stover.Fn
          [SCUM].Summariser.Total.Wt
          [SCUM].ExpectedYield.Value
          [SCUM].DryYield.Value
          [SCUM].TotalBiomassAtStartReproductive.Value
          [SCUM].TotalBiomassAtStartSenescence.Value
          [SCUM].Ymax.Value
          [SCUM].Summariser.Total.N
          [SCUM].Arbitrator.DMSupply
          [SCUM].Arbitrator.DMDemand
          [SCUM].Phenology.AccumulatedEmergedTT
          [SCUM].Arbitrator.DMSinkLimitation
          [SCUM].Arbitrator.DMNutrientLimitation
          [SCUM].Phenology.ThermalTime.Value
          [SCUM].Phenology.CurrentPhaseName
          [SCUM].Phenology.Stage
          [AutomaticIrrigation].Script.Top_Refull
          [AutomaticIrrigation].Script.Top_Trigger
          [AutomaticIrrigation].Script.Top_SW
          [AutomaticIrrigation].Script.Top_DUL
          [Irrigation].IrrigationApplied
          [AutomaticIrrigation].Script.Amount_to_apply
          [AutomaticIrrigation].Script.StartDate
          [Clock].Today
          [AutomaticIrrigation].Script.SeasonIsOpen
          [AutomaticIrrigation].Script.EndDate
          [AutomaticIrrigation].Script.TodayYear
          [SCUM].Arbitrator.FN
          [SCUM].Arbitrator.NSupply
    Memo Caption
      # SCUM: the Simple Crop Uptake Model

      _Hamish Brown and Rob Zyskowski, Plant and Food Research, New Zealand_

      This model has been built to simulate a range of different crops in simulations where water and nitrogen balance are of interest but a fully mechanistic plant model is not needed. It is a daily time step implementation of the crop model that is used on the Overseer nutrient balance model (Cichota_etal_2010).  It uses simple sigmoidal functions for estimating daily cover and biomass deltas to give realistic water and nitrogen demands. It does not simulate potential yield, this is specified as an input. Yield will be reduced below the specified potential yield if N or water supplies from the soil are insufficient to meet demand. The model has been paramaterised for simulating water and nitrogen balances of cropping rotations in New Zealand (where over 50 different crop types are grown and it is not feasible to produce full crop models for each of these). It may be adapted for other purposes and other crop types may be added but the user will need to keep in mind that it is empirical and the parameters might need changing for crops from different locations.
  Experiment Lincoln2012
    Memo
      ### Lincoln2012 (Rain-Shelter Trail)

      Testing of APSIM Maize under New Zealand conditions was undertaken using the data of Teixeira et al(2014).  This dataset includes the impact of three N (0 to 250 kg/ha N) and two water regimes (dryland and fully irrigated) using a rain-shelter structure.  Observations include biomass growth and nitrogen content of individual organs, soil water contents, Stover area index, phenology and yield components. Total biomass ranged from 8000 kg/ha for dryland nil N crops to up to 28000kg/ha for fully irrigated and N fertilised crops.  Dryland crops recovered 25 percent less N from applied fertilizer than irrigated crops.
    Factors
      Factor Nitrogen: Specifications=[Fert]
        Operations Nil
          2012-11-15  [Fertiliser].Apply(0, Fertiliser.Types.UreaN, 10);
          2012-12-20  [Fertiliser].Apply(0, Fertiliser.Types.UreaN, 10);
          2013-01-31  [Fertiliser].Apply(0, Fertiliser.Types.UreaN, 10);
        Operations Low
          2012-11-15  [Fertiliser].Apply(25, Fertiliser.Types.UreaN, 10);
          2012-12-20  [Fertiliser].Apply(50, Fertiliser.Types.UreaN, 10);
        Operations Med
          2012-11-15  [Fertiliser].Apply(50, Fertiliser.Types.UreaN, 10);
          2012-12-20  [Fertiliser].Apply(100, Fertiliser.Types.UreaN, 10);
          2013-01-31  [Fertiliser].Apply(100, Fertiliser.Types.UreaN, 10);
      Factor Irrigation: Specifications=[Irrig]
        Operations Full
          2012-10-24  [Irrigation].Apply(16);
          2012-10-26  [Irrigation].Apply(10);
          2012-11-03  [Irrigation].Apply(13);
          2012-11-11  [Irrigation].Apply(19.5);
          2012-11-15  [Irrigation].Apply(3.1);
          2012-11-23  [Irrigation].Apply(20);
          2012-11-29  [Irrigation].Apply(20);
          2012-11-30  [Irrigation].Apply(30);
          2012-12-13  [Irrigation].Apply(19);
          2012-12-20  [Irrigation].Apply(26);
          2012-12-20  [Irrigation].Apply(4);
          2012-12-27  [Irrigation].Apply(22);
          2013-01-03  [Irrigation].Apply(39.7);
          2013-01-10  [Irrigation].Apply(42.1);
          2013-01-17  [Irrigation].Apply(46.2);
          2013-01-24  [Irrigation].Apply(44.7);
          2013-01-31  [Irrigation].Apply(49.0);
          2013-02-07  [Irrigation].Apply(37);
          2013-02-14  [Irrigation].Apply(38);
          2013-02-21  [Irrigation].Apply(38);
          2013-02-28  [Irrigation].Apply(33.4);
          2013-03-07  [Irrigation].Apply(39.7);
          2013-03-14  [Irrigation].Apply(31.3);
          2013-03-21  [Irrigation].Apply(24);
          2013-03-28  [Irrigation].Apply(34);
          2013-04-04  [Irrigation].Apply(27.5);
        Operations Nil
          2012-10-24  [Irrigation].Apply(16);
          2012-10-26  [Irrigation].Apply(10);
          2012-11-03  [Irrigation].Apply(13);
          2012-11-11  [Irrigation].Apply(19.5);
          2012-11-15  [Irrigation].Apply(3.1);
          2012-11-23  [Irrigation].Apply(25);
          2012-11-29  [Irrigation].Apply(25);
          2012-12-20  [Irrigation].Apply(4);
          2013-01-31  [Irrigation].Apply(4.3);
    Simulation Lincoln2012: Area=0; Slope=0
      Weather: FileName=%root%\Prototypes\Maize\lincoln.met
      Clock: StartDate=2012-10-01; EndDate=2013-04-25
      Summary summaryfile
      SoilArbitrator Soil Arbitrator
      Zone RainShelter: Area=1; Slope=0
        Soil paparoa_silt_loam: SoilType=lignin_FOM; Region=Generic soil types; State=Canterbury; Latitude=999999; Longitude=999999
          DataSource=Profile descriptions provided by Trevor Webb and data for functional horizions based on SWAMP project results
          SoilWater: residueinterception=0; SummerDate=1-Nov; SummerU=9; SummerCona=4.4; WinterDate=1-Apr; WinterU=6; WinterCona=3; DiffusConst=88; DiffusSlope=35; Salb=0.13; CN2Bare=73; CNRed=20; CNCov=0.8; max_pond=0; Thickness=[200, 200, 200, 200, 200, 200, 200, 200]; SWCON=[0.5, 0.56, 0.31, 0.7, 0.7, 0.7, 0.7, 0.7]
          SoilNitrogen: fom_type=[default, manure, mucuna, lablab, shemp, stable]; fract_carb=[0.2, 0.3, 0.54, 0.57, 0.45, 0]; fract_cell=[0.7, 0.3, 0.37, 0.37, 0.47, 0.1]; fract_lign=[0.1, 0.4, 0.09, 0.06, 0.08, 0.9]; wfpsN2N2O_x=[22, 88]; wfpsN2N2O_y=[0.1, 1]
          Analysis: Thickness=[200, 200, 200, 300, 300, 300]; PH=[6, 6, 6, 6, 6, 6]; PHUnits=Water; BoronUnits=HotWater
          Water
            Thickness  BD     AirDry  LL15  DUL   SAT
            200        1.311  0.06    0.06  0.3   0.37
            200        1.474  0.12    0.12  0.3   0.37
            200        1.601  0.1     0.12  0.26  0.32
            200        1.68   0.13    0.13  0.24  0.3
            200        1.68   0.12    0.12  0.24  0.3
            200        1.68   0.15    0.15  0.21  0.3
            200        1.68   0.15    0.15  0.21  0.3
            200        1.68   0.15    0.15  0.21  0.3
            SoilCrop SCUMSoil: LL=[0.084, 0.12, 0.12, 0.15, 0.15, 0.06, 0.06, 0.06]; KL=[0.1, 0.1, 0.1, 0.1, 0.1, 0.01, 0.01, 0.01]; XF=[1, 1, 0.5, 1, 1, 1, 1, 1]
          Sample Initial nitrogen: NO3Units=kgha; NH4Units=kgha; SWUnits=Volumetric; OCUnits=Total; PHUnits=Water
            Thickness  NO3    NH4   SW
            200        16.2   0.9   0.06
            200        10.76  2.92  0.25
            200        7.83   0.57  0.2
            300        6.85   0.98  0.2
            300        4.88   0.84  0.2
            300        1.74   0.54  0.2
          SoilOrganicMatter: RootCN=16; RootWt=6000; SoilCN=11; EnrACoeff=7.4; EnrBCoeff=0.2; OCUnits=Total
            Thickness  OC    FBiom  FInert
            200        3.6   0.03   0.3
            200        0.97  0.02   0.6
            200        0.42  0.01   0.8
            300        0.23  0.01   0.9
            300        0.23  0.01   0.9
            300        0.23  0.01   0.9
        Plant SCUM: CropType=MCSP
        MicroClimate: air_pressure=1010; soil_emissivity=0.96; sun_angle=15; soil_heat_flux_fraction=0.4; night_interception_fraction=0.5; windspeed_default=3; refheight=2; albedo=0.15; emissivity=0.96; gsmax=0.01; r50=200; a_interception=0; b_interception=1; c_interception=0; d_interception=0; soil_albedo=0.23
        Irrigation
        Fertiliser
        SurfaceOrganicMatter: PoolName=wheat; type=wheat; mass=0; standing_fraction=0; cnr=80; CriticalResidueWeight=2000; OptimumDecompTemp=20; MaxCumulativeEOS=20; CNRatioDecompCoeff=0.277; CNRatioDecompThreshold=25; TotalLeachRain=25; MinRainToLeach=10; CriticalMinimumOrganicC=0.004; DefaultCPRatio=0; DefaultStandingFraction=0; StandingExtinctCoeff=0.5; FractionFaecesAdded=0.5
          Pools:
            {PoolName=wheat, ResidueType=wheat, Mass=0, CNRatio=80, StandingFraction=0}
          ResidueTypes ResidueTypesList: LoadFromResource=ResidueTypes
        Operations Irrig
          2012-10-24  [Irrigation].Apply(16);
          2012-10-26  [Irrigation].Apply(10);
          2012-11-03  [Irrigation].Apply(13);
          2012-11-11  [Irrigation].Apply(19.5);
          2012-11-15  [Irrigation].Apply(3.1);
          2012-11-23  [Irrigation].Apply(20);
          2012-11-29  [Irrigation].Apply(20);
          2012-11-30  [Irrigation].Apply(30);
          2012-12-13  [Irrigation].Apply(19);
          2012-12-20  [Irrigation].Apply(26);
          2012-12-20  [Irrigation].Apply(4);
          2012-12-27  [Irrigation].Apply(22);
          2013-01-03  [Irrigation].Apply(39.7);
          2013-01-10  [Irrigation].Apply(42.1);
          2013-01-17  [Irrigation].Apply(46.2);
          2013-01-24  [Irrigation].Apply(44.7);
          2013-01-31  [Irrigation].Apply(44.7);
          2013-01-31  [Irrigation].Apply(4.3);
          2013-02-07  [Irrigation].Apply(37);
          2013-02-14  [Irrigation].Apply(38);
          2013-02-21  [Irrigation].Apply(38);
          2013-02-28  [Irrigation].Apply(33.4);
          2013-03-07  [Irrigation].Apply(39.7);
          2013-03-14  [Irrigation].Apply(31.3);
          2013-03-21  [Irrigation].Apply(24);
          2013-03-28  [Irrigation].Apply(34);
          2013-04-04  [Irrigation].Apply(27.5);
        Operations Fert
          2012-11-15  [Fertiliser].Apply(50, Fertiliser.Types.UreaN, 10);
          2012-12-20  [Fertiliser].Apply(100, Fertiliser.Types.UreaN, 10);
          2013-01-31  [Fertiliser].Apply(100, Fertiliser.Types.UreaN, 10);
        Operations Sow
          2012-10-23  [SCUM].Sow(population:11, cultivar:"Maize_Short", depth:10, rowSpacing:710);
        Manager ExtraVariables
```csharp
using System;
using Models.Core;
using System.Collections.Generic;
using System.Text;
using Models.Soils;
using Models.PMF;
using Models;
using System.Xml.Serialization;
using APSIM.Shared.Utilities;

namespace Models
{
	[Serializable] 
	public class Script : Model
	{
		[Link] Clock Clock;
		[Link] Soils.Soil Soil;
		[Link] Models.SurfaceOM.SurfaceOrganicMatter SOM;
		[Link] Weather Met;
		[Link] Fertiliser Fert;
		[Link] Irrigation Irrig;
		[Link] Plant SCUM;
		[Link] Zone zone;
					
		[XmlIgnore] public bool InitialDay { get; set; }
		
		[XmlIgnore] public double AccumPlantN { get; set; }
		[XmlIgnore] public double AccumMineralisation { get; set; }
		[XmlIgnore] public double AccumDenit { get; set; }
		[XmlIgnore] public double AccumFert { get; set; }
		[XmlIgnore] public double AccumLeach { get; set; }
		[XmlIgnore] public double AccumDetach { get; set; }
		[XmlIgnore] public double DeltaSoilOMN { get; set; }
		[XmlIgnore] public double DeltaSurfaceOMN { get; set; }
		[XmlIgnore] public double DeltaSoilMineralN { get; set; }
		[XmlIgnore] public double SoilNitrogenContent { get; set; }
		
		[XmlIgnore] public double AccumEO { get; set; }
		[XmlIgnore] public double AccumEP { get; set; }
		[XmlIgnore] public double AccumES { get; set; }
		[XmlIgnore] public double AccumDrainage { get; set; }
		[XmlIgnore] public double AccumRunoff { get; set; }
		[XmlIgnore] public double AccumOutflowLat { get; set; }
		[XmlIgnore] public double AccumIrrigation { get; set; }
		[XmlIgnore] public double AccumRainfall { get; set; }
		[XmlIgnore] public double SoilWaterDeficit { get; set; }
	
		[XmlIgnore] public double  InitialSoilOMN { get; set; }
		[XmlIgnore] public double  InitialSurfaceOMN { get; set; }
		[XmlIgnore] public double  InitialMineralN { get; set; }
		
		[XmlIgnore] public double SWC { get; set; }
		[XmlIgnore] public double DUL { get; set; }
		[XmlIgnore] public double OutFlowLat { get; set; }

		[XmlIgnore] public double FomN { get; set; }
		[XmlIgnore] public double BiomN { get; set; }
		[XmlIgnore] public double HumN { get; set; }
		[XmlIgnore] public double OrganicN { get; set; }
		[XmlIgnore] public double NO3N { get; set; }
		[XmlIgnore] public double NH4N { get; set; }
		[XmlIgnore] public double UreaN { get; set; }
		[XmlIgnore] public double MineralN { get; set; }
		[XmlIgnore] public double DltNMinRes { get; set; }
		[XmlIgnore] public double DltNMinTot { get; set; }
		
		[XmlIgnore] public double StoverExpandedPosition { get; set; }
		[XmlIgnore] public double StoverAppearedPosition { get; set; }
		[XmlIgnore] public double ExpandedStoverNoYesterday { get; set; }
		[XmlIgnore] public double AppearedStoverNoYesterday { get; set; }
		[XmlIgnore] public double MostRecentlyExpandedStoverSize { get; set; }
		[XmlIgnore] public double MostRecentlyAppearedStoverMaxSize { get; set; }
        
		[EventSubscribe("Commencing")]
		private void OnSimulationCommencing(object sender, EventArgs e)
		{
			InitialDay = true;
			StoverExpandedPosition = 0;
			StoverAppearedPosition = 0;
			ExpandedStoverNoYesterday = 0;
			AppearedStoverNoYesterday = 0;
			MostRecentlyExpandedStoverSize = 0;
			MostRecentlyAppearedStoverMaxSize = 0;
		}
		
		[EventSubscribe("DoManagement")]
		private void OnDoManagement(object sender, EventArgs e)
		{
			//!!!!!! Nitrogen balance components !!!!!!
			//!!!!!!^^^^^^^^^^^^^^^^^^^^^^^^^^^^^!!!!!!
			FomN = MathUtilities.Sum(Soil.SoilNitrogen.FOMN);
			HumN = MathUtilities.Sum(Soil.SoilNitrogen.HumicN);
			BiomN = MathUtilities.Sum(Soil.SoilNitrogen.MicrobialN);
			OrganicN = FomN + HumN + BiomN;
			NO3N = MathUtilities.Sum(Soil.NO3N);
			NH4N = MathUtilities.Sum(Soil.NH4N);
			UreaN = MathUtilities.Sum(Soil.SoilNitrogen.urea);
			MineralN = NO3N + NH4N + UreaN; 
			DltNMinRes = MathUtilities.Sum(Soil.SoilNitrogen.dlt_n_min_res);
			DltNMinTot = MathUtilities.Sum(Soil.SoilNitrogen.MineralisedN);
			int layers = Soil.Thickness.Length;
			if (InitialDay == true)
			{
				InitialSurfaceOMN = SOM.N;
				InitialSoilOMN = OrganicN;
				InitialMineralN = MineralN;
				InitialDay = false;
			}
			AccumFert += Fert.NitrogenApplied;
			DeltaSurfaceOMN = SOM.N - InitialSurfaceOMN;
			AccumLeach = AccumLeach - Soil.SoilWater.LeachNH4 - Soil.SoilWater.LeachNO3 - Soil.SoilWater.LeachUrea; //Fails
			AccumMineralisation += MathUtilities.Sum(Soil.SoilNitrogen.MineralisedN);
			AccumDenit -= MathUtilities.Sum(Soil.SoilNitrogen.Denitrification);
			AccumPlantN -= (double)zone.Get("SCUM.Root.NUptake");
			DeltaSoilOMN = OrganicN - InitialSoilOMN;
			DeltaSoilMineralN = MineralN - InitialMineralN;
			SoilNitrogenContent = MineralN;
			
			//!!!!!! Water balance components !!!!!!
			//!!!!!!^^^^^^^^^^^^^^^^^^^^^^^^^^!!!!!!

			AccumIrrigation += Irrig.IrrigationApplied;
			AccumRainfall += Met.Rain;
			//AccumEP -= (double)zone.Get("[SCUM].Stover.Transpiration");
			AccumEP -= (double)zone.Get("SCUM.Root.WaterUptake");
			SoilWaterDeficit = (SWC - DUL);
			double OutFlowLat = MathUtilities.Sum(Soil.SoilWater.outflow_lat);
			AccumOutflowLat -= OutFlowLat;
			
		}
		
		[EventSubscribe("DoManagementCalculations")]
		private void OnDoManagementCalculations(object sender, EventArgs e)
		{
			FomN = MathUtilities.Sum(Soil.SoilNitrogen.FOMN);
			HumN = MathUtilities.Sum(Soil.SoilNitrogen.HumicN);
			BiomN = MathUtilities.Sum(Soil.SoilNitrogen.MicrobialN);
			
			
			AccumEO -= Soil.SoilWater.Eo;
			AccumES -= Soil.SoilWater.Es; 
			AccumDrainage -= Soil.SoilWater.Drainage;
			AccumRunoff -= Soil.SoilWater.Runoff;
			SWC = MathUtilities.Sum(Soil.SoilWater.SWmm);
			DUL = MathUtilities.Sum(Soil.SoilWater.DULmm);
			
			
			
		}
	}
}
```
        Manager Harvesting
```csharp
using System;
using Models.Core;
using System.Collections.Generic;
using System.Text;
using Models.Soils;
using Models.PMF;
using Models;
using System.Xml.Serialization;
using APSIM.Shared.Utilities;

namespace Models
{
	[Serializable] 
	public class Script : Model
	{
		[Link] Plant SCUM;
		[Link] Zone zone;
					
        
		[EventSubscribe("Commencing")]
		private void OnSimulationCommencing(object sender, EventArgs e)
		{
		}
		
		[EventSubscribe("DoManagement")]
		private void OnDoManagement(object sender, EventArgs e)
		{
			if (SCUM.Phenology.CurrentPhaseName == "ReadyForHarvesting")
			{
				SCUM.Harvest();
				SCUM.EndCrop();
			}
		}
		
		[EventSubscribe("DoManagementCalculations")]
		private void OnDoManagementCalculations(object sender, EventArgs e)
		{
			
		}
	}
}
```
        Manager SetSCUMYield
          OverRidePath = SCUM.Product.ExpectedYield.Value
          OverRideInterger = 1800
          ChangeDate = 2012-10-23
```csharp
using System;
using Models.Core;
using System.Collections.Generic;
using System.Text;
using Models.PMF;
using Models;
using System.Xml.Serialization;
using APSIM.Shared.Utilities;

namespace Models
{
	[Serializable] 
	public class Script : Model
	{
		[Link] Plant Plant;
		[Link] Clock Clock;
		[Link] Zone zone;
		
		[Description("Path for coefficient to be Overwritten")]
		public string OverRidePath { get; set; }
		[Description("Value for new coefficient Interger")]
		public int OverRideInterger { get; set; }
		[Description("Sowing Date")]
		public DateTime ChangeDate { get; set; }
        
		[EventSubscribe("DoManagement")]
		private void OnDoManagement(object sender, EventArgs e)
		{
			if (Clock.Today.Date == ChangeDate)
			{
				object ResetValue = OverRideInterger;
				zone.Set(OverRidePath, ResetValue);
			}
		}
	}
}
```
        Report: EventNames=[Clock].DoReport
          VariableNames:
            [Clock].Today
            [ExtraVariables].Script.AccumPlantN
            [ExtraVariables].Script.AccumMineralisation
            [ExtraVariables].Script.AccumDenit
            [ExtraVariables].Script.AccumFert
            [ExtraVariables].Script.AccumLeach
            [ExtraVariables].Script.AccumDetach
            [ExtraVariables].Script.DeltaSoilOMN
            [ExtraVariables].Script.DeltaSurfaceOMN
            [ExtraVariables].Script.DeltaSoilMineralN
            [ExtraVariables].Script.SWC
            [ExtraVariables].Script.DUL
            [ExtraVariables].Script.OutFlowLat
            [ExtraVariables].Script.AccumEO
            [ExtraVariables].Script.AccumEP
            [ExtraVariables].Script.AccumES
            [ExtraVariables].Script.AccumDrainage
            [ExtraVariables].Script.AccumRunoff
            [ExtraVariables].Script.AccumRainfall
            [ExtraVariables].Script.AccumIrrigation
            [ExtraVariables].Script.AccumOutflowLat
            [ExtraVariables].Script.SoilWaterDeficit
            [ExtraVariables].Script.SoilNitrogenContent
            [ExtraVariables].Script.FomN
            [ExtraVariables].Script.HumN
            [ExtraVariables].Script.BiomN
            [ExtraVariables].Script.DltNMinRes
            [ExtraVariables].Script.DltNMinTot
            [Soil].SoilWater.SW
            [Soil].SoilWater.Eo
            [Soil].SoilWater.Es
            [Soil].SoilWater.Drainage
            [Soil].SoilWater.Runoff
            sum([Soil].SoilWater.SWmm) as ProfileWater
            [Soil].NO3N
            [MicroClimate].net_radn
            [MicroClimate].peta
            [MicroClimate].petr
            [SCUM].Product.Live.Wt
            [SCUM].Stover.Live.Wt
            [SCUM].Root.Live.Wt
            [SCUM].Product.Live.N
            [SCUM].Stover.Live.N
            [SCUM].Root.Live.N
            [SCUM].Root.WaterUptake
            [SCUM].Stover.Transpiration
            [SCUM].Stover.WaterDemand
            [SCUM].Root.Depth
            [SCUM].Stover.CoverTotal
            [SCUM].Stover.LAI
            [SCUM].Stover.Height
            [SCUM].Phenology.Stage
            [SCUM].Summariser.AboveGround.N
            [SCUM].Summariser.AboveGround.Wt
            [SCUM].Summariser.Total.N
            [SCUM].Summariser.Total.Wt
            [SCUM].Arbitrator.NDemand
            [SCUM].Arbitrator.NDemand
            [SCUM].Arbitrator.DMSupply
            [SCUM].Arbitrator.DMDemand
            [SCUM].Arbitrator.DMAllocated
            [SCUM].Arbitrator.DMSinkLimitation
            [SCUM].Arbitrator.DMNutrientLimitation
            [SCUM].Stover.MaximumNConc.Value
            [SCUM].Stover.MinimumNConc.Value
            [SCUM].Stover.Live.NConc
            [SCUM].Stover.Live.NConc
            [SCUM].Product.Live.NConc
            [SCUM].Stover.FRGRFunction.Value
            [SCUM].Stover.Fw
        Manager ClimateControl
          StartDate = 2012-10-23
          EndDate = 2013-04-10
```csharp
using System;
using Models.Core;
using APSIM.Shared.Utilities;



using System.Collections.Generic;
using System.Text;
using Models.PMF;
using Models;
using System.Xml.Serialization;

namespace Models
{
	[Serializable] 
	[System.Xml.Serialization.XmlInclude(typeof(Model))]
	public class Script : Model
	{
		[Link] Weather Met;
		[Link] Clock Clock;
    
		[Description("Start Date")]
		public DateTime StartDate { get; set; }
        
		[Description("End Date")]
		public DateTime EndDate { get; set; }
 
    
		[EventSubscribe("PreparingNewWeatherData")]
		private void OnPreparingNewWeatherData(object sender, EventArgs e)
		{
			if ((Clock.Today.Date >= StartDate) && (Clock.Today.Date <= EndDate))
				Met.Rain = 0;		
		}
	}
}
```
  Simulation BiomassRemoveCutTest: Area=0; Slope=0
    Weather: FileName=%root%\Tests\WeatherFiles\lincoln.met
    Clock: StartDate=2010-10-01; EndDate=2011-07-31
    Summary
    SoilArbitrator Soil Arbitrator
    Zone Field: Area=0; Slope=0
      Soil: same as SCUMTestBase.Field.Soil
      SurfaceOrganicMatter surface organic matter: same as TestCrop.CropCompBase.Field.surface organic matter
      MicroClimate: same as TestCrop.CropCompBase.Field.MicroClimate
      Plant SCUM: CropType=MCSP
      Irrigation
      Fertiliser
      Manager SowingAndCutting
        CultivarName = Green_Peas
        InitialRootDepth = 10
        SowingDate = 2010-10-14
        CutDate = 2010-12-14
        CutDate2 = 2012-02-14
        CutDate3 = 2013-01-14
        EndCropDate = 2011-05-14
```csharp
using System;
using System.Collections.Generic;
using Models.Core;
using Models.PMF;
using Models.PMF.Interfaces;
using System.Xml.Serialization;

namespace Models
{
	[Serializable] 
	[System.Xml.Serialization.XmlInclude(typeof(Model))]
	public class Script : Model
	{
		[Link] Plant MCSP;
		[Link] Clock Clock;

		[Description("Cultivar")]
		public string CultivarName { get; set; }
		[Description("Initial Root Depth")]
		public double InitialRootDepth { get; set; }
		[Description("Sowing Date")]
		public DateTime SowingDate { get; set; }
		[Description("Cut Date")]
		public DateTime CutDate { get; set; }
		[Description("Cut Date2")]
		public DateTime CutDate2 { get; set; }
		[Description("Cut Date3")]
		public DateTime CutDate3 { get; set; }
		[Description("EndCrop Date")]
		public DateTime EndCropDate { get; set; }
		
		[XmlIgnore] private RemovalFractions Remove { get; set; }
		
		[EventSubscribe("Commencing")]
		private void OnSimulationCommencing(object sender, EventArgs e)
		{
			Remove = new RemovalFractions(MCSP.Organs);
		}
		
		[EventSubscribe("DoManagement")]
		private void OnDoManagement(object sender, EventArgs e)
		{
			//Set up  array of remove fractions to send with Cut method.  Each member in the array corresponds to an organ in the same order they are set up in.

			if (Clock.Today.Date == SowingDate)
				MCSP.Sow(cultivar: CultivarName, population: 1, depth: InitialRootDepth, rowSpacing: 150);
			else if (Clock.Today.Date == CutDate)
			{
				Remove.SetPhenologyStage(3.5);
				Remove.SetFractionRemoved("Stover", 0.5);
				Remove.SetFractionToResidue("Stover", 0.2);
				Remove.SetFractionRemoved("Product", 0.8);
				Remove.SetFractionToResidue("Product", 0.1);
				Remove.SetFractionRemoved("Root", 0.0);
				Remove.SetFractionToResidue("Root", 0.2);
				MCSP.Cut(Remove);
			}
			else if (Clock.Today.Date == EndCropDate)
				MCSP.EndCrop();
			
			/*//Change fractions to remove
			if (Clock.Today.Date == SowingDate2)
				MCSP.Sow(cultivar: CultivarName, population: 1, depth: InitialRootDepth, rowSpacing: 150);
			else if (Clock.Today.Date == CutDate2)
			{
				//Harvest with manager specified removal fractions
				Remove.SetFractionRemoved("Product", 0.3);
				Remove.SetFractionRemoved("Stover", 0.1);
				Remove.SetFractionToResidue("Product", 0.3);
				Remove.SetFractionToResidue("Stover", 0.7);
				MCSP.Cut(Remove);
			}
			else if (Clock.Today.Date == EndCropDate2)
				MCSP.EndCrop();
			
			//Change fractions to remove
			if (Clock.Today.Date == SowingDate3)
				MCSP.Sow(cultivar: CultivarName, population: 1, depth: InitialRootDepth, rowSpacing: 150);
			else if (Clock.Today.Date == CutDate3)
			{
				Remove.SetFractionRemoved("Product", 0.5);
				Remove.SetFractionRemoved("Stover", 0.3);
				Remove.SetFractionToResidue("Product", 0.3);
				Remove.SetFractionToResidue("Stover", 0.7);
				MCSP.Cut(Remove);
			}
			else if (Clock.Today.Date == EndCropDate3)
				MCSP.EndCrop();*/
			//PMFCrop.Sow(... Contains the following arguements:
			//Population  double  Optional  Seeds sowing/m2.  Default is zero
			//Cultivar    string  Required  "NameOfCultivar"
			//Depth       double  Optional  Depth (mm) seed sown.   Default is 100mm 
			//MaxCover    double  Optional  Proportion (0-1) of the ground row crop will cover.   Default is 1.0
			//BudNumber   double  Optional  Number of mainstems per seed sown.  Default is 1.0
			//RowSpacing  double  Optional  Spaceing (mm) between drill rows when crop is sown.  Default is 150mm
			//CropClass   string  Optional  Crop class to instantiate when crop is sown.  Default is "Plant"
		}
	}
}
```
      Manager ExtraVariables
        script: same as in TestCrop.CropCompBase.Field.ExtraVariables
      Report: EventNames=[Clock].DoReport
        VariableNames:
          [Clock].Today
          [ExtraVariables].Script.AccumPlantN
          [ExtraVariables].Script.AccumMineralisation
          [ExtraVariables].Script.AccumDenit
          [ExtraVariables].Script.AccumFert
          [ExtraVariables].Script.AccumLeach
          [ExtraVariables].Script.AccumDetach
          [ExtraVariables].Script.DeltaSoilOMN
          [ExtraVariables].Script.DeltaSurfaceOMN
          [ExtraVariables].Script.DeltaSoilMineralN
          [ExtraVariables].Script.SWC
          [ExtraVariables].Script.DUL
          [ExtraVariables].Script.OutFlowLat
          [ExtraVariables].Script.AccumEO
          [ExtraVariables].Script.AccumEP
          [ExtraVariables].Script.AccumES
          [ExtraVariables].Script.AccumDrainage
          [ExtraVariables].Script.AccumRunoff
          [ExtraVariables].Script.AccumRainfall
          [ExtraVariables].Script.AccumIrrigation
          [ExtraVariables].Script.AccumOutflowLat
          [ExtraVariables].Script.SoilWaterDeficit
          [ExtraVariables].Script.SoilNitrogenContent
          [ExtraVariables].Script.FomN
          [ExtraVariables].Script.HumN
          [ExtraVariables].Script.BiomN
          [ExtraVariables].Script.DltNMinRes
          [ExtraVariables].Script.DltNMinTot
          [MicroClimate].net_radn
          [MicroClimate].peta
          [MicroClimate].petr
          [Soil].SoilWater.Drainage
          [Soil].SoilWater.Runoff
          [Soil].SoilWater.Eo
          [Soil].SoilWater.Es
          [Soil].SoilWater.pond
          [Soil].SoilWater.SWmm
          [Soil].NO3N
          [SCUM].Stover.Live.Wt
          [SCUM].Root.Live.Wt
          [SCUM].Product.Live.Wt
          [SCUM].Stover.Live.N
          [SCUM].Root.Live.N
          [SCUM].Product.Live.N
          [SCUM].Stover.Live.NConc
          [SCUM].Root.Live.NConc
          [SCUM].Product.Live.NConc
          [SCUM].Root.WaterSupply
          [SCUM].Root.WaterUptake
          [SCUM].Stover.Transpiration
          [SCUM].Stover.WaterDemand
          [SCUM].Root.Depth
          [SCUM].Stover.CoverTotal
          [SCUM].Stover.CoverDead
          [SCUM].Stover.LAI
          [SCUM].Stover.Height
          [SCUM].Stover.PotentialBiomass.Value
          [SCUM].Product.LiveFWt
          [SCUM].Arbitrator.NDemand
          [SCUM].Arbitrator.NSupply
          [SCUM].Stover.Fw
          [SCUM].Stover.Fn
          [SCUM].Summariser.Total.Wt
          [SCUM].ExpectedYield.Value
          [SCUM].DryYield.Value
          [SCUM].TotalBiomassAtStartReproductive.Value
          [SCUM].TotalBiomassAtStartSenescence.Value
          [SCUM].Ymax.Value
          [SCUM].Summariser.Total.N
          [SCUM].Arbitrator.DMSupply
          [SCUM].Arbitrator.DMDemand
          [SCUM].Phenology.AccumulatedThermalTime.Value
          [SCUM].Arbitrator.DMSinkLimitation
          [SCUM].Arbitrator.DMNutrientLimitation
          [SCUM].Phenology.ThermalTime.Value
          [SCUM].Phenology.CurrentPhaseName
          [SCUM].Phenology.Stage
          [AutomaticIrrigation].Script.Top_Refull
          [AutomaticIrrigation].Script.Top_Trigger
          [AutomaticIrrigation].Script.Top_SW
          [AutomaticIrrigation].Script.Top_DUL
          [Irrigation].IrrigationApplied
          [AutomaticIrrigation].Script.Amount_to_apply
          [AutomaticIrrigation].Script.StartDate
          [Clock].Today
          [AutomaticIrrigation].Script.SeasonIsOpen
          [AutomaticIrrigation].Script.EndDate
          [AutomaticIrrigation].Script.TodayYear
          [SCUM].Arbitrator.FN
          [SurfaceOrganicMatter].wt
          sum([Soil].SoilNitrogen.FOMN)
          [SCUM].Phenology.AccumulatedEmergedTT
          [SCUM].Stover.CoverGreen
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