Simulations: Version=150
  Memo README
    There is an issue with SWIM finding the right psi after someone else has mucked around in the water balance.

    Swim3.cs line 3295 sets the maximum iterations. Start there. Increasing from 1K to 1.1K causes a fast crash (no solution) and the psi values in the root zone are going positive. See the summary writeline at lien 3328. Uncomment that, add node and days and stuff to assist. Why positive? Is this happening with 1K iterations as well?

    Try looking at it with no rain or irrigation.
  Replacements
    Manager CalculateRollingWaterBalance
```csharp
// This script calculates a *WaterBalance* term (output) that adds together the water balance
// water entering the system (e.g. rain, irrigation) and subtracts the water
// leaving the system (e.g. runoff, drainage, evaporation, plant water uptake). If mass balance
// is maintained, the *WaterBalance* variable should always be zero.   




using Models.Climate;
using APSIM.Shared.Utilities;
using Models.Soils.Nutrients;
using Models.Soils;
using Models.PMF;
using Models.Core;
using System.Xml.Serialization;
using System;
using Models.AgPasture;
using Models.Interfaces;
using System.Linq;

namespace Models
{
    [Serializable] 
    [System.Xml.Serialization.XmlInclude(typeof(Model))]
    public class Script : Model
    {
        [Link] Clock clock;
        [Link] ISummary summary;
        [Link] IWeather weather;
        [Link] Irrigation irrigation;
        [Link] private ISoilWater waterBalance;
        [Link] private IPlant[] plants;

  
        // add (no3+nh4) uptake as N uptake to IPlant

        public double WaterBalanceCumulative  { get; set; }
        public double WaterBalanceToday  { get; set; }

        public double SoilWaterAtInitialisation  { get; set; }
        public double SoilWaterYesterday  { get; set; }
		public double SoilWaterNow  { get; set; }

		public double PlantWaterUptake { get; set; }

        public double WaterAddedToday  { get; set; }
        public double WaterRemovedToday  { get; set; }
        public double WaterAddedCumulative  { get; set; }
        public double WaterRemovedCumulative  { get; set; }



        [EventSubscribe("DoDailyInitialisation")]
        private void DoDailyInitialisation(object sender, EventArgs e)
        {
        	if (clock.Today == clock.StartDate) 
        	// capture the water in and on the soil as a starting point
        	// doing this here as need the models to have intialised first
        	{
	        	SoilWaterAtInitialisation = waterBalance.Pond;
    	    	for (int i = 0; i < waterBalance.SWmm.Length; i++)
        			SoilWaterAtInitialisation += waterBalance.SWmm[i];

        		SoilWaterYesterday = SoilWaterAtInitialisation;		
        		WaterAddedCumulative = 0.0;
        		WaterRemovedCumulative = 0.0;
        		SoilWaterNow = 0.0;
        	}
        	else
        	{
        		SoilWaterYesterday = SoilWaterNow;		// SoilWaterNow holds the value calculated at reporting yesterday
        		WaterAddedToday = 0.0;
        		WaterRemovedToday = 0.0;
        	}
		}

        [EventSubscribe("DoReportCalculations")]
        private void DoReportCalculations(object sender, EventArgs e)
        {
        	// All the WaterBalance variables should be zero. A positive value is a generation of water.
        	SoilWaterNow = waterBalance.Pond;
        	for (int i = 0; i < waterBalance.SWmm.Length; i++)
        		SoilWaterNow += waterBalance.SWmm[i]; // so all the water stored in or on the soil

        	WaterAddedToday = weather.Rain + irrigation.IrrigationApplied;   // Can there be runon? Probably not but this will throw an error if that ever happens
        	WaterAddedCumulative+= WaterAddedToday;

        	WaterRemovedToday = waterBalance.Drainage + waterBalance.Es + waterBalance.Runoff;
        	PlantWaterUptake = 0.0;
        	foreach (var plant in plants)
        		PlantWaterUptake += plant.WaterUptake.Sum();

        	WaterRemovedToday += PlantWaterUptake;
        	// Need to add subsurface drainage here

        	WaterRemovedCumulative += WaterRemovedToday;

        	WaterBalanceToday = WaterAddedToday - WaterRemovedToday - (SoilWaterNow - SoilWaterYesterday);
        	WaterBalanceCumulative = WaterAddedCumulative - WaterRemovedCumulative - (SoilWaterNow - SoilWaterAtInitialisation);
        	// need to add a warning value and a crash value and make a crash
		}
    }
}
```
  DataStore
    ExcelInput: FileNames=[HudsonObserved.xlsx]
      SheetNames=[ObservedCrop, ObservedPhenology, ObservedCl, ObservedResidue, ObservedRunoff, Stubble, ObservedSW, ObservedSWlayers]
  Folder Validation
    Simulation HudsonW1
      Clock: Start=1994-08-05; End=2000-01-23
      Summary summaryfile
      Weather: FileName=Hudson.met
      SoilArbitrator
      MicroClimate: a_interception=0; b_interception=1; c_interception=0; d_interception=0; SoilHeatFluxFraction=0.4; MinimumHeightDiffForNewLayer=0; NightInterceptionFraction=0.5; ReferenceHeight=2
      Zone paddock: Area=1; Slope=0; AspectAngle=0; Altitude=50
        Report: EventNames=[Clock].DoReport
          VariableNames:
            [Clock].Today
            [Soil].Swim3.SW
            [Soil].Swim3.Runoff
            [Soil].Swim3.Drainage
            [Soil].Swim3.Es
            [Soil].Swim3.Eo
            [Wheat].Leaf.LAI
            [Wheat].AboveGround.Wt
            [Wheat].Grain.Wt
            [Weather].Rain
            sum([Soil].Nutrient.NH4.kgha) as NH4
            sum([Soil].Nutrient.NO3.kgha) as NO3
            sum([Soil].Nutrient.DenitrifiedN) as dnit
            [Wheat].AboveGround.N
            [Wheat].BelowGround.N
            sum([Soil].Swim3.SWmm[5:9]) as SW110
            sum([Soil].Swim3.SWmm[10:14]) as SW210
            sum([Soil].Swim3.SWmm[15:19]) as SW310
            sum([Soil].CL.kgha[1:9]) as Cl110
            sum([Soil].CL.kgha[10:14]) as Cl210
            sum([Soil].CL.kgha[15:19]) as Cl310
        Soil: Latitude=0; Longitude=0
          Physical
            Thickness  BD   AirDry  LL15  DUL   SAT   KS
            100        1    0.1     0.24  0.47  0.53  240
            200        1.1  0.1     0.28  0.49  0.54  240
            200        1.1  0.1     0.28  0.52  0.57  120
            200        1.1  0.1     0.29  0.52  0.55  120
            200        1.1  0.1     0.29  0.51  0.54  120
            200        1.2  0.1     0.29  0.5   0.53  120
            200        1.2  0.1     0.29  0.5   0.53  120
            200        1.2  0.1     0.33  0.48  0.51  120
            200        1.2  0.1     0.33  0.48  0.51  60
            200        1.2  0.1     0.35  0.48  0.51  60
            200        1.2  0.1     0.35  0.47  0.5   60
            200        1.2  0.1     0.35  0.45  0.48  60
            200        1.3  0.1     0.35  0.45  0.48  60
            200        1.3  0.1     0.35  0.45  0.48  60
            200        1.3  0.1     0.35  0.45  0.48  60
            200        1.3  0.1     0.35  0.45  0.48  60
            SoilCrop WheatSoil
              LL=[0.25, 0.3, 0.3, 0.33, 0.33, 0.35, 0.35, 0.4, 0.4, 0.4, 0.4, 0.4, 0.4, 0.4, 0.4, 0.4]
              KL=[0.06, 0.06, 0.06, 0.06, 0.06, 0.06, 0.06, 0.06, 0.06, 0.06, 0, 0, 0, 0, 0, 0]
              XF=[1, 1, 1, 1, 1, 1, 1, 1, 1, 1, 0, 0, 0, 0, 0, 0]
          Organic: FOMCNRatio=40
            Thickness  Carbon  SoilCNRatio  FBiom  FInert  FOM
            100        1.4     14.5         0.2    0.32    1.84299
            200        1.4     14.5         0.03   0.5     1.51868
            200        1.4     14.5         0.02   0.6     1.25144
            200        1.35    14.5         0.015  0.7     1.03122
            200        0.95    14.5         0.01   0.85    0.849759
            200        1       14.5         0.01   0.9     0.700227
            200        0.8     14.5         0.01   0.99    0.577008
            200        0.45    14.5         0.01   0.99    0.475472
            200        0.45    14.5         0.01   0.99    0.391803
            200        0.45    14.5         0.01   0.99    0.322858
            200        0.45    14.5         0.01   0.99    0.266044
            200        0.45    14.5         0.01   0.99    0.219228
            200        0.45    14.5         0.01   0.99    0.180651
            200        0.45    14.5         0.01   0.99    0.148862
            200        0.45    14.5         0.01   0.99    0.122667
            200        0.45    14.5         0.01   0.99    0.101081
          Chemical
            Thickness  NO3N  NH4N  PH   CL
            100        10.7  0.3   6    18
            200        9.99  0.3   6.4  13
            200        7.87  0.3   6.8  11
            200        6.2   0.3   7.2  11
            200        4.85  0.3   7.6  16
            200        3.56  0.3   8    28
            200        2.72  0.3   8    66
            200        2.34  0.3   8    122
            200        2.47  0.3   8    181
            200        3.24  0.3   8    232
            200        4.25  0.3   8    270
            200        4.94  0.3   8    292
            200        5.2   0.3   8    293
            200        4.95  0.3   8    270
            200        4.52  0.3   8    292
            200        4.24  0.3   8    293
          Sample Initial water: SWUnits=Volumetric; OCUnits=Total; PHUnits=Water
            Thickness=[100, 200, 200, 200, 200, 200, 200, 200, 200, 200, 200, 200, 200, 200, 200, 200]
            SW=[0.434, 0.43, 0.48, 0.47, 0.46, 0.46, 0.46, 0.485, 0.49, 0.474, 0.457, 0.453, 0.447, 0.465, 0.457, 0.43]
          CERESSoilTemperature Temperature
          Swim3: PrecipitationInterception=0; ersoil=1e-06; ernode=1e-06; slcerr=1e-06; Salb=0.13; CN2Bare=75; CNRed=20; CNCov=0.8; KDul=0.1; PSIDul=-100; VC=true; DTMin=0; DTMax=1440; MaxWaterIncrement=5; SpaceWeightingFactor=0; SoluteSpaceWeightingFactor=1; Dis=0; Disp=1; A=2; DTHC=0.1; DTHP=2; Diagnostics=true; WaterTable=0
            SwimSoluteParameters NO3: WaterTableConcentration=0; D0=0.05
              Thickness  Exco  FIP
              100        0     1
              200        0     1
              200        0     1
              200        0     1
              200        0     1
              200        0     1
              200        0     1
              200        0     1
              200        0     1
              200        0     1
              200        0     1
              200        0     1
              200        0     1
              200        0     1
              200        0     1
              200        0     1
            SwimSoluteParameters NH4: WaterTableConcentration=0; D0=0.05
              Thickness  Exco  FIP
              100        1     1
              200        1     1
              200        1     1
              200        1     1
              200        1     1
              200        1     1
              200        1     1
              200        1     1
              200        1     1
              200        1     1
              200        1     1
              200        1     1
              200        1     1
              200        1     1
              200        1     1
              200        1     1
            SwimSoluteParameters Urea: same as Validation.HudsonW1.paddock.Soil.Swim3.NO3
            SwimSoluteParameters CL: same as Validation.HudsonW1.paddock.Soil.Swim3.NO3
            SwimSoluteParameters PlantAvailableNH4: same as Validation.HudsonW1.paddock.Soil.Swim3.NH4
            SwimSoluteParameters PlantAvailableNO3: same as Validation.HudsonW1.paddock.Soil.Swim3.NO3
            SwimSoluteParameters LabileP: same as Validation.HudsonW1.paddock.Soil.Swim3.NO3
            SwimSoluteParameters UnavailableP: same as Validation.HudsonW1.paddock.Soil.Swim3.NO3
          LayerStructure
            Thickness=[10, 20, 30, 40, 200, 200, 200, 200, 200, 200, 200, 200, 200, 200, 200, 200, 200, 200, 200]
          Solute CL
          Nutrient
        SurfaceOrganicMatter SurfaceOM: InitialResidueName=unknown; InitialResidueType=wheat; InitialResidueMass=0; InitialStandingFraction=1; InitialCPR=0; InitialCNR=100
        MicroClimate: a_interception=0; b_interception=1; c_interception=0; d_interception=0; SoilHeatFluxFraction=0.4; MinimumHeightDiffForNewLayer=0; NightInterceptionFraction=0.5; ReferenceHeight=2
        Fertiliser
        Plant Wheat
        Operations
          1994-08-05  [Wheat].Sow(population:26, cultivar:hartog, depth:40, rowSpacing:300);
          1994-08-05  [Fertiliser].Apply(70, Fertiliser.Types.NO3N, 50);
          1994-09-07  [Wheat].EndCrop();
          1994-10-27  [Wheat].Harvest();
          1995-06-01  [Wheat].Sow(cultivar:hartog, population:126, depth:40, rowSpacing:300);
          1995-06-01  [Fertiliser].Apply(80, Fertiliser.Types.NO3N, 50);
          1995-11-28  [Wheat].Harvest();
          1995-11-28  [Wheat].EndCrop();
          1996-07-02  [Wheat].Sow(cultivar:hartog, population:126, depth:40, rowSpacing:300);
          1996-07-02  [Fertiliser].Apply(101, Fertiliser.Types.NO3N, 50);
          1996-12-04  [Wheat].EndCrop();
          1997-06-02  [Wheat].Sow(cultivar:hartog, population:71, depth:40, rowSpacing:300);
          1997-06-02  [Fertiliser].Apply(100, Fertiliser.Types.NO3N, 50);
          1997-11-26  [Wheat].Harvest();
          1997-11-26  [Wheat].EndCrop();
          1998-06-18  [Wheat].Sow(cultivar:hartog, population:126, depth:40, rowSpacing:300);
          1998-06-18  [Fertiliser].Apply(102, Fertiliser.Types.NO3N, 50);
          1998-12-02  [Wheat].Harvest();
          1998-12-02  [Wheat].EndCrop();
          1999-06-23  [Wheat].Sow(cultivar:hartog, population:50, depth:40, rowSpacing:300);
          1999-06-23  [Fertiliser].Apply(102, Fertiliser.Types.NO3N, 50);
          1999-12-16  [Wheat].Harvest();
          1999-12-16  [Wheat].EndCrop();
  Folder Sensibility
    Folder LowerBoundaryConditions
      Memo Memo Lower BC
        https://www.apsim.info/documentation/model-documentation/soil-modules-documentation/swimv2-1/

        # Overview

        SWIM3 (Huth et al., 2012) allows three of the four lower boundary conditions described in Verburg et al. (1996) as described below. The zero flux lower boundary condition has not been enabled.

        All references to "SWIM" here refer to the highly detailed documentation by Verburg et al. (1996) of the standalone model that has morphed over the years into SWIM3. Verburg et al. remains the definitive documentation and should be referred to for detail.

        See the "SWIM3_SetLowerBC" Manager script (to be found in both the SWIM3 example and in the Manager toolbox) for examples of how to change lower boundary conditions.

        ## SetLowerBCForGradient(bbcGradient)

        A constant gradient in soil water potential with depth is the default lower boundary condition and is applicable to most 'open field' simulations where there is free drainage from the soil. This option is ibbc = 0 in SWIM3. This lower boundary condition setting must be accompanied by the value of that gradient. This is done using a command in a Manager script along the lines of:

        	SetLowerBCForGradient(bbcGradient);

        where bbcGradient is a double (real) variable with the value of the required gradient in soil water potential with depth in the soil. The set value remains in place until the user resets it.
        Gravity is added to bbcGradient so the most common setting is bbcGradient = 0.0 which means that there is no gradient of soil water potential. In this case, water moves under the influence of gravity alone at the lower boundary. This is the default for SWIM3 and will prevail unless the user intervenes.
        Other gradients can be set. For example, setting bbcGradient = -1.0 will set the soil water potential gradient to counteract the effect of gravity and will essentially set a no-flow lower boundary (which is likely to result in an unstable simulation).

        ## SetLowerBCForGivenPotential(bbcPotential)

        This lower boundary condition sets a constant soil water potential at the lowest node in the simulation. Note that soil water potential is in units of cm (although units of mm are used on the user interface) and is negative in unsaturated soils. This option can be useful for mimicking the effect of a water table at the base of the simulation by setting a positive value equal to the height difference between the water table and the bottom of the simulated soil profile. Note that in this setting, water will be added to the simulation at the lower boundary as needed to maintain the user set soil water potential.
        See the Manager script "SWIM3_SetLowerBC" for an example:

        	SetLowerBCForGivenPotential(bbcPotential);

        where bbcPotential is the required potential as a double variable in cm. this setting is equivalent to ibbc = 1 in SWIM.

        ## SetLowerBCForSeepage(bbcPotentialSeepage)

        A seepage lower boundary is a condition where no drainage can occur until a user-set head of water (i.e., a depth of saturated soil) of bbcPotentialSeepage accumulates at the base of the soil profile. Once that head is reached drainage occurs at the rate allowed by the saturated soil water conductivity under gravity only until the head falls below the user-set value. This lower boundary condition is that of ibbc = 3 in SWIM. A common usage of this boundary condition is when simulating a zero-tension (i.e., free to the atmosphere) lysimeter and in this case bbcPotentialSeepage = 0.0. See an example in "SWIM3_SetLowerBC":

        	SetLowerBCForSeepage(bbcPotentialSeepage);

        where bbcPotentialSeepage is in cm.

        ## Testing

        The simulation below runs a simple pasture simulation in an irrigated environment with lower boundary conditions of a unit gradient (“Gradient”), zero-tension seepage as in a lysimeter (“Seepage”), and a set water potential of -500 mm (so wetter than the drained upper limit, “Potential”).

        The simulation contains a Manager component to check for preservation of mass in the water balance (“CalculateRollingWaterBalance”). This component calculates daily and cumulative water balances to test for errors and drift. First the component adds up the daily water inputs (rain, irrigation), outputs (drainage, **tile drainage**, soil water evaporation, runoff, plant water uptake), and change in water storage from the start to the end of the day. Here, storage is both the water in the soil and that in any surface pond. The water balance is the water added, minus water removed, minus the increase in water stored. Note that this water balance component is generic and can be added to any simulation.

        Several plots have been produced.

        **Daily WaterBalance** shows that the largest absolute daily error in the water balance is less than 0.0003 mm and that there are more positive errors (water ‘lost’ in the simulation) than negative errors. Following this to the **Cumulative WaterBalance** shows the effect of the lop-sided daily errors but is reassuring in that the cumulative error is less than 0.02 mm even after six years of simulation.

        **WaterStored** shows the amount of water stored in the soil (none of these simulations included ponding conditions). As expected, the Potential simulation has the highest water storage because the lower boundary potential of -500 mm is wetter than the drained upper limit and water is regularly being added into the simulation to maintain that water potential. The Seepage simulation holds slightly more water in the soil than the Gradient simulation because in Seepage drainage cannot occur until the lower boundary soil water potential rises to zero. That need to the water potential to rise to zero before draining means that some water must accumulate at the base of the soil while the potential is rising and so it allows more time for plants to access the water before it eventually drains. The outcome is that there will generally be somewhat less drainage when a seepage lower boundary condition is set compared to the default unit gradient boundary condition.

        **PsiOfLowestLayer** shows the time series of soil water potential in the lower layer. In Potential it is the prescribed -50 cm (note that SWIM3’s outputs of psi are in cm rather than mm – something that might be fixed in the future perhaps). Seepage maintains a higher value of Psi than Gradient for most of the simulation as expected.

        **Gradient**, **Seepage** and **Potential** detail the time series of soil water potential in the lowest layer against drainage for each boundary condition type. Close examination of **Seepage** shows that drainage is only present when the potential is zero. Note that the drainage is the sum of that during the day while the potential is that at the end of the day so it is possible that there was some drainage during the day but a slightly negative potential at the end of the day. One feature of this boundary condition is the absence of the almost-daily small (< 1mm /day) drainage amounts that are seen in **Gradient**. The negative drainage in **Potential** is the result of inflow to maintain the -500 mm soil water potential at the lower boundary. **Drainage** and **CumulativeDrainage** show the effects of the boundary conditions more clearly.

        In these simulations there is no difference in **WaterUptake** across the boundary conditions (because the simulations are well irrigated). In the absence of irrigation it would be expected that their would be higher water uptake in the seepage and potential (given a value of -500 mm) boundary conditions as they hold more water in the soil (see **WaterStored**) for the bulk of the simulation duration.

        Only the constant potential boundary condition resulted in any **Runoff** (the simulations are in a relatively dry environment with a highly permeable soil). The irrigation setting for the simulations was based on soil water deficit. Therefore, as might be expected, **Irrigation** (see also ** CumulativeIrrigation**) commenced later in each season for the constant potential boundary condition and less irrigation was applied. Also as expected, slightly more irrigation was applied to the constant gradient simulation than the seepage simulation.
      Experiment E1
        Factors
          CompositeFactor Gradient
            Specifications:
              [SWIM3_SetLowerBC].Script.LowerBCType=gradient
              [SWIM3].MaxWaterIncrement=1
          CompositeFactor Seepage
            Specifications:
              [SWIM3_SetLowerBC].Script.LowerBCType=seepage
              [SWIM3].MaxWaterIncrement=5
              [SWIM3].DTMax = 30
          CompositeFactor Potential
            Specifications:
              [SWIM3_SetLowerBC].Script.LowerBCType=potential
              [SWIM3_SetLowerBC].Script.LowerBCValue=-1000
              [SWIM3].MaxWaterIncrement=5
              [SWIM3].DTMax = 30
        Simulation Base_LowerBC
          Weather: FileName=..\..\Examples\WeatherFiles\lincoln.met
          Clock: Start=2000-01-01; End=2005-01-31
          Summary summaryfile
          SoilArbitrator
          MicroClimate: a_interception=0; b_interception=0; c_interception=0; d_interception=0; SoilHeatFluxFraction=0; MinimumHeightDiffForNewLayer=0; NightInterceptionFraction=0; ReferenceHeight=2
          Forages
            Parameters:
              Name                          IsLive  DigestibilityString  FractionConsumable  MinimumAmount  UseDigestibilityFromModel
              SurfaceOrganicMatter.Residue  true    0.7                  0                   100            false
              SurfaceOrganicMatter.Residue  false   0.3                  0                   0              false
              AGPRyegrass.Leaf              true    0.7                  1                   100            false
              AGPRyegrass.Leaf              false   0.3                  1                   0              false
              AGPRyegrass.Stem              true    0.7                  1                   100            false
              AGPRyegrass.Stem              false   0.3                  1                   0              false
              AGPRyegrass.Stolon            true    0.7                  1                   100            false
              AGPRyegrass.Stolon            false   0.3                  1                   0              false
              AGPWhiteClover.Leaf           true    0.7                  1                   100            false
              AGPWhiteClover.Leaf           false   0.3                  1                   0              false
              AGPWhiteClover.Stem           true    0.7                  1                   100            false
              AGPWhiteClover.Stem           false   0.3                  1                   0              false
              AGPWhiteClover.Stolon         true    0.7                  1                   100            false
              AGPWhiteClover.Stolon         false   0.3                  1                   0              false
          Zone paddock: Area=1; Slope=0; AspectAngle=0; Altitude=50
            Manager CalculateRollingWaterBalance
            Manager CalculateRollingSoilNitrogenBalance
```csharp
using Models.Climate;
using APSIM.Shared.Utilities;
using Models.Soils.Nutrients;
using Models.Soils;
using Models.PMF;
using Models.Core;
using System.Xml.Serialization;
using System;
using Models.AgPasture;
using Models.Interfaces;
using System.Linq;

namespace Models
{
    [Serializable] 
    [System.Xml.Serialization.XmlInclude(typeof(Model))]
    public class Script : Model
    {
        [Link] Clock clock;
        [Link] ISummary summary;
        [Link] IWeather weather;
        [Link] Irrigation irrigation;
        [Link] private ISoilWater waterBalance;  // and I think this will give solutes as well
        [Link] private IPlant[] plants;
        [Link] private Nutrient nutrient;

  
        // add (no3+nh4) uptake as N uptake to IPlant

        public double NBalanceCumulative  { get; set; }
        public double NBalanceToday  { get; set; }

        public double SoilNAtInitialisation  { get; set; }
        public double SoilNYesterday  { get; set; }
		public double SoilNNow  { get; set; }

		public double PlantNUptake { get; set; }

        public double NAddedToday  { get; set; }
        public double NRemovedToday  { get; set; }
        public double NAddedCumulative  { get; set; }
        public double NRemovedCumulative  { get; set; }



        [EventSubscribe("DoDailyInitialisation")]
        private void DoDailyInitialisation(object sender, EventArgs e)
        {
        	if (clock.Today == clock.StartDate) 
        	{
        		// capture the N in and on the soil as a starting point
        		// doing this here as need the models to have intialised first
	        	SoilNAtInitialisation = 0.0; // leave this here as a reminder that once surface solutes are enabled will have to add here
	        	//SoilNAtInitialisation += nutrient.Urea.kgha.Sum() + nutrient.NH4.kgha.Sum() + nutrient.NO3.kgha.Sum() + nutrient.TotalN.Urea.kgha.Sum() ;// + nutrient.
    	    	//for (int i = 0; i < waterBalance.SWmm.Length; i++)
        			//SoilNAtInitialisation += waterBalance...SWmm[i];

        		//SoilWaterYesterday = SoilWaterAtInitialisation;		
        		//WaterAddedCumulative = 0.0;
        		//WaterRemovedCumulative = 0.0;
        		//SoilWaterNow = 0.0;
        	}
        	else
        	{
        		//SoilWaterYesterday = SoilWaterNow;		// SoilWaterNow holds the value calculated at reporting yesterday
        		//WaterAddedToday = 0.0;
        		//WaterRemovedToday = 0.0;
        	}
		}

        //[EventSubscribe("DoReportCalculations")]
        private void DoReportCalculations(object sender, EventArgs e)
        {
        	/* All the WaterBalance variables should be zero. A positive value is a generation of water.
        	SoilWaterNow = waterBalance.Pond;
        	for (int i = 0; i < waterBalance.SWmm.Length; i++)
        		SoilWaterNow += waterBalance.SWmm[i]; // so all the water stored in or on the soil

        	WaterAddedToday = weather.Rain + irrigation.IrrigationApplied;   // Can there be runon? Probably not but this will throw an error if that ever happens
        	WaterAddedCumulative+= WaterAddedToday;

        	WaterRemovedToday = waterBalance.Drainage + waterBalance.Es + waterBalance.Runoff;
        	PlantWaterUptake = 0.0;
        	foreach (var plant in plants)
        		PlantWaterUptake += plant.WaterUptake.Sum();

        	WaterRemovedToday += PlantWaterUptake;
        	// Need to add subsurface drainage here

        	WaterRemovedCumulative += WaterRemovedToday;

        	WaterBalanceToday = WaterAddedToday - WaterRemovedToday - (SoilWaterNow - SoilWaterYesterday);
        	WaterBalanceCumulative = WaterAddedCumulative - WaterRemovedCumulative - (SoilWaterNow - SoilWaterAtInitialisation);
        	// need to add a warning value and a crash value and make a crash
		*/}
    }
}
```
            Manager SWIM3_SetLowerBC
              LowerBCType = potential
              LowerBCValue = -500
```csharp
using Models.Climate;
using APSIM.Shared.Utilities;
using Models.Soils.Nutrients;
using Models.Soils;
using Models.PMF;
using Models.Core;
using System.Xml.Serialization;
using System;
using Models.AgPasture;
using Models.Interfaces;

namespace Models
{
    [Serializable] 
    [System.Xml.Serialization.XmlInclude(typeof(Model))]
    public class Script : Model
    {
        [Link] Clock clock;
        [Link] ISummary summary;
        [Link] private Swim3 swim;
        //[Link] private PastureSpecies ryegrass;
        //[Link] private SimpleGrazing grazing;
        
        public enum LowerBCTypeOptions {gradient,seepage,potential};

        [Separator("Sets the lower boundary condition type (and value if set to 'potential' for SWIM3. The change is applied at the beginning of the first day of the simulation.")]
        [Description("[Get a dropdown] What lower boundary condition is wanted?")] public LowerBCTypeOptions LowerBCType { get; set; }
        [Description("If 'potential', then what potential? Should be negative (mm) ")] public double LowerBCValue { get; set; }

        public double SoilWaterStart  { get; set; }
        public double SoilWaterEnd  { get; set; }

        [EventSubscribe("DoDailyInitialisation")]
        private void DoDailyInitialisation(object sender, EventArgs e)
        {
        }

        [EventSubscribe("DoReportCalculations")]
        private void DoReportCalculations(object sender, EventArgs e)
        {
        }

        [EventSubscribe("DoManagement")]
        private void DoDailyCalculations(object sender, EventArgs e)
        {
            if (clock.Today == clock.StartDate)
            {
                summary.WriteMessage(this, "Script is setting lower boundary condition to " + LowerBCType, MessageType.Diagnostic);
                if (LowerBCType == LowerBCTypeOptions.gradient)
                    swim.SetLowerBCForGradient(bbcGradient: 0.0);   // in cm/cm (ibbc=0) Note that this is the default setting
                else if (LowerBCType == LowerBCTypeOptions.potential)
                    swim.SetLowerBCForGivenPotential(bbcPotential: LowerBCValue /10.0 );    //  convert to cm (ibbc=1), DUL is -100 cm so values more positive will often result in inflow to the bottom of the soil profile. Input in mm so divide here.
                else if (LowerBCType == LowerBCTypeOptions.seepage)
                    swim.SetLowerBCForSeepage(bbcPotentialSeepage: 0.0);  // in cm (ibbc=3). This is for zero-tension lysimeters
                else
                	throw new Exception("Wrong lower boundary condition type");
            }
        }
    }
}
```
            Manager AutomaticIrrigation
              allowIrrigation = True
              seasonStart = 1-sep
              seasonEnd = 30-mar
              seasonsAllocation = 10000
              triggerDeficit = 80
              targetDeficit = 100
              returndays = 3
              maximumAmount = 30
              depthPAWC = 300
```csharp
using Newtonsoft.Json;
using APSIM.Shared.Utilities;
using System.Xml.Serialization;
using Models.Soils;
using Models.PMF;
using Models.Core;
using System;
using Models.Interfaces;



        
namespace Models
{
    [Serializable] 
    [System.Xml.Serialization.XmlInclude(typeof(Model))]
    public class Script : Model
    {
        [Link] private ISummary summary;
        [Link] private Irrigation Irrigation;
        [Link] private Clock Clock;
        [Link] private Soil Soil;
        [Link(IsOptional = true)] private IPlant existingCrop;
        private DateTime StartDate;
        private DateTime EndDate;
        private double TopDUL;
        private double TopLL;
        private int nLayers;
        [Link]
        private IPhysical soilPhysical;
        [Link]
        private ISoilWater waterBalance;
        //Communication to other modules
       
        //User inputs from properties tab
        [Description("Turn irrigation on?")]
        public bool allowIrrigation { get; set; }
        [Description("Start of irrigation season (dd-MMM)")]
        public string seasonStart { get; set; }
        [Description("End of irrigation season (dd-MMM)")]
        public string seasonEnd { get; set; }
        [Description("Season allocation (mm)")]
        public double seasonsAllocation { get; set; }
        [Description("Deficit to trigger irrigation (% PAWC)")]
        public double triggerDeficit { get; set; }
        [Description("Deficit to stop irrigaton (% PAWC)")]
        public double targetDeficit { get; set; }
        [Description("Minimum days for irrigation to return")]
        public double returndays { get; set; }
        [Description("Maximum irrigation application (mm/day)")]
        public double maximumAmount { get; set; }
        [Description("Depth to calculate PAWC (mm)")]
        public double depthPAWC { get; set; }

        //Class members
        [JsonIgnore] public double TopSWdeficit { get; set; }
        [JsonIgnore] public double TopSWC { get; set; }
        [JsonIgnore] public double DaysSinceIrrigation { get; set; }
        [JsonIgnore] public double AmountToApply { get; set; }
        [JsonIgnore] public double SeasonAppliedAmount { get; set; }
        
        private bool IrrigationIsAllowed { get; set; }
        private bool SeasonIsOpen { get; set; }
        private bool CropIsActive { get; set; }
        private bool IrrigatorIsAvailable { get; set; }
        private bool SoilIsDry { get; set; }

    
        //Calculate static soil variables
        [EventSubscribe("StartOfSimulation")]
        private void OnStartOfSimulation(object sender, EventArgs e)
        {   
            //Set the season dates
            StartDate = DateTime.Parse(seasonStart + "-" + Clock.Today.Year.ToString());
            EndDate = DateTime.Parse(seasonEnd + "-" + Clock.Today.Year.ToString());
            
            //Can we irrigate at all?
            IrrigationIsAllowed = false; 
            if (allowIrrigation)
                IrrigationIsAllowed = true; 

            //Calculate soil water variables
            double depthFromSurface = 0.0;
            double fracLayer = 0.0;
            nLayers = soilPhysical.Thickness.Length;
            for (int layer = 0; layer < nLayers; layer++)
            {
                fracLayer = Math.Min(1.0, (depthPAWC - depthFromSurface) / soilPhysical.Thickness[layer]);
                TopLL += soilPhysical.LL15mm[layer] * fracLayer;
                TopDUL += soilPhysical.DULmm[layer] * fracLayer;
                depthFromSurface += soilPhysical.Thickness[layer];
                if (depthFromSurface >= depthPAWC)
                    layer = nLayers;
            }
        }
             
        //Determine daily requirement for irrigation
        [EventSubscribe("StartOfDay")]
        private void OnStartOfDay(object sender, EventArgs e)
        {
            //Can we irrigate today?          
            SeasonIsOpen = isBetween(Clock.Today, StartDate, EndDate);
            if (!SeasonIsOpen)
                SeasonAppliedAmount = 0;

            //Is there a crop in the ground that needs irrigation?
            CropIsActive = false;
            if ((existingCrop != null) && (existingCrop.IsAlive))
                CropIsActive = true;
            //if ((existingCrop.Phenology.Stage >= 3.0) && (existingCrop.Phenology.Stage < 6.0))
          
            //Is the irrigator available?
            IrrigatorIsAvailable = false;
            DaysSinceIrrigation += 1;
            if (DaysSinceIrrigation >= returndays)
                IrrigatorIsAvailable = true;
          
            //Is the soil dry enough to require irrigation?
            SoilIsDry = false;
            double depthFromSurface = 0.0;
            double fracLayer = 0.0;
            TopSWC = 0.0;
            for (int layer = 0; layer < nLayers; layer++)
            //for (int layer = 0; depthFromSurface < depthPAWC + soilPhysical.Thickness[layer]; layer++)
            {
                fracLayer = Math.Min(1.0, (depthPAWC - depthFromSurface) / soilPhysical.Thickness[layer]);
                TopSWC += waterBalance.SWmm[layer] * fracLayer;
                depthFromSurface += soilPhysical.Thickness[layer];
                if (depthFromSurface >= depthPAWC)
                    layer = nLayers;
            }
            
            TopSWdeficit = TopSWC - TopDUL;
            if (Math.Max(0.0, -TopSWdeficit) >= (TopDUL - TopLL) * (100 - triggerDeficit) / 100)
                SoilIsDry = true;
                
            //Are all the conditions ratifying irrigation
            if (IrrigationIsAllowed && SeasonIsOpen && CropIsActive && IrrigatorIsAvailable && SoilIsDry)
            {
                //Lets bloody well irrigate then!!!!
                AmountToApply = TopDUL * targetDeficit / 100 - TopSWC;
                AmountToApply = Math.Max(0.0, Math.Min(AmountToApply, seasonsAllocation - SeasonAppliedAmount));
                AmountToApply = Math.Min(AmountToApply,maximumAmount);
                Irrigation.Apply(AmountToApply);
                DaysSinceIrrigation = 0;
                SeasonAppliedAmount += AmountToApply;
            }
        }
        
        ///Checks whether theDate is between iniDate and endDate (non-year specific)
        private bool isBetween(DateTime theDay, DateTime iniDate, DateTime endDate)
        {
            bool result = false;
            if (iniDate.DayOfYear < endDate.DayOfYear)
            {
                // period is within one year, ex: summer in the northern hemisphere
                if ((theDay.DayOfYear >= iniDate.DayOfYear) && (theDay.DayOfYear <= endDate.DayOfYear))
                    result = true;
            }
            else
            {
                // period goes over the end of the year, ex: summer in the southern hemisphere
                if ((theDay.DayOfYear >= iniDate.DayOfYear) || (theDay.DayOfYear <= endDate.DayOfYear))
                    result = true;
            }
            
            return result;
        }
    }
}
```
            Soil: Latitude=0; Longitude=0
              Physical
                Thickness  ParticleSizeClay  ParticleSizeSand  ParticleSizeSilt  Rocks  BD     AirDry  LL15   DUL    SAT   KS
                60         17.61             33.77             48.62             0      0.865  0.077   0.231  0.565  0.58  216
                110        17.61             33.77             48.62             0      0.865  0.077   0.231  0.565  0.58  216
                140        17.61             33.77             48.62             0      0.865  0.077   0.231  0.565  0.58  216
                240        17.61             33.77             48.62             0      0.865  0.077   0.231  0.565  0.58  216
                150        17.61             33.77             48.62             0      0.865  0.077   0.231  0.565  0.58  216
                SoilCrop AgPRyegrassSoil: LL=[0.231, 0.231, 0.231, 0.231, 0.231]; KL=[0.1, 0.1, 0.1, 0.1, 0]; XF=[1, 1, 1, 1, 0]
                SoilCrop AgPWhiteCloverSoil: LL=[0.231, 0.231, 0.231, 0, 0]; KL=[0.1, 0.1, 0.1, 0, 0]; XF=[1, 1, 1, 0, 0]
              Nutrient
              Organic: FOMCNRatio=40
                Thickness  Carbon  SoilCNRatio  FBiom  FInert  FOM
                60         8.2     12.5         0.08   0.58    92.873
                110        5.5     12.5         0.02   0.7     57.963
                140        3.3     12.5         0.015  0.77    31.811
                240        1.7     12.5         0.01   0.9     11.373
                150        1.7     12.5         0.01   0.99    0
              Chemical
                Thickness  NO3N   NH4N   PH   CL
                60         6.503  0.599  6.5  10
                110        2.101  0.1    6.5  10
                140        2.101  0.1    6.5  10
                240        1.701  0.1    6.5  10
                150        1.701  0.1    6.5  10
              Sample Initial values: SWUnits=Volumetric; OCUnits=Total; PHUnits=Water
                Thickness  NO3    NH4    SW     CL  PH
                60         6.503  0.599  0.565  10  5.7
                110        2.101  0.1    0.565  10  5.3
                140        2.101  0.1    0.565  10  5.9
                240        1.701  0.1    0.565  10  6.6
                150        1.701  0.1    0.565  10  6.7
              Swim3: PrecipitationInterception=0; ersoil=1e-06; ernode=1e-06; slcerr=1e-06; Salb=0.13; CN2Bare=50; CNRed=20; CNCov=0.8; KDul=1; PSIDul=-100; VC=true; DTMin=0; DTMax=60; MaxWaterIncrement=5; SpaceWeightingFactor=0; SoluteSpaceWeightingFactor=1; Dis=0; Disp=1; A=2; DTHC=0.1; DTHP=2; Diagnostics=false; WaterTable=0
                SwimSoluteParameters Urea: WaterTableConcentration=0; D0=0.05
                  Thickness  Exco  FIP
                  60         0     1
                  110        0     1
                  140        0     1
                  240        0     1
                  150        0     1
                SwimSoluteParameters NH4: WaterTableConcentration=0; D0=0.05
                  Thickness  Exco  FIP
                  60         1     1
                  110        1     1
                  140        1     1
                  240        1     1
                  150        1     1
                SwimSoluteParameters NO3: WaterTableConcentration=0; D0=0.05
                  Thickness  Exco  FIP
                  60         0     1
                  110        0     1
                  140        0     1
                  240        0     1
                  150        0     1
                SwimSoluteParameters Cl: WaterTableConcentration=0; D0=0.05
                  Thickness  Exco  FIP
                  60         0     1
                  110        0     1
                  140        0     1
                  240        0     1
                  150        0     1
                SwimSoluteParameters PlantAvailableNH4: WaterTableConcentration=0; D0=0.05
                  Thickness  Exco  FIP
                  60         1     1
                  110        1     1
                  140        1     1
                  240        1     1
                  150        1     1
                SwimSoluteParameters PlantAvailableNO3: WaterTableConcentration=0; D0=0.05
                  Thickness  Exco  FIP
                  60         0     1
                  110        0     1
                  140        0     1
                  240        0     1
                  150        0     1
                SwimSoluteParameters LabileP: WaterTableConcentration=0; D0=0.05
                  Thickness  Exco  FIP
                  60         0     1
                  110        0     1
                  140        0     1
                  240        0     1
                  150        0     1
                SwimSoluteParameters UnavailableP: WaterTableConcentration=0; D0=0.05
                  Thickness  Exco  FIP
                  60         0     1
                  110        0     1
                  140        0     1
                  240        0     1
                  150        0     1
              Solute Cl
              LayerStructure: Thickness=[10, 20, 30, 40, 50, 50, 50, 50, 100, 100, 50, 50, 50, 50]
              SoilTemperature
            Irrigation
            Fertiliser
            SurfaceOrganicMatter: InitialResidueName=grass; InitialResidueType=grass; InitialResidueMass=20; InitialStandingFraction=0; InitialCPR=0; InitialCNR=17
            SimpleGrazing: GrazingRotationType=0; SimpleGrazingFrequencyString=end of month; SimpleMinGrazable=0; SimpleGrazingResidual=1200; FlexibleGrazePostDM=0; FractionDefoliatedNToSoil=[90]; FractionExcretedNToDung=[0.4]; CNRatioDung=0; DepthUrineIsAdded=150; FractionPopulationDecline=0; TramplingOn=false; MaximumPropLitterMovedToSoil=0.1; PastureConsumedAtMaximumRateOfLitterRemoval=1200
            PastureSpecies AGPRyegrass: InitialShootDM=2500; InitialRootDM=500; InitialRootDepth=350
            PastureSpecies AGPWhiteClover: InitialShootDM=500; InitialRootDM=250; InitialRootDepth=300
            Report: EventNames=[Clock].EndOfDay
              VariableNames:
                [SWIM3_SetLowerBC].Script.LowerBCType
                [Clock].Today as Date
                [CalculateRollingWaterBalance].Script.WaterAddedToday as WaterAddedToday
                [CalculateRollingWaterBalance].Script.WaterRemovedToday as WaterRemovedToday
                [Soil].Swim3.Drainage as Drainage
                [Soil].Swim3.Runoff as Runoff
                sum([Soil].Swim3.SWmm) as WaterStored
                [Soil].Swim3.Pond as PondDepth
                [CalculateRollingWaterBalance].Script.WaterBalanceCumulative
                [CalculateRollingWaterBalance].Script.WaterBalanceToday
                [CalculateRollingWaterBalance].Script.PlantWaterUptake
                [Soil].Swim3.psi as Psi
                [Soil].Swim3.SW as SW
                [Irrigation].IrrigationApplied as Irrigation
                [AGPRyegrass].AboveGround.Wt + [AGPWhiteClover].AboveGround.Wt as AboveGroundBioamss
    Folder PotentialLowerBoundaryCondition
      Memo Memo Lower BC Potentials
        This series of simulations tests/demonstrates the setting of different potentials of the constant potential lower boundary condition. Values of 0, -1000 (drained upper limit), -10,000 and -100,000 mm were set. No irrigation was applied.

        The first two plots show that the water balance was acceptable. **WaterStored** shows the expected changes with varying lower boundary condition. **WaterUptake** and its cumulative show no effect of the two wetter lower boundary conditions that were pumping considerable amounts of water (see **Drainage**) into the bottom of the soil profile but water uptake was reduced in the drier two boundary conditions.
      Experiment E2
        Factors
          CompositeFactor Potential_0
            Specifications:
              [SWIM3_SetLowerBC].Script.LowerBCType=potential
              [SWIM3_SetLowerBC].Script.LowerBCValue=0
              [Swim3].MaxWaterIncrement = 1.0
          CompositeFactor Potential_1000
            Specifications:
              [SWIM3_SetLowerBC].Script.LowerBCType=potential
              [SWIM3_SetLowerBC].Script.LowerBCValue=-1000
          CompositeFactor Potential_10000
            Specifications:
              [SWIM3_SetLowerBC].Script.LowerBCType=potential
              [SWIM3_SetLowerBC].Script.LowerBCValue=-10000
          CompositeFactor Potential_100000
            Specifications:
              [SWIM3_SetLowerBC].Script.LowerBCType=potential
              [SWIM3_SetLowerBC].Script.LowerBCValue=-100000
        Simulation Base_LowerBC_Potentials
          Weather: FileName=..\..\Examples\WeatherFiles\lincoln.met
          Clock: Start=2000-01-01; End=2005-12-31
          Summary summaryfile
          SoilArbitrator
          MicroClimate: a_interception=0; b_interception=0; c_interception=0; d_interception=0; SoilHeatFluxFraction=0; MinimumHeightDiffForNewLayer=0; NightInterceptionFraction=0; ReferenceHeight=2
          Forages: same as Sensibility.LowerBoundaryConditions.E1.Base_LowerBC.Forages
          Zone paddock: Area=1; Slope=0; AspectAngle=0; Altitude=50
            Memo To do and notes
              The first few lines in IrrigationSchedule
              // these are only here to get the soil above saturation -

              // not working all that well because the upper BC is causing all the excess water to runoff anyway

              // can delete this probably once pond is fixed.

              Add with and without plants to the experiment. Need a more flexible Manager first? Or add and kill?

              Could be nice to be able to swap from weather to controlled environment without having to change the links in "CalculateRollingWaterBalance"
            Manager CalculateRollingWaterBalance
            Manager SWIM3_SetLowerBC
              LowerBCType = potential
              LowerBCValue = -500
```csharp
using Models.Climate;
using APSIM.Shared.Utilities;
using Models.Soils.Nutrients;
using Models.Soils;
using Models.PMF;
using Models.Core;
using System.Xml.Serialization;
using System;
using Models.AgPasture;
using Models.Interfaces;

namespace Models
{
    [Serializable] 
    [System.Xml.Serialization.XmlInclude(typeof(Model))]
    public class Script : Model
    {
        [Link] Clock clock;
        [Link] ISummary summary;
        [Link] private Swim3 swim;
        //[Link] private PastureSpecies ryegrass;
        //[Link] private SimpleGrazing grazing;
        
        public enum LowerBCTypeOptions {gradient,seepage,potential};

        [Separator("Sets the lower boundary condition type (and value if set to 'potential' for SWIM3. The change is applied at the beginning of the first day of the simulation.")]
        [Description("[Get a dropdown] What lower boundary condition is wanted?")] public LowerBCTypeOptions LowerBCType { get; set; }
        [Description("If 'potential', then what potential? Should be negative (mm) ")] public double LowerBCValue { get; set; }

        public double SoilWaterStart  { get; set; }
        public double SoilWaterEnd  { get; set; }

        [EventSubscribe("DoDailyInitialisation")]
        private void DoDailyInitialisation(object sender, EventArgs e)
        {
        }

        [EventSubscribe("DoReportCalculations")]
        private void DoReportCalculations(object sender, EventArgs e)
        {
        }

        [EventSubscribe("DoManagement")]
        private void DoDailyCalculations(object sender, EventArgs e)
        {
            if (clock.Today == clock.StartDate)
            {
                summary.WriteMessage(this, "Script is setting lower boundary condition to " + LowerBCType, MessageType.Diagnostic);
                if (LowerBCType == LowerBCTypeOptions.gradient)
                    swim.SetLowerBCForGradient(bbcGradient: 0.0);   // in cm/cm (ibbc=0) Note that this is the default setting
                else if (LowerBCType == LowerBCTypeOptions.potential)
                    swim.SetLowerBCForGivenPotential(bbcPotential: LowerBCValue /10.0 );    //  convert to cm (ibbc=1), DUL is -100 cm so values more positive will often result in inflow to the bottom of the soil profile. Input in mm so divide here.
                else if (LowerBCType == LowerBCTypeOptions.seepage)
                    swim.SetLowerBCForSeepage(bbcPotentialSeepage: 0.0);  // in cm (ibbc=3). This is for zero-tension lysimeters
            }
        }
    }
}
```
            Manager AutomaticIrrigation
              allowIrrigation = False
              seasonStart = 1-sep
              seasonEnd = 30-mar
              seasonsAllocation = 10000
              triggerDeficit = 80
              targetDeficit = 100
              returndays = 3
              maximumAmount = 30
              depthPAWC = 300
              script: same as in Sensibility.LowerBoundaryConditions.E1.Base_LowerBC.paddock.AutomaticIrrigation
            Soil: Latitude=0; Longitude=0
              Physical: same as Sensibility.LowerBoundaryConditions.E1.Base_LowerBC.paddock.Soil.Physical
              Nutrient
              Organic: FOMCNRatio=40
                Thickness  Carbon  SoilCNRatio  FBiom  FInert  FOM
                60         8.2     12.5         0.08   0.58    92.873
                110        5.5     12.5         0.02   0.7     57.963
                140        3.3     12.5         0.015  0.77    31.811
                240        1.7     12.5         0.01   0.9     11.373
                150        1.7     12.5         0.01   0.99    0
              Chemical: same as Sensibility.LowerBoundaryConditions.E1.Base_LowerBC.paddock.Soil.Chemical
              Sample Initial values: same as Sensibility.LowerBoundaryConditions.E1.Base_LowerBC.paddock.Soil.Initial values
              Swim3: PrecipitationInterception=0; ersoil=1e-06; ernode=1e-06; slcerr=1e-06; Salb=0.13; CN2Bare=0; CNRed=0; CNCov=0.8; KDul=1; PSIDul=-100; VC=true; DTMin=0; DTMax=30; MaxWaterIncrement=5; SpaceWeightingFactor=0; SoluteSpaceWeightingFactor=1; Dis=0; Disp=1; A=2; DTHC=0.1; DTHP=2; Diagnostics=false; WaterTable=0
                SwimSoluteParameters Urea: WaterTableConcentration=0; D0=0.05
                  Thickness  Exco  FIP
                  60         0     1
                  110        0     1
                  140        0     1
                  240        0     1
                  150        0     1
                SwimSoluteParameters NH4: WaterTableConcentration=0; D0=0.05
                  Thickness  Exco  FIP
                  60         1     1
                  110        1     1
                  140        1     1
                  240        1     1
                  150        1     1
                SwimSoluteParameters NO3: WaterTableConcentration=0; D0=0.05
                  Thickness  Exco  FIP
                  60         0     1
                  110        0     1
                  140        0     1
                  240        0     1
                  150        0     1
                SwimSoluteParameters Cl: WaterTableConcentration=0; D0=0.05
                  Thickness  Exco  FIP
                  60         0     1
                  110        0     1
                  140        0     1
                  240        0     1
                  150        0     1
                SwimSoluteParameters PlantAvailableNH4: WaterTableConcentration=0; D0=0.05
                  Thickness  Exco  FIP
                  60         1     1
                  110        1     1
                  140        1     1
                  240        1     1
                  150        1     1
                SwimSoluteParameters PlantAvailableNO3: WaterTableConcentration=0; D0=0.05
                  Thickness  Exco  FIP
                  60         0     1
                  110        0     1
                  140        0     1
                  240        0     1
                  150        0     1
                SwimSoluteParameters LabileP: WaterTableConcentration=0; D0=0.05
                  Thickness  Exco  FIP
                  60         0     1
                  110        0     1
                  140        0     1
                  240        0     1
                  150        0     1
                SwimSoluteParameters UnavailableP: WaterTableConcentration=0; D0=0.05
                  Thickness  Exco  FIP
                  60         0     1
                  110        0     1
                  140        0     1
                  240        0     1
                  150        0     1
              Solute Cl
              LayerStructure: Thickness=[10, 20, 30, 40, 50, 50, 50, 50, 100, 100, 50, 50, 50, 50]
              SoilTemperature
            Irrigation
            Fertiliser
            SurfaceOrganicMatter: InitialResidueName=grass; InitialResidueType=grass; InitialResidueMass=20; InitialStandingFraction=0; InitialCPR=0; InitialCNR=17
            SimpleGrazing: same as Sensibility.LowerBoundaryConditions.E1.Base_LowerBC.paddock.SimpleGrazing
            PastureSpecies AGPRyegrass: InitialShootDM=2500; InitialRootDM=500; InitialRootDepth=350
            PastureSpecies AGPWhiteClover: InitialShootDM=500; InitialRootDM=250; InitialRootDepth=300
            Report: EventNames=[Clock].EndOfDay
              VariableNames:
                [SWIM3_SetLowerBC].Script.LowerBCType
                [Clock].Today as Date
                [CalculateRollingWaterBalance].Script.WaterAddedToday as WaterAddedToday
                [CalculateRollingWaterBalance].Script.WaterRemovedToday as WaterRemovedToday
                [Soil].Swim3.Drainage as Drainage
                [Soil].Swim3.Runoff as Runoff
                sum([Soil].Swim3.SWmm) as WaterStored
                [Soil].Swim3.Pond as PondDepth
                [CalculateRollingWaterBalance].Script.WaterBalanceCumulative
                [CalculateRollingWaterBalance].Script.WaterBalanceToday
                [CalculateRollingWaterBalance].Script.PlantWaterUptake
                [Irrigation].IrrigationApplied as Irrigation
                [Weather].Rain as Rainfall
                [Soil].Swim3.psi as Psi
                [Soil].Swim3.SW as SW
                [Soil].Physical.DUL as DUL
                [Soil].Physical.SAT as Sat
    Folder SurfaceBoundaryConditions
      Memo Memo Surface BC
        See the "SetSurfaceBoundaryCondition" manager script for examples of how to change the surface boundary conditions.

        ## SetSurfaceBoundaryCondition(CurveNumber)

        The curve number approach for calculating runoff is the default surface boundary condition and is applicable to most 'open field' simulations. This option is ISBC = 0 in SWIM. This surface boundary condition relies on the value of **bare soil runoff curve number** in the SWIM3 component. Setting this surface boundary condition is done using a command in a Manager script:

        	SetSurfaceBCForCurveNumber();

        **NOTE: If bare soil runoff curve number is set to zero then SWIM will enable ponding and excess water at the surface will go into a pond instead of runoff.** This is equivalent to ISBC = 1 in SWIM.

        ## SetSurfaceBoundaryCondition(PowerFunction)

        A simple power-law function for calculating runoff can be defined. This option is ISBC = 2 in the SWIM manual. This function requires 6 arguments to be specified. The first three arguments define the minimum, maximum and initial size of the pond (mm). The last three arguments define the parameters (hrc, roff0, roff1) to the runoff equation as defined in the SWIM manual (Verburg et al. (1996).

        Setting this surface boundary condition is done using a command in a Manager script:

        	swim.SetSurfaceBCForPowerFunction(minimumSurfaceStorage: 10,
                            		  maximumSurfaceStorage: 20,
                            		  initialSurfaceStorage: 15,
                            		  precipitationConstant: 50,
                            		  runoffRateFactor: 0.2,
                            		  runoffRatePower: 2);

        ## Testing

        An experiment has been set up to show the impacts of using these two methods for setting the surface boundary condition. The first three experiment factors use the curve number approach with 3 different curve numbers (0, 50 and 90). The fouth factor uses the power-rate function.

        The graphs show the following characteristics:
        * When curve number is zero there is no runoff. Instead ponding occurs at serveral points during the simulation. The lack of runoff results in more water stored in the profile.
        * Using the power function (with the above arguments) results in the lowest rate of runoff.
        * As expected, using a curve number of 90 results in the highest rate of runoff.
        * Mass balance is maintained for all options.
      Experiment E3
        Factors
          CompositeFactor CurveNumber0
            Specifications:
              [SetSurfaceBoundaryCondition].Script.SurfaceBCType = CurveNumber
              [Swim3].CN2Bare = 0
          CompositeFactor CurveNumber50
            Specifications:
              [SetSurfaceBoundaryCondition].Script.SurfaceBCType = CurveNumber
              [Swim3].CN2Bare = 50
          CompositeFactor CurveNumber90
            Specifications:
              [SetSurfaceBoundaryCondition].Script.SurfaceBCType = CurveNumber
              [Swim3].CN2Bare = 90
          CompositeFactor PowerFunction
            Specifications=[SetSurfaceBoundaryCondition].Script.SurfaceBCType = PowerFunction
        Simulation Base_SurfaceBC
          Weather: FileName=..\..\Examples\WeatherFiles\lincoln.met
          Clock: Start=2000-01-01; End=2005-12-30
          Summary summaryfile
          SoilArbitrator
          MicroClimate: a_interception=0; b_interception=0; c_interception=0; d_interception=0; SoilHeatFluxFraction=0; MinimumHeightDiffForNewLayer=0; NightInterceptionFraction=0; ReferenceHeight=2
          Forages: same as Sensibility.LowerBoundaryConditions.E1.Base_LowerBC.Forages
          Zone paddock: Area=1; Slope=0; AspectAngle=0; Altitude=50
            Manager CalculateRollingWaterBalance
            Manager SetSurfaceBoundaryCondition
              SurfaceBCType = CurveNumber
```csharp
using Models.Climate;
using APSIM.Shared.Utilities;
using Models.Soils.Nutrients;
using Models.Soils;
using Models.PMF;
using Models.Core;
using System.Xml.Serialization;
using System;
using Models.AgPasture;
using Models.Interfaces;

namespace Models
{
    [Serializable] 
    [System.Xml.Serialization.XmlInclude(typeof(Model))]
    public class Script : Model
    {
        [Link] ISummary summary;
        [Link] private Swim3 swim;
        
        public enum SurfaceBCOptions { CurveNumber, PowerFunction };

        [Description("What surface boundary condition?")] 
        public SurfaceBCOptions SurfaceBCType { get; set; }

        [EventSubscribe("StartOfSimulation")]
        private void DoDailyInitialisation(object sender, EventArgs e)
        {
            summary.WriteMessage(this, "Script is setting surface boundary condition to " + SurfaceBCType, MessageType.Diagnostic);
            if (SurfaceBCType == SurfaceBCOptions.CurveNumber)
            	swim.SetSurfaceBCForCurveNumber();
            else if (SurfaceBCType == SurfaceBCOptions.PowerFunction)
                swim.SetSurfaceBCForPowerFunction(minimumSurfaceStorage: 10, 
                  							      maximumSurfaceStorage: 20, 
                   							      initialSurfaceStorage: 15, 
                   							      precipitationConstant: 50, 
                   							      runoffRateFactor: 0.2, 
                   							      runoffRatePower: 2);
        }
    }
}
```
            Soil: Latitude=0; Longitude=0
              Physical
                Thickness  ParticleSizeClay  ParticleSizeSand  ParticleSizeSilt  Rocks  BD     AirDry  LL15   DUL    SAT   KS
                60         17.61             33.77             48.62             0      0.865  0.077   0.231  0.565  0.58  5
                110        17.61             33.77             48.62             0      0.865  0.077   0.231  0.565  0.58  5
                140        17.61             33.77             48.62             0      0.865  0.077   0.231  0.565  0.58  5
                240        17.61             33.77             48.62             0      0.865  0.077   0.231  0.565  0.58  5
                150        17.61             33.77             48.62             0      0.865  0.077   0.231  0.565  0.58  5
                SoilCrop AgPRyegrassSoil: LL=[0.231, 0.231, 0.231, 0.231, 0.231]; KL=[0.1, 0.1, 0.1, 0.1, 0]; XF=[1, 1, 1, 1, 0]
                SoilCrop AgPWhiteCloverSoil: LL=[0.231, 0.231, 0.231, 0, 0]; KL=[0.1, 0.1, 0.1, 0, 0]; XF=[1, 1, 1, 0, 0]
              Nutrient
              Organic: FOMCNRatio=40
                Thickness  Carbon  SoilCNRatio  FBiom  FInert  FOM
                60         8.2     12.5         0.08   0.58    92.873
                110        5.5     12.5         0.02   0.7     57.963
                140        3.3     12.5         0.015  0.77    31.811
                240        1.7     12.5         0.01   0.9     11.373
                150        1.7     12.5         0.01   0.99    0
              Chemical: same as Sensibility.LowerBoundaryConditions.E1.Base_LowerBC.paddock.Soil.Chemical
              Sample Initial values: same as Sensibility.LowerBoundaryConditions.E1.Base_LowerBC.paddock.Soil.Initial values
              Swim3: same as Sensibility.LowerBoundaryConditions.E1.Base_LowerBC.paddock.Soil.Swim3
              Solute Cl
              LayerStructure: Thickness=[10, 20, 30, 40, 50, 50, 50, 50, 100, 100, 50, 50, 50, 50]
              SoilTemperature
            Irrigation
            Fertiliser
            SurfaceOrganicMatter: InitialResidueName=grass; InitialResidueType=grass; InitialResidueMass=20; InitialStandingFraction=0; InitialCPR=0; InitialCNR=17
            SimpleGrazing: same as Sensibility.LowerBoundaryConditions.E1.Base_LowerBC.paddock.SimpleGrazing
            PastureSpecies AGPRyegrass: InitialShootDM=2500; InitialRootDM=500; InitialRootDepth=350
            PastureSpecies AGPWhiteClover: InitialShootDM=500; InitialRootDM=250; InitialRootDepth=300
            Report: EventNames=[Clock].EndOfDay
              VariableNames:
                [SetSurfaceBoundaryCondition].Script.SurfaceBCType
                [Clock].Today as Date
                [CalculateRollingWaterBalance].Script.WaterAddedToday as WaterAddedToday
                [CalculateRollingWaterBalance].Script.WaterRemovedToday as WaterRemovedToday
                [Soil].Swim3.Drainage as Drainage
                [Soil].Swim3.Runoff as Runoff
                sum([Soil].Swim3.SWmm) as WaterStored
                [Soil].Swim3.Pond as PondDepth
                [CalculateRollingWaterBalance].Script.WaterBalanceCumulative
                [CalculateRollingWaterBalance].Script.WaterBalanceToday
                [CalculateRollingWaterBalance].Script.PlantWaterUptake
                [Soil].Swim3.psi as Psi
                [Soil].Swim3.SW as SW
                [Irrigation].IrrigationApplied as Irrigation
    Folder TileDrainage
      Memo
        # Subsurface drainage

        Subsurface drainage in APSIM's SWIM3 is implemented using the Hooghoudt equation. The tests below examine the sensibility of the responses in subsurface and vertical (i.e., normal) drainage as well as test for mass balance in water.
      Experiment E4_1
        Memo
          ## Depth to the impermeable layer

          When the vertical distance between the subsurface drains and the impermeable layer decreases, the drains become more effective. The reader is referred to the scientific/engineering literature on drainage to understand the details but in casual terms, when that distance is small the flow lines are compressed and the drains are more effective.

          The simulations below show that as the depth to the impermeable layer increases from 750 to 950 mm, the subsurface flow decreases and drainage increases. This is as expected. Water balance is within tolerance (less than 0.03 mm when the simulation was extended to six years).
        Factors
          Factor DepthToImperm
            Specification=[SWIM3].SwimSubsurfaceDrain.ImpermDepth = 750 to 1000 step 100
        Simulation TileDrainage1
          Memo
            ## Depth to the impermeable layer

            When the vertical distance between the subsurface drains and the impermeable layer decreases, the drains become more effective. The reader is referred to the scientific/engineering literature on drainage to understand the details but in casual terms, when that distance is small the flow lines are compressed and the drains are more effective.

            The simulations below show that as the depth to the impermeable layer increases from 750 to 950 mm, the subsurface flow decreases and drainage increases. This is as expected. Water balance is within tolerance (0.03 mm when the simulation was extended to six years).
          Weather: FileName=..\..\Examples\WeatherFiles\lincoln.met
          Clock: Start=2000-01-01; End=2000-01-31
          Summary summaryfile
          SoilArbitrator
          MicroClimate: a_interception=0; b_interception=0; c_interception=0; d_interception=0; SoilHeatFluxFraction=0; MinimumHeightDiffForNewLayer=0; NightInterceptionFraction=0; ReferenceHeight=2
          Forages: same as Sensibility.LowerBoundaryConditions.E1.Base_LowerBC.Forages
          Zone paddock: Area=1; Slope=0; AspectAngle=0; Altitude=50
            Manager CalculateRollingWaterBalance
            Manager SWIM3_SetLowerBC
              LowerBCType = gradient
              LowerBCValue = -500
              script: same as in Sensibility.LowerBoundaryConditions.E1.Base_LowerBC.paddock.SWIM3_SetLowerBC
            Manager AutomaticIrrigation: same as Sensibility.LowerBoundaryConditions.E1.Base_LowerBC.paddock.AutomaticIrrigation
            Operations AddIrrigation
              2000-01-10  [Irrigation].Apply(amount:100,duration:60);
              2000-01-15  [Irrigation].Apply(amount:100,duration:60);
            SurfaceOrganicMatter: InitialResidueName=grass; InitialResidueType=grass; InitialResidueMass=0; InitialStandingFraction=0; InitialCPR=0; InitialCNR=17
            Soil: SoilType=Loam; LocalName=Horotiu; Site=Ruakura, south of Railway Ln; NearestTown=Hamilton; Region=Waikato; Country=New Zealand; NaturalVegetation=long term grass; ApsoilNumber=1320; Latitude=-37.779; Longitude=175.304; LocationAccuracy=+/-50 m; YearOfSampling=1984
              DataSource=The database of New Zealand soils was compiled by AgResearch (www.agresearch.co.nz) and based on soil properties gathered, mainly from publications, in the course of conducting several simulation-based research projects but particularly from the Pastoral 21 Environment program which was funded by the New Zealand Ministry for Business, Innovation and Employment,  Dairy NZ, Fonterra and Meat & Wool NZ.
              Comments=Gravel soil. The bulk density of this APSoil reflects weight of fine-earth fraction per volume of bulk soil. Use with gravimetric water contents measured on the fine-earth fraction. Gravel assumed to not hold water as reflected in low SAT, DUL, LL15, LL and AD. The data is a combination of published or supplied measurements, pedotransfer functions, and expert opinion. See Cichota et al. (2013; Soil Research 51: 92-111, http://dx.doi.org/10.1071/SR12338) for a description of the pedotransfer functions. The soil carbon and fresh organic matter settings have been set as those broadly appropriate for permanent productive pastoral systems, see Cichota el al. (2012; Soil Research 50: 694-707, http://dx.doi.org/10.1071/SR12208). Users should take care to adapt these to local conditions before using the data in simulations. FOM values estimated to be 900 kg/ha of FOM in top 600mm of soil and another 100 kg/ha below.
              Memo Notes
                VS - added kF and nF from HydCurves for exco and fip. Also added 5 (units unclear) for D0

                VS - changed the last four Ks values from as below to 3 mm /day (to try and get tile drainage)

                13,367
                7,114
                6,216
                3,256
                6,716
                2,348
                18,003
                62,350
              Physical
                Thickness  ParticleSizeClay  ParticleSizeSand  ParticleSizeSilt  Rocks  BD    AirDry  LL15   DUL    SAT   KS
                60         18.44             53.54             28.02             0      0.82  0.091   0.276  0.414  0.45  100
                110        18.44             53.54             28.02             0      0.82  0.091   0.276  0.414  0.45  50
                140        18.44             53.54             28.02             0      0.82  0.091   0.276  0.414  0.45  25
                240        18.44             53.54             28.02             0      0.82  0.091   0.276  0.414  0.45  3
                200        18.44             53.54             28.02             0      0.82  0.091   0.276  0.414  0.45  3
                200        18.44             53.54             28.02             0      0.82  0.091   0.276  0.414  0.45  3
                200        18.44             53.54             28.02             0      0.82  0.091   0.276  0.414  0.45  3
                350        18.44             53.54             28.02             0      0.82  0.091   0.276  0.414  0.45  3
                BD source: Field measured and checked for sensibility
                AirDry source: Estimated based on local knowledge
                LL15, DUL source: Laboratory measured
                SAT source: Calculated from measured, estimated or calculated BD
              Nutrient
              Organic: FOMCNRatio=40
                Thickness  Carbon  SoilCNRatio  FBiom  FInert  FOM
                60         8.2     10.649       0.08   0.597   26.6765
                110        5.5     10.649       0.072  0.642   21.4084
                140        3.3     10.649       0.026  0.777   16.1801
                240        1.7     10.649       0.008  0.896   10.012
                200        1.7     10.649       0.008  0.957   6.71124
                200        1.2     10.649       0.008  0.975   4.49868
                200        0.7     10.649       0.008  0.992   3.01555
                350        0.1     10.649       0.008  0.986   1.49748
              Chemical
                Thickness  NO3N  NH4N  PH   CL
                60         0     0     6.5  10
                110        0     0     6.5  10
                140        0     0     6.5  10
                240        0     0     6.5  10
                200        0     0     6.5  10
                200        0     0     6.5  10
                200        0     0     6.5  10
                350        0     0     6.5  10
                PH source: Estimated based on local knowledge
              Sample Initial values: SWUnits=Volumetric; OCUnits=Total; PHUnits=Water
                Thickness  NO3  NH4  SW     CL  PH
                60         0    0    0.414  10  6.5
                110        0    0    0.414  10  6.5
                140        0    0    0.414  10  6.5
                240        0    0    0.414  10  6.5
                200        0    0    0.414  10  6.5
                200        0    0    0.414  10  6.5
                200        0    0    0.414  10  6.5
                350        0    0    0.414  10  6.5
              Swim3: PrecipitationInterception=0; ersoil=1e-06; ernode=1e-06; slcerr=1e-06; Salb=0.13; CN2Bare=0; CNRed=20; CNCov=0.8; KDul=1; PSIDul=-100; VC=true; DTMin=0; DTMax=1440; MaxWaterIncrement=10; SpaceWeightingFactor=0; SoluteSpaceWeightingFactor=1; Dis=0; Disp=1; A=2; DTHC=0.1; DTHP=2; Diagnostics=false; WaterTable=0
                SwimSoluteParameters Urea: WaterTableConcentration=0; D0=0.05
                  Thickness  Exco  FIP
                  60         0     1
                  110        0     1
                  140        0     1
                  240        0     1
                  200        0     1
                  200        0     1
                  200        0     1
                  350        0     1
                SwimSoluteParameters NH4: WaterTableConcentration=0; D0=5
                  Thickness  Exco  FIP
                  60         5     1
                  110        5     1
                  140        5     1
                  240        5     1
                  200        5     1
                  200        5     1
                  200        5     1
                  350        5     1
                SwimSoluteParameters NO3: WaterTableConcentration=0; D0=0.05
                  Thickness  Exco  FIP
                  60         0     1
                  110        0     1
                  140        0     1
                  240        0     1
                  200        0     1
                  200        0     1
                  200        0     1
                  350        0     1
                SwimSoluteParameters Cl: WaterTableConcentration=0; D0=0.05
                  Thickness  Exco  FIP
                  60         0     1
                  110        0     1
                  140        0     1
                  240        0     1
                  200        0     1
                  200        0     1
                  200        0     1
                  350        0     1
                SwimSoluteParameters PlantAvailableNH4: WaterTableConcentration=0; D0=0.05
                  Thickness  Exco   FIP
                  60         16.98  0.71
                  110        24.53  0.62
                  140        29.28  0.58
                  240        51.55  0.43
                  200        37.33  0.51
                  200        56.51  0.4
                  200        34.12  0.48
                  350        14.52  0.47
                SwimSoluteParameters PlantAvailableNO3: WaterTableConcentration=0; D0=0.05
                  Thickness  Exco  FIP
                  60         0     1
                  110        0     1
                  140        0     1
                  240        0     1
                  200        0     1
                  200        0     1
                  200        0     1
                  350        0     1
                SwimSoluteParameters LabileP: WaterTableConcentration=0; D0=0.05
                  Thickness  Exco  FIP
                  60         0     1
                  110        0     1
                  140        0     1
                  240        0     1
                  200        0     1
                  200        0     1
                  200        0     1
                  350        0     1
                SwimSoluteParameters UnavailableP: WaterTableConcentration=0; D0=0.05
                  Thickness  Exco  FIP
                  60         0     1
                  110        0     1
                  140        0     1
                  240        0     1
                  200        0     1
                  200        0     1
                  200        0     1
                  350        0     1
                SwimSubsurfaceDrain: DrainDepth=500; DrainSpacing=5000; DrainRadius=150; Klat=1000; ImpermDepth=2000
              Solute Cl
              LayerStructure: Thickness=[10, 20, 30, 40, 50, 50, 50, 50, 100, 100, 50, 50, 50, 50]
              SoilTemperature
              Physical PhysicalActual (disabled)
                Thickness  ParticleSizeClay  ParticleSizeSand  ParticleSizeSilt  Rocks  BD     AirDry  LL15   DUL    SAT    KS
                60         17.61             33.77             48.62             0      0.865  0.081   0.246  0.511  0.588  13367
                110        16.36             33.91             49.73             0      0.835  0.068   0.207  0.451  0.605  7114
                140        16.42             35.91             47.67             0      0.805  0.067   0.203  0.439  0.616  6216
                240        29.03             46.26             24.71             0      0.83   0.085   0.259  0.419  0.625  3256
                200        18.44             53.54             28.02             0      0.82   0.091   0.276  0.414  0.628  6716
                200        32.64             45.98             21.38             0      0.815  0.094   0.286  0.429  0.633  2348
                200        9.49              63.84             26.67             0      0.944  0.075   0.227  0.364  0.552  18003
                350        1                 93.21             5.79              0      1.063  0.015   0.045  0.092  0.312  62350
                BD source: Field measured and checked for sensibility
                AirDry source: Estimated based on local knowledge
                LL15, DUL source: Laboratory measured
                SAT source: Calculated from measured, estimated or calculated BD
            Irrigation
            Fertiliser
            Report: EventNames=[Clock].EndOfDay
              VariableNames:
                [Clock].Today as Date
                [CalculateRollingWaterBalance].Script.WaterBalanceToday as WaterBalanceToday
                [CalculateRollingWaterBalance].Script.WaterBalanceCumulative as WaterBalanceCumulative
                sum([Soil].Nutrient.TotalN) as TotalN
                [Soil].Swim3.SubsurfaceDrain as SubsurfaceDrain
                [Soil].Swim3.Drainage as Drainage
                sum([Soil].Swim3.SWmm) as WaterStorage
                [Soil].Swim3.WaterTable as WaterTableDepth
                [Soil].Swim3.psi as Psi
                [Irrigation].IrrigationApplied as Irrigation
                [NO3].kgha
      Experiment E4_2
        Memo
          ## Drain spacing

          A the spacing between subsurface drains decreases, subsurface drain flow can be expected to increase under conditions of high flow (when the hydraulics of the drains would otherwise be limiting).

          The simulations below show that as drain spacing is decreased from 10 m to 1 m, the subsurface flow increases and vertical drainage decreases. This is as expected. Water balance is within tolerance (less than 0.03 mm when the simulation was extended to six years).
        Factors
          Factor DrainSpacing
            Specification=[SWIM3].SwimSubsurfaceDrain.DrainSpacing = 1000 to 10000 step 1000
        Simulation TileDrainage2
          Memo
            On hold until the leaching variables are exposed
          Weather: FileName=..\..\Examples\WeatherFiles\lincoln.met
          Clock: Start=2000-01-01; End=2000-01-31
          Summary summaryfile
          SoilArbitrator
          MicroClimate: a_interception=0; b_interception=0; c_interception=0; d_interception=0; SoilHeatFluxFraction=0; MinimumHeightDiffForNewLayer=0; NightInterceptionFraction=0; ReferenceHeight=2
          Forages: same as Sensibility.LowerBoundaryConditions.E1.Base_LowerBC.Forages
          Zone paddock: Area=1; Slope=0; AspectAngle=0; Altitude=50
            Manager CalculateRollingWaterBalance
            Manager SWIM3_SetLowerBC: same as Sensibility.TileDrainage.E4_1.TileDrainage1.paddock.SWIM3_SetLowerBC
            Manager AutomaticIrrigation: same as Sensibility.LowerBoundaryConditions.E1.Base_LowerBC.paddock.AutomaticIrrigation
            Operations AddIrrigation
              2000-01-10  [Irrigation].Apply(amount:100,duration:60);
              2000-01-15  [Irrigation].Apply(amount:100,duration:60);
            SurfaceOrganicMatter: InitialResidueName=grass; InitialResidueType=grass; InitialResidueMass=0; InitialStandingFraction=0; InitialCPR=0; InitialCNR=17
            Soil: SoilType=Loam; LocalName=Horotiu; Site=Ruakura, south of Railway Ln; NearestTown=Hamilton; Region=Waikato; Country=New Zealand; NaturalVegetation=long term grass; ApsoilNumber=1320; Latitude=-37.779; Longitude=175.304; LocationAccuracy=+/-50 m; YearOfSampling=1984
              DataSource=The database of New Zealand soils was compiled by AgResearch (www.agresearch.co.nz) and based on soil properties gathered, mainly from publications, in the course of conducting several simulation-based research projects but particularly from the Pastoral 21 Environment program which was funded by the New Zealand Ministry for Business, Innovation and Employment,  Dairy NZ, Fonterra and Meat & Wool NZ.
              Comments=Gravel soil. The bulk density of this APSoil reflects weight of fine-earth fraction per volume of bulk soil. Use with gravimetric water contents measured on the fine-earth fraction. Gravel assumed to not hold water as reflected in low SAT, DUL, LL15, LL and AD. The data is a combination of published or supplied measurements, pedotransfer functions, and expert opinion. See Cichota et al. (2013; Soil Research 51: 92-111, http://dx.doi.org/10.1071/SR12338) for a description of the pedotransfer functions. The soil carbon and fresh organic matter settings have been set as those broadly appropriate for permanent productive pastoral systems, see Cichota el al. (2012; Soil Research 50: 694-707, http://dx.doi.org/10.1071/SR12208). Users should take care to adapt these to local conditions before using the data in simulations. FOM values estimated to be 900 kg/ha of FOM in top 600mm of soil and another 100 kg/ha below.
              Memo Notes
                VS - added kF and nF from HydCurves for exco and fip. Also added 5 (units unclear) for D0

                VS - changed the last four Ks values from as below to 3 mm /day (to try and get tile drainage)

                13,367
                7,114
                6,216
                3,256
                6,716
                2,348
                18,003
                62,350
              Physical: same as Sensibility.TileDrainage.E4_1.TileDrainage1.paddock.Soil.Physical
              Nutrient
              Organic: same as Sensibility.TileDrainage.E4_1.TileDrainage1.paddock.Soil.Organic
              Chemical: same as Sensibility.TileDrainage.E4_1.TileDrainage1.paddock.Soil.Chemical
              Sample Initial values: same as Sensibility.TileDrainage.E4_1.TileDrainage1.paddock.Soil.Initial values
              Swim3: PrecipitationInterception=0; ersoil=1e-06; ernode=1e-06; slcerr=1e-06; Salb=0.13; CN2Bare=0; CNRed=20; CNCov=0.8; KDul=1; PSIDul=-100; VC=true; DTMin=0; DTMax=1440; MaxWaterIncrement=10; SpaceWeightingFactor=0; SoluteSpaceWeightingFactor=1; Dis=0; Disp=1; A=2; DTHC=0.1; DTHP=2; Diagnostics=false; WaterTable=0
                SwimSoluteParameters Urea: WaterTableConcentration=0; D0=0.05
                  Thickness  Exco  FIP
                  60         0     1
                  110        0     1
                  140        0     1
                  240        0     1
                  200        0     1
                  200        0     1
                  200        0     1
                  350        0     1
                SwimSoluteParameters NH4: WaterTableConcentration=0; D0=5
                  Thickness  Exco  FIP
                  60         5     1
                  110        5     1
                  140        5     1
                  240        5     1
                  200        5     1
                  200        5     1
                  200        5     1
                  350        5     1
                SwimSoluteParameters NO3: WaterTableConcentration=0; D0=0.05
                  Thickness  Exco  FIP
                  60         0     1
                  110        0     1
                  140        0     1
                  240        0     1
                  200        0     1
                  200        0     1
                  200        0     1
                  350        0     1
                SwimSoluteParameters Cl: WaterTableConcentration=0; D0=0.05
                  Thickness  Exco  FIP
                  60         0     1
                  110        0     1
                  140        0     1
                  240        0     1
                  200        0     1
                  200        0     1
                  200        0     1
                  350        0     1
                SwimSoluteParameters PlantAvailableNH4: WaterTableConcentration=0; D0=0.05
                  Thickness  Exco   FIP
                  60         16.98  0.71
                  110        24.53  0.62
                  140        29.28  0.58
                  240        51.55  0.43
                  200        37.33  0.51
                  200        56.51  0.4
                  200        34.12  0.48
                  350        14.52  0.47
                SwimSoluteParameters PlantAvailableNO3: WaterTableConcentration=0; D0=0.05
                  Thickness  Exco  FIP
                  60         0     1
                  110        0     1
                  140        0     1
                  240        0     1
                  200        0     1
                  200        0     1
                  200        0     1
                  350        0     1
                SwimSoluteParameters LabileP: WaterTableConcentration=0; D0=0.05
                  Thickness  Exco  FIP
                  60         0     1
                  110        0     1
                  140        0     1
                  240        0     1
                  200        0     1
                  200        0     1
                  200        0     1
                  350        0     1
                SwimSoluteParameters UnavailableP: WaterTableConcentration=0; D0=0.05
                  Thickness  Exco  FIP
                  60         0     1
                  110        0     1
                  140        0     1
                  240        0     1
                  200        0     1
                  200        0     1
                  200        0     1
                  350        0     1
                SwimSubsurfaceDrain: DrainDepth=500; DrainSpacing=5000; DrainRadius=150; Klat=1000; ImpermDepth=1000
              Solute Cl
              LayerStructure: Thickness=[10, 20, 30, 40, 50, 50, 50, 50, 100, 100, 50, 50, 50, 50]
              SoilTemperature
              Physical PhysicalActual (disabled): same as Sensibility.TileDrainage.E4_1.TileDrainage1.paddock.Soil.PhysicalActual
            Irrigation
            Fertiliser
            Report: same as Sensibility.TileDrainage.E4_1.TileDrainage1.paddock.Report
      Experiment E4_3
        Memo
          ## Depth to the drains

          Shallower subsurface drains are less effective than deeper drains because they can only drain water stored in the soil layers shallower than the drains themselves.

          The simulations below show that as drain depth increases from 300 to 700 mm, the subsurface flow increases and drainage decreases. This is as expected. Water balance is within tolerance (less than 0.03 mm when the simulation was extended to six years).
        Factors
          Factor DrainDepth
            Specification=[SWIM3].SwimSubsurfaceDrain.DrainDepth = 300 to 700 step 100
        Simulation TileDrainage3: same as Sensibility.TileDrainage.E4_2.TileDrainage2
    Folder SoluteMassBalanceTesting
      Experiment E5_tracer
        Memo
          Mass balance was tested using chloride as a tracer. Several simulations were run with a linear (FIP=1) isotherm. The simulation was set up with a bare soil, no crops, no evaporation, and 10 mm /day of rainfall. Cl was added to the top 10 mm of soil on the first day (see the AddSoluteToSoil manager) and mass balance was calculated on a daily basis. Using Factors, “exco” of the Cl was changed between 0.0 and 10. When exco = 0 the Cl is not adsorbed (no attraction to the soil surfaces). When exco = 1 the concentration on the soil surfaces in g solute / Mg soil is numerically equal to the concentration in the soil water in g solute / m3 soil water. When exco is 10 the concentration on the soil surfaces will be ten times of that in the soil water (noting the difference in units of course) and the solute is only minimally mobile.

          The mass balance error was less than 0.05 kg (of 100 kg) of solute across all simulations and it did not worsen with duration of simulation. The worst mass balance was in the no-adsorption simulation and coincided with peak leaching rate when changes in concentration were relatively steep. Given this, part of the mass balance error may be due to recalculating solute amounts from the node basis of SWIM’s numerical solution onto the layer basis that APSIM uses. Regardless, the error was minimal and within the tolerance for APSIM’s purposes.
        Factors
          Factor Exco0: Specification=[Swim3].Cl
            SwimSoluteParameters Cl: WaterTableConcentration=0; D0=0.05
              Thickness  Exco  FIP
              60         0     1
              110        0     1
              140        0     1
              240        0     1
              200        0     1
              200        0     1
              200        0     1
              350        0     1
          Factor Exco0_5: Specification=[Swim3].Cl
            SwimSoluteParameters Cl: WaterTableConcentration=0; D0=0.05
              Thickness  Exco  FIP
              60         0.5   1
              110        0.5   1
              140        0.5   1
              240        0.5   1
              200        0.5   1
              200        0.5   1
              200        0.5   1
              350        0.5   1
          Factor Exco1: Specification=[Swim3].Cl
            SwimSoluteParameters Cl: WaterTableConcentration=0; D0=0.05
              Thickness  Exco  FIP
              60         1     1
              110        1     1
              140        1     1
              240        1     1
              200        1     1
              200        1     1
              200        1     1
              350        1     1
          Factor Exco1_5: Specification=[Swim3].Cl
            SwimSoluteParameters Cl: WaterTableConcentration=0; D0=0.05
              Thickness  Exco  FIP
              60         1.5   1
              110        1.5   1
              140        1.5   1
              240        1.5   1
              200        1.5   1
              200        1.5   1
              200        1.5   1
              350        1.5   1
          Factor Exco3: Specification=[Swim3].Cl
            SwimSoluteParameters Cl: WaterTableConcentration=0; D0=0.05
              Thickness  Exco  FIP
              60         3     1
              110        3     1
              140        3     1
              240        3     1
              200        3     1
              200        3     1
              200        3     1
              350        3     1
          Factor Exco10: Specification=[Swim3].Cl
            SwimSoluteParameters Cl: WaterTableConcentration=0; D0=0.05
              Thickness  Exco  FIP
              60         10    1
              110        10    1
              140        10    1
              240        10    1
              200        10    1
              200        10    1
              200        10    1
              350        10    1
        Simulation Base_SoluteLinear
          ControlledEnvironment: Rain=10; AirPressure=1010
            zero: MaxT, MinT, Radn, PanEvap, VP, Wind, CO2, DiffuseFraction, Latitude, Longitude, DayLength, SunRise, SunSet
          Clock: Start=2000-01-01; End=2000-06-30
          Summary summaryfile
          SoilArbitrator
          MicroClimate: a_interception=0; b_interception=0; c_interception=0; d_interception=0; SoilHeatFluxFraction=0; MinimumHeightDiffForNewLayer=0; NightInterceptionFraction=0; ReferenceHeight=2
          Forages: same as Sensibility.LowerBoundaryConditions.E1.Base_LowerBC.Forages
          Zone paddock: Area=1; Slope=0; AspectAngle=0; Altitude=50
            Manager CalculateRollingWaterBalance
            Manager AddSoluteToSoil
```csharp
using Models.Climate;
using APSIM.Shared.Utilities;
using Models.Soils.Nutrients;
using Models.Soils;
using Models.Surface;
using Models.PMF;
using Models.Core;
using System.Xml.Serialization;
using System;
using Models.AgPasture;
using Models.Interfaces;
using System.Linq;

namespace Models
{
    [Serializable] 
    [System.Xml.Serialization.XmlInclude(typeof(Model))]
    public class Script : Model
    {
        [Link] Clock clock;
        [Link] ISummary summary;
        /*[Link] IWeather weather;
        [Link] Irrigation irrigation;
        [Link] private SurfaceOrganicMatter surfaceOM;
        [Link] private ISoilWater soil;  // and I think this will give solutes as well
        [Link] private Fertiliser fertiliser;
        [Link] Swim3 swim3;
        [Link(ByName = true)] private Solute no3; */
        [Link(ByName = true)] private Solute cl;
  




        [EventSubscribe("DoDailyInitialisation")] private void DoDailyInitialisation(object sender, EventArgs e)
        {
        	if (clock.Today == clock.StartDate) 
	        	cl.AddKgHaDelta(SoluteSetterType.Other, new double[] {100, 0, 0, 0, 0, 0, 0, 0, 0, 0, 0, 0, 0, 0});
		}
    }
}
```
            Manager SoilChlorideBalance
```csharp
using Models.Climate;
using APSIM.Shared.Utilities;
using Models.Soils.Nutrients;
using Models.Soils;
using Models.Surface;
using Models.PMF;
using Models.Core;
using System.Xml.Serialization;
using System;
using Models.AgPasture;
using Models.Interfaces;
using System.Linq;

namespace Models
{
    [Serializable] 
    [System.Xml.Serialization.XmlInclude(typeof(Model))]
    public class Script : Model
    {
        [Link] Clock clock;
        [Link] ISummary summary;
        [Link] IWeather weather;
        [Link] Irrigation irrigation;
        [Link] private SurfaceOrganicMatter surfaceOM;
        [Link] private ISoilWater soil;  // and I think this will give solutes as well
        [Link] private Swim3 swim;
        [Link] private Nutrient nutrient;
        [Link] private Fertiliser fertiliser;
        [Link(ByName = true)] private Solute cl;

  
        public double ChlorideBalance  { get; set; }
        private  double ChlorideAtInit  { get; set; }
        private  double ChlorideLeached  { get; set; }


        [EventSubscribe("DoDailyInitialisation")] private void DoDailyInitialisation(object sender, EventArgs e)
        {
        	if (clock.Today == clock.StartDate) 
	        {
	        	ChlorideAtInit = cl.kgha.Sum();
	        	ChlorideLeached = 0.0;
	        	ChlorideBalance = 0.0;
	        }
		}

        [EventSubscribe("DoReportCalculations")] private void DoReportCalculations(object sender, EventArgs e)
        {
        	
        	ChlorideLeached += swim.LeachCl;
        	ChlorideBalance = ChlorideAtInit - ChlorideLeached - cl.kgha.Sum();
		}
    }
}
```
            Manager SWIM3_SetLowerBC
              LowerBCType = gradient
              LowerBCValue = -500
```csharp
using Models.Climate;
using APSIM.Shared.Utilities;
using Models.Soils.Nutrients;
using Models.Soils;
using Models.PMF;
using Models.Core;
using System.Xml.Serialization;
using System;
using Models.AgPasture;
using Models.Interfaces;

namespace Models
{
    [Serializable] 
    [System.Xml.Serialization.XmlInclude(typeof(Model))]
    public class Script : Model
    {
        [Link] Clock clock;
        [Link] ISummary summary;
        [Link] private Swim3 swim;
        //[Link] private PastureSpecies ryegrass;
        //[Link] private SimpleGrazing grazing;
        
        public enum LowerBCTypeOptions {gradient,seepage,potential};

        [Separator("Sets the lower boundary condition type (and value if set to 'potential' for SWIM3. The change is applied at the beginning of the first day of the simulation.")]
        [Description("What lower boundary condition is wanted?")] public LowerBCTypeOptions LowerBCType { get; set; }
        [Description("If 'potential', then what potential? Should be negative (mm) ")] public double LowerBCValue { get; set; }

        public double SoilWaterStart  { get; set; }
        public double SoilWaterEnd  { get; set; }

        [EventSubscribe("DoDailyInitialisation")]
        private void DoDailyInitialisation(object sender, EventArgs e)
        {
        }

        [EventSubscribe("DoReportCalculations")]
        private void DoReportCalculations(object sender, EventArgs e)
        {
        }

        [EventSubscribe("DoManagement")]
        private void DoDailyCalculations(object sender, EventArgs e)
        {
            if (clock.Today == clock.StartDate)
            {
                summary.WriteMessage(this, "Script is setting lower boundary condition to " + LowerBCType, MessageType.Diagnostic);
                if (LowerBCType == LowerBCTypeOptions.gradient)
                    swim.SetLowerBCForGradient(bbcGradient: 0.0);   // in cm/cm (ibbc=0) Note that this is the default setting
                else if (LowerBCType == LowerBCTypeOptions.potential)
                    swim.SetLowerBCForGivenPotential(bbcPotential: LowerBCValue /10.0 );    //  convert to cm (ibbc=1), DUL is -100 cm so values more positive will often result in inflow to the bottom of the soil profile. Input in mm so divide here.
                else if (LowerBCType == LowerBCTypeOptions.seepage)
                    swim.SetLowerBCForSeepage(bbcPotentialSeepage: 0.0);  // in cm (ibbc=3). This is for zero-tension lysimeters
                else
                	throw new Exception("Wrong lower boundary condition type");
            }
        }
    }
}
```
            Manager AutomaticIrrigation: same as Sensibility.PotentialLowerBoundaryCondition.E2.Base_LowerBC_Potentials.paddock.AutomaticIrrigation
            SurfaceOrganicMatter: InitialResidueName=grass; InitialResidueType=grass; InitialResidueMass=0; InitialStandingFraction=0; InitialCPR=0; InitialCNR=17
            Operations AddFertiliser
              // 2000-01-02  [Fertiliser].Apply(Amount: 500, Type: UreaN);
              // 2000-01-02  [Fertiliser].Apply(Amount: 500, Type: NO3N);
              // 2000-01-02  [Fertiliser].Apply(Amount: 500, Type: Cl);
            Operations AddWater (disabled)
              2000-01-05  [Irrigation].Apply(amount:100,duration:60);
              2000-01-10  [Irrigation].Apply(amount:100,duration:60);
              2000-01-15  [Irrigation].Apply(amount:100,duration:60);
              2000-01-20  [Irrigation].Apply(amount:100,duration:60);
              2000-01-25  [Irrigation].Apply(amount:100,duration:60);
              2000-01-30  [Irrigation].Apply(amount:100,duration:60);
              2000-02-05  [Irrigation].Apply(amount:100,duration:60);
              2000-02-10  [Irrigation].Apply(amount:100,duration:60);
              2000-02-15  [Irrigation].Apply(amount:100,duration:60);
              2000-02-20  [Irrigation].Apply(amount:100,duration:60);
              2000-02-25  [Irrigation].Apply(amount:100,duration:60);
              2000-03-05  [Irrigation].Apply(amount:100,duration:60);
              2000-03-10  [Irrigation].Apply(amount:100,duration:60);
              2000-03-15  [Irrigation].Apply(amount:100,duration:60);
              2000-03-20  [Irrigation].Apply(amount:100,duration:60);
              2000-03-25  [Irrigation].Apply(amount:100,duration:60);
              2000-03-30  [Irrigation].Apply(amount:100,duration:60);
              2000-04-05  [Irrigation].Apply(amount:100,duration:60);
              2000-04-10  [Irrigation].Apply(amount:100,duration:60);
              2000-04-15  [Irrigation].Apply(amount:100,duration:60);
              2000-04-20  [Irrigation].Apply(amount:100,duration:60);
              2000-04-25  [Irrigation].Apply(amount:100,duration:60);
              2000-04-30  [Irrigation].Apply(amount:100,duration:60);
            Soil: SoilType=Loam; LocalName=Horotiu; Site=Ruakura, south of Railway Ln; NearestTown=Hamilton; Region=Waikato; Country=New Zealand; NaturalVegetation=long term grass; ApsoilNumber=1320; Latitude=-37.779; Longitude=175.304; LocationAccuracy=+/-50 m; YearOfSampling=1984
              DataSource=The database of New Zealand soils was compiled by AgResearch (www.agresearch.co.nz) and based on soil properties gathered, mainly from publications, in the course of conducting several simulation-based research projects but particularly from the Pastoral 21 Environment program which was funded by the New Zealand Ministry for Business, Innovation and Employment,  Dairy NZ, Fonterra and Meat & Wool NZ.
              Comments=Gravel soil. The bulk density of this APSoil reflects weight of fine-earth fraction per volume of bulk soil. Use with gravimetric water contents measured on the fine-earth fraction. Gravel assumed to not hold water as reflected in low SAT, DUL, LL15, LL and AD. The data is a combination of published or supplied measurements, pedotransfer functions, and expert opinion. See Cichota et al. (2013; Soil Research 51: 92-111, http://dx.doi.org/10.1071/SR12338) for a description of the pedotransfer functions. The soil carbon and fresh organic matter settings have been set as those broadly appropriate for permanent productive pastoral systems, see Cichota el al. (2012; Soil Research 50: 694-707, http://dx.doi.org/10.1071/SR12208). Users should take care to adapt these to local conditions before using the data in simulations. FOM values estimated to be 900 kg/ha of FOM in top 600mm of soil and another 100 kg/ha below.
              Physical
                Thickness  ParticleSizeClay  ParticleSizeSand  ParticleSizeSilt  Rocks  BD     AirDry  LL15   DUL    SAT    KS
                60         17.61             33.77             48.62             0      0.865  0.081   0.246  0.511  0.588  13367.955
                110        16.36             33.91             49.73             0      0.835  0.068   0.207  0.451  0.605  7114.419
                140        16.42             35.91             47.67             0      0.805  0.067   0.203  0.439  0.616  6216.357
                240        29.03             46.26             24.71             0      0.83   0.085   0.259  0.419  0.625  3256.961
                200        18.44             53.54             28.02             0      0.82   0.091   0.276  0.414  0.628  6716.918
                200        32.64             45.98             21.38             0      0.815  0.094   0.286  0.429  0.633  2348.283
                200        9.49              63.84             26.67             0      0.944  0.075   0.227  0.364  0.552  18003.598
                350        1                 93.21             5.79              0      1.063  0.015   0.045  0.092  0.312  62350.094
                BD source: Field measured and checked for sensibility
                AirDry source: Estimated based on local knowledge
                LL15, DUL source: Laboratory measured
                SAT source: Calculated from measured, estimated or calculated BD
              Nutrient
              Organic: FOMCNRatio=40
                Thickness  Carbon  SoilCNRatio  FBiom  FInert  FOM
                60         0       10.649       0.08   0.597   0
                110        0       10.649       0.072  0.642   0
                140        0       10.649       0.026  0.777   0
                240        0       10.649       0.008  0.896   0
                200        0       10.649       0.008  0.957   0
                200        0       10.649       0.008  0.975   0
                200        0       10.649       0.008  0.992   0
                350        0       10.649       0.008  0.986   0
              Chemical
                Thickness  NO3N  NH4N  PH   CL
                60         0     0     6.5  0
                110        0     0     6.5  0
                140        0     0     6.5  0
                240        0     0     6.5  0
                200        0     0     6.5  0
                200        0     0     6.5  0
                200        0     0     6.5  0
                350        0     0     6.5  0
                PH source: Estimated based on local knowledge
              Sample Initial values: SWUnits=Volumetric; OCUnits=Total; PHUnits=Water
                Thickness  NO3  NH4  SW     CL  PH
                60         0    0    0.511  0   6.5
                110        0    0    0.451  0   6.5
                140        0    0    0.439  0   6.5
                240        0    0    0.419  0   6.5
                200        0    0    0.414  0   6.5
                200        0    0    0.429  0   6.5
                200        0    0    0.364  0   6.5
                350        0    0    0.092  0   6.5
              Swim3: PrecipitationInterception=0; ersoil=1e-06; ernode=1e-06; slcerr=1e-06; Salb=0.13; CN2Bare=50; CNRed=20; CNCov=0.8; KDul=1; PSIDul=-100; VC=true; DTMin=0; DTMax=30; MaxWaterIncrement=5; SpaceWeightingFactor=0; SoluteSpaceWeightingFactor=0; Dis=0; Disp=1; A=2; DTHC=0.1; DTHP=2; Diagnostics=false; WaterTable=0
                SwimSoluteParameters Urea: WaterTableConcentration=0; D0=0.05
                  Thickness  Exco  FIP
                  60         0     1
                  110        0     1
                  140        0     1
                  240        0     1
                  200        0     1
                  200        0     1
                  200        0     1
                  350        0     1
                SwimSoluteParameters NH4: WaterTableConcentration=0; D0=5
                  Thickness  Exco  FIP
                  60         0     1
                  110        0     1
                  140        0     1
                  240        0     1
                  200        0     1
                  200        0     1
                  200        0     1
                  350        0     1
                SwimSoluteParameters NO3: WaterTableConcentration=0; D0=0.05
                  Thickness  Exco  FIP
                  60         0     1
                  110        0     1
                  140        0     1
                  240        0     1
                  200        0     1
                  200        0     1
                  200        0     1
                  350        0     1
                SwimSoluteParameters Cl: WaterTableConcentration=0; D0=0.05
                  Thickness  Exco  FIP
                  60         0     1
                  110        0     1
                  140        0     1
                  240        0     1
                  200        0     1
                  200        0     1
                  200        0     1
                  350        0     1
                SwimSoluteParameters PlantAvailableNH4: WaterTableConcentration=0; D0=0.05
                  Thickness  Exco   FIP
                  60         16.98  0.71
                  110        24.53  0.62
                  140        29.28  0.58
                  240        51.55  0.43
                  200        37.33  0.51
                  200        56.51  0.4
                  200        34.12  0.48
                  350        14.52  0.47
                SwimSoluteParameters PlantAvailableNO3: WaterTableConcentration=0; D0=0.05
                  Thickness  Exco  FIP
                  60         0     1
                  110        0     1
                  140        0     1
                  240        0     1
                  200        0     1
                  200        0     1
                  200        0     1
                  350        0     1
                SwimSoluteParameters LabileP: WaterTableConcentration=0; D0=0.05
                  Thickness  Exco  FIP
                  60         0     1
                  110        0     1
                  140        0     1
                  240        0     1
                  200        0     1
                  200        0     1
                  200        0     1
                  350        0     1
                SwimSoluteParameters UnavailableP: WaterTableConcentration=0; D0=0.05
                  Thickness  Exco  FIP
                  60         0     1
                  110        0     1
                  140        0     1
                  240        0     1
                  200        0     1
                  200        0     1
                  200        0     1
                  350        0     1
                SwimSoluteParameters NH41 (disabled): WaterTableConcentration=0; D0=5
                  Thickness  Exco   FIP
                  60         16.98  0.71
                  110        24.53  0.62
                  140        29.28  0.58
                  240        51.55  0.43
                  200        37.33  0.51
                  200        56.51  0.4
                  200        34.12  0.48
                  350        14.52  0.47
                SwimSubsurfaceDrain: DrainDepth=500; DrainSpacing=5000; DrainRadius=150; Klat=1000; ImpermDepth=1000
              Solute Cl
              LayerStructure: Thickness=[10, 20, 30, 40, 50, 50, 50, 50, 100, 100, 50, 50, 50, 50]
              SoilTemperature
            Irrigation
            Fertiliser
            Report: EventNames=[Clock].EndOfDay
              VariableNames:
                [Clock].Today as Date
                sum([Soil].Cl.kgha) as StoredCl
                [SWIM3].LeachCl as LeachCl
                [SoilChlorideBalance].Script.ChlorideBalance as ChlorideBalance
                Sum of [SWIM3].Drainage from Start to End as CumulativeDrainage
                [SWIM3].LeachCl / [SWIM3].Drainage / 10 as ConcDrainagePpm
      Experiment E5_2_nonlinear
        Memo Nonlinear Solute Isotherms
          Nonlinear solute isoterms (i.e. anything with a power of the Freundlich isotherm, FIP, of less than 1) are disabled because they are causing a mass balance error. They might be reactivated in the future if the cause can be found. The tests are left here (but disbled so as not to cause a crash) should the issue be addressed in the future.
        Factors (disabled)
          Factor NoAdsorb: Specification=[Swim3].Cl
            SwimSoluteParameters Cl: WaterTableConcentration=0; D0=0.05
              Thickness  Exco  FIP
              60         0     1
              110        0     1
              140        0     1
              240        0     1
              200        0     1
              200        0     1
              200        0     1
              350        0     1
          Factor Linear: Specification=[Swim3].Cl
            SwimSoluteParameters Cl: WaterTableConcentration=0; D0=0.05
              Thickness  Exco  FIP
              60         1     1
              110        1     1
              140        1     1
              240        1     1
              200        1     1
              200        1     1
              200        1     1
              350        1     1
          Factor NonlinearFIP09: Specification=[Swim3].Cl
            SwimSoluteParameters Cl: WaterTableConcentration=0; D0=0.05
              Thickness  Exco  FIP
              60         1     0.9
              110        1     0.9
              140        1     0.9
              240        1     0.9
              200        1     0.9
              200        1     0.9
              200        1     0.9
              350        1     0.9
          Factor NonlinearFIP08: Specification=[Swim3].Cl
            SwimSoluteParameters Cl: WaterTableConcentration=0; D0=0.05
              Thickness  Exco  FIP
              60         1     0.8
              110        1     0.8
              140        1     0.8
              240        1     0.8
              200        1     0.8
              200        1     0.8
              200        1     0.8
              350        1     0.8
          Factor NonlinearFIP07: Specification=[Swim3].Cl
            SwimSoluteParameters Cl: WaterTableConcentration=0; D0=0.05
              Thickness  Exco  FIP
              60         1     0.7
              110        1     0.7
              140        1     0.7
              240        1     0.7
              200        1     0.7
              200        1     0.7
              200        1     0.7
              350        1     0.7
          Factor NonlinearFIP06: Specification=[Swim3].Cl
            SwimSoluteParameters Cl: WaterTableConcentration=0; D0=0.05
              Thickness  Exco  FIP
              60         1     0.6
              110        1     0.6
              140        1     0.6
              240        1     0.6
              200        1     0.6
              200        1     0.6
              200        1     0.6
              350        1     0.6
          Factor NonlinearFIP05: Specification=[Swim3].Cl
            SwimSoluteParameters Cl: WaterTableConcentration=0; D0=0.05
              Thickness  Exco  FIP
              60         1     0.5
              110        1     0.5
              140        1     0.5
              240        1     0.5
              200        1     0.5
              200        1     0.5
              200        1     0.5
              350        1     0.5
          Factor NonlinearFIP04: Specification=[Swim3].Cl
            SwimSoluteParameters Cl: WaterTableConcentration=0; D0=0.05
              Thickness  Exco  FIP
              60         1     0.4
              110        1     0.4
              140        1     0.4
              240        1     0.4
              200        1     0.4
              200        1     0.4
              200        1     0.4
              350        1     0.4
          Factor NonlinearFIP03: Specification=[Swim3].Cl
            SwimSoluteParameters Cl: WaterTableConcentration=0; D0=0.05
              Thickness  Exco  FIP
              60         1     0.3
              110        1     0.3
              140        1     0.3
              240        1     0.3
              200        1     0.3
              200        1     0.3
              200        1     0.3
              350        1     0.3
        Simulation Base_SoluteNonlinear (disabled)
          Memo
            On hold until the leaching variables are exposed
          Weather: FileName=..\..\Examples\WeatherFiles\lincoln.met
          Clock: Start=2000-01-01; End=2000-06-30
          Summary summaryfile
          SoilArbitrator
          MicroClimate: a_interception=0; b_interception=0; c_interception=0; d_interception=0; SoilHeatFluxFraction=0; MinimumHeightDiffForNewLayer=0; NightInterceptionFraction=0; ReferenceHeight=2
          Forages
            Parameters:
              Name                          IsLive  DigestibilityString  FractionConsumable  MinimumAmount  UseDigestibilityFromModel
              SurfaceOrganicMatter.Residue  true    0.7                  0                   100            false
              SurfaceOrganicMatter.Residue  false   0.3                  0                   0              false
              AGPRyegrass.Leaf              true    0.7                  1                   100            false
              AGPRyegrass.Leaf              false   0.3                  1                   0              false
              AGPRyegrass.Stem              true    0.7                  1                   100            false
              AGPRyegrass.Stem              false   0.3                  1                   0              false
              AGPRyegrass.Stolon            true    0.7                  1                   100            false
              AGPRyegrass.Stolon            false   0.3                  1                   0              false
              AGPWhiteClover.Leaf           true    0.7                  1                   100            false
              AGPWhiteClover.Leaf           false   0.3                  1                   0              false
              AGPWhiteClover.Stem           true    0.7                  1                   100            false
              AGPWhiteClover.Stem           false   0.3                  1                   0              false
              AGPWhiteClover.Stolon         true    0.7                  1                   100            false
              AGPWhiteClover.Stolon         false   0.3                  1                   0              false
          Zone paddock: Area=1; Slope=0; AspectAngle=0; Altitude=50
            Manager CalculateRollingWaterBalance
            Manager SetSoluteInSoil
```csharp
using Models.Climate;
using APSIM.Shared.Utilities;
using Models.Soils.Nutrients;
using Models.Soils;
using Models.Surface;
using Models.PMF;
using Models.Core;
using System.Xml.Serialization;
using System;
using Models.AgPasture;
using Models.Interfaces;
using System.Linq;

namespace Models
{
    [Serializable] 
    [System.Xml.Serialization.XmlInclude(typeof(Model))]
    public class Script : Model
    {
        [Link] Clock clock;
        [Link] ISummary summary;
        /*[Link] IWeather weather;
        [Link] Irrigation irrigation;
        [Link] private SurfaceOrganicMatter surfaceOM;
        [Link] private ISoilWater soil;  // and I think this will give solutes as well
        [Link] private Fertiliser fertiliser;
        [Link] Swim3 swim3;
        [Link(ByName = true)] private Solute no3; */
        [Link(ByName = true)] private Solute cl;
  

		public double ChlorideAdded { get; set; }


        [EventSubscribe("DoDailyInitialisation")] private void DoDailyInitialisation(object sender, EventArgs e)
        {
        	if (clock.Today == clock.StartDate) 
        	{
	        	cl.AddKgHaDelta(SoluteSetterType.Other, new double[] {1, 0, 0, 0, 0, 0, 0, 0, 0, 0, 0, 0, 0, 0});
	        	ChlorideAdded = cl.kgha.Sum();
        	}
        	else
	        	ChlorideAdded = 0.0;
		}
    }
}
```
            Manager SoilChlorideBalance
              script: same as in Sensibility.SoluteMassBalanceTesting.E5_tracer.Base_SoluteLinear.paddock.SoilChlorideBalance
            Manager SWIM3_SetLowerBC
              LowerBCType = gradient
              LowerBCValue = -500
              script: same as in Sensibility.LowerBoundaryConditions.E1.Base_LowerBC.paddock.SWIM3_SetLowerBC
            Manager AutomaticIrrigation
              allowIrrigation = False
              seasonStart = 1-sep
              seasonEnd = 30-mar
              seasonsAllocation = 10000
              triggerDeficit = 80
              targetDeficit = 100
              returndays = 3
              maximumAmount = 30
              depthPAWC = 300
              script: same as in Sensibility.LowerBoundaryConditions.E1.Base_LowerBC.paddock.AutomaticIrrigation
            SurfaceOrganicMatter: InitialResidueName=grass; InitialResidueType=grass; InitialResidueMass=0; InitialStandingFraction=0; InitialCPR=0; InitialCNR=17
            Operations AddFertiliser
              // 2000-01-02  [Fertiliser].Apply(Amount: 500, Type: UreaN);
              // 2000-01-02  [Fertiliser].Apply(Amount: 500, Type: NO3N);
              // 2000-01-02  [Fertiliser].Apply(Amount: 500, Type: Cl);
            Operations AddWater
              2000-01-05  [Irrigation].Apply(amount:100,duration:60);
              2000-01-10  [Irrigation].Apply(amount:100,duration:60);
              2000-01-15  [Irrigation].Apply(amount:100,duration:60);
              2000-01-20  [Irrigation].Apply(amount:100,duration:60);
              2000-01-25  [Irrigation].Apply(amount:100,duration:60);
              2000-01-30  [Irrigation].Apply(amount:100,duration:60);
              2000-02-05  [Irrigation].Apply(amount:100,duration:60);
              2000-02-10  [Irrigation].Apply(amount:100,duration:60);
              2000-02-15  [Irrigation].Apply(amount:100,duration:60);
              2000-02-20  [Irrigation].Apply(amount:100,duration:60);
              2000-02-25  [Irrigation].Apply(amount:100,duration:60);
              2000-03-05  [Irrigation].Apply(amount:100,duration:60);
              2000-03-10  [Irrigation].Apply(amount:100,duration:60);
              2000-03-15  [Irrigation].Apply(amount:100,duration:60);
              2000-03-20  [Irrigation].Apply(amount:100,duration:60);
              2000-03-25  [Irrigation].Apply(amount:100,duration:60);
              2000-03-30  [Irrigation].Apply(amount:100,duration:60);
              2000-04-05  [Irrigation].Apply(amount:100,duration:60);
              2000-04-10  [Irrigation].Apply(amount:100,duration:60);
              2000-04-15  [Irrigation].Apply(amount:100,duration:60);
              2000-04-20  [Irrigation].Apply(amount:100,duration:60);
              2000-04-25  [Irrigation].Apply(amount:100,duration:60);
              2000-04-30  [Irrigation].Apply(amount:100,duration:60);
              2000-05-05  [Irrigation].Apply(amount:100,duration:60);
              2000-05-10  [Irrigation].Apply(amount:100,duration:60);
              2000-05-15  [Irrigation].Apply(amount:100,duration:60);
              2000-05-20  [Irrigation].Apply(amount:100,duration:60);
              2000-05-25  [Irrigation].Apply(amount:100,duration:60);
              2000-05-30  [Irrigation].Apply(amount:100,duration:60);
              2000-06-05  [Irrigation].Apply(amount:100,duration:60);
              2000-06-10  [Irrigation].Apply(amount:100,duration:60);
              2000-06-15  [Irrigation].Apply(amount:100,duration:60);
              2000-06-20  [Irrigation].Apply(amount:100,duration:60);
              2000-06-25  [Irrigation].Apply(amount:100,duration:60);
              2000-06-30  [Irrigation].Apply(amount:100,duration:60);
            Soil: SoilType=Loam; LocalName=Horotiu; Site=Ruakura, south of Railway Ln; NearestTown=Hamilton; Region=Waikato; Country=New Zealand; NaturalVegetation=long term grass; ApsoilNumber=1320; Latitude=-37.779; Longitude=175.304; LocationAccuracy=+/-50 m; YearOfSampling=1984
              DataSource=The database of New Zealand soils was compiled by AgResearch (www.agresearch.co.nz) and based on soil properties gathered, mainly from publications, in the course of conducting several simulation-based research projects but particularly from the Pastoral 21 Environment program which was funded by the New Zealand Ministry for Business, Innovation and Employment,  Dairy NZ, Fonterra and Meat & Wool NZ.
              Comments=Gravel soil. The bulk density of this APSoil reflects weight of fine-earth fraction per volume of bulk soil. Use with gravimetric water contents measured on the fine-earth fraction. Gravel assumed to not hold water as reflected in low SAT, DUL, LL15, LL and AD. The data is a combination of published or supplied measurements, pedotransfer functions, and expert opinion. See Cichota et al. (2013; Soil Research 51: 92-111, http://dx.doi.org/10.1071/SR12338) for a description of the pedotransfer functions. The soil carbon and fresh organic matter settings have been set as those broadly appropriate for permanent productive pastoral systems, see Cichota el al. (2012; Soil Research 50: 694-707, http://dx.doi.org/10.1071/SR12208). Users should take care to adapt these to local conditions before using the data in simulations. FOM values estimated to be 900 kg/ha of FOM in top 600mm of soil and another 100 kg/ha below.
              Memo Notes
                VS - added kF and nF from HydCurves for exco and fip. Also added 5 (units unclear) for D0
              Physical
                Thickness  ParticleSizeClay  ParticleSizeSand  ParticleSizeSilt  Rocks  BD     AirDry  LL15   DUL    SAT    KS
                60         17.61             33.77             48.62             0      0.865  0.081   0.246  0.511  0.588  13367.955
                110        16.36             33.91             49.73             0      0.835  0.068   0.207  0.451  0.605  7114.419
                140        16.42             35.91             47.67             0      0.805  0.067   0.203  0.439  0.616  6216.357
                240        29.03             46.26             24.71             0      0.83   0.085   0.259  0.419  0.625  3256.961
                200        18.44             53.54             28.02             0      0.82   0.091   0.276  0.414  0.628  6716.918
                200        32.64             45.98             21.38             0      0.815  0.094   0.286  0.429  0.633  2348.283
                200        9.49              63.84             26.67             0      0.944  0.075   0.227  0.364  0.552  18003.598
                350        1                 93.21             5.79              0      1.063  0.015   0.045  0.092  0.312  62350.094
                BD source: Field measured and checked for sensibility
                AirDry source: Estimated based on local knowledge
                LL15, DUL source: Laboratory measured
                SAT source: Calculated from measured, estimated or calculated BD
              Nutrient
              Organic: FOMCNRatio=40
                Thickness  Carbon  SoilCNRatio  FBiom  FInert  FOM
                60         0       10.649       0.08   0.597   0
                110        0       10.649       0.072  0.642   0
                140        0       10.649       0.026  0.777   0
                240        0       10.649       0.008  0.896   0
                200        0       10.649       0.008  0.957   0
                200        0       10.649       0.008  0.975   0
                200        0       10.649       0.008  0.992   0
                350        0       10.649       0.008  0.986   0
              Chemical
                Thickness  NO3N  NH4N  PH   CL
                60         0     0     6.5  0
                110        0     0     6.5  0
                140        0     0     6.5  0
                240        0     0     6.5  0
                200        0     0     6.5  0
                200        0     0     6.5  0
                200        0     0     6.5  0
                350        0     0     6.5  0
                PH source: Estimated based on local knowledge
              Sample Initial values: SWUnits=Volumetric; OCUnits=Total; PHUnits=Water
                Thickness  NO3  NH4  SW     CL     PH
                60         0    0    0.511  0      6.5
                110        0    0    0.451  0      6.5
                140        0    0    0.439  0.001  6.5
                240        0    0    0.419  0      6.5
                200        0    0    0.414  0      6.5
                200        0    0    0.429  0.001  6.5
                200        0    0    0.364  0      6.5
                350        0    0    0.092  0      6.5
              Swim3: PrecipitationInterception=0; ersoil=1e-06; ernode=1e-06; slcerr=1e-06; Salb=0.13; CN2Bare=50; CNRed=20; CNCov=0.8; KDul=1; PSIDul=-100; VC=true; DTMin=0; DTMax=30; MaxWaterIncrement=5; SpaceWeightingFactor=0; SoluteSpaceWeightingFactor=1; Dis=0; Disp=1; A=2; DTHC=0.1; DTHP=2; Diagnostics=false; WaterTable=0
                SwimSoluteParameters Urea: WaterTableConcentration=0; D0=0.05
                  Thickness  Exco  FIP
                  60         0     1
                  110        0     1
                  140        0     1
                  240        0     1
                  200        0     1
                  200        0     1
                  200        0     1
                  350        0     1
                SwimSoluteParameters NH4: WaterTableConcentration=0; D0=5
                  Thickness  Exco  FIP
                  60         1     1
                  110        1     1
                  140        1     1
                  240        1     1
                  200        1     1
                  200        1     1
                  200        1     1
                  350        1     1
                SwimSoluteParameters NO3: WaterTableConcentration=0; D0=0.05
                  Thickness  Exco  FIP
                  60         0     1
                  110        0     1
                  140        0     1
                  240        0     1
                  200        0     1
                  200        0     1
                  200        0     1
                  350        0     1
                SwimSoluteParameters Cl: WaterTableConcentration=0; D0=0.05
                  Thickness  Exco  FIP
                  60         0     1
                  110        0     1
                  140        0     1
                  240        0     1
                  200        0     1
                  200        0     1
                  200        0     1
                  350        0     1
                SwimSoluteParameters PlantAvailableNH4: WaterTableConcentration=0; D0=0.05
                  Thickness  Exco   FIP
                  60         16.98  0.71
                  110        24.53  0.62
                  140        29.28  0.58
                  240        51.55  0.43
                  200        37.33  0.51
                  200        56.51  0.4
                  200        34.12  0.48
                  350        14.52  0.47
                SwimSoluteParameters PlantAvailableNO3: WaterTableConcentration=0; D0=0.05
                  Thickness  Exco  FIP
                  60         0     1
                  110        0     1
                  140        0     1
                  240        0     1
                  200        0     1
                  200        0     1
                  200        0     1
                  350        0     1
                SwimSoluteParameters LabileP: WaterTableConcentration=0; D0=0.05
                  Thickness  Exco  FIP
                  60         0     1
                  110        0     1
                  140        0     1
                  240        0     1
                  200        0     1
                  200        0     1
                  200        0     1
                  350        0     1
                SwimSoluteParameters UnavailableP: WaterTableConcentration=0; D0=0.05
                  Thickness  Exco  FIP
                  60         0     1
                  110        0     1
                  140        0     1
                  240        0     1
                  200        0     1
                  200        0     1
                  200        0     1
                  350        0     1
                SwimSoluteParameters NH41: WaterTableConcentration=0; D0=5
                  Thickness  Exco   FIP
                  60         16.98  0.71
                  110        24.53  0.62
                  140        29.28  0.58
                  240        51.55  0.43
                  200        37.33  0.51
                  200        56.51  0.4
                  200        34.12  0.48
                  350        14.52  0.47
                SwimSubsurfaceDrain: DrainDepth=500; DrainSpacing=5000; DrainRadius=150; Klat=1000; ImpermDepth=1000
              Solute Cl
              LayerStructure: Thickness=[10, 20, 30, 40, 50, 50, 50, 50, 100, 100, 50, 50, 50, 50]
              SoilTemperature
            Irrigation
            Fertiliser
            Report: EventNames=[Clock].EndOfDay
              VariableNames:
                [Clock].Today as Date
                sum([Soil].Cl.kgha) as StoredCl
                [SWIM3].LeachCl as LeachedCl
                [SoilChlorideBalance].Script.ChlorideBalance as BalanceCl
            Manager SetSoluteInSoil1
```csharp
using Models.Climate;
using APSIM.Shared.Utilities;
using Models.Soils.Nutrients;
using Models.Soils;
using Models.Surface;
using Models.PMF;
using Models.Core;
using System.Xml.Serialization;
using System;
using Models.AgPasture;
using Models.Interfaces;
using System.Linq;

namespace Models
{
    [Serializable] 
    [System.Xml.Serialization.XmlInclude(typeof(Model))]
    public class Script : Model
    {
        [Link] Clock clock;
        [Link] ISummary summary;
        [Link] IWeather weather;
        [Link] Irrigation irrigation;
        [Link] private SurfaceOrganicMatter surfaceOM;
        [Link] private ISoilWater soil;  // and I think this will give solutes as well
        [Link] private Fertiliser fertiliser;
        [Link(ByName = true)] private Solute cl;
        [Link] Swim3 swim3;
        [Link(ByName = true)] private Solute no3;
  
        // add (no3+nh4) uptake as Cl uptake to IPlant

        public double ClBalanceCumulative  { get; set; }
        public double ClBalanceToday  { get; set; }

        public double SoilClAtInitialisation  { get; set; }
        public double SoilClYesterday  { get; set; }
		public double SoilClNow  { get; set; }

        public double ClAddedToday  { get; set; }
        public double ClRemovedToday  { get; set; }
        public double ClAddedCumulative  { get; set; }
        public double ClRemovedCumulative  { get; set; }



        [EventSubscribe("DoDailyInitialisation")] private void DoDailyInitialisation(object sender, EventArgs e)
        {
        	if (clock.Today == clock.StartDate) 
	        {
	        	cl.AddKgHaDelta(SoluteSetterType.Other, new double[] {100, 0, 0, 0, 0, 0, 0, 0, 0, 0, 0, 0, 0, 0});
	        	no3.AddKgHaDelta(SoluteSetterType.Other, new double[] {1, 0, 0, 0, 0, 0, 0, 0, 0, 0, 0, 0, 0, 0}); 
				SoilClAtInitialisation = cl.kgha.Sum();  
	        	SoilClYesterday = SoilClAtInitialisation;
	        	SoilClNow = SoilClAtInitialisation;
	        }
		}

        [EventSubscribe("DoReportCalculations")] private void DoReportCalculations(object sender, EventArgs e)
        {
        	SoilClYesterday = SoilClNow; // capture yesterday's value before overwriting
        	SoilClNow =  cl.kgha.Sum();  

			// fertiliser only as this is a bar soil simulation
        	ClAddedToday = 0.0; // ???? how to get this
        	ClAddedCumulative+= ClAddedToday;
        	
        	// leached only for chloride
        	ClRemovedToday = swim3.LeachCL;  
        	ClRemovedCumulative += ClRemovedToday;

        	ClBalanceToday = ClAddedToday - ClRemovedToday - (SoilClNow - SoilClYesterday);
        	ClBalanceCumulative = ClAddedCumulative - ClRemovedCumulative - (SoilClNow - SoilClAtInitialisation);
        	// need to add a warning value and a crash value and make a crash
		}
    }
}
```
    Folder InitialConditions
      Memo Memo Initial Conditions
        https://www.apsim.info/documentation/model-documentation/soil-modules-documentation/swimv2-1/

        # Overview

        SWIM3 (Huth et al., 2012) allows three of the four lower boundary conditions described in Verburg et al. (1996) as described below. The zero flux lower boundary condition has not been enabled.

        All references to "SWIM" here refer to the highly detailed documentation by Verburg et al. (1996) of the standalone model that has morphed over the years into SWIM3. Verburg et al. remains the definitive documentation and should be referred to for detail.

        This test ensures that the code to initialise psi from initial values of theta is providing a close enough estimate.
      Experiment E6
        Factors
          Factor SoilType: Specification=[Soil]
            Soil Clay: Latitude=0; Longitude=0
              Physical
                Thickness  ParticleSizeClay  ParticleSizeSand  ParticleSizeSilt  Rocks  BD     AirDry  LL15   DUL    SAT   KS
                10         17.61             33.77             48.62             0      0.865  0.06    0.231  0.565  0.58  1
                20         17.61             33.77             48.62             0      0.865  0.06    0.231  0.565  0.58  1
                30         17.61             33.77             48.62             0      0.865  0.06    0.231  0.565  0.58  1
                40         17.61             33.77             48.62             0      0.865  0.06    0.231  0.565  0.58  1
                50         17.61             33.77             48.62             0      0.865  0.06    0.231  0.565  0.58  1
                50         17.61             33.77             48.62             0      0.865  0.06    0.231  0.565  0.58  1
                50         17.61             33.77             48.62             0      0.865  0.06    0.231  0.565  0.58  1
                50         17.61             33.77             48.62             0      0.865  0.06    0.231  0.565  0.58  1
              Nutrient
              Organic: FOMCNRatio=40
                Thickness  Carbon  SoilCNRatio  FBiom  FInert  FOM
                60         8.2     12.5         0.08   0.58    92.873
                110        5.5     12.5         0.02   0.7     57.963
                140        3.3     12.5         0.015  0.77    31.811
                240        1.7     12.5         0.01   0.9     11.373
                150        1.7     12.5         0.01   0.99    0
              Chemical: same as Sensibility.LowerBoundaryConditions.E1.Base_LowerBC.paddock.Soil.Chemical
              Sample Initial values: SWUnits=Volumetric; OCUnits=Total; PHUnits=Water
                Thickness  NO3    NH4    SW      CL  PH
                10         6.503  0.599  0.58    10  5.7
                20         2.101  0.1    0.5749  10  5.3
                30         2.101  0.1    0.565   10  5.9
                40         1.701  0.1    0.4417  10  6.6
                50         1.701  0.1    0.231   10  6.7
                50         1.701  0.1    0.0638  10  6.7
                50         1.701  0.1    0.231   10  6.7
                50         1.701  0.1    0.231   10  6.7
              Swim3: PrecipitationInterception=0; ersoil=1e-06; ernode=1e-06; slcerr=1e-06; Salb=0.13; CN2Bare=50; CNRed=20; CNCov=0.8; KDul=1; PSIDul=-100; VC=true; DTMin=0; DTMax=60; MaxWaterIncrement=5; SpaceWeightingFactor=0; SoluteSpaceWeightingFactor=1; Dis=0; Disp=1; A=2; DTHC=0.1; DTHP=2; Diagnostics=false; WaterTable=0
                SwimSoluteParameters Urea: WaterTableConcentration=0; D0=0.05
                  Thickness  Exco  FIP
                  60         0     1
                  110        0     1
                  140        0     1
                  240        0     1
                  150        0     1
                SwimSoluteParameters NH4: WaterTableConcentration=0; D0=0.05
                  Thickness  Exco  FIP
                  60         1     1
                  110        1     1
                  140        1     1
                  240        1     1
                  150        1     1
                SwimSoluteParameters NO3: WaterTableConcentration=0; D0=0.05
                  Thickness  Exco  FIP
                  60         0     1
                  110        0     1
                  140        0     1
                  240        0     1
                  150        0     1
                SwimSoluteParameters Cl: WaterTableConcentration=0; D0=0.05
                  Thickness  Exco  FIP
                  60         0     1
                  110        0     1
                  140        0     1
                  240        0     1
                  150        0     1
                SwimSoluteParameters LabileP: WaterTableConcentration=0; D0=0.05
                  Thickness  Exco  FIP
                  60         0     1
                  110        0     1
                  140        0     1
                  240        0     1
                  150        0     1
                SwimSoluteParameters UnavailableP: WaterTableConcentration=0; D0=0.05
                  Thickness  Exco  FIP
                  60         0     1
                  110        0     1
                  140        0     1
                  240        0     1
                  150        0     1
              Solute Cl
              LayerStructure: Thickness=[10, 20, 30, 40, 50, 50, 50, 50]
              SoilTemperature
            Soil Loam: Latitude=0; Longitude=0
              Physical
                Thickness  ParticleSizeClay  ParticleSizeSand  ParticleSizeSilt  Rocks  BD     AirDry  LL15  DUL  SAT   KS
                10         17.61             33.77             48.62             0      0.865  0.02    0.1   0.2  0.35  1
                20         17.61             33.77             48.62             0      0.865  0.02    0.1   0.2  0.35  1
                30         17.61             33.77             48.62             0      0.865  0.02    0.1   0.2  0.35  1
                40         17.61             33.77             48.62             0      0.865  0.02    0.1   0.2  0.35  1
                50         17.61             33.77             48.62             0      0.865  0.02    0.1   0.2  0.35  1
                50         17.61             33.77             48.62             0      0.865  0.02    0.1   0.2  0.35  1
                50         17.61             33.77             48.62             0      0.865  0.02    0.1   0.2  0.35  1
                50         17.61             33.77             48.62             0      0.865  0.02    0.1   0.2  0.35  1
              Nutrient
              Organic: FOMCNRatio=40
                Thickness  Carbon  SoilCNRatio  FBiom  FInert  FOM
                60         8.2     12.5         0.08   0.58    92.873
                110        5.5     12.5         0.02   0.7     57.963
                140        3.3     12.5         0.015  0.77    31.811
                240        1.7     12.5         0.01   0.9     11.373
                150        1.7     12.5         0.01   0.99    0
              Chemical: same as Sensibility.LowerBoundaryConditions.E1.Base_LowerBC.paddock.Soil.Chemical
              Sample Initial values: SWUnits=Volumetric; OCUnits=Total; PHUnits=Water
                Thickness  NO3    NH4    SW      CL  PH
                10         6.503  0.599  0.35    10  5.7
                20         2.101  0.1    0.2504  10  5.3
                30         2.101  0.1    0.2     10  5.9
                40         1.701  0.1    0.1489  10  6.6
                50         1.701  0.1    0.1     10  6.7
                50         1.701  0.1    0.0293  10  6.7
                50         1.701  0.1    0.1     10  6.7
                50         1.701  0.1    0.1     10  6.7
              Swim3: same as Sensibility.InitialConditions.E6.Factors.SoilType.Clay.Swim3
              Solute Cl
              LayerStructure: Thickness=[10, 20, 30, 40, 50, 50, 50, 50]
              SoilTemperature
            Soil Sand: Latitude=0; Longitude=0
              Physical
                Thickness  ParticleSizeClay  ParticleSizeSand  ParticleSizeSilt  Rocks  BD     AirDry  LL15  DUL   SAT  KS
                10         17.61             33.77             48.62             0      0.865  0.005   0.03  0.08  0.3  1
                20         17.61             33.77             48.62             0      0.865  0.005   0.03  0.08  0.3  1
                30         17.61             33.77             48.62             0      0.865  0.005   0.03  0.08  0.3  1
                40         17.61             33.77             48.62             0      0.865  0.005   0.03  0.08  0.3  1
                50         17.61             33.77             48.62             0      0.865  0.005   0.03  0.08  0.3  1
                50         17.61             33.77             48.62             0      0.865  0.005   0.03  0.08  0.3  1
                50         17.61             33.77             48.62             0      0.865  0.005   0.03  0.08  0.3  1
                50         17.61             33.77             48.62             0      0.865  0.005   0.03  0.08  0.3  1
              Nutrient
              Organic: FOMCNRatio=40
                Thickness  Carbon  SoilCNRatio  FBiom  FInert  FOM
                60         8.2     12.5         0.08   0.58    92.873
                110        5.5     12.5         0.02   0.7     57.963
                140        3.3     12.5         0.015  0.77    31.811
                240        1.7     12.5         0.01   0.9     11.373
                150        1.7     12.5         0.01   0.99    0
              Chemical: same as Sensibility.LowerBoundaryConditions.E1.Base_LowerBC.paddock.Soil.Chemical
              Sample Initial values: SWUnits=Volumetric; OCUnits=Total; PHUnits=Water
                Thickness  NO3    NH4    SW      CL  PH
                10         6.503  0.599  0.3     10  5.7
                20         2.101  0.1    0.1474  10  5.3
                30         2.101  0.1    0.08    10  5.9
                40         1.701  0.1    0.0429  10  6.6
                50         1.701  0.1    0.03    10  6.7
                50         1.701  0.1    0.008   10  6.7
                50         1.701  0.1    0.03    10  6.7
                50         1.701  0.1    0.03    10  6.7
              Swim3: same as Sensibility.InitialConditions.E6.Factors.SoilType.Clay.Swim3
              Solute Cl
              LayerStructure: Thickness=[10, 20, 30, 40, 50, 50, 50, 50]
              SoilTemperature
        Simulation Base_InitialConditions
          ControlledEnvironment Weather: AirPressure=1010
            zero: MaxT, MinT, Rain, Radn, PanEvap, VP, Wind, CO2, DiffuseFraction, Latitude, Longitude, DayLength, SunRise, SunSet
          Clock: Start=2000-01-01; End=2000-01-01
          Summary summaryfile
          SoilArbitrator
          MicroClimate: a_interception=0; b_interception=0; c_interception=0; d_interception=0; SoilHeatFluxFraction=0; MinimumHeightDiffForNewLayer=0; NightInterceptionFraction=0; ReferenceHeight=2
          Zone paddock: Area=1; Slope=0; AspectAngle=0; Altitude=50
            Soil: same as Sensibility.LowerBoundaryConditions.E1.Base_LowerBC.paddock.Soil
            SurfaceOrganicMatter: InitialResidueName=grass; InitialResidueType=grass; InitialResidueMass=20; InitialStandingFraction=0; InitialCPR=0; InitialCNR=17
            Report InitilisationReport
              VariableNames:
                [Clock].Today as Date
                [Swim3].psi
                [Swim3].theta
                sum([Soil].Swim3.SWmm) as TotalSW
                [Swim3].Drainage
                [Swim3].Es
                [Swim3].Runoff
              EventNames:
                [Clock].StartOfDay
                [Clock].EndOfDay
            Manager
```csharp
using System;
using Models.Core;
using Models.Interfaces;
using Models.PMF;
using APSIM.Shared.Utilities;
using Models.Soils;

namespace Models
{
    [Serializable]
    public class Script : Model
    {
        [Link] IClock Clock;
        [Link] ISummary Summary;
        [Link] Swim3 swim3;

        [EventSubscribe("StartOfDay")]
        private void OnStartOfDay(object sender, EventArgs e)
        {
            if (!MathUtilities.FloatsAreEqual(swim3.psi[0],0.0,0.1))
            	throw new Exception ("Psi ("+swim3.psi[0].ToString()+") is not equal to expected value of 0 in layer 0");

            if (!MathUtilities.FloatsAreEqual(swim3.psi[1],-25.0,0.2))
            	throw new Exception ("Psi ("+swim3.psi[1].ToString()+") is not equal to expected value of -25 in layer 1");

            if (!MathUtilities.FloatsAreEqual(swim3.psi[2],-100.0,2))
            	throw new Exception ("Psi ("+swim3.psi[2].ToString()+") is not equal to expected value of -100 in layer 2");

            if (!MathUtilities.FloatsAreEqual(swim3.psi[3],-1000.0,10))
            	throw new Exception ("Psi ("+swim3.psi[3].ToString()+") is not equal to expected value of -1000 in layer 3");

            if (!MathUtilities.FloatsAreEqual(swim3.psi[4],-15000.0,15))
            	throw new Exception ("Psi ("+swim3.psi[4].ToString()+") is not equal to expected value of -10000 in layer 4");

            if (!MathUtilities.FloatsAreEqual(swim3.psi[5],-1000000.0,10000))
            	throw new Exception ("Psi ("+swim3.psi[5].ToString()+") is not equal to expected value of -100000 in layer 5");

        }
    }
}
```
  Folder Tutorial
    Simulation CreateNewSolute
      Memo
        SWIM will discover solutes automatically. To create a new solute:

        1. Add a *Solute* to the *soil* node (right click on *soil* and choose *Solute* from the *Soils,Nutrients* folder)
        2. Rename the solute (e.g. to *Br*)
        3. Add a *SwimSoluteParameters* to the swim node (right click on *swim* and choose *SwimSoluteParameters* from the *Soils* folder)
        4. Rename the *SwimSoluteParameters* to the same name as the solute (e.g. to *Br*)
        5. Parameterise as necessary (adding EXCO and FIP)

        To report the value of the solute use:

                [Br].kgha

        The graph at the bottom shows that SWIM is moving the solute in the same was as Cl which is expected given the two solutes are parameterised the same.
      ControlledEnvironment: Rain=10; AirPressure=1010
        zero: MaxT, MinT, Radn, PanEvap, VP, Wind, CO2, DiffuseFraction, Latitude, Longitude, DayLength, SunRise, SunSet
      Clock: Start=2000-01-01; End=2000-06-30
      Summary summaryfile
      SoilArbitrator
      MicroClimate: a_interception=0; b_interception=0; c_interception=0; d_interception=0; SoilHeatFluxFraction=0; MinimumHeightDiffForNewLayer=0; NightInterceptionFraction=0; ReferenceHeight=2
      Zone paddock: Area=1; Slope=0; AspectAngle=0; Altitude=50
        Manager AddSoluteToSoil: same as Sensibility.SoluteMassBalanceTesting.E5_tracer.Base_SoluteLinear.paddock.AddSoluteToSoil
        Manager SWIM3SetLowerBC
          LowerBCType = gradient
          LowerBCValue = -500
```csharp
using Models.Climate;
using APSIM.Shared.Utilities;
using Models.Soils.Nutrients;
using Models.Soils;
using Models.PMF;
using Models.Core;
using System.Xml.Serialization;
using System;
using Models.AgPasture;
using Models.Interfaces;

namespace Models
{
    [Serializable] 
    [System.Xml.Serialization.XmlInclude(typeof(Model))]
    public class Script : Model
    {
        [Link] Clock clock;
        [Link] ISummary summary;
        [Link] private Swim3 swim;
        
        public enum LowerBCTypeOptions {gradient,seepage,potential};

        [Separator("Sets the lower boundary condition type (and value if set to 'potential' for SWIM3. The change is applied at the beginning of the first day of the simulation.")]
        [Description("What lower boundary condition is wanted?")] 
        public LowerBCTypeOptions LowerBCType { get; set; }
        
        [Description("If 'potential', then what potential? Should be negative (mm) ")] 
        public double LowerBCValue { get; set; }

        public double SoilWaterStart  { get; set; }
        public double SoilWaterEnd  { get; set; }

        [EventSubscribe("DoManagement")]
        private void DoDailyCalculations(object sender, EventArgs e)
        {
            if (clock.Today == clock.StartDate)
            {
                summary.WriteMessage(this, "Script is setting lower boundary condition to " + LowerBCType, MessageType.Diagnostic);
                if (LowerBCType == LowerBCTypeOptions.gradient)
                    swim.SetLowerBCForGradient(bbcGradient: 0.0);   // in cm/cm (ibbc=0) Note that this is the default setting
                else if (LowerBCType == LowerBCTypeOptions.potential)
                    swim.SetLowerBCForGivenPotential(bbcPotential: LowerBCValue /10.0 );    //  convert to cm (ibbc=1), DUL is -100 cm so values more positive will often result in inflow to the bottom of the soil profile. Input in mm so divide here.
                else if (LowerBCType == LowerBCTypeOptions.seepage)
                    swim.SetLowerBCForSeepage(bbcPotentialSeepage: 0.0);  // in cm (ibbc=3). This is for zero-tension lysimeters
                else
                	throw new Exception("Wrong lower boundary condition type");
            }
        }
    }
}
```
        Manager SoluteInitialise
          DateCsvString = 1/01/2000
          ValueCsvString = 100,0,0,0,0,0,0,0
          SoluteName = Br
          SetAdd = Set
```csharp
using Models.Climate;
using APSIM.Shared.Utilities;
using Models.Soils.Nutrients;
using Models.Soils;
using Models.Core;
using System;
using System.Collections.Generic;
using Models.AgPasture;
using Models.Interfaces;
using System.Linq;

namespace Models
{
    [Serializable] 
    [System.Xml.Serialization.XmlInclude(typeof(Model))]
    public class Script : Model
    {
        [Link] Clock clock;
        [Link] ISummary summary;
        [Link] private Solute[] solutes;

		private Solute solute;
		private List<DateTime> dates = new List<DateTime>();
		private List<double> values = new List<double>();

		public enum SetAddType { Set, Add }

	    [Description("Name of solute:")]
    	public string SoluteName { get; set; }

	    [Description("Set the value of the solute or add a delta to it?")]
    	public SetAddType SetAdd { get; set; }

	    [Description("Dates (csv) for setting (adding to) the solute:")]
    	public string DateCsvString { get; set; }

	    [Description("Values (csv) kg/ha:")]
    	public string ValueCsvString { get; set; }
  
		
		public double SoluteAdded { get; set; }

		[EventSubscribe("StartOfSimulation")]
        private void OnStartOfSimulation(object sender, EventArgs e)
		{
			solute = Array.Find(solutes, s => s.Name.Equals(SoluteName, StringComparison.InvariantCultureIgnoreCase));
			if (solute == null)
				throw new Exception($"Cannot find solute {SoluteName}");
		
			var dateStrings = DateCsvString.Split(",", StringSplitOptions.RemoveEmptyEntries);
			foreach (var d in dateStrings)
			   dates.Add(DateTime.Parse(d));

			var valueStrings = ValueCsvString.Split(",", StringSplitOptions.RemoveEmptyEntries);
			foreach (var v in valueStrings)
			   values.Add(Convert.ToDouble(v));
    	}
    	
    	
        [EventSubscribe("DoDailyInitialisation")] private void DoDailyInitialisation(object sender, EventArgs e)
        {
	       	SoluteAdded = 0.0;
        	foreach (var d in dates)
        	{
        		if (clock.Today == d) 
	        	{
	        		if (SetAdd == SetAddType.Add)
		        		solute.AddKgHaDelta(SoluteSetterType.Other, values.ToArray());
		        	else
		        		solute.SetKgHa(SoluteSetterType.Other, values.ToArray());
		        	
		        	SoluteAdded = solute.kgha.Sum();
    	    	}
        	}
		}
    }
}
```
        SurfaceOrganicMatter: InitialResidueName=grass; InitialResidueType=grass; InitialResidueMass=0; InitialStandingFraction=0; InitialCPR=0; InitialCNR=17
        Soil: SoilType=Loam; LocalName=Horotiu; Site=Ruakura, south of Railway Ln; NearestTown=Hamilton; Region=Waikato; Country=New Zealand; NaturalVegetation=long term grass; ApsoilNumber=1320; Latitude=-37.779; Longitude=175.304; LocationAccuracy=+/-50 m; YearOfSampling=1984
          DataSource=The database of New Zealand soils was compiled by AgResearch (www.agresearch.co.nz) and based on soil properties gathered, mainly from publications, in the course of conducting several simulation-based research projects but particularly from the Pastoral 21 Environment program which was funded by the New Zealand Ministry for Business, Innovation and Employment,  Dairy NZ, Fonterra and Meat & Wool NZ.
          Comments=Gravel soil. The bulk density of this APSoil reflects weight of fine-earth fraction per volume of bulk soil. Use with gravimetric water contents measured on the fine-earth fraction. Gravel assumed to not hold water as reflected in low SAT, DUL, LL15, LL and AD. The data is a combination of published or supplied measurements, pedotransfer functions, and expert opinion. See Cichota et al. (2013; Soil Research 51: 92-111, http://dx.doi.org/10.1071/SR12338) for a description of the pedotransfer functions. The soil carbon and fresh organic matter settings have been set as those broadly appropriate for permanent productive pastoral systems, see Cichota el al. (2012; Soil Research 50: 694-707, http://dx.doi.org/10.1071/SR12208). Users should take care to adapt these to local conditions before using the data in simulations. FOM values estimated to be 900 kg/ha of FOM in top 600mm of soil and another 100 kg/ha below.
          Physical: same as Sensibility.SoluteMassBalanceTesting.E5_tracer.Base_SoluteLinear.paddock.Soil.Physical
          Nutrient
          Organic: same as Sensibility.SoluteMassBalanceTesting.E5_tracer.Base_SoluteLinear.paddock.Soil.Organic
          Chemical: same as Sensibility.SoluteMassBalanceTesting.E5_tracer.Base_SoluteLinear.paddock.Soil.Chemical
          Sample Initial values: same as Sensibility.SoluteMassBalanceTesting.E5_tracer.Base_SoluteLinear.paddock.Soil.Initial values
          Swim3 Swim: PrecipitationInterception=0; ersoil=1e-06; ernode=1e-06; slcerr=1e-06; Salb=0.13; CN2Bare=50; CNRed=20; CNCov=0.8; KDul=1; PSIDul=-100; VC=true; DTMin=0; DTMax=30; MaxWaterIncrement=5; SpaceWeightingFactor=0; SoluteSpaceWeightingFactor=0; Dis=0; Disp=1; A=2; DTHC=0.1; DTHP=2; Diagnostics=false; WaterTable=0
            SwimSoluteParameters Urea: WaterTableConcentration=0; D0=0.05
              Thickness  Exco  FIP
              60         0     1
              110        0     1
              140        0     1
              240        0     1
              200        0     1
              200        0     1
              200        0     1
              350        0     1
            SwimSoluteParameters NH4: WaterTableConcentration=0; D0=5
              Thickness  Exco  FIP
              60         0     1
              110        0     1
              140        0     1
              240        0     1
              200        0     1
              200        0     1
              200        0     1
              350        0     1
            SwimSoluteParameters NO3: WaterTableConcentration=0; D0=0.05
              Thickness  Exco  FIP
              60         0     1
              110        0     1
              140        0     1
              240        0     1
              200        0     1
              200        0     1
              200        0     1
              350        0     1
            SwimSoluteParameters Cl: WaterTableConcentration=0; D0=0.05
              Thickness  Exco  FIP
              60         0     1
              110        0     1
              140        0     1
              240        0     1
              200        0     1
              200        0     1
              200        0     1
              350        0     1
            SwimSoluteParameters Br: WaterTableConcentration=0; D0=0.05
              Thickness  Exco  FIP
              60         0     1
              110        0     1
              140        0     1
              240        0     1
              200        0     1
              200        0     1
              200        0     1
              350        0     1
            SwimSoluteParameters PlantAvailableNH4: WaterTableConcentration=0; D0=0.05
              Thickness  Exco   FIP
              60         16.98  0.71
              110        24.53  0.62
              140        29.28  0.58
              240        51.55  0.43
              200        37.33  0.51
              200        56.51  0.4
              200        34.12  0.48
              350        14.52  0.47
            SwimSoluteParameters PlantAvailableNO3: WaterTableConcentration=0; D0=0.05
              Thickness  Exco  FIP
              60         0     1
              110        0     1
              140        0     1
              240        0     1
              200        0     1
              200        0     1
              200        0     1
              350        0     1
            SwimSoluteParameters LabileP: WaterTableConcentration=0; D0=0.05
              Thickness  Exco  FIP
              60         0     1
              110        0     1
              140        0     1
              240        0     1
              200        0     1
              200        0     1
              200        0     1
              350        0     1
            SwimSoluteParameters UnavailableP: WaterTableConcentration=0; D0=0.05
              Thickness  Exco  FIP
              60         0     1
              110        0     1
              140        0     1
              240        0     1
              200        0     1
              200        0     1
              200        0     1
              350        0     1
          Solute Cl
          Solute Br
          LayerStructure: Thickness=[10, 20, 30, 40, 50, 50, 50, 50, 100, 100, 50, 50, 50, 50]
          SoilTemperature
        Irrigation
        Fertiliser
        Report: EventNames=[Clock].EndOfDay
          VariableNames:
            [Clock].Today as Date
            sum([Soil].Cl.kgha) as Cl
            sum([Soil].Br.kgha) as Br
    Simulation SolutesInIrrigationWater
      Memo
        Solutes can be added with irrigation water. To do this, specify the amount of solute when using the* Irrigation.Apply* method. For example:

        	2000-01-01 [Irrigation].Apply(amount:100,duration:60, no3:5);

        The units for amount of solute is kg/ha. Currently, only NO3 and NH4 can be added with irrigation.

        This simulation adds 5 irrigations (through the *AddIrrigation* manager script), each with 5 kg/ha of NO3.

        The graph shows the 5 increases in NO3.

        Notes:

        1. SWIM will potentially send excess surface water to runoff, regardless of whether it is rainfall or irrigation water. The irrigation apply method has a boolean argument called 'willRunoff' to indictate whether irrigation water should potentially runoff or not. SWIM ignores this property. The result is that irrigation water may potentially be lost through runoff.

        2. Runoff water in SWIM does not contain solutes.

        3. There is no soil or wind erosion in APSIM.
      ControlledEnvironment: Rain=10; AirPressure=1010
        zero: MaxT, MinT, Radn, PanEvap, VP, Wind, CO2, DiffuseFraction, Latitude, Longitude, DayLength, SunRise, SunSet
      Clock: Start=2000-01-01; End=2000-06-30
      Summary summaryfile
      SoilArbitrator
      MicroClimate: a_interception=0; b_interception=0; c_interception=0; d_interception=0; SoilHeatFluxFraction=0; MinimumHeightDiffForNewLayer=0; NightInterceptionFraction=0; ReferenceHeight=2
      Zone paddock: Area=1; Slope=0; AspectAngle=0; Altitude=50
        Manager SWIM3SetLowerBC: same as Tutorial.CreateNewSolute.paddock.SWIM3SetLowerBC
        Operations AddIrrigation
          2000-01-10  [Irrigation].Apply(amount:100,duration:60, no3:5);
          2000-02-10  [Irrigation].Apply(amount:100,duration:60, no3:5);
          2000-03-10  [Irrigation].Apply(amount:100,duration:60, no3:5);
          2000-04-10  [Irrigation].Apply(amount:100,duration:60, no3:5);
          2000-05-10  [Irrigation].Apply(amount:100,duration:60, no3:5);
        SurfaceOrganicMatter: InitialResidueName=grass; InitialResidueType=grass; InitialResidueMass=0; InitialStandingFraction=0; InitialCPR=0; InitialCNR=17
        Soil: SoilType=Loam; LocalName=Horotiu; Site=Ruakura, south of Railway Ln; NearestTown=Hamilton; Region=Waikato; Country=New Zealand; NaturalVegetation=long term grass; ApsoilNumber=1320; Latitude=-37.779; Longitude=175.304; LocationAccuracy=+/-50 m; YearOfSampling=1984
          DataSource=The database of New Zealand soils was compiled by AgResearch (www.agresearch.co.nz) and based on soil properties gathered, mainly from publications, in the course of conducting several simulation-based research projects but particularly from the Pastoral 21 Environment program which was funded by the New Zealand Ministry for Business, Innovation and Employment,  Dairy NZ, Fonterra and Meat & Wool NZ.
          Comments=Gravel soil. The bulk density of this APSoil reflects weight of fine-earth fraction per volume of bulk soil. Use with gravimetric water contents measured on the fine-earth fraction. Gravel assumed to not hold water as reflected in low SAT, DUL, LL15, LL and AD. The data is a combination of published or supplied measurements, pedotransfer functions, and expert opinion. See Cichota et al. (2013; Soil Research 51: 92-111, http://dx.doi.org/10.1071/SR12338) for a description of the pedotransfer functions. The soil carbon and fresh organic matter settings have been set as those broadly appropriate for permanent productive pastoral systems, see Cichota el al. (2012; Soil Research 50: 694-707, http://dx.doi.org/10.1071/SR12208). Users should take care to adapt these to local conditions before using the data in simulations. FOM values estimated to be 900 kg/ha of FOM in top 600mm of soil and another 100 kg/ha below.
          Physical: same as Sensibility.SoluteMassBalanceTesting.E5_tracer.Base_SoluteLinear.paddock.Soil.Physical
          Nutrient
          Organic: same as Sensibility.SoluteMassBalanceTesting.E5_tracer.Base_SoluteLinear.paddock.Soil.Organic
          Chemical
            Thickness  NO3N  NH4N  PH   CL
            60         1     0     6.5  0
            110        1     0     6.5  0
            140        1     0     6.5  0
            240        1     0     6.5  0
            200        1     0     6.5  0
            200        1     0     6.5  0
            200        1     0     6.5  0
            350        1     0     6.5  0
            PH source: Estimated based on local knowledge
          Sample Initial values: SWUnits=Volumetric; OCUnits=Total; PHUnits=Water
            Thickness  NO3  NH4  SW     CL  PH
            60         1    0    0.511  0   6.5
            110        1    0    0.451  0   6.5
            140        1    0    0.439  0   6.5
            240        1    0    0.419  0   6.5
            200        1    0    0.414  0   6.5
            200        1    0    0.429  0   6.5
            200        1    0    0.364  0   6.5
            350        1    0    0.092  0   6.5
          Swim3 Swim: PrecipitationInterception=0; ersoil=1e-06; ernode=1e-06; slcerr=1e-06; Salb=0.13; CN2Bare=50; CNRed=20; CNCov=0.8; KDul=1; PSIDul=-100; VC=true; DTMin=0; DTMax=30; MaxWaterIncrement=5; SpaceWeightingFactor=0; SoluteSpaceWeightingFactor=0; Dis=0; Disp=1; A=2; DTHC=0.1; DTHP=2; Diagnostics=false; WaterTable=0
            SwimSoluteParameters Urea: WaterTableConcentration=0; D0=0.05
              Thickness  Exco  FIP
              60         0     1
              110        0     1
              140        0     1
              240        0     1
              200        0     1
              200        0     1
              200        0     1
              350        0     1
            SwimSoluteParameters NH4: WaterTableConcentration=0; D0=5
              Thickness  Exco  FIP
              60         0     1
              110        0     1
              140        0     1
              240        0     1
              200        0     1
              200        0     1
              200        0     1
              350        0     1
            SwimSoluteParameters NO3: WaterTableConcentration=0; D0=0.05
              Thickness  Exco  FIP
              60         0     1
              110        0     1
              140        0     1
              240        0     1
              200        0     1
              200        0     1
              200        0     1
              350        0     1
            SwimSoluteParameters LabileP: WaterTableConcentration=0; D0=0.05
              Thickness  Exco  FIP
              60         0     1
              110        0     1
              140        0     1
              240        0     1
              200        0     1
              200        0     1
              200        0     1
              350        0     1
            SwimSoluteParameters UnavailableP: WaterTableConcentration=0; D0=0.05
              Thickness  Exco  FIP
              60         0     1
              110        0     1
              140        0     1
              240        0     1
              200        0     1
              200        0     1
              200        0     1
              350        0     1
          LayerStructure: Thickness=[10, 20, 30, 40, 50, 50, 50, 50, 100, 100, 50, 50, 50, 50]
          SoilTemperature
        Irrigation
        Fertiliser
        Report: EventNames=[Clock].EndOfDay
          VariableNames:
            [Clock].Today as Date
            sum([NO3].kgha) as NO3
    Simulation TileDrainage
      Memo
        ## Depth to the impermeable layer

        When the vertical distance between the subsurface drains and the impermeable layer decreases, the drains become more effective. The reader is referred to the scientific/engineering literature on drainage to understand the details but in casual terms, when that distance is small the flow lines are compressed and the drains are more effective.

        To create a tile drain, add a SwimSubsurfaceDrain to the Swim model under soil.

        The simulation below shows a simulation with a drain configured with a depth to impermeable layer of 1000mm
      Weather: FileName=..\..\Examples\WeatherFiles\lincoln.met
      Clock: Start=2000-01-01; End=2000-01-31
      Summary summaryfile
      SoilArbitrator
      MicroClimate: a_interception=0; b_interception=0; c_interception=0; d_interception=0; SoilHeatFluxFraction=0; MinimumHeightDiffForNewLayer=0; NightInterceptionFraction=0; ReferenceHeight=2
      Zone paddock: Area=1; Slope=0; AspectAngle=0; Altitude=50
        Manager SWIMSetLowerBC
          LowerBCType = gradient
          LowerBCValue = -500
```csharp
using Models.Climate;
using APSIM.Shared.Utilities;
using Models.Soils.Nutrients;
using Models.Soils;
using Models.PMF;
using Models.Core;
using System.Xml.Serialization;
using System;
using Models.AgPasture;
using Models.Interfaces;

namespace Models
{
    [Serializable] 
    [System.Xml.Serialization.XmlInclude(typeof(Model))]
    public class Script : Model
    {
        [Link] Clock clock;
        [Link] ISummary summary;
        [Link] private Swim3 swim;
        
        public enum LowerBCTypeOptions {gradient,seepage,potential};

        [Separator("Sets the lower boundary condition type (and value if set to 'potential' for SWIM3. The change is applied at the beginning of the first day of the simulation.")]
        [Description("What lower boundary condition is wanted?")] 
        public LowerBCTypeOptions LowerBCType { get; set; }
        
        [Description("If 'potential', then what potential? Should be negative (mm) ")]
        [Display(EnabledCallback = "IsPotential")] 
        public double LowerBCValue { get; set; }
        
        /// <summary></summary>
        public bool IsPotential => LowerBCType == LowerBCTypeOptions.potential;
        

        public double SoilWaterStart  { get; set; }
        public double SoilWaterEnd  { get; set; }

        [EventSubscribe("DoManagement")]
        private void DoDailyCalculations(object sender, EventArgs e)
        {
            if (clock.Today == clock.StartDate)
            {
                summary.WriteMessage(this, "Script is setting lower boundary condition to " + LowerBCType, MessageType.Diagnostic);
                if (LowerBCType == LowerBCTypeOptions.gradient)
                    swim.SetLowerBCForGradient(bbcGradient: 0.0);   // in cm/cm (ibbc=0) Note that this is the default setting
                else if (LowerBCType == LowerBCTypeOptions.potential)
                    swim.SetLowerBCForGivenPotential(bbcPotential: LowerBCValue /10.0 );    //  convert to cm (ibbc=1), DUL is -100 cm so values more positive will often result in inflow to the bottom of the soil profile. Input in mm so divide here.
                else if (LowerBCType == LowerBCTypeOptions.seepage)
                    swim.SetLowerBCForSeepage(bbcPotentialSeepage: 0.0);  // in cm (ibbc=3). This is for zero-tension lysimeters
                else
                	throw new Exception("Wrong lower boundary condition type");
            }
        }
    }
}
```
        Manager AutomaticIrrigation: same as Sensibility.LowerBoundaryConditions.E1.Base_LowerBC.paddock.AutomaticIrrigation
        Operations AddIrrigation
          2000-01-10  [Irrigation].Apply(amount:100,duration:60);
          2000-01-15  [Irrigation].Apply(amount:100,duration:60);
        SurfaceOrganicMatter: InitialResidueName=grass; InitialResidueType=grass; InitialResidueMass=0; InitialStandingFraction=0; InitialCPR=0; InitialCNR=17
        Soil: SoilType=Loam; LocalName=Horotiu; Site=Ruakura, south of Railway Ln; NearestTown=Hamilton; Region=Waikato; Country=New Zealand; NaturalVegetation=long term grass; ApsoilNumber=1320; Latitude=-37.779; Longitude=175.304; LocationAccuracy=+/-50 m; YearOfSampling=1984
          DataSource=The database of New Zealand soils was compiled by AgResearch (www.agresearch.co.nz) and based on soil properties gathered, mainly from publications, in the course of conducting several simulation-based research projects but particularly from the Pastoral 21 Environment program which was funded by the New Zealand Ministry for Business, Innovation and Employment,  Dairy NZ, Fonterra and Meat & Wool NZ.
          Comments=Gravel soil. The bulk density of this APSoil reflects weight of fine-earth fraction per volume of bulk soil. Use with gravimetric water contents measured on the fine-earth fraction. Gravel assumed to not hold water as reflected in low SAT, DUL, LL15, LL and AD. The data is a combination of published or supplied measurements, pedotransfer functions, and expert opinion. See Cichota et al. (2013; Soil Research 51: 92-111, http://dx.doi.org/10.1071/SR12338) for a description of the pedotransfer functions. The soil carbon and fresh organic matter settings have been set as those broadly appropriate for permanent productive pastoral systems, see Cichota el al. (2012; Soil Research 50: 694-707, http://dx.doi.org/10.1071/SR12208). Users should take care to adapt these to local conditions before using the data in simulations. FOM values estimated to be 900 kg/ha of FOM in top 600mm of soil and another 100 kg/ha below.
          Physical: same as Sensibility.TileDrainage.E4_1.TileDrainage1.paddock.Soil.Physical
          Nutrient
          Organic: same as Sensibility.TileDrainage.E4_1.TileDrainage1.paddock.Soil.Organic
          Chemical: same as Sensibility.TileDrainage.E4_1.TileDrainage1.paddock.Soil.Chemical
          Sample Initial values: same as Sensibility.TileDrainage.E4_1.TileDrainage1.paddock.Soil.Initial values
          Swim3 Swim: same as Sensibility.TileDrainage.E4_2.TileDrainage2.paddock.Soil.Swim3
          Solute Cl
          LayerStructure: Thickness=[10, 20, 30, 40, 50, 50, 50, 50, 100, 100, 50, 50, 50, 50]
          SoilTemperature
        Irrigation
        Fertiliser
        Report: EventNames=[Clock].EndOfDay
          VariableNames:
            [Clock].Today as Date
            sum([Soil].Nutrient.TotalN) as TotalN
            [Soil].Swim.SubsurfaceDrain as SubsurfaceDrain
            [Soil].Swim.Drainage as Drainage
            sum([Soil].Swim.SWmm) as WaterStorage
            [Soil].Swim.WaterTable as WaterTableDepth
            [Soil].Swim.psi as Psi
            [Irrigation].IrrigationApplied as Irrigation
            [NO3].kgha
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