Simulations: Version=32
  Memo TitlePage
    # The APSIM Soybean Model

    The APSIM Soybean model has been developed using the Plant Modelling Framework (PMF) of [brown_plant_2014]. This new framework provides a library of plant organ and process submodels that can be coupled, at runtime, to construct a model in much the same way that models can be coupled to construct a simulation. This means that dynamic composition of lower level process and organ classes (e.g. photosynthesis, leaf) into larger constructions (e.g. maize, wheat, sorghum) can be achieved by the model developer without additional coding.

    The model consists of:

    * a phenology model to simulate development between growth phases
    * a structure model to simulate plant morphology
    * a collection of organs to simulate the various plant parts
    * an arbitrator to allocate resources (N, biomass) to the various plant organs
  Memo Introduction
    The APSIM Soybean model has been tested on a range of datasets from around the world to provide tests across a range of environmental conditions.  Tests include ranges in plant population, time of sowing and irrigation levels.
  Replacements
    Plant Soybean: CropType=Soybean
      OrganArbitrator Arbitrator
        RelativeAllocation NArbitrator
        RelativeAllocation DMArbitrator
      Phenology: FractionBiomassRemoved=0; DaysAfterSowing=0
        AirTemperatureFunction ThermalTimeOriginal
          XYPairs: X=[10, 30, 40]; Y=[0, 20, 0]
        AirTemperatureFunction ThermalTime
          XYPairs: X=[10, 20, 30, 40]; Y=[0, 10, 20, 0]
        PhotoperiodFunction Photoperiod: Twilight=0; DayLength=0
        GerminatingPhase Germinating: Start=Sowing; End=Germination
        EmergingPhase Emerging: Start=Germination; End=Emergence; ShootLag=10; ShootRate=1
          VariableReference ThermalTime: VariableName=[Phenology].ThermalTime.Value()
        GenericPhase Vegetative: Start=Emergence; End=StartFlowering
          Constant Target: FixedValue=200
          MultiplyFunction ThermalTime
            VariableReference ThermalTime: VariableName=[Phenology].ThermalTime.Value()
            LinearInterpolationFunction PhotoperiodModifier: XProperty=[Phenology].Photoperiod.Value()
              XYPairs: X=[14.43, 21.19]; Y=[1, 0]
        GenericPhase EarlyFlowering: Start=StartFlowering; End=StartPodDevelopment
          Memo
            The duration of the grain filling phase has been taken from the model of Robertson et al (2002).
          Constant Target: FixedValue=200
          VariableReference ThermalTime: VariableName=[Phenology].ThermalTime.Value()
          VariableReference Stress: VariableName=[Phenology].Vegetative.PhotoperiodEffect.Value()
        GenericPhase EarlyPodDevelopment: Start=StartPodDevelopment; End=StartGrainFilling
          Memo
            The duration of the grain filling phase has been taken from the model of Robertson et al (2002).
          Constant Target: FixedValue=140
          VariableReference ThermalTime: VariableName=[Phenology].ThermalTime.Value()
          VariableReference Stress: VariableName=[Phenology].Vegetative.PhotoperiodEffect.Value()
        GenericPhase EarlyGrainFilling: Start=StartGrainFilling; End=EndCanopyDevelopment
          VariableReference ThermalTime: VariableName=[Phenology].ThermalTime.Value()
          VariableReference Stress: VariableName=[Phenology].Vegetative.PhotoperiodEffect.Value()
          MultiplyFunction Target
            Constant FractionofGrainfilling: FixedValue=0.05
            VariableReference EntireGrainfilling
              VariableName=[Phenology].LateGrainFilling.Target.EntireGrainfillPeriod.FixedValue
        GenericPhase MidGrainFilling: Start=EndCanopyDevelopment; End=EndPodDevelopment
          VariableReference ThermalTime: VariableName=[Phenology].ThermalTime.Value()
          VariableReference Stress: VariableName=[Phenology].Vegetative.PhotoperiodEffect.Value()
          AirTemperatureFunction ThermalTimeNew
            XYPairs: X=[5, 20, 30, 40]; Y=[0, 10, 20, 0]
          MultiplyFunction Target
            Constant FractionofMidToLateGrainfilling: FixedValue=0.5
            SubtractFunction
              VariableReference EntireGrainfilling
                VariableName=[Phenology].LateGrainFilling.Target.EntireGrainfillPeriod.FixedValue
              VariableReference EarlyGrainfilling: VariableName=[Phenology].EarlyGrainFilling.Target.Value()
        GenericPhase LateGrainFilling: Start=EndPodDevelopment; End=EndGrainFill
          SubtractFunction Target
            Constant EntireGrainfillPeriod: FixedValue=500
            VariableReference EarlyGrainFillingTarget: VariableName=[Phenology].EarlyGrainFilling.Target.Value()
            VariableReference MidGrainFillingTarget: VariableName=[Phenology].MidGrainFilling.Target.Value()
          VariableReference ThermalTime: VariableName=[Phenology].ThermalTime.Value()
          VariableReference Stress: VariableName=[Phenology].Vegetative.PhotoperiodEffect.Value()
          AirTemperatureFunction ThermalTimeNew
            XYPairs: X=[5, 20, 30, 40]; Y=[0, 10, 20, 0]
        GenericPhase Maturing: Start=EndGrainFill; End=Maturity
          Constant Target: FixedValue=5
          VariableReference ThermalTime: VariableName=[Phenology].ThermalTime.Value()
        GenericPhase Ripening: Start=Maturity; End=HarvestRipe
          Constant Target: FixedValue=1
          VariableReference ThermalTime: VariableName=[Phenology].ThermalTime.Value()
        EndPhase ReadyForHarvesting: Start=HarvestRipe; End=Unused
          VariableReference ThermalTime: VariableName=[Phenology].ThermalTime.Value()
        OnEventFunction NFF: SetEvent=StartFlowering; ReSetEvent=never
          Constant PreEventValue: FixedValue=0
          VariableReference PostEventValue: VariableName=[Phenology].Vegetative.CompletionNodeNumber.Value()
        OnEventFunction FN: SetEvent=StartGrainFilling; ReSetEvent=never
          Constant PreEventValue: FixedValue=0
          SubtractFunction PostEventValue
            VariableReference PostEventValue: VariableName=[Structure].LeafTipsAppeared
            VariableReference PostEventValue1: VariableName=[Phenology].NFF.Value()
        OnEventFunction EmergenceDAS: SetEvent=Emergence; ReSetEvent=never
          Memo
            A function is used to provide maturity date as days after sowing(DAS).
          Constant PreEventValue: FixedValue=0
          VariableReference PostEventValue: VariableName=[Phenology].DaysAfterSowing
        OnEventFunction FloweringDAS: SetEvent=StartFlowering; ReSetEvent=never
          Memo
            A function is used to provide flowering date as days after sowing(DAS).
          Constant PreEventValue: FixedValue=0
          VariableReference PostEventValue: VariableName=[Phenology].DaysAfterSowing
        OnEventFunction MaturityDAS: SetEvent=Maturity; ReSetEvent=never
          Memo
            A function is used to provide maturity date as days after sowing(DAS).
          Constant PreEventValue: FixedValue=0
          VariableReference PostEventValue: VariableName=[Phenology].DaysAfterSowing
      Structure: Initialised=false; Germinated=false; Emerged=false; CohortToInitialise=0; TipToAppear=0; ApexNum=0
        VariableReference ThermalTime: VariableName=[Phenology].ThermalTime.Value()
        Constant DroughtInducedBranchMortality: FixedValue=0
        Constant FinalLeafNumber: FixedValue=40
        LinearInterpolationFunction HeightModel: XProperty=[Stem].Live.Wt
          XYPairs: X=[0, 300]; Y=[10, 750]
        MultiplyFunction BranchingRate
          LinearInterpolationFunction Potential_Branching_Rate: XProperty=[Structure].LeafTipsAppeared
            XYPairs: X=[0, 6, 7, 8, 9]; Y=[0, 0, 1, 0, 0]
          LinearInterpolationFunction Cover_response: XProperty=[leaf].CoverGreen
            XYPairs: X=[0, 0.17, 0.25]; Y=[1, 1, 0]
          LinearInterpolationFunction CHO_response: XProperty=[Stem].Live.StorageWt
            XYPairs: X=[0, 1, 10]; Y=[1, 1, 1]
        Constant BranchMortality: FixedValue=0
        PhaseLookup Phyllochron
          PhaseLookupValue Vegetative: Start=Emergence; End=StartPodDevelopment
            Constant Function: FixedValue=45
          PhaseLookupValue Podding: Start=StartPodDevelopment; End=EndCanopyDevelopment
            Constant Function: FixedValue=45
        Constant StemSenescenceAge: FixedValue=0
      ReproductiveOrgan Grain: GrowthRespiration=0; MaintenanceRespiration=0
        Constant PotentialHarvestIndex: FixedValue=0.5
        AddFunction FillingDuration
          VariableReference EarlyGrainFillingDuration: VariableName=[Phenology].EarlyGrainFilling.Target.Value()
          VariableReference MidGrainFillingDuration: VariableName=[Phenology].MidGrainFilling.Target.Value()
          VariableReference LateGrainFillingDuration: VariableName=[Phenology].LateGrainFilling.Target.Value()
        Constant MaximumPotentialGrainSize: FixedValue=0.19
        PhaseLookup DMDemandFunction
          PhaseLookupValue GrainFilling: Start=StartGrainFilling; End=EndGrainFill
            MultiplyFunction HIGrainDemand
              VariableReference AboveGroundWt: VariableName=[AboveGround].Wt
              DivideFunction HarvestIndexIncrease
                VariableReference PotentialHarvestIndex: VariableName=[Grain].PotentialHarvestIndex.Value()
                VariableReference FillingDuration: VariableName=[Grain].FillingDuration.Value()
              VariableReference ThermalTime: VariableName=[Phenology].ThermalTime.Value()
            FillingRateFunction
              VariableReference NumberFunction: VariableName=[Grain].NumberFunction.Value()
              VariableReference ThermalTime: VariableName=[Phenology].ThermalTime.Value()
              VariableReference PotentialSizeIncrement: VariableName=[Grain].MaximumPotentialGrainSize.Value()
              VariableReference FillingDuration: VariableName=[Grain].FillingDuration.Value()
        Constant MinimumNConc: FixedValue=0.05
        Constant MaximumNConc: FixedValue=0.058
        Constant WaterContent: FixedValue=0.12
        MultiplyFunction NFillingRate
          VariableReference NConc: VariableName=[Grain].MaximumNConc.Value()
          VariableReference DMDemand: VariableName=[Grain].DMDemandFunction.Value()
          VariableReference DMConversionEfficiency: VariableName=[Grain].DMConversionEfficiency.Value()
        PhaseLookup NFillingRateOLD
          PhaseLookupValue GrainFilling: Start=StartGrainFilling; End=EndGrainFill
            FillingRateFunction
              VariableReference NumberFunction: VariableName=[Grain].NumberFunction.Value()
              VariableReference ThermalTime: VariableName=[Phenology].ThermalTime.Value()
              MultiplyFunction PotentialSizeIncrement
                Constant MaximumFinalNConc: FixedValue=0.04
                VariableReference MaximumSize: VariableName=[Grain].MaximumPotentialGrainSize.Value()
              AddFunction FillingDuration
                VariableReference LatePodDevelopmentDuration: VariableName=[Phenology].LatePodDevelopment.Target.Value()
                VariableReference LateGrainFillingDuration1: VariableName=[Phenology].LateGrainFilling.Target.Value()
        MultiplyFunction NumberFunction
          Constant PeasPerPod: FixedValue=1
          VariableReference PodNumber: VariableName=[Shell].PodNumber.Value()
        BiomassRemoval BiomassRemovalDefaults
          OrganBiomassRemovalType Harvest: FractionLiveToRemove=1; FractionDeadToRemove=0; FractionLiveToResidue=0; FractionDeadToResidue=0
          OrganBiomassRemovalType Cut: FractionLiveToRemove=1; FractionDeadToRemove=0; FractionLiveToResidue=0; FractionDeadToResidue=0
          OrganBiomassRemovalType Prune: FractionLiveToRemove=0; FractionDeadToRemove=0; FractionLiveToResidue=0.8; FractionDeadToResidue=0
          OrganBiomassRemovalType Graze: FractionLiveToRemove=0.6; FractionDeadToRemove=0; FractionLiveToResidue=0.2; FractionDeadToResidue=0
        Constant DMConversionEfficiency: FixedValue=0.694
        Constant RemobilisationCost: FixedValue=0
        Constant CarbonConcentration: FixedValue=0.4
        DivideFunction HarvestIndex
          VariableReference GrainWt: VariableName=[Grain].Wt
          VariableReference AboveGroundWt: VariableName=[AboveGround].Wt
        Live Biomass: DMDOfStructural=0.6
        Dead Biomass: DMDOfStructural=0.6
      Root: GrowthRespiration=0; MaintenanceRespiration=0
        LinearInterpolationFunction KLModifier: XProperty=[Leaf].LAI
          XYPairs: X=[0, 3]; Y=[1, 1]
        AirTemperatureFunction TemperatureEffect
          XYPairs: X=[0, 26, 35]; Y=[1, 1, 1]
        Constant MaxDailyNUptake: FixedValue=6
        Constant SenescenceRate: FixedValue=0.005
        Constant MaximumRootDepth: FixedValue=1000000
        PhaseLookup RootFrontVelocity
          PhaseLookupValue PreEmergence: Start=Germination; End=Emergence
            Constant Function: FixedValue=5
          PhaseLookupValue early: Start=Emergence; End=StartGrainFilling
            Constant Function: FixedValue=30
          PhaseLookupValue late: Start=StartGrainFilling; End=Maturity
            Constant Function: FixedValue=5
        Constant MaximumNConc: FixedValue=0.01
        Constant MinimumNConc: FixedValue=0.005
        PhaseBasedSwitch NitrogenDemandSwitch: Start=Emergence; End=EndGrainFill
        LinearInterpolationFunction KNO3: XProperty=[Root].LengthDensity
          XYPairs: X=[0, 0.003]; Y=[0.02, 0.02]
        LinearInterpolationFunction KNH4: XProperty=[Root].LengthDensity
          XYPairs: X=[0, 0.003]; Y=[0, 0]
        BiomassRemoval BiomassRemovalDefaults
          OrganBiomassRemovalType Harvest: FractionLiveToRemove=0; FractionDeadToRemove=0; FractionLiveToResidue=0.2; FractionDeadToResidue=0
          OrganBiomassRemovalType Cut: FractionLiveToRemove=0; FractionDeadToRemove=0; FractionLiveToResidue=0.3; FractionDeadToResidue=0
          OrganBiomassRemovalType Prune: FractionLiveToRemove=0; FractionDeadToRemove=0; FractionLiveToResidue=0.1; FractionDeadToResidue=0
          OrganBiomassRemovalType Graze: FractionLiveToRemove=0; FractionDeadToRemove=0; FractionLiveToResidue=0.15; FractionDeadToResidue=0
        LinearInterpolationFunction NUptakeSWFactor: XProperty=[Root].RWC
          XYPairs: X=[0, 1]; Y=[0, 1]
        Constant InitialDM: FixedValue=0.2; Units=g/plant
        Constant SpecificRootLength: FixedValue=40; Units=m/g
        PartitionFractionDemandFunction DMDemandFunction
          PhaseLookup PartitionFraction
            PhaseLookupValue Early: Start=Emergence; End=StartFlowering
              Constant Function: FixedValue=0.2
            PhaseLookupValue Middle: Start=StartFlowering; End=StartGrainFilling
              Constant Function: FixedValue=0.1
            PhaseLookupValue Late: Start=StartGrainFilling; End=Maturity
              Constant Function: FixedValue=0
        Constant DMConversionEfficiency: FixedValue=1
        Constant MaintenanceRespirationFunction: FixedValue=1
        Constant RemobilisationCost: FixedValue=0
        Constant CarbonConcentration: FixedValue=0.4
      Nodule
        Constant FixationMetabolicCost: FixedValue=0
        PartitionFractionDemandFunction DMDemandFunction
          PhaseLookup PartitionFraction
            PhaseLookupValue Early: Start=Emergence; End=StartFlowering
              Constant Function: FixedValue=0.03
            PhaseLookupValue Middle: Start=StartFlowering; End=StartGrainFilling
              Constant Function: FixedValue=0.02
            PhaseLookupValue Late: Start=StartGrainFilling; End=Maturity
              Constant Function: FixedValue=0
        Constant MaximumNConc: FixedValue=0.02
        Constant MinimumNConc: FixedValue=0.01
        Constant SenescenceRate: FixedValue=0
        Constant NReallocationFactor: FixedValue=0
        PhaseBasedSwitch NitrogenDemandSwitch: Start=Emergence; End=EndGrainFill
        BiomassRemoval BiomassRemovalDefaults
          OrganBiomassRemovalType Harvest: FractionLiveToRemove=0.5; FractionDeadToRemove=0; FractionLiveToResidue=0.1; FractionDeadToResidue=0
          OrganBiomassRemovalType Cut: FractionLiveToRemove=0.8; FractionDeadToRemove=0; FractionLiveToResidue=0; FractionDeadToResidue=0
          OrganBiomassRemovalType Prune: FractionLiveToRemove=0; FractionDeadToRemove=0; FractionLiveToResidue=0.6; FractionDeadToResidue=0
          OrganBiomassRemovalType Graze: FractionLiveToRemove=0.6; FractionDeadToRemove=0; FractionLiveToResidue=0.2; FractionDeadToResidue=0
        Constant StructuralFraction: FixedValue=1; Units=g/g
        Constant InitialWtFunction: FixedValue=0; Units=g/m^2
        Constant DetachmentRateFunction: FixedValue=0; Units=/d
        MultiplyFunction FixationRateOLD
          VariableReference NoduleWt: VariableName=[Nodule].Live.Wt
          Constant SpecificNitrogenaseActivity: FixedValue=0.1
          MinimumFunction StressFactor
            AirTemperatureFunction FT
              XYPairs: X=[0, 20, 30, 40]; Y=[0, 1, 1, 0]
            LinearInterpolationFunction FW: XProperty=[Leaf].Fw
              XYPairs: X=[0, 1, 1.5]; Y=[0, 1, 1]
        Constant MaintenanceRespirationFunction: FixedValue=0; Units=0-1
        Constant DMConversionEfficiency: FixedValue=1; Units=0-1
        Constant NRetranslocationFactor: FixedValue=0
        Constant DMReallocationFactor: FixedValue=0
        Constant DMRetranslocationFactor: FixedValue=0
        VariableReference CriticalNConc: VariableName=[Nodule].MinimumNConc.Value()
        Constant RemobilisationCost: FixedValue=0
        Constant CarbonConcentration: FixedValue=0.4
        HoldFunction FixationRate: WhenToHold=StartGrainFilling
          MinimumFunction DailyPotentialFixationRate
            MultiplyFunction PotentialFixationRate
              VariableReference Biomass: VariableName=[AboveGround].Wt
              PhaseLookup SpecificFixationRate
                PhaseLookupValue VegetativeGrowth: Start=Emergence; End=StartFlowering
                  Constant Rate: FixedValue=0.006
                PhaseLookupValue ReproductiveGrowth: Start=StartFlowering; End=EndGrainFill
                  Constant Rate: FixedValue=0.002
            Constant MaximumFixationRate: FixedValue=0.6
      GenericOrgan Shell
        AccumulateFunction PodNumber: StartStageName=StartPodDevelopment; EndStageName=EndCanopyDevelopment; FractionRemovedOnCut=0; FractionRemovedOnHarvest=0; FractionRemovedOnGraze=0; FractionRemovedOnPrune=0
          MultiplyFunction DailyPodAppearanceRate
            DivideFunction PodAppearanceRate
              Constant PodsPerNode: FixedValue=8
              VariableReference NodeAppearanceRate: VariableName=[Structure].Phyllochron.Value()
            VariableReference ThermalTime: VariableName=[Phenology].ThermalTime.Value()
            VariableReference PlantPopulation: VariableName=[Soybean].SowingData.Population
        Constant NReallocationFactor: FixedValue=0
        Constant NRetranslocationFactor: FixedValue=0.1
        Constant StructuralFraction: FixedValue=0.7
        Constant MaximumNConc: FixedValue=0.009
        Constant MinimumNConc: FixedValue=0.01
        Constant DMRetranslocationFactor: FixedValue=0.1
        PhaseBasedSwitch NitrogenDemandSwitch: Start=Germination; End=Maturity
        BiomassRemoval BiomassRemovalDefaults: same as Replacements.Soybean.Nodule.BiomassRemovalDefaults
        Constant InitialWtFunction: FixedValue=0; Units=g/m^2
        Constant SenescenceRate: FixedValue=0; Units=/d
        Constant DetachmentRateFunction: FixedValue=0; Units=/d
        Constant MaintenanceRespirationFunction: FixedValue=0; Units=0-1
        Constant DMConversionEfficiency: FixedValue=1; Units=0-1
        Constant DMReallocationFactor: FixedValue=0
        VariableReference CriticalNConc: VariableName=[Shell].MinimumNConc.Value()
        Constant RemobilisationCost: FixedValue=0
        Constant CarbonConcentration: FixedValue=0.4
        MultiplyFunction PodNumberOld
          Constant PodsPerNode: FixedValue=1
          VariableReference StemPopulation: VariableName=[Structure].TotalStemPopn
          PhaseLookupValue FloweringNodes: Start=StartFlowering; End=HarvestRipe
            SubtractFunction FloweringNodes
              VariableReference TotalNodes: VariableName=[Structure].LeafTipsAppeared
              VariableReference VegetativeNodes: VariableName=[Phenology].NFF.Value()
        HoldFunction PodNumberByStem: WhenToHold=StartGrainFilling
          MultiplyFunction Value
            Constant PodsPerGStem: FixedValue=5
            VariableReference StemMass: VariableName=[Stem].Live.Wt
        PhaseLookup DMDemandFunction
          PhaseLookupValue PodDevelopment: Start=StartPodDevelopment; End=EndPodDevelopment
            MultiplyFunction HIPodDemand
              VariableReference AboveGroundWt: VariableName=[AboveGround].Wt
              DivideFunction HarvestIndexIncrease
                VariableReference PotentialHarvestIndex: VariableName=[Shell].PotentialHarvestIndex.Value()
                VariableReference FillingDuration: VariableName=[Shell].FillingDuration.Value()
              VariableReference ThermalTime: VariableName=[Phenology].ThermalTime.Value()
            FillingRateFunction: same as Replacements.Soybean.Grain.DMDemandFunction.GrainFilling.FillingRateFunction
        PopulationBasedDemandFunction DMDemandFunctionOLD
          VariableReference ThermalTime: VariableName=[Phenology].ThermalTime.Value()
          VariableReference OrganPopulation: VariableName=[Shell].PodNumber.Value()
          Constant ExpansionStress: FixedValue=1
          AddFunction GrowthDuration
            VariableReference EarlyPodDevelopmentDuration: VariableName=[Phenology].EarlyPodDevelopment.Target.Value()
            VariableReference EarlyGrainFillingDuration: VariableName=[Phenology].EarlyGrainFilling.Target.Value()
            VariableReference MidGrainFillingDuration: VariableName=[Phenology].MidGrainFilling.Target.Value()
          Constant StartStage: FixedValue=5
          Constant MaximumOrganWt: FixedValue=0.08
        Constant PotentialHarvestIndex: FixedValue=0.1
        AddFunction FillingDuration: same as Replacements.Soybean.Shell.DMDemandFunctionOLD.GrowthDuration
      Leaf: MaxCover=1; Albedo=0.25; Gsmax=0.011; R50=150; MicroClimatePresent=true; KDead=0.3; MaximumMainStemLeafNumber=40
        zero: GrowthRespiration, MaintenanceRespiration, CurrentExpandingLeaf, StartFractionExpanded, FractionNextleafExpanded, DeadNodesYesterday, FRGR, PotentialEP, TipsAtEmergence, CohortsAtInitialisation, FractionDied
        ArrayBiomass CohortArrayLive: Propertys=[[Leaf].Live]; ArraySize=[Leaf].MaxNodeNo
        ArrayBiomass CohortArrayDead: Propertys=[[Leaf].Dead]; ArraySize=[Leaf].MaxNodeNo
        LeafCohort InitialLeaf1: Rank=1; Area=100
          zero: NReallocationFactor, DMReallocationFactor, NRetranslocationFactor, DMRetranslocationFactor, ShadeInducedSenRate, SenescedFrac, DeltaPotentialArea, DeltaStressConstrainedArea, DeltaCarbonConstrainedArea, PotentialStructuralDMAllocation, PotentialMetabolicDMAllocation, MetabolicNReallocated, MetabolicWtReallocated, StorageNReallocated, StorageWtReallocated, MetabolicNRetranslocated, StorageNRetrasnlocated, DMRetranslocated, MetabolicNAllocation, StructuralDMAllocation, MetabolicDMAllocation, MaintenanceRespiration
        LeafCohort InitialLeaf2: Rank=2
          zero: NReallocationFactor, DMReallocationFactor, NRetranslocationFactor, DMRetranslocationFactor, ShadeInducedSenRate, SenescedFrac, DeltaPotentialArea, DeltaStressConstrainedArea, DeltaCarbonConstrainedArea, PotentialStructuralDMAllocation, PotentialMetabolicDMAllocation, MetabolicNReallocated, MetabolicWtReallocated, StorageNReallocated, StorageWtReallocated, MetabolicNRetranslocated, StorageNRetrasnlocated, DMRetranslocated, MetabolicNAllocation, StructuralDMAllocation, MetabolicDMAllocation, Area, MaintenanceRespiration
        VariableReference ThermalTime: VariableName=[Phenology].ThermalTime.Value()
        LeafCohortParameters: ExpansionStressValue=0
          Constant SenessingLeafRelativeSize: FixedValue=1; Units=0-1
          MultiplyFunction GrowthDuration
            VariableReference Phyllochron: VariableName=[Structure].Phyllochron.Value()
            LinearInterpolationFunction AgeFactor: XProperty=[Leaf].AppearedCohortNo
              XYPairs: X=[1, 5, 10, 20]; Y=[1, 2, 4, 8]
          MultiplyFunction MaxArea
            LinearInterpolationFunction RelativeArea: XProperty=[Leaf].AppearedCohortNo
              XYPairs: X=[2, 7, 10, 18]; Y=[0.6666, 1, 1, 0.83]
            Constant LargestLeaf: FixedValue=12000
          Constant LagDuration: FixedValue=1000000; Units=0-1
          LinearInterpolationFunction SenescenceDuration: XProperty=[Phenology].Stage
            XYPairs: X=[1, 5, 5.5, 6]; Y=[80, 80, 40, 10]
          Constant DetachmentLagDuration: FixedValue=0
          Constant DetachmentDuration: FixedValue=20
          LinearInterpolationFunction SpecificLeafAreaMax: XProperty=[Leaf].LAI
            XYPairs: X=[0.5, 0.8, 1, 2, 3, 4]; Y=[35000, 35000, 34500, 30000, 25000, 20000]
          Constant StructuralFraction: FixedValue=0.7
          LinearInterpolationFunction SpecificLeafAreaMin: XProperty=[Leaf].LAI
            XYPairs: X=[0.5, 0.8, 1, 2, 3, 4]; Y=[40000, 35000, 30000, 30000, 30000, 27000]
          LinearInterpolationFunction ExpansionStress: XProperty=[Soybean].WaterSupplyDemandRatio
            XYPairs: X=[0, 1]; Y=[0, 1]
          Constant MinimumNConc: FixedValue=0.02
          Constant CriticalNConc: FixedValue=0.05
          Constant MaximumNConc: FixedValue=0.08
          Constant NReallocationFactor: FixedValue=1
          Constant DMRetranslocationFactor: FixedValue=0.5
          LinearInterpolationFunction ShadeInducedSenescenceRate: XProperty=[Leaf].CohortCurrentRankCoverAbove
            XYPairs: X=[0, 0.9, 0.90001]; Y=[0, 0, 0]
          Constant InitialNConc: FixedValue=0
          Constant StorageFraction: FixedValue=0
          Constant DMReallocationFactor: FixedValue=0
          Constant LeafSizeShapeParameter: FixedValue=0.01
          Constant MaintenanceRespirationFunction: FixedValue=0
          Constant DroughtInducedSenAcceleration: FixedValue=1
          Constant CellDivisionStress: FixedValue=1; Units=0-1
          Constant DroughtInducedLagAcceleration: FixedValue=1
          ArrayFunction LagDurationAgeMultiplier: Values=1 1 1
          ArrayFunction SenescenceDurationAgeMultiplier: Values=1 1 1
          ArrayFunction LeafSizeAgeMultiplier: Values=1 1 1 1 1 1 1 1 1 1 1 1
          Constant RemobilisationCost: FixedValue=0
          Constant CarbonConcentration: FixedValue=0.4
          Constant NRetranslocationFactor: FixedValue=0.5
        LinearInterpolationFunction ExtinctionCoeff: XProperty=[Soybean].SowingData.RowSpacing
          XYPairs: X=[200, 1000]; Y=[0.6, 0.4]
        RUEModel Photosynthesis
          Constant RUE: FixedValue=1
          WeightedTemperatureFunction FT: MaximumTemperatureWeighting=0.5
            XYPairs: X=[10, 20, 30, 40]; Y=[0, 1, 1, 0]
          LinearInterpolationFunction FVPD: XProperty=[Leaf].Photosynthesis.VPD
            XYPairs: X=[0, 10, 50]; Y=[1, 1, 1]
          LinearInterpolationFunction FN: XProperty=[Leaf].Fn
            XYPairs: X=[0, 1, 1.5]; Y=[1, 1, 1]
          LinearInterpolationFunction FW: XProperty=[Leaf].Fw
            XYPairs: X=[0, 1]; Y=[0, 1]
          RUECO2Function FCO2: PhotosyntheticPathway=C3
          VariableReference RadnInt: VariableName=[Leaf].RadIntTot
        MinimumFunction FRGRFunction
          VariableReference RUE_FT: VariableName=[Leaf].Photosynthesis.FT.Value()
          MinimumFunction Others
            VariableReference RUE_FN: VariableName=[Leaf].Photosynthesis.FN.Value()
            VariableReference RUE_FVPD: VariableName=[Leaf].Photosynthesis.FVPD.Value()
        LinearInterpolationFunction FrostFraction: XProperty=[Weather].MinT
          XYPairs: X=[-1, 0]; Y=[0, 0]
        BiomassRemoval BiomassRemovalDefaults
          OrganBiomassRemovalType Harvest: FractionLiveToRemove=0; FractionDeadToRemove=0; FractionLiveToResidue=0.3; FractionDeadToResidue=0
          OrganBiomassRemovalType Cut: FractionLiveToRemove=0.8; FractionDeadToRemove=0; FractionLiveToResidue=0; FractionDeadToResidue=0
          OrganBiomassRemovalType Prune: FractionLiveToRemove=0; FractionDeadToRemove=0; FractionLiveToResidue=0.6; FractionDeadToResidue=0
          OrganBiomassRemovalType Graze: FractionLiveToRemove=0.6; FractionDeadToRemove=0; FractionLiveToResidue=0.1; FractionDeadToResidue=0
        Constant StructuralFraction: FixedValue=0.5
        Constant DMConversionEfficiency: FixedValue=1
        ApexStandard
        Constant RemobilisationCost: FixedValue=0
        Constant CarbonConcentration: FixedValue=0.4
      GenericOrgan Stem
        PartitionFractionDemandFunction DMDemandFunction
          PhaseLookup PartitionFraction
            PhaseLookupValue StemGrowthPhase: Start=Emergence; End=EndCanopyDevelopment
              LinearInterpolationFunction StemFraction: XProperty=[AboveGround].Wt
                XYPairs: X=[0, 200, 201, 400]; Y=[0.5, 0.5, 0.62, 0.62]
            PhaseLookupValue GrainFilling: Start=EndCanopyDevelopment; End=EndGrainFill
              Constant StemFraction: FixedValue=0
        Constant NReallocationFactor: FixedValue=0
        Constant NRetranslocationFactor: FixedValue=0.1
        PhaseLookup DMRetranslocationFactor
          PhaseLookupValue GrainFilling: Start=StartGrainFilling; End=EndGrainFill
            Constant RetranslocationFactor: FixedValue=0.2
        LinearInterpolationFunction MaximumNConc: XProperty=[Phenology].Stage
          XYPairs: X=[3, 4, 5]; Y=[0.025, 0.02, 0.015]
        Constant MinimumNConc: FixedValue=0.005
        PhaseBasedSwitch NitrogenDemandSwitch: Start=Emergence; End=StartGrainFilling
        Constant StructuralFraction: FixedValue=0.7
        BiomassRemoval BiomassRemovalDefaults: same as Replacements.Soybean.Nodule.BiomassRemovalDefaults
        Constant InitialWtFunction: FixedValue=0; Units=g/m^2
        Constant SenescenceRate: FixedValue=0; Units=/d
        Constant DetachmentRateFunction: FixedValue=0; Units=/d
        Constant MaintenanceRespirationFunction: FixedValue=0; Units=0-1
        Constant DMConversionEfficiency: FixedValue=1; Units=0-1
        Constant DMReallocationFactor: FixedValue=0
        VariableReference CriticalNConc: VariableName=[Stem].MinimumNConc.Value()
        Constant RemobilisationCost: FixedValue=0
        Constant CarbonConcentration: FixedValue=0.4
      CompositeBiomass AboveGround: DMDOfStructural=0.6
        Propertys=[[Leaf].Live, [Leaf].Dead, [Stem].Live, [Stem].Dead, [Grain].Live, [Grain].Dead, [Shell].Live, [Shell].Dead]
      CompositeBiomass BelowGround: DMDOfStructural=0.6; Propertys=[[Root].Live, [Root].Dead, [Nodule].Live, [Nodule].Dead]
      CompositeBiomass Total: DMDOfStructural=0.6
        Propertys=[[Leaf].Live, [Leaf].Dead, [Stem].Live, [Stem].Dead, [Grain].Live, [Grain].Dead, [Shell].Live, [Shell].Dead, [Root].Live, [Root].Dead, [Nodule].Live, [Nodule].Dead]
      CompositeBiomass TotalLive: DMDOfStructural=0.6
        Propertys=[[Leaf].Live, [Stem].Live, [Grain].Live, [Shell].Live, [Root].Live, [Nodule].Live]
      CompositeBiomass TotalDead: DMDOfStructural=0.6
        Propertys=[[Leaf].Dead, [Stem].Dead, [Grain].Dead, [Shell].Dead, [Root].Dead, [Nodule].Dead]
      CompositeBiomass Pod: DMDOfStructural=0.6; Propertys=[[Shell].Live, [Shell].Dead, [Grain].Live, [Grain].Dead]
      Memo
        ## References

        ### **Ayaz S, McKenzie BA, McNeil DL, Hill GD.** **2004**. Light interception and utilization of four grain legumes sown at different plant populations and depths. _Journal of Agricultural Science,_ **142**: 297-308.
         **Ayaz S, McKenzie BA, Hill GD, McNeil DL.** **2004**. Variability in yield of four grain legume species in a subhumid temperate environment. II. Yield components. _Journal of Agricultural Science,_ **142**: 21-28.
         **Ayaz S, McKenzie BA, Hill GD, McNeil DL.** **2004**. Nitrogen distribution in four grain legumes. _Journal of Agricultural Science,_ **142**: 309-317.
         **Wilson DR, Robertson MJ.** **1996.** Pea phenology responses to temperature and photoperiod. _Australian Agronomy Society_.
      Cultivar PioneerP932T16R_MG32
        Command:
          [Phenology].Vegetative.Target.FixedValue = 328
          [Phenology].EarlyFlowering.Target.FixedValue = 106
          [Phenology].EarlyGrainFilling.Target.FractionofGrainfilling.FixedValue = 0.20
          [Phenology].LateGrainFilling.Target.EntireGrainfillPeriod.FixedValue = 499
          [Phenology].Vegetative.ThermalTime.PhotoperiodEffect.XYPairs.X = 13.59, 17.6
      Cultivar PioneerP22T69R_MG22
        Command:
          [Phenology].Vegetative.Target.FixedValue = 328
          [Phenology].EarlyFlowering.Target.FixedValue = 106
          [Phenology].EarlyGrainFilling.Target.FractionofGrainfilling.FixedValue = 0.075
          [Phenology].LateGrainFilling.Target.EntireGrainfillPeriod.FixedValue = 580
          [Phenology].Vegetative.ThermalTime.PhotoperiodEffect.XYPairs.X = 13.59, 17.6
      Cultivar Trial_MG00
        Command:
          [Phenology].Vegetative.Target.FixedValue = 268
          [Phenology].EarlyFlowering.Target.FixedValue = 76
          [Phenology].EarlyGrainFilling.Target.FractionofGrainfilling.FixedValue = 0.05
          [Phenology].LateGrainFilling.Target.EntireGrainfillPeriod.FixedValue = 432
          [Phenology].Vegetative.ThermalTime.PhotoperiodEffect.XYPairs.X = 14.43, 21.19
      Cultivar Lambert_MG0
        Command:
          [Phenology].Vegetative.Target.FixedValue = 294
          [Phenology].EarlyFlowering.Target.FixedValue = 81
          [Phenology].EarlyGrainFilling.Target.FractionofGrainfilling.FixedValue = 0.05
          [Phenology].LateGrainFilling.Target.EntireGrainfillPeriod.FixedValue = 442
          [Phenology].Vegetative.ThermalTime.PhotoperiodEffect.XYPairs.X = 14.29, 20.14
      Cultivar IA1006_MG10
        Command:
          [Phenology].Vegetative.Target.FixedValue = 336
          [Phenology].EarlyFlowering.Target.FixedValue = 118
          [Phenology].EarlyGrainFilling.Target.FractionofGrainfilling.FixedValue = 0.05
          [Phenology].LateGrainFilling.Target.EntireGrainfillPeriod.FixedValue = 518
          [Phenology].Vegetative.ThermalTime.PhotoperiodEffect.XYPairs.X = 14.37, 19.30
      Cultivar IA2008_MG20
        Command:
          [Phenology].Vegetative.Target.FixedValue = 329
          [Phenology].EarlyFlowering.Target.FixedValue = 150
          [Phenology].EarlyGrainFilling.Target.FractionofGrainfilling.FixedValue = 0.05
          [Phenology].LateGrainFilling.Target.EntireGrainfillPeriod.FixedValue = 580
          [Phenology].Vegetative.ThermalTime.PhotoperiodEffect.XYPairs.X = 13.92, 17.93
      Cultivar Macon_MG30
        Command:
          [Phenology].Vegetative.Target.FixedValue = 367
          [Phenology].EarlyFlowering.Target.FixedValue = 163
          [Phenology].EarlyGrainFilling.Target.FractionofGrainfilling.FixedValue = 0.175
          [Phenology].LateGrainFilling.Target.EntireGrainfillPeriod.FixedValue = 607
          [Phenology].Vegetative.ThermalTime.PhotoperiodEffect.XYPairs.X = 14.05, 17.56
      Cultivar Pioneer94B01_MG40
        Command:
          [Phenology].Vegetative.Target.FixedValue = 322
          [Phenology].EarlyFlowering.Target.FixedValue = 143
          [Phenology].EarlyGrainFilling.Target.FractionofGrainfilling.FixedValue = 0.30
          [Phenology].LateGrainFilling.Target.EntireGrainfillPeriod.FixedValue = 567
          [Phenology].Vegetative.ThermalTime.PhotoperiodEffect.XYPairs.X = 13.05, 16.46
      Cultivar Hutcheson_MG50
        Command:
          [Phenology].Vegetative.Target.FixedValue = 438
          [Phenology].EarlyFlowering.Target.FixedValue = 112
          [Phenology].EarlyGrainFilling.Target.FractionofGrainfilling.FixedValue = 0.30
          [Phenology].LateGrainFilling.Target.EntireGrainfillPeriod.FixedValue = 505
          [Phenology].Vegetative.ThermalTime.PhotoperiodEffect.XYPairs.X = 12.58, 15.88
      Cultivar NK622_MG60
        Command:
          [Phenology].Vegetative.Target.FixedValue = 436
          [Phenology].EarlyFlowering.Target.FixedValue = 93
          [Phenology].EarlyGrainFilling.Target.FractionofGrainfilling.FixedValue = 0.30
          [Phenology].LateGrainFilling.Target.EntireGrainfillPeriod.FixedValue = 467
          [Phenology].Vegetative.ThermalTime.PhotoperiodEffect.XYPairs.X = 12.39, 15.61
      Cultivar Becks367NRR_MG37
        Command:
          [Phenology].Vegetative.Target.FixedValue = 267
          [Phenology].EarlyFlowering.Target.FixedValue = 112
          [Phenology].EarlyGrainFilling.Target.FractionofGrainfilling.FixedValue = 0.26
          [Phenology].LateGrainFilling.Target.EntireGrainfillPeriod.FixedValue = 506
          [Phenology].Vegetative.ThermalTime.PhotoperiodEffect.XYPairs.X = 13.27, 16.70
      Cultivar AsgrowAG4403_MG40
        Command:
          [Phenology].Vegetative.Target.FixedValue = 292
          [Phenology].EarlyFlowering.Target.FixedValue = 123
          [Phenology].EarlyGrainFilling.Target.FractionofGrainfilling.FixedValue = 0.30
          [Phenology].LateGrainFilling.Target.EntireGrainfillPeriod.FixedValue = 535
          [Phenology].Vegetative.ThermalTime.PhotoperiodEffect.XYPairs.X = 13.09, 16.49
      Cultivar HornbeckHBK4891_MG40
        Command:
          [Phenology].Vegetative.Target.FixedValue = 292
          [Phenology].EarlyFlowering.Target.FixedValue = 123
          [Phenology].EarlyGrainFilling.Target.FractionofGrainfilling.FixedValue = 0.30
          [Phenology].LateGrainFilling.Target.EntireGrainfillPeriod.FixedValue = 535
          [Phenology].Vegetative.ThermalTime.PhotoperiodEffect.XYPairs.X = 13.09, 16.49
      Cultivar AsgrowAG5701_MG50
        Command:
          [Phenology].Vegetative.Target.FixedValue = 404
          [Phenology].EarlyFlowering.Target.FixedValue = 131
          [Phenology].EarlyGrainFilling.Target.FractionofGrainfilling.FixedValue = 0.30
          [Phenology].LateGrainFilling.Target.EntireGrainfillPeriod.FixedValue = 549
          [Phenology].Vegetative.ThermalTime.PhotoperiodEffect.XYPairs.X = 12.83, 16.13
      Cultivar PioneerP9504_MG50
        Command:
          [Phenology].Vegetative.Target.FixedValue = 404
          [Phenology].EarlyFlowering.Target.FixedValue = 112
          [Phenology].EarlyGrainFilling.Target.FractionofGrainfilling.FixedValue = 0.30
          [Phenology].LateGrainFilling.Target.EntireGrainfillPeriod.FixedValue = 505
          [Phenology].Vegetative.ThermalTime.PhotoperiodEffect.XYPairs.X = 12.83, 16.13
      Cultivar Pioneer92MGI_MG26
        Command:
          [Phenology].Vegetative.Target.FixedValue = 271
          [Phenology].EarlyFlowering.Target.FixedValue = 120
          [Phenology].EarlyGrainFilling.Target.FractionofGrainfilling.FixedValue = 0.125
          [Phenology].LateGrainFilling.Target.EntireGrainfillPeriod.FixedValue = 529
          [Phenology].Vegetative.ThermalTime.PhotoperiodEffect.XYPairs.X = 13.77, 17.57
      Cultivar Becks321NRR_MG32
        Command:
          [Phenology].Vegetative.Target.FixedValue = 272
          [Phenology].EarlyFlowering.Target.FixedValue = 117
          [Phenology].EarlyGrainFilling.Target.FractionofGrainfilling.FixedValue = 0.20
          [Phenology].LateGrainFilling.Target.EntireGrainfillPeriod.FixedValue = 522
          [Phenology].Vegetative.ThermalTime.PhotoperiodEffect.XYPairs.X = 13.45, 18.0
      Cultivar Hooper_MG40
        Command:
          [Phenology].Vegetative.Target.FixedValue = 380
          [Phenology].EarlyFlowering.Target.FixedValue = 80
          [Phenology].EarlyGrainFilling.Target.FractionofGrainfilling.FixedValue = 0.05
          [Phenology].LateGrainFilling.Target.EntireGrainfillPeriod.FixedValue = 440
          [Phenology].Vegetative.ThermalTime.PhotoperiodEffect.XYPairs.X = 13.26, 16.67
          [Leaf].LeafCohortParameters.MaxArea.LargestLeaf.FixedValue = 21500
      Cultivar Stephens_MG40
        Command:
          [Phenology].Vegetative.Target.FixedValue = 360
          [Phenology].EarlyFlowering.Target.FixedValue = 80
          [Phenology].EarlyGrainFilling.Target.FractionofGrainfilling.FixedValue = 0.05
          [Phenology].LateGrainFilling.Target.EntireGrainfillPeriod.FixedValue = 440
          [Phenology].Vegetative.ThermalTime.PhotoperiodEffect.XYPairs.X = 13.26, 16.67
          [Leaf].LeafCohortParameters.MaxArea.LargestLeaf.FixedValue = 23000
      Cultivar Davis
        Command:
          [Phenology].Vegetative.Target.FixedValue = 436
          [Phenology].EarlyFlowering.Target.FixedValue = 93
          [Phenology].EarlyGrainFilling.Target.FractionofGrainfilling.FixedValue = 0.05
          [Phenology].LateGrainFilling.Target.EntireGrainfillPeriod.FixedValue = 467
          [Phenology].Vegetative.ThermalTime.PhotoperiodEffect.XYPairs.X = 12.39, 15.61
          [Leaf].LeafCohortParameters.MaxArea.LargestLeaf.FixedValue = 23000
          [Grain].MaximumNConc.FixedValue = 0.067
      Cultivar PioneerP92Y75_MG27
        Command:
          [Phenology].Vegetative.Target.FixedValue = 328
          [Phenology].EarlyFlowering.Target.FixedValue = 106
          [Phenology].EarlyGrainFilling.Target.FractionofGrainfilling.FixedValue = 0.14
          [Phenology].LateGrainFilling.Target.EntireGrainfillPeriod.FixedValue = 499
          [Phenology].Vegetative.ThermalTime.PhotoperiodEffect.XYPairs.X = 13.59, 17.6
      Cultivar PioneerP22T61_MG22
        Command:
          [Phenology].Vegetative.Target.FixedValue = 328
          [Phenology].EarlyFlowering.Target.FixedValue = 106
          [Phenology].EarlyGrainFilling.Target.FractionofGrainfilling.FixedValue = 0.075
          [Phenology].LateGrainFilling.Target.EntireGrainfillPeriod.FixedValue = 499
          [Phenology].Vegetative.ThermalTime.PhotoperiodEffect.XYPairs.X = 13.59, 17.6
      Cultivar Buchanan: same as Replacements.Soybean.Hooper_MG40
      Cultivar Djakal
        Command:
          [Phenology].Vegetative.Target.FixedValue = 360
          [Phenology].EarlyFlowering.Target.FixedValue = 80
          [Phenology].EarlyGrainFilling.Target.FractionofGrainfilling.FixedValue = 0.05
          [Phenology].LateGrainFilling.Target.EntireGrainfillPeriod.FixedValue = 440
          [Phenology].Vegetative.ThermalTime.PhotoperiodEffect.XYPairs.X = 13.26, 16.67
          [Leaf].LeafCohortParameters.MaxArea.LargestLeaf.FixedValue = 17000
    Report DailyReport: EventNames=[Clock].DoReport
      VariableNames:
        [Clock].Today
        [Clock].Today.DayOfYear
        [Soybean].Phenology.DaysAfterSowing
        [Soybean].Phenology.Stage
        [Weather].MeanT
        [Weather].Radn
        [Soybean].Arbitrator.DM.TotalFixationSupply
        [Soybean].Arbitrator.N.TotalFixationSupply
        [Soybean].Phenology.Vegetative.PhotoperiodEffect
        [Soybean].Phenology.CurrentStageName
        [Soybean].Phenology.Photoperiod
        [Soybean].AboveGround.Wt
        [Soybean].AboveGround.N
        [Soybean].Leaf.AppearedCohortNo
        [Soybean].Leaf.Fw
        [Soybean].Leaf.Fn
        [Soybean].Leaf.Photosynthesis.FT
        [Soybean].Leaf.LAI
        [Soybean].Leaf.CoverGreen
        [Soybean].Leaf.Live.Wt
        [Soybean].Leaf.Live.N
        [Soybean].Leaf.Live.NConc
        [Soybean].Leaf.Dead.Wt
        [Soybean].Leaf.Dead.N
        [Soybean].Leaf.Dead.NConc
        [Soybean].Leaf.SpecificArea
        [Soybean].Leaf.Wt
        [Soybean].Stem.Wt
        [Soybean].Stem.N
        [Soybean].Stem.Nconc
        [Soybean].Shell.Wt
        [Soybean].Shell.N
        [Soybean].Shell.Nconc
        [Soybean].Grain.Wt
        [Soybean].Grain.N
        [Soybean].Grain.Nconc
        [Soybean].Grain.HarvestIndex
        [Soybean].Shell.Wt
        [Soybean].Shell.PodNumber
        [Soybean].Pod.Wt
        [Soybean].Pod.N
        [Soybean].Pod.NConc
        [Soybean].Nodule.NFixed
        [Soybean].Root.Wt
        sum([Soil].SoilNitrogen.NO3) as TotalSoilNO3
        sum([Soil].SoilNitrogen.NH4) as TotalSoilNH4
    Report HarvestReportOLD: EventNames=[Soybean].Harvesting
      VariableNames:
        [Clock].Today
        [Soybean].Phenology.CurrentStageName
        [Soybean].Structure.MainStemPrimordiaNo
        [Soybean].Phenology.NFF.Value()
        [Soybean].Script.FinalTag
    Report HarvestReport: EventNames=[Soybean].Harvesting
      VariableNames:
        [Clock].Today
        [Soybean].Phenology.CurrentStageName
        [Soybean].Phenology.EmergenceDAS
        [Soybean].Phenology.FloweringDAS
        [Soybean].Phenology.MaturityDAS
        [Soybean].AboveGround.Wt
        [Soybean].Grain.Wt
    Report FACTSReport: EventNames=[Clock].DoReport
      VariableNames:
        [Clock].Today
        [Soil].SoilWater.SW[4] as SW15cm
        ([Soil].SoilWater.SW[6]+[Soil].SoilWater.SW[7])/2 as SW45cm
        [Soil].Temperature[4] as ST15cm
        ([Soil].Temperature[6]+[Soil].Temperature[7])/2 as ST45cm
        [Soil].SoilWater.WaterTable
        ([Soybean].Leaf.Transpiration + [Soil].SoilWater.Es + [MicroClimate].interception) as ET
        [Soybean].Nodule.FixationRate
        [Soybean].Root.Depth
        [Soybean].Leaf.CohortSize
        sum([Soil].SoilNitrogen.NO3[1:13]) as RootZoneNO3
        sum([Soil].SoilNitrogen.NH4[1:13]) as RootZoneNH4
  DataStore
    ExcelInput Observed: FileName=Observed.xlsx
      SheetNames=[Observed, ObservedET, ObservedSW, ObservedST, ObservedLeafSize]
    PredictedObserved: PredictedTableName=DailyReport; ObservedTableName=Observed; FieldNameUsedForMatch=Clock.Today
    PredictedObserved PredictedObservedHarvest: PredictedTableName=HarvestReport; ObservedTableName=Observed; FieldNameUsedForMatch=Soybean.Phenology.CurrentStageName
    PredictedObserved PredictedObservedSW: PredictedTableName=DailyReport; ObservedTableName=ObservedSW; FieldNameUsedForMatch=Clock.Today
    PredictedObserved PredictedObservedET: PredictedTableName=FACTSReport; ObservedTableName=ObservedET; FieldNameUsedForMatch=Clock.Today
  Folder Validation
    Folder USA
      Folder FACTS
        Experiment Ames2015
          Factors
            Factor Sow
              Factor Early: Specifications=[SowingRule].Script.SowingDate=2015-05-01
              Factor Late: Specifications=[SowingRule].Script.SowingDate=2015-06-01
          Simulation Ames2015Base
            Clock: StartDate=2015-01-01; EndDate=2015-12-31
            Summary summaryfile
            Weather: FileName=Ames.met
            SoilArbitrator Soil Arbitrator
            Zone paddock: Area=1; Slope=0
              MicroClimate: a_interception=0; b_interception=1; c_interception=0.1; d_interception=0; soil_albedo=0.23; sun_angle=15; soil_heat_flux_fraction=0.4; night_interception_fraction=0.5; refheight=2; albedo=0.26; emissivity=0.96; RadIntTotal=0
              Irrigation
              Fertiliser
              SurfaceOrganicMatter: PoolName=wheat; type=wheat; mass=0; standing_fraction=0; cnr=80; CriticalResidueWeight=2000; OptimumDecompTemp=20; MaxCumulativeEOS=20; CNRatioDecompCoeff=0.277; CNRatioDecompThreshold=25; TotalLeachRain=25; MinRainToLeach=10; CriticalMinimumOrganicC=0.004; DefaultCPRatio=0; DefaultStandingFraction=0; StandingExtinctCoeff=0.5; FractionFaecesAdded=0.5
                Pools:
                  {PoolName=wheat, ResidueType=wheat, Mass=0, CNRatio=80, StandingFraction=0}
                ResidueTypes ResidueTypesList: LoadFromResource=ResidueTypes
              Report DailyReport: EventNames=[Clock].DoReport
                VariableNames:
                  [Clock].Today
                  [DiagnosticsVariables].Script.AccumPlantN
                  [DiagnosticsVariables].Script.AccumMineralisation
                  [DiagnosticsVariables].Script.AccumDenit
                  [DiagnosticsVariables].Script.AccumFert
                  [DiagnosticsVariables].Script.AccumLeach
                  [DiagnosticsVariables].Script.AccumDetach
                  [DiagnosticsVariables].Script.DeltaSoilOMN
                  [DiagnosticsVariables].Script.DeltaSurfaceOMN
                  [DiagnosticsVariables].Script.DeltaSoilMineralN
                  [Soybean].Root.NSupply
                  [Soil].SoilWater.Eo
                  [Soil].SoilWater.Es
                  [DiagnosticsVariables].Script.SWC
                  [DiagnosticsVariables].Script.DUL
                  [Soil].SoilWater.Drainage
                  [Soil].SoilWater.Runoff
                  [DiagnosticsVariables].Script.OutFlowLat
                  [Soil].SoilWater.pond
                  [DiagnosticsVariables].Script.AccumEO
                  [DiagnosticsVariables].Script.AccumEP
                  [DiagnosticsVariables].Script.AccumES
                  [DiagnosticsVariables].Script.AccumDrainage
                  [DiagnosticsVariables].Script.AccumRunoff
                  [DiagnosticsVariables].Script.AccumRainfall
                  [DiagnosticsVariables].Script.AccumIrrigation
                  [DiagnosticsVariables].Script.AccumOutflowLat
                  [DiagnosticsVariables].Script.SoilWaterDeficit
                  [Soybean].Grain.Live.Wt
                  [Soybean].Shell.Live.Wt
                  [Soybean].Stem.Live.Wt
                  [Soybean].Stem.Live.Wt
                  [Soybean].Grain.Live.N
                  [Soybean].Shell.Live.N
                  [Soybean].Leaf.Live.Wt
                  [Soybean].Root.Live.Wt
                  [Soybean].Leaf.Live.N
                  [Soybean].Root.Live.N
                  [Soybean].Leaf.Live.NConc
                  [Soybean].Root.Live.NConc
                  [Soybean].Root.WaterSupply
                  [Soybean].Root.WaterUptake
                  [Soybean].Leaf.Transpiration
                  [Soybean].Leaf.WaterDemand
                  [Soybean].Root.Depth
                  [Soybean].Leaf.CoverTotal
                  [Soybean].Leaf.CoverDead
                  [Soybean].Leaf.LAI
                  [Soybean].Leaf.Height
                  [Soybean].Leaf.PotentialBiomass.Value()
                  [Soil].SoilWater.SWmm
                  [Soil].NO3N
                  [DiagnosticsVariables].Script.SoilNitrogenContent
                  [Soybean].Arbitrator.N.TotalPlantDemand
                  [MicroClimate].net_radn
                  [MicroClimate].peta
                  [MicroClimate].petr
                  [DiagnosticsVariables].Script.FomN
                  [DiagnosticsVariables].Script.HumN
                  [DiagnosticsVariables].Script.BiomN
                  [DiagnosticsVariables].Script.DltNMinRes
                  [DiagnosticsVariables].Script.DltNMinTot
                  [Soybean].Leaf.Fw
                  [Soybean].Leaf.Fn
                  [Soybean].Phenology.CurrentPhaseName
                  [Soybean].Phenology.Stage
                  [Soybean].Pod.Wt
                  [Soybean].Pod.N
                  [Soybean].Structure.LeafTipsAppeared
                  [Soybean].Structure.MainStemPrimordiaNo
                  [Soybean].Leaf.CohortArea[1]
                  [Soybean].Leaf.CohortArea[2]
                  [Soybean].Leaf.CohortArea[3]
                  [Soybean].Leaf.CohortArea[4]
                  [Soybean].Leaf.CohortArea[5]
                  [Soybean].Leaf.CohortArea[6]
                  [Soybean].Leaf.CohortArea[7]
                  [Soybean].Leaf.CohortArea[8]
                  [Soybean].Leaf.CohortArea[9]
                  [Soybean].Leaf.CohortArea[10]
                  [Soybean].Leaf.CohortArea[11]
                  [Soybean].Leaf.CohortArea[12]
                  [Soybean].Leaf.CohortArea[13]
                  [Soybean].Leaf.CohortArea[14]
                  [Soybean].Leaf.CohortArea[15]
                  [Soybean].Leaf.AppearedCohortNo
                  [Soybean].Leaf.DeadCohortNo
                  [Soybean].AboveGround.Wt
                  [Soybean].Phenology.Stage
                  [Soybean].Structure.MainStemPrimordiaNo
                  [Soybean].Phenology.NFF.Value()
                  [SoybeanHarvestRule].Script.FinalTag
                  [Soybean].Grain.NumberFunction.Value()
                  [Soybean].Shell.PodNumber.Value()
                  [Soybean].Phenology.FN.Value()
                  [Soybean].Phenology.FN.TotalNodes.Value()
                  [Soybean].Phenology.FN.VegetativeNodes.Value()
              Manager SowingRule
                RowSpacing = 760
                SowingDepth = 50
                SowingRate = 35
                CultivarName = PioneerP22T61_MG22
                SowingDate = 1997-12-23
```csharp
        using System;
        using Models.Core;
        using Models.PMF;
        using APSIM.Shared.Utilities;
        
        namespace Models
        {
           [Serializable] 
           [System.Xml.Serialization.XmlInclude(typeof(Model))]
            public class Script : Model
            {      
               [Link] Plant Soybean;
               [Link] Clock Clock;

               [Description("Spacing (mm) between rows")]
               public double RowSpacing { get; set; }
               [Description("Depth (mm) Grains are planted")]
               public double SowingDepth { get; set; }
               [Description("Seeds sown (/m2)")]
               public double SowingRate { get; set; }
               [Description("Cultivar")]
               [Display(Type=DisplayType.CultivarName)]
               public string CultivarName { get; set; }
               [Description("Sowing Date")]
               public DateTime SowingDate { get; set; }

               [EventSubscribe("DoManagement")]
               private void OnDoManagement(object sender, EventArgs e)
               {
                if (Clock.Today.Date == SowingDate)
                    Soybean.Sow(population:SowingRate, cultivar:CultivarName, depth:SowingDepth, rowSpacing:RowSpacing, budNumber:1);
               }
            }
        }
```
              Manager HarvestRule
```csharp
using System;
using Models.Core;
using System.Collections.Generic;
using System.Text;
using Models.Soils;
using Models.PMF;
using Models;
using System.Xml.Serialization;
using APSIM.Shared.Utilities;

namespace Models
{
    [Serializable] 
    public class Script : Model
    {      
        [Link] Plant Soybean;          
        [Link] Zone zone;            
                    
        
        [EventSubscribe("Commencing")]
        private void OnSimulationCommencing(object sender, EventArgs e)
        {
        }       
        
        [EventSubscribe("DoManagement")]
        private void OnDoManagement(object sender, EventArgs e)
        {
        if (Soybean.Phenology.CurrentPhaseName=="ReadyForHarvesting")
           {
           Soybean.Harvest();
           Soybean.EndCrop();
           }
        }
        
        [EventSubscribe("DoManagementCalculations")]
        private void OnDoManagementCalculations(object sender, EventArgs e)
        {
            
        }
    }
}
```
              Report HarvestReport: EventNames=[Soybean].Harvesting
                VariableNames:
                  [Clock].Today
                  [Soybean].Structure.MainStemPrimordiaNo
                  [Soybean].Phenology.NFF.Value()
                  [Soybean].Script.FinalTag
              Operations
              Plant Soybean: CropType=Soybean
              SoluteManager
              Soil: SoilType=Nicollet; LocalName=SoilAmesCorn; NearestTown=Ames; Region=Boone; State=Iowa; Country=US; ApsoilNumber=34; Latitude=42.02204; Longitude=-93.769115; DataSource=mesured data and web soil survey; Comments=hydrological parameters and BD from Saxton and Rawls, 2006
                Water
                  Thickness  BD    AirDry  LL15   DUL    SAT    KS
                  25         1.25  0.135   0.174  0.31   0.445  151
                  25         1.25  0.135   0.174  0.31   0.455  128
                  50         1.25  0.15    0.174  0.3    0.42   239
                  100        1.25  0.165   0.165  0.25   0.43   158
                  100        1.25  0.12    0.12   0.22   0.35   144
                  150        1.35  0.11    0.11   0.21   0.34   115
                  150        1.35  0.102   0.102  0.22   0.33   103
                  150        1.36  0.126   0.126  0.265  0.393  182
                  150        1.36  0.133   0.133  0.261  0.364  168
                  150        1.36  0.128   0.128  0.253  0.335  159
                  150        1.4   0.128   0.128  0.2    0.37   2
                  300        1.4   0.09    0.09   0.28   0.332  2
                  300        1.4   0.09    0.09   0.18   0.242  2
                  300        1.4   0.09    0.09   0.2    0.256  2
                  400        1.4   0.09    0.09   0.191  0.234  2
                  SoilCrop SoybeanSoil
                    LL=[0.174, 0.174, 0.174, 0.165, 0.12, 0.11, 0.102, 0.126, 0.133, 0.128, 0.128, 0.09, 0.09, 0.09, 0.09]
                    KL=[0.08, 0.08, 0.08, 0.08, 0.08, 0.08, 0.07, 0.06, 0.06, 0.04, 0.01, 0.01, 0.01, 0, 0]
                    XF=[1, 1, 1, 1, 1, 1, 1, 1, 1, 1, 1, 1, 0.5, 0, 0]
                SoilOrganicMatter: RootCN=46; RootWt=3500; SoilCN=12.5; EnrACoeff=7.4; EnrBCoeff=0.2; OCUnits=Total
                  Thickness  OC    FBiom  FInert
                  25         2.43  0.191  0.4
                  25         2.34  0.164  0.4
                  50         2.44  0.162  0.4
                  100        2.37  0.055  0.441
                  100        1.98  0.017  0.52
                  150        1.95  0.018  0.619
                  150        0.97  0.034  0.738
                  150        0.98  0.04   0.802
                  150        0.49  0.061  0.797
                  150        0.49  0.053  0.798
                  150        0.49  0.011  0.808
                  300        0.49  0.01   0.857
                  300        0.49  0.012  0.95
                  300        0.49  0.016  0.99
                  400        0.49  0.01   0.99
                Analysis: PHUnits=Water; BoronUnits=HotWater
                  Thickness=[25, 25, 50, 100, 100, 150, 150, 150, 150, 150, 150, 300, 300, 300, 400]
                  PH=[7.48, 7.48, 7.48, 7.38, 7.43, 7.43, 7.73, 7.73, 8.08, 8.08, 8.08, 8.08, 8.08, 8.08, 8.08]
                Sample Initial nitrogen: NO3Units=kgha; NH4Units=kgha; SWUnits=Volumetric; OCUnits=Total; PHUnits=Water
                  Thickness  NO3  NH4  SW
                  25         1    4    0.31
                  25         1.5  4    0.31
                  50         2    4    0.32
                  100        1.5  4    0.25
                  100        1.5  4    0.327
                  150        1.2  4    0.304
                  150        1    4    0.298
                  150        1    1.5  0.285
                  150        1.1  1.5  0.384
                  150        0.9  0.1  0.335
                  150        0.8  0.2  0.37
                  300        1.1  0.3  0.332
                  300        0.5  0.4  0.242
                  300        0.4  0    0.256
                  400        0    0    0.234
                SoilNitrogen: fom_type=[default, manure, mucuna, lablab, shemp, stable]; fract_carb=[0.2, 0.3, 0.54, 0.57, 0.45, 0]; fract_cell=[0.7, 0.3, 0.37, 0.37, 0.47, 0.1]; fract_lign=[0.1, 0.4, 0.09, 0.06, 0.08, 0.9]
                SoilWater: SummerDate=1-Nov; SummerU=1.5; SummerCona=6.6; WinterDate=1-Apr; WinterU=1.5; WinterCona=6.6; DiffusConst=88; DiffusSlope=35.4; Salb=0.2; CN2Bare=85; CNRed=20; CNCov=0.8; slope=0; discharge_width=0; catchment_area=0; max_pond=0; Thickness=[150, 150, 150, 150, 150, 150, 300, 300, 1000]; SWCON=[0.7, 0.7, 0.7, 0.7, 0.7, 0.7, 0.7, 0.7, 0.7]; ResidueInterception=0
                CERESSoilTemperature
              Report FACTSReport: EventNames=[Clock].DoReport
                VariableNames:
                  [Clock].Today
                  [Soil].SoilWater.SW[4] as SW15cm
                  ([Soil].SoilWater.SW[6]+[Soil].SoilWater.SW[7])/2 as SW45cm
                  [Soil].Temperature[4] as ST15cm
                  ([Soil].Temperature[6]+[Soil].Temperature[7])/2 as ST45cm
              Manager WaterTableManager
                InitialWaterTableDepth = 2000
                InSeasonWaterTableDepth = 1000
                StartDate = 2017-05-01
                EndDate = 2017-05-20
```csharp
        using System;
        using Models.Core;
        using Models.PMF;
        using APSIM.Shared.Utilities;
        using Models.Soils;
        
        namespace Models
        {
           [Serializable] 
           [System.Xml.Serialization.XmlInclude(typeof(Model))]
            public class Script : Model
            {      
               [Link] Soil Soil;
               [Link] Clock Clock;

               [Description("Initial Water Table Depth (mm)")]
               public double InitialWaterTableDepth { get; set; }

              [Description("InSeason Table Depth (mm)")]
               public double InSeasonWaterTableDepth { get; set; }

               [Description("Start Date")]
               public DateTime StartDate { get; set; }

               [Description("End Date")]
               public DateTime EndDate { get; set; }


        [EventSubscribe("Commencing")]
        private void OnSimulationCommencing(object sender, EventArgs e)
        {
        //(Soil.SoilWater as SoilWater).WaterTable = InitialWaterTableDepth;
        }       

               [EventSubscribe("DoManagement")]
               private void OnDoManagement(object sender, EventArgs e)
               {
                if (Clock.Today.Date >= StartDate && Clock.Today.Date >= EndDate)
                   (Soil.SoilWater as SoilWater).WaterTable = InSeasonWaterTableDepth;
                else
                    (Soil.SoilWater as SoilWater).WaterTable = InitialWaterTableDepth;
               }
            }
        }
```
        Experiment Ames2017
          Factors
            Factor Sow
              Factor Early
                Specifications:
                  [SowingRule].Script.SowingDate=2017-05-16
                  [SowingRule].Script.SowingRate=32
                  [SowingRule].Script.SowingDepth=50
              Factor Late
                Specifications:
                  [SowingRule].Script.SowingDate=2017-05-30
                  [SowingRule].Script.SowingRate=35
                  [SowingRule].Script.SowingDepth=5
          Simulation Ames2017Base
            Clock: StartDate=2017-01-01; EndDate=2017-12-31
            Summary summaryfile
            Weather: FileName=Ames.met
            SoilArbitrator Soil Arbitrator
            Zone paddock: Area=1; Slope=0
              MicroClimate: a_interception=0; b_interception=1; c_interception=0.1; d_interception=0; soil_albedo=0.23; sun_angle=15; soil_heat_flux_fraction=0.4; night_interception_fraction=0.5; refheight=2; albedo=0.26; emissivity=0.96; RadIntTotal=0
              Irrigation
              Fertiliser
              SurfaceOrganicMatter: same as Validation.USA.FACTS.Ames2015.Ames2015Base.paddock.SurfaceOrganicMatter
              Report DailyReport: same as Validation.USA.FACTS.Ames2015.Ames2015Base.paddock.DailyReport
              Manager SowingRule
                RowSpacing = 760
                SowingDepth = 50
                SowingRate = 32
                CultivarName = PioneerP932T16R_MG32
                SowingDate = 1997-12-23
                script: same as in Validation.USA.FACTS.Ames2015.Ames2015Base.paddock.SowingRule
              Manager HarvestRule: same as Validation.USA.FACTS.Ames2015.Ames2015Base.paddock.HarvestRule
              Report HarvestReport: EventNames=[Soybean].Harvesting
                VariableNames:
                  [Clock].Today
                  [Soybean].Structure.MainStemPrimordiaNo
                  [Soybean].Phenology.NFF.Value()
                  [Soybean].Script.FinalTag
              Operations
              Plant Soybean: CropType=Soybean
              SoluteManager
              Soil: same as Validation.USA.FACTS.Ames2015.Ames2015Base.paddock.Soil
              Report FACTSReport: EventNames=[Clock].DoReport
                VariableNames:
                  [Clock].Today
                  [Soil].SoilWater.SW[4] as SW15cm
                  ([Soil].SoilWater.SW[6]+[Soil].SoilWater.SW[7])/2 as SW45cm
                  [Soil].Temperature[4] as ST15cm
                  ([Soil].Temperature[6]+[Soil].Temperature[7])/2 as ST45cm
              Manager WaterTableManager: same as Validation.USA.FACTS.Ames2015.Ames2015Base.paddock.WaterTableManager
        Experiment Sutherland2015
          Factors
            Factor Sow
              Factor Early
                Specifications:
                  [SowingRule].Script.SowingDate=2015-04-30
                  [SowingRule].Script.SowingRate=33
                  [SowingRule].Script.SowingDepth=40
              Factor Late
                Specifications:
                  [SowingRule].Script.SowingDate=2015-06-01
                  [SowingRule].Script.SowingRate=48
                  [SowingRule].Script.SowingDepth=20
          Simulation Sutherland2015Base
            Clock: StartDate=2015-01-01; EndDate=2015-12-31
            Summary summaryfile
            Weather: FileName=Sutherland.met
            SoilArbitrator Soil Arbitrator
            Zone paddock: Area=1; Slope=0
              MicroClimate: a_interception=0; b_interception=1; c_interception=0; d_interception=0; soil_albedo=0.23; sun_angle=15; soil_heat_flux_fraction=0.4; night_interception_fraction=0.5; refheight=2; albedo=0.26; emissivity=0.96; RadIntTotal=0
              Irrigation
              Fertiliser
              SurfaceOrganicMatter: same as Validation.USA.FACTS.Ames2015.Ames2015Base.paddock.SurfaceOrganicMatter
              Report DailyReport: same as Validation.USA.FACTS.Ames2015.Ames2015Base.paddock.DailyReport
              Manager SowingRule
                RowSpacing = 760
                SowingDepth = 50
                SowingRate = 30
                CultivarName = PioneerP932T16R_MG32
                SowingDate = 1997-12-23
                script: same as in Validation.USA.FACTS.Ames2015.Ames2015Base.paddock.SowingRule
              Manager HarvestRule: same as Validation.USA.FACTS.Ames2015.Ames2015Base.paddock.HarvestRule
              Report HarvestReport: EventNames=[Soybean].Harvesting
                VariableNames:
                  [Clock].Today
                  [Soybean].Structure.MainStemPrimordiaNo
                  [Soybean].Phenology.NFF.Value()
                  [Soybean].Script.FinalTag
              Operations
                1998-01-07  [Irrigation].Apply(25);
                1998-01-14  [Irrigation].Apply(25);
                1998-01-21  [Irrigation].Apply(25);
                1998-01-28  [Irrigation].Apply(25);
                1998-02-07  [Irrigation].Apply(25);
                1998-02-14  [Irrigation].Apply(25);
                1998-02-21  [Irrigation].Apply(25);
                1998-02-28  [Irrigation].Apply(25);
                1998-03-07  [Irrigation].Apply(25);
                1998-03-14  [Irrigation].Apply(25);
                1998-03-21  [Irrigation].Apply(25);
                1998-03-28  [Irrigation].Apply(25);
              Plant Soybean: CropType=Soybean
              SoluteManager
              Soil: SoilType=Primghar; NearestTown=Sutherland; State=Iowa; Country=US; Latitude=42.92; Longitude=-95.53; DataSource=web soil survey; Comments=hydrological parameters and BD from Saxton and Rawls, 2006
                Water
                  Thickness  BD    AirDry  LL15   DUL    SAT
                  25         1.25  0.115   0.171  0.28   0.487
                  25         1.25  0.115   0.171  0.28   0.487
                  50         1.25  0.145   0.171  0.28   0.44
                  100        1.25  0.171   0.171  0.315  0.415
                  100        1.25  0.171   0.171  0.3    0.421
                  150        1.35  0.171   0.171  0.29   0.44
                  150        1.35  0.14    0.14   0.26   0.438
                  150        1.36  0.14    0.14   0.27   0.438
                  150        1.36  0.14    0.14   0.263  0.438
                  150        1.36  0.14    0.14   0.26   0.438
                  150        1.4   0.14    0.14   0.24   0.438
                  300        1.4   0.11    0.11   0.24   0.3
                  300        1.4   0.11    0.11   0.24   0.3
                  300        1.4   0.11    0.11   0.24   0.3
                  400        1.4   0.11    0.11   0.24   0.3
                  SoilCrop SoybeanSoil
                    LL=[0.171, 0.171, 0.171, 0.171, 0.171, 0.171, 0.14, 0.14, 0.14, 0.14, 0.14, 0.11, 0.11, 0.11, 0.11]
                    KL=[0.03, 0.05, 0.08, 0.08, 0.08, 0.08, 0.08, 0.05, 0.05, 0.01, 0.01, 0.01, 0.01, 0.01, 0.01]
                    XF=[1, 1, 1, 1, 1, 1, 1, 1, 1, 1, 1, 1, 1, 1, 1]
                SoilOrganicMatter: RootCN=58.1; RootWt=2500; SoilCN=12; EnrACoeff=7.4; EnrBCoeff=0.2; OCUnits=Total
                  Thickness  OC    FBiom  FInert
                  25         2.5   0.228  0.4
                  25         2.45  0.18   0.4
                  50         2.46  0.186  0.401
                  100        2.17  0.043  0.44
                  100        1.85  0.018  0.52
                  150        1.86  0.019  0.621
                  150        1.11  0.026  0.739
                  150        1.12  0.03   0.803
                  150        0.39  0.057  0.796
                  150        0.39  0.046  0.798
                  150        0.39  0.033  0.8
                  300        0.39  0.029  0.852
                  300        0.2   0.011  0.948
                  300        0.1   0.019  0.99
                  400        0.1   0.009  0.99
                Analysis: PHUnits=Water; BoronUnits=HotWater
                  Thickness=[25, 25, 50, 100, 100, 150, 150, 150, 150, 150, 150, 300, 300, 300, 400]
                  PH=[5.48, 5.48, 5.48, 5.68, 5.98, 5.98, 6.75, 6.75, 7.97, 7.97, 7.97, 7.97, 7.97, 7.97, 7.97]
                Sample Initial nitrogen: NO3Units=kgha; NH4Units=kgha; SWUnits=Volumetric; OCUnits=Total; PHUnits=Water
                  Thickness  NO3  NH4  SW
                  25         2.5  4    0.22
                  25         2.5  4    0.24
                  50         2.5  4    0.24
                  100        2.5  4.3  0.25
                  100        2    2.1  0.25
                  150        5.5  4.5  0.3
                  150        4.5  4    0.27
                  150        3    1    0.27
                  150        3    1    0.263
                  150        3    0    0.26
                  150        1    0    0.24
                  300        1    0.1  0.24
                  300        2    1    0.3
                  300        3.8  0    0.3
                  400        0    0    0.3
                SoilNitrogen: fom_type=[default, manure, mucuna, lablab, shemp, stable]; fract_carb=[0.2, 0.3, 0.54, 0.57, 0.45, 0]; fract_cell=[0.7, 0.3, 0.37, 0.37, 0.47, 0.1]; fract_lign=[0.1, 0.4, 0.09, 0.06, 0.08, 0.9]
                CERESSoilTemperature
                SoilWater: SummerDate=1-Nov; SummerU=1.5; SummerCona=6.6; WinterDate=1-Apr; WinterU=1.5; WinterCona=6.6; DiffusConst=88; DiffusSlope=35.4; Salb=0.2; CN2Bare=85; CNRed=20; CNCov=0.8; slope=0; discharge_width=0; catchment_area=0; max_pond=0; Thickness=[150, 150, 150, 150, 150, 150, 300, 300, 300]; SWCON=[0.7, 0.7, 0.7, 0.7, 0.7, 0.7, 0.7, 0.7, 0.7]; ResidueInterception=0
              Manager WaterTableManager: same as Validation.USA.FACTS.Ames2015.Ames2015Base.paddock.WaterTableManager
        Experiment Sutherland2017
          Factors
            Factor Sow
              Factor Early: Specifications=[SowingRule].Script.SowingDate=2017-05-08
              Factor Late: Specifications=[SowingRule].Script.SowingDate=2017-05-25
          Simulation Sutherland2017Base
            Clock: StartDate=2017-01-01; EndDate=2017-12-31
            Summary summaryfile
            Weather: FileName=Sutherland.met
            SoilArbitrator Soil Arbitrator
            Zone paddock: Area=1; Slope=0
              MicroClimate: a_interception=0; b_interception=1; c_interception=0; d_interception=0; soil_albedo=0.23; sun_angle=15; soil_heat_flux_fraction=0.4; night_interception_fraction=0.5; refheight=2; albedo=0.26; emissivity=0.96; RadIntTotal=0
              Irrigation
              Fertiliser
              SurfaceOrganicMatter: same as Validation.USA.FACTS.Ames2015.Ames2015Base.paddock.SurfaceOrganicMatter
              Report DailyReport: same as Validation.USA.FACTS.Ames2015.Ames2015Base.paddock.DailyReport
              Manager SowingRule
                RowSpacing = 760
                SowingDepth = 50
                SowingRate = 30
                CultivarName = PioneerP22T69R_MG22
                SowingDate = 1997-12-23
                script: same as in Validation.USA.FACTS.Ames2015.Ames2015Base.paddock.SowingRule
              Manager HarvestRule: same as Validation.USA.FACTS.Ames2015.Ames2015Base.paddock.HarvestRule
              Report HarvestReport: EventNames=[Soybean].Harvesting
                VariableNames:
                  [Clock].Today
                  [Soybean].Structure.MainStemPrimordiaNo
                  [Soybean].Phenology.NFF.Value()
                  [Soybean].Script.FinalTag
              Operations: same as Validation.USA.FACTS.Sutherland2015.Sutherland2015Base.paddock.Operations
              Plant Soybean: CropType=Soybean
              SoluteManager
              Soil: same as Validation.USA.FACTS.Sutherland2015.Sutherland2015Base.paddock.Soil
              Manager WaterTableManager: same as Validation.USA.FACTS.Ames2015.Ames2015Base.paddock.WaterTableManager
      Folder Arkansas
        Experiment Arkansas2001
          Factors
            Factor Cv
              Specifications=[SowingRule].Script.CultivarName=Trial_MG00,Lambert_MG0,IA1006_MG10,IA2008_MG20,Macon_MG30,Pioneer94B01_MG40,Hutcheson_MG50,NK622_MG60
          Simulation Arkansas2001Base
            Clock: StartDate=2001-01-01; EndDate=2001-12-31
            Summary summaryfile
            Weather: FileName=Arkansas.met
            SoilArbitrator Soil Arbitrator
            Zone paddock: Area=1; Slope=0
              MicroClimate: a_interception=0; b_interception=1; c_interception=0; d_interception=0; soil_albedo=0.23; sun_angle=15; soil_heat_flux_fraction=0.4; night_interception_fraction=0.5; refheight=2; albedo=0.26; emissivity=0.96; RadIntTotal=0
              Irrigation
              Fertiliser
              SurfaceOrganicMatter: PoolName=maize; type=maize; mass=4500; standing_fraction=0; cnr=55; CriticalResidueWeight=2000; OptimumDecompTemp=20; MaxCumulativeEOS=20; CNRatioDecompCoeff=0.277; CNRatioDecompThreshold=25; TotalLeachRain=25; MinRainToLeach=10; CriticalMinimumOrganicC=0.004; DefaultCPRatio=0; DefaultStandingFraction=0; StandingExtinctCoeff=0.5; FractionFaecesAdded=0.5
                Pools:
                  {PoolName=maize, ResidueType=maize, Mass=4500, CNRatio=55, StandingFraction=0}
                ResidueTypes ResidueTypesList: LoadFromResource=ResidueTypes
              Report DailyReport: same as Validation.USA.FACTS.Ames2015.Ames2015Base.paddock.DailyReport
              Manager SowingRule
                RowSpacing = 380
                SowingDepth = 50
                SowingRate = 43
                CultivarName = Ames_P932T16R_32MG
                SowingDate = 2001-06-10
                script: same as in Validation.USA.FACTS.Ames2015.Ames2015Base.paddock.SowingRule
              Manager HarvestRule: same as Validation.USA.FACTS.Ames2015.Ames2015Base.paddock.HarvestRule
              Report HarvestReport: EventNames=[Soybean].Harvesting
                VariableNames:
                  [Clock].Today
                  [Soybean].Structure.MainStemPrimordiaNo
                  [Soybean].Phenology.NFF.Value()
                  [Soybean].Script.FinalTag
              Plant Soybean: CropType=Soybean
              SoluteManager
              Soil: LocalName=Plano (Wisconsin); NearestTown=Ames; State=Iowa; Country=US; ApsoilNumber=34; Latitude=0; Longitude=0; DataSource=for palle paper; Comments=data from WSS and saxton equations
                Water
                  Thickness  BD     AirDry  LL15   DUL    SAT
                  150        1.195  0.078   0.155  0.367  0.522
                  150        1.195  0.14    0.155  0.367  0.522
                  300        1.428  0.183   0.183  0.363  0.438
                  300        1.428  0.183   0.183  0.363  0.438
                  300        1.452  0.18    0.18   0.351  0.429
                  320        1.614  0.142   0.142  0.226  0.372
                  SoilCrop SoybeanSoil: LL=[0.155, 0.155, 0.183, 0.183, 0.18, 0.142]; KL=[0.08, 0.08, 0.08, 0.08, 0.066, 0.034]; XF=[1, 1, 1, 1, 1, 0.053]
                SoilWater: SummerDate=1-jun; SummerU=8.62; SummerCona=3.81; WinterDate=1-dec; WinterU=8.62; WinterCona=3.81; DiffusConst=40; DiffusSlope=16; Salb=0.13; CN2Bare=73; CNRed=20; CNCov=0.8; max_pond=0; Thickness=[150, 150, 300, 300, 300, 320]; SWCON=[0.332, 0.332, 0.212, 0.212, 0.223, 0.423]; ResidueInterception=0
                SoilNitrogen: fom_type=[default, manure, mucuna, lablab, shemp, stable]; fract_carb=[0.2, 0.3, 0.54, 0.57, 0.45, 0]; fract_cell=[0.7, 0.3, 0.37, 0.37, 0.47, 0.1]; fract_lign=[0.1, 0.4, 0.09, 0.06, 0.08, 0.9]
                SoilOrganicMatter: RootCN=45; RootWt=1000; SoilCN=14; EnrACoeff=7.4; EnrBCoeff=0.2; OCUnits=Total
                  Thickness  OC     FBiom  FInert
                  150        2.326  0.035  0.4
                  150        2.326  0.019  0.5
                  300        0.349  0.013  0.68
                  300        0.349  0.01   0.8
                  300        0.331  0.01   0.8
                  320        0.174  0.01   0.855
                Analysis: Thickness=[150, 150, 300, 300, 300, 320]; PH=[6.582, 6.582, 6.052, 6.052, 6.0785, 6.317]; PHUnits=Water; BoronUnits=HotWater
                Sample Initial nitrogen: NO3Units=kgha; NH4Units=kgha; SWUnits=Volumetric; OCUnits=Total; PHUnits=Water
                  Thickness  NO3  NH4  SW
                  150        27   12   0
                  150        10   3    -
                  300        3    1    -
                  300        0    0    -
                  300        0    0    -
                  320        0    0    -
                InitialWater: PercentMethod=FilledFromTop; FractionFull=0
                CERESSoilTemperature
        Experiment Arkansas2002
          Factors
            Factor Cv
              Specifications=[SowingRule].Script.CultivarName=Trial_MG00,Lambert_MG0,IA1006_MG10,IA2008_MG20,Macon_MG30,Pioneer94B01_MG40,Hutcheson_MG50,NK622_MG60
          Simulation Arkansas2002Base
            Clock: StartDate=2002-01-01; EndDate=2002-12-31
            Summary summaryfile
            Weather: FileName=Arkansas.met
            SoilArbitrator Soil Arbitrator
            Zone paddock: Area=1; Slope=0
              MicroClimate: a_interception=0; b_interception=1; c_interception=0; d_interception=0; soil_albedo=0.23; sun_angle=15; soil_heat_flux_fraction=0.4; night_interception_fraction=0.5; refheight=2; albedo=0.26; emissivity=0.96; RadIntTotal=0
              Irrigation
              Fertiliser
              SurfaceOrganicMatter: same as Validation.USA.Arkansas.Arkansas2001.Arkansas2001Base.paddock.SurfaceOrganicMatter
              Report DailyReport: same as Validation.USA.FACTS.Ames2015.Ames2015Base.paddock.DailyReport
              Manager SowingRule
                RowSpacing = 380
                SowingDepth = 70
                SowingRate = 43
                CultivarName = Ames_P932T16R_32MG
                SowingDate = 2002-05-07
                script: same as in Validation.USA.FACTS.Ames2015.Ames2015Base.paddock.SowingRule
              Manager HarvestRule: same as Validation.USA.FACTS.Ames2015.Ames2015Base.paddock.HarvestRule
              Report HarvestReport: EventNames=[Soybean].Harvesting
                VariableNames:
                  [Clock].Today
                  [Soybean].Structure.MainStemPrimordiaNo
                  [Soybean].Phenology.NFF.Value()
                  [Soybean].Script.FinalTag
              Plant Soybean: CropType=Soybean
              SoluteManager
              Soil: same as Validation.USA.Arkansas.Arkansas2001.Arkansas2001Base.paddock.Soil
        Experiment Arkansas2003
          Factors
            Factor Cv
              Specifications=[SowingRule].Script.CultivarName=Trial_MG00,Lambert_MG0,IA1006_MG10,IA2008_MG20,Macon_MG30,Pioneer94B01_MG40,Hutcheson_MG50,NK622_MG60
          Simulation Arkansas2003Base
            Clock: StartDate=2003-01-01; EndDate=2003-12-31
            Summary summaryfile
            Weather: FileName=Arkansas.met
            SoilArbitrator Soil Arbitrator
            Zone paddock: Area=1; Slope=0
              MicroClimate: a_interception=0; b_interception=1; c_interception=0; d_interception=0; soil_albedo=0.23; sun_angle=15; soil_heat_flux_fraction=0.4; night_interception_fraction=0.5; refheight=2; albedo=0.26; emissivity=0.96; RadIntTotal=0
              Irrigation
              Fertiliser
              SurfaceOrganicMatter: same as Validation.USA.Arkansas.Arkansas2001.Arkansas2001Base.paddock.SurfaceOrganicMatter
              Report DailyReport: same as Validation.USA.FACTS.Ames2015.Ames2015Base.paddock.DailyReport
              Manager SowingRule
                RowSpacing = 380
                SowingDepth = 50
                SowingRate = 43
                CultivarName = Ames_P932T16R_32MG
                SowingDate = 2003-05-27
                script: same as in Validation.USA.FACTS.Ames2015.Ames2015Base.paddock.SowingRule
              Manager HarvestRule: same as Validation.USA.FACTS.Ames2015.Ames2015Base.paddock.HarvestRule
              Report HarvestReport: EventNames=[Soybean].Harvesting
                VariableNames:
                  [Clock].Today
                  [Soybean].Structure.MainStemPrimordiaNo
                  [Soybean].Phenology.NFF.Value()
                  [Soybean].Script.FinalTag
              Plant Soybean: CropType=Soybean
              SoluteManager
              Soil: same as Validation.USA.Arkansas.Arkansas2001.Arkansas2001Base.paddock.Soil
      Folder Indiana
        Experiment Indiana2006
          Factors
            Factor Sow
              Factor Mar30
                Specifications:
                  [SowingRule].Script.SowingDate=2006-03-30
                  [SowingRule].Script.SowingDepth=65
              Factor Apr13
                Specifications:
                  [SowingRule].Script.SowingDate=2006-04-13
                  [SowingRule].Script.SowingDepth=80
              Factor Apr27
                Specifications:
                  [SowingRule].Script.SowingDate=2006-04-27
                  [SowingRule].Script.SowingDepth=50
              Factor May10
                Specifications:
                  [SowingRule].Script.SowingDate=2006-05-10
                  [SowingRule].Script.SowingDepth=35
              Factor May30
                Specifications:
                  [SowingRule].Script.SowingDate=2006-05-30
                  [SowingRule].Script.SowingDepth=80
              Factor Jun06
                Specifications:
                  [SowingRule].Script.SowingDate=2006-06-06
                  [SowingRule].Script.SowingDepth=100
            Factor Cv
              Specifications=[SowingRule].Script.CultivarName=Becks367NRR_MG37,Becks321NRR_MG32,Pioneer92MGI_MG26
          Simulation Indiana2006Base
            Clock: StartDate=2006-01-01; EndDate=2006-12-31
            Summary summaryfile
            Weather: FileName=Indiana.met
            SoilArbitrator Soil Arbitrator
            Zone paddock: Area=1; Slope=0
              MicroClimate: a_interception=0; b_interception=1; c_interception=0; d_interception=0; soil_albedo=0.23; sun_angle=15; soil_heat_flux_fraction=0.4; night_interception_fraction=0.5; refheight=2; albedo=0.26; emissivity=0.96; RadIntTotal=0
              Irrigation
              Manager Automatic irrigation based on water deficit
                FASW = 0
                WaterDeficit = 0
                AutoIrrigationOn = True
                FASWThreshold = 0.9
                FASWDepth = 900
```csharp
using System;
using Models.Core;
using System.Collections.Generic;
using System.Text;
using Models.Soils;
using Models.PMF;
using Models;
using System.Xml.Serialization;
using APSIM.Shared.Utilities;

namespace Models
{
    [Serializable] 
    public class Script : Model
    {
        public double FASW { get; set; }
        public double WaterDeficit  { get; set; }
    
        [Link] Zone zone;
        [Link] Irrigation irrigation;
        [Link] Soil soil;
        
        [Description("Auto irrigation on?")]
        public bool AutoIrrigationOn { get; set; }

        [Description("Threshold fraction available water (0-1)")]
        public double FASWThreshold { get; set; }

        [Description("Soil depth (mm) to which fraction available water is calculated")]
        public double FASWDepth { get; set; }

        [EventSubscribe("DoManagement")]
        private void OnDoManagement(object sender, EventArgs e)
        {
            CalculateFASW();
            if (AutoIrrigationOn)
            {
                if (FASW < FASWThreshold)
                {
                    double amount = 10;
                    irrigation.Apply(WaterDeficit, depth: 0);
                }
            }
        }
        
        private void CalculateFASW()
        {
            double[] LL15 = MathUtilities.Multiply(soil.LL15, soil.Thickness);
            double[] DUL = MathUtilities.Multiply(soil.DUL, soil.Thickness);
        
            int nlayr = GetLayerIndex();
            double cumdep = MathUtilities.Sum(soil.Thickness, 0, nlayr, 0.0);

            double excess_fr = MathUtilities.Divide((cumdep - FASWDepth), soil.Thickness[nlayr], 0.0);

            // note that results may be strange if swdep < ll15
            double avail_sw = (MathUtilities.Sum(soil.Water, 0, nlayr, 0.0)
                              - excess_fr * soil.Water[nlayr])
                              - (MathUtilities.Sum(LL15, 0, nlayr, 0.0)
                              - excess_fr * LL15[nlayr]);


            double pot_avail_sw = (MathUtilities.Sum(DUL, 0, nlayr, 0.0)
                                  - excess_fr * DUL[nlayr])
                                  - (MathUtilities.Sum(LL15, 0, nlayr, 0.0)
                                  - excess_fr * LL15[nlayr]);

            FASW = MathUtilities.Divide(avail_sw, pot_avail_sw, 0.0);
            WaterDeficit = MathUtilities.Constrain(pot_avail_sw - avail_sw, 0.0, 100000);
        }

        private int GetLayerIndex()
        {
            double[] cumThickness = Soil.ToCumThickness(soil.Thickness);
            for (int i = 1; i < cumThickness.Length; i++)
            {
                if (FASWDepth < cumThickness[i])
                    return i - 1;
            }
            
            return cumThickness.Length - 1;
        }

    }
}
```
              Fertiliser
              SurfaceOrganicMatter: same as Validation.USA.Arkansas.Arkansas2001.Arkansas2001Base.paddock.SurfaceOrganicMatter
              Report DailyReport: same as Validation.USA.FACTS.Ames2015.Ames2015Base.paddock.DailyReport
              Manager SowingRule
                RowSpacing = 760
                SowingDepth = 50
                SowingRate = 38
                CultivarName = Ames_P932T16R_32MG
                SowingDate = 2001-06-10
                script: same as in Validation.USA.FACTS.Ames2015.Ames2015Base.paddock.SowingRule
              Manager HarvestRule: same as Validation.USA.FACTS.Ames2015.Ames2015Base.paddock.HarvestRule
              Report HarvestReport: EventNames=[Soybean].Harvesting
                VariableNames:
                  [Clock].Today
                  [Soybean].Structure.MainStemPrimordiaNo
                  [Soybean].Phenology.NFF.Value()
                  [Soybean].Script.FinalTag
              Plant Soybean: CropType=Soybean
              SoluteManager
              Soil: LocalName=Clarion (near Newell); NearestTown=Ames; State=Iowa; Country=US; ApsoilNumber=34; Latitude=0; Longitude=0; Comments=all data only from WSS
                DataSource=for Mahli al-Kaisi paper (Marsden Research farm), tes file , long term soybean
                Water
                  Thickness  BD     AirDry  LL15   DUL    SAT
                  180        1.425  0.144   0.16   0.297  0.412
                  120        1.425  0.132   0.147  0.289  0.412
                  160        1.425  0.147   0.147  0.289  0.412
                  200        1.6    0.165   0.165  0.293  0.346
                  250        1.6    0.165   0.165  0.293  0.346
                  410        1.6    0.105   0.105  0.25   0.346
                  200        1.6    0.105   0.105  0.25   0.346
                  SoilCrop SoybeanSoil: LL=[0.16, 0.147, 0.147, 0.165, 0.165, 0.105, 0.105]; KL=[0.08, 0.08, 0.08, 0.08, 0.08, 0.06, 0.03]; XF=[1, 1, 1, 1, 1, 0.09, 0.05]
                SoilWater: SummerDate=1-jun; SummerU=7.975; SummerCona=3.675; WinterDate=1-dec; WinterU=3.975; WinterCona=3.675; DiffusConst=40; DiffusSlope=16; Salb=0.13; CN2Bare=73; CNRed=20; CNCov=0.8; max_pond=0; Thickness=[180, 120, 160, 200, 250, 410, 200]; SWCON=[0.358, 0.375, 0.375, 0.261, 0.261, 0.369, 0.369]; ResidueInterception=0
                SoilNitrogen: fom_type=[default, manure, mucuna, lablab, shemp, stable]; fract_carb=[0.2, 0.3, 0.54, 0.57, 0.45, 0]; fract_cell=[0.7, 0.3, 0.37, 0.37, 0.47, 0.1]; fract_lign=[0.1, 0.4, 0.09, 0.06, 0.08, 0.9]
                SoilOrganicMatter: RootCN=45; RootWt=1000; SoilCN=14; EnrACoeff=7.4; EnrBCoeff=0.2; OCUnits=Total
                  Thickness  OC     FBiom  FInert
                  180        2.035  0.035  0.4
                  120        1.453  0.018  0.512
                  160        1.453  0.014  0.624
                  200        0.727  0.01   0.768
                  250        0.727  0.01   0.8
                  410        0.145  0.01   0.8
                  200        0.145  0.01   0.874
                Analysis: Thickness=[180, 120, 160, 200, 250, 410, 200]; PH=[6.317, 6.317, 6.317, 6.582, 6.582, 7.96, 7.96]; PHUnits=Water; BoronUnits=HotWater
                Sample Initial nitrogen: NO3Units=kgha; NH4Units=kgha; SWUnits=Volumetric; OCUnits=Total; PHUnits=Water
                  Thickness  NO3  NH4  SW
                  180        27   12   0
                  120        10   3    -
                  160        3    1    -
                  200        0    0    -
                  250        0    0    -
                  410        0    0    -
                  200        0    0    -
                InitialWater: PercentMethod=FilledFromTop; FractionFull=0
                CERESSoilTemperature
        Experiment Indiana2007
          Factors
            Factor Sow
              Factor Mar27
                Specifications:
                  [SowingRule].Script.SowingDate=2007-03-27
                  [SowingRule].Script.SowingDepth=50
              Factor Apr10
                Specifications:
                  [SowingRule].Script.SowingDate=2007-04-10
                  [SowingRule].Script.SowingDepth=75
              Factor Apr30
                Specifications:
                  [SowingRule].Script.SowingDate=2007-04-30
                  [SowingRule].Script.SowingDepth=55
              Factor May09
                Specifications:
                  [SowingRule].Script.SowingDate=2007-05-09
                  [SowingRule].Script.SowingDepth=55
              Factor Jun01
                Specifications:
                  [SowingRule].Script.SowingDate=2007-06-01
                  [SowingRule].Script.SowingDepth=55
              Factor Jun07
                Specifications:
                  [SowingRule].Script.SowingDate=2007-06-07
                  [SowingRule].Script.SowingDepth=80
            Factor Cv
              Specifications=[SowingRule].Script.CultivarName=Becks367NRR_MG37,Becks321NRR_MG32,Pioneer92MGI_MG26
          Simulation Indiana2007Base
            Clock: StartDate=2007-01-01; EndDate=2007-12-31
            Summary summaryfile
            Weather: FileName=Indiana.met
            SoilArbitrator Soil Arbitrator
            Zone paddock: same as Validation.USA.Indiana.Indiana2006.Indiana2006Base.paddock
      Folder Mississippi
        Experiment Mississippi2002
          Factors
            Factor Cv
              Specifications=[SowingRule].Script.CultivarName=AsgrowAG4403_MG40,HornbeckHBK4891_MG40,AsgrowAG5701_MG50,PioneerP9504_MG50
            Factor Sow
              Factor Early: Specifications=[SowingRule].Script.SowingDate=2002-04-16
              Factor Late: Specifications=[SowingRule].Script.SowingDate=2002-05-08
          Simulation Mississippi2002Base
            Clock: StartDate=2002-01-01; EndDate=2002-12-31
            Summary summaryfile
            Weather: FileName=StonevilleMississippi.met
            SoilArbitrator Soil Arbitrator
            Zone paddock: Area=1; Slope=0
              MicroClimate: a_interception=0; b_interception=1; c_interception=0; d_interception=0; soil_albedo=0.23; sun_angle=15; soil_heat_flux_fraction=0.4; night_interception_fraction=0.5; refheight=2; albedo=0.26; emissivity=0.96; RadIntTotal=0
              Irrigation
              Fertiliser
              SurfaceOrganicMatter: same as Validation.USA.Arkansas.Arkansas2001.Arkansas2001Base.paddock.SurfaceOrganicMatter
              Report DailyReport: same as Validation.USA.FACTS.Ames2015.Ames2015Base.paddock.DailyReport
              Manager SowingRule: same as Validation.USA.Indiana.Indiana2006.Indiana2006Base.paddock.SowingRule
              Manager HarvestRule: same as Validation.USA.FACTS.Ames2015.Ames2015Base.paddock.HarvestRule
              Report HarvestReport: EventNames=[Soybean].Harvesting
                VariableNames:
                  [Clock].Today
                  [Soybean].Structure.MainStemPrimordiaNo
                  [Soybean].Phenology.NFF.Value()
                  [Soybean].Script.FinalTag
              Plant Soybean: CropType=Soybean
              SoluteManager
              Soil: same as Validation.USA.Indiana.Indiana2006.Indiana2006Base.paddock.Soil
        Experiment Mississippi2003
          Factors
            Factor Cv
              Specifications=[SowingRule].Script.CultivarName=AsgrowAG4403_MG40,HornbeckHBK4891_MG40,AsgrowAG5701_MG50,PioneerP9504_MG50
            Factor Sow
              Factor Early: Specifications=[SowingRule].Script.SowingDate=2003-04-03
              Factor Late: Specifications=[SowingRule].Script.SowingDate=2003-05-06
          Simulation Mississippi2003Base
            Clock: StartDate=2003-01-01; EndDate=2003-12-31
            Summary summaryfile
            Weather: FileName=StonevilleMississippi.met
            SoilArbitrator Soil Arbitrator
            Zone paddock: same as Validation.USA.Mississippi.Mississippi2002.Mississippi2002Base.paddock
    Folder Australia
      Folder Coleambally
        Experiment Coleambally
          Factors
            Factor Sow
              Factor Dec09: Specifications=[SowingRule].Script.SowingDate=2003-12-09
          Simulation ColeaballyBase
            Clock: StartDate=2003-12-01; EndDate=2004-05-31
            Summary summaryfile
            Weather: FileName=Coleambally.met
            SoilArbitrator Soil Arbitrator
            Zone paddock: Area=1; Slope=0
              MicroClimate: a_interception=0; b_interception=1; c_interception=0; d_interception=0; soil_albedo=0.23; sun_angle=15; soil_heat_flux_fraction=0.4; night_interception_fraction=0.5; refheight=2; albedo=0.26; emissivity=0.96; RadIntTotal=0
              Irrigation
              Fertiliser
              SurfaceOrganicMatter: PoolName=maize; type=maize; mass=100; standing_fraction=0; cnr=55; CriticalResidueWeight=2000; OptimumDecompTemp=20; MaxCumulativeEOS=20; CNRatioDecompCoeff=0.277; CNRatioDecompThreshold=25; TotalLeachRain=25; MinRainToLeach=10; CriticalMinimumOrganicC=0.004; DefaultCPRatio=0; DefaultStandingFraction=0; StandingExtinctCoeff=0.5; FractionFaecesAdded=0.5
                Pools:
                  {PoolName=maize, ResidueType=maize, Mass=100, CNRatio=55, StandingFraction=0}
                ResidueTypes ResidueTypesList: LoadFromResource=ResidueTypes
              Report DailyReport: same as Validation.USA.FACTS.Ames2015.Ames2015Base.paddock.DailyReport
              Manager SowingRule
                RowSpacing = 200
                SowingDepth = 50
                SowingRate = 33
                CultivarName = Djakal
                SowingDate = 2001-06-10
                script: same as in Validation.USA.FACTS.Ames2015.Ames2015Base.paddock.SowingRule
              Manager HarvestRule: same as Validation.USA.FACTS.Ames2015.Ames2015Base.paddock.HarvestRule
              Report HarvestReport: EventNames=[Soybean].Harvesting
                VariableNames:
                  [Clock].Today
                  [Soybean].Structure.MainStemPrimordiaNo
                  [Soybean].Phenology.NFF.Value()
                  [Soybean].Script.FinalTag
              Plant Soybean: CropType=Soybean
              SoluteManager
              Soil: SoilType=APS6Soil; LocalName=APS6Site; Site=APS6Site; NearestTown=Unknown; Region=Lawes; NaturalVegetation=Unknown; Latitude=0; Longitude=0
                Water
                  Thickness  BD    AirDry  LL15  DUL   SAT
                  150        1.38  0.1     0.2   0.38  0.43
                  150        1.34  0.1     0.2   0.38  0.43
                  300        1.35  0.1     0.22  0.4   0.43
                  300        1.5   0.1     0.18  0.4   0.43
                  300        1.49  0.1     0.14  0.39  0.42
                  300        1.46  0.1     0.2   0.38  0.4
                  300        1.46  0.1     0.2   0.38  0.4
                  SoilCrop SoybeanSoil: LL=[0.2, 0.2, 0.22, 0.18, 0.14, 0.25, 0.28]; KL=[0.06, 0.05, 0.05, 0.04, 0.04, 0.06, 0.06]; XF=[1, 1, 1, 1, 1, 1, 1]
                SoilWater: SummerDate=1-Nov; SummerU=6; SummerCona=3.5; WinterDate=1-Apr; WinterU=6; WinterCona=3.5; DiffusConst=88; DiffusSlope=35.4; Salb=0.13; CN2Bare=60; CNRed=20; CNCov=0.8; slope=0; discharge_width=0; catchment_area=0; max_pond=0; ResidueInterception=0
                  Thickness  SWCON  KLAT
                  150        0.3    0
                  150        0.3    0
                  300        0.3    0
                  300        0.3    0
                  300        0.3    0
                  300        0.3    0
                  300        0.3    0
                SoilNitrogen: fom_type=[default, manure, mucuna, lablab, shemp, stable]; fract_carb=[0.2, 0.3, 0.54, 0.57, 0.45, 0]; fract_cell=[0.7, 0.3, 0.37, 0.37, 0.47, 0.1]; fract_lign=[0.1, 0.4, 0.09, 0.06, 0.08, 0.9]
                SoilOrganicMatter: RootCN=60; RootWt=100; SoilCN=14.5; EnrACoeff=1; EnrBCoeff=1; OCUnits=Total
                  Thickness  OC    FBiom  FInert
                  150        2.2   0.03   0.45
                  150        1.6   0.02   0.6
                  300        1.15  0.01   0.78
                  300        1     0.01   0.9
                  300        0.8   0.01   0.99
                  300        0.45  0.01   0.99
                  300        0.45  0.01   0.99
                Analysis: Thickness=[150, 150, 300, 300, 300, 300, 300]; PH=[7.5, 8, 8, 8, 8, 8, 8]; PHUnits=Water; BoronUnits=HotWater
                Sample Initial Water: Thickness=[150, 150, 300, 300, 300, 300, 300]; SW=[0.326, 0.326, 0.346, 0.333, 0.315, 0.326, 0.326]; NO3Units=ppm; NH4Units=ppm; SWUnits=Volumetric; OCUnits=Total; PHUnits=Water
                Sample Initial Nitrogen: NO3Units=ppm; NH4Units=ppm; SWUnits=Volumetric; OCUnits=Total; PHUnits=Water
                  Thickness  NO3  NH4
                  150        10   3
                  150        5    2
                  300        3    1
                  300        2    0.8
                  300        1    0.8
                  300        0.1  0.5
                  300        0.1  0.5
                CERESSoilTemperature
              Manager Automatic irrigation based on water deficit: same as Validation.USA.Indiana.Indiana2006.Indiana2006Base.paddock.Automatic irrigation based on water deficit
      Folder Gatton
        Experiment Gatton
          Factors
            Factor Sow
              Factor Jan9: Specifications=[SowingRule].Script.SowingDate=1990-01-09
          Simulation GattonBase
            Clock: StartDate=1990-01-01; EndDate=1990-05-31
            Summary summaryfile
            Weather: FileName=Gatton.met
            SoilArbitrator Soil Arbitrator
            Zone paddock: Area=1; Slope=0
              MicroClimate: a_interception=0; b_interception=1; c_interception=0; d_interception=0; soil_albedo=0.23; sun_angle=15; soil_heat_flux_fraction=0.4; night_interception_fraction=0.5; refheight=2; albedo=0.26; emissivity=0.96; RadIntTotal=0
              Irrigation
              Fertiliser
              SurfaceOrganicMatter: same as Validation.Australia.Coleambally.Coleambally.ColeaballyBase.paddock.SurfaceOrganicMatter
              Report DailyReport: same as Validation.USA.FACTS.Ames2015.Ames2015Base.paddock.DailyReport
              Manager SowingRule
                RowSpacing = 200
                SowingDepth = 50
                SowingRate = 38
                CultivarName = Davis
                SowingDate = 2001-06-10
                script: same as in Validation.USA.FACTS.Ames2015.Ames2015Base.paddock.SowingRule
              Manager HarvestRule: same as Validation.USA.FACTS.Ames2015.Ames2015Base.paddock.HarvestRule
              Report HarvestReport: EventNames=[Soybean].Harvesting
                VariableNames:
                  [Clock].Today
                  [Soybean].Structure.MainStemPrimordiaNo
                  [Soybean].Phenology.NFF.Value()
                  [Soybean].Script.FinalTag
              Plant Soybean: CropType=Soybean
              SoluteManager
              Soil: same as Validation.Australia.Coleambally.Coleambally.ColeaballyBase.paddock.Soil
      Folder Griffith
        Experiment Griffith
          Factors
            Factor Sow
              Factor Nov15
                Specifications:
                  [SowingRule].Script.SowingDate=1999-11-15
                  [SowingRule].Script.SowingDepth=50
                  [HarvestRule].Script.HarvestDate=2000-04-06
              Factor Dec08
                Specifications:
                  [SowingRule].Script.SowingDate=1999-12-08
                  [SowingRule].Script.SowingDepth=50
                  [HarvestRule].Script.HarvestDate=2000-04-12
              Factor Jan06
                Specifications:
                  [SowingRule].Script.SowingDate=2000-01-06
                  [SowingRule].Script.SowingDepth=50
                  [HarvestRule].Script.HarvestDate=2000-04-27
            Factor Cv: Specifications=[SowingRule].Script.CultivarName=Hooper_MG40,Stephens_MG40
          Simulation GriffithBase
            Clock: StartDate=1999-11-10; EndDate=2000-05-31
            Summary summaryfile
            Weather: FileName=Griffith.met
            SoilArbitrator Soil Arbitrator
            Zone paddock: Area=1; Slope=0
              MicroClimate: a_interception=0; b_interception=1; c_interception=0; d_interception=0; soil_albedo=0.23; sun_angle=15; soil_heat_flux_fraction=0.4; night_interception_fraction=0.5; refheight=2; albedo=0.26; emissivity=0.96; RadIntTotal=0
              Irrigation
              Manager Automatic irrigation based on water deficit: same as Validation.USA.Indiana.Indiana2006.Indiana2006Base.paddock.Automatic irrigation based on water deficit
              Fertiliser
              SurfaceOrganicMatter: same as Validation.USA.Arkansas.Arkansas2001.Arkansas2001Base.paddock.SurfaceOrganicMatter
              Report DailyReport: same as Validation.USA.FACTS.Ames2015.Ames2015Base.paddock.DailyReport
              Manager SowingRule
                RowSpacing = 760
                SowingDepth = 50
                SowingRate = 30
                CultivarName = Ames_P932T16R_32MG
                SowingDate = 2001-06-10
                script: same as in Validation.USA.FACTS.Ames2015.Ames2015Base.paddock.SowingRule
              Manager HarvestRule
                HarvestDate = 2000-04-04
```csharp
using System;
using Models.Core;
using System.Collections.Generic;
using System.Text;
using Models.Soils;
using Models.PMF;
using Models;
using System.Xml.Serialization;
using APSIM.Shared.Utilities;

namespace Models
{
    [Serializable] 
    public class Script : Model
    {      
        [Link] Plant Soybean;          
        [Link] Clock Clock;

                    
        [Description("Harvest Date")]
        public DateTime HarvestDate { get; set; }

        [EventSubscribe("Commencing")]
        private void OnSimulationCommencing(object sender, EventArgs e)
        {
        }       
        
        [EventSubscribe("DoManagement")]
        private void OnDoManagement(object sender, EventArgs e)
        {
           if (Clock.Today.Date == HarvestDate)
           {
           Soybean.Harvest();
           Soybean.EndCrop();
           }
        }
        
        [EventSubscribe("DoManagementCalculations")]
        private void OnDoManagementCalculations(object sender, EventArgs e)
        {
            
        }
    }
}
```
              Report HarvestReport: EventNames=[Soybean].Harvesting
                VariableNames:
                  [Clock].Today
                  [Soybean].Structure.MainStemPrimordiaNo
                  [Soybean].Phenology.NFF.Value()
                  [Soybean].Script.FinalTag
              Plant Soybean: CropType=Soybean
              SoluteManager
              Soil: same as Validation.USA.Indiana.Indiana2006.Indiana2006Base.paddock.Soil
      Folder Katherine
        Experiment Katherine1988
          Factors
            Factor Water: Specifications=[AutomaticIrrigation]
              Manager Irrigated
                FASW = 0
                WaterDeficit = 0
                AutoIrrigationOn = True
                FASWThreshold = 0.7
                FASWDepth = 1200
                script: same as in Validation.USA.Indiana.Indiana2006.Indiana2006Base.paddock.Automatic irrigation based on water deficit
              Manager Rainfed
                FASW = 0
                WaterDeficit = 0
                AutoIrrigationOn = False
                FASWThreshold = 0.7
                FASWDepth = 1200
                script: same as in Validation.USA.Indiana.Indiana2006.Indiana2006Base.paddock.Automatic irrigation based on water deficit
          Simulation Katherine1988Base
            Clock: StartDate=1988-01-01; EndDate=1988-05-31
            Summary summaryfile
            Weather: FileName=Katherine1988.met
            SoilArbitrator Soil Arbitrator
            Zone paddock: Area=1; Slope=0
              MicroClimate: a_interception=0; b_interception=1; c_interception=0; d_interception=0; soil_albedo=0.23; sun_angle=15; soil_heat_flux_fraction=0.4; night_interception_fraction=0.5; refheight=2; albedo=0.26; emissivity=0.96; RadIntTotal=0
              Irrigation
              Manager AutomaticIrrigation: same as Validation.USA.Indiana.Indiana2006.Indiana2006Base.paddock.Automatic irrigation based on water deficit
              Fertiliser
              SurfaceOrganicMatter: same as Validation.USA.Arkansas.Arkansas2001.Arkansas2001Base.paddock.SurfaceOrganicMatter
              Report DailyReport: same as Validation.USA.FACTS.Ames2015.Ames2015Base.paddock.DailyReport
              Manager SowingRule
                RowSpacing = 500
                SowingDepth = 40
                SowingRate = 35
                CultivarName = Buchanan
                SowingDate = 1988-01-05
                script: same as in Validation.USA.FACTS.Ames2015.Ames2015Base.paddock.SowingRule
              Manager HarvestRule: same as Validation.USA.FACTS.Ames2015.Ames2015Base.paddock.HarvestRule
              Report HarvestReport: EventNames=[Soybean].Harvesting
                VariableNames:
                  [Clock].Today
                  [Soybean].Structure.MainStemPrimordiaNo
                  [Soybean].Phenology.NFF.Value()
                  [Soybean].Script.FinalTag
              Plant Soybean: CropType=Soybean
              SoluteManager
              Soil: Latitude=0; Longitude=0
                Water
                  Thickness  BD    AirDry  LL15  DUL   SAT
                  150        1.56  0.05    0.19  0.3   0.31
                  150        1.52  0.08    0.21  0.31  0.33
                  150        1.46  0.21    0.21  0.31  0.34
                  150        1.46  0.22    0.22  0.32  0.34
                  150        1.42  0.22    0.22  0.33  0.34
                  150        1.42  0.22    0.22  0.33  0.34
                  300        1.46  0.22    0.22  0.32  0.34
                  300        1.5   0.23    0.23  0.34  0.35
                  300        1.53  0.24    0.24  0.35  0.37
                  SoilCrop SoybeanSoil: LL=[0.19, 0.21, 0.21, 0.23, 0.23, 0.24, 0.25, 0.28, 0.28]; KL=[0.16, 0.16, 0.12, 0.1, 0.1, 0.08, 0.06, 0.04, 0.03]; XF=[1, 1, 1, 1, 1, 1, 1, 0, 0]
                SoilWater: SummerDate=1-Nov; SummerU=1.5; SummerCona=6.6; WinterDate=1-Apr; WinterU=1.5; WinterCona=6.6; DiffusConst=88; DiffusSlope=35.4; Salb=0.2; CN2Bare=70; CNRed=20; CNCov=0.8; slope=0; discharge_width=0; catchment_area=0; max_pond=0; Thickness=[150, 150, 150, 150, 150, 150, 300, 300, 300]; SWCON=[0.7, 0.7, 0.7, 0.7, 0.7, 0.7, 0.7, 0.7, 0.7]; ResidueInterception=0
                SoilNitrogen: fom_type=[default, manure, mucuna, lablab, shemp, stable]; fract_carb=[0.2, 0.3, 0.54, 0.57, 0.45, 0]; fract_cell=[0.7, 0.3, 0.37, 0.37, 0.47, 0.1]; fract_lign=[0.1, 0.4, 0.09, 0.06, 0.08, 0.9]
                SoilOrganicMatter: RootCN=36; RootWt=2000; SoilCN=14.5; EnrACoeff=7.4; EnrBCoeff=0.2; OCUnits=Total
                  Thickness  OC    FBiom  FInert
                  150        1.27  0.04   0.39
                  150        0.59  0.02   0.47
                  150        0.34  0.01   0.52
                  150        0.34  0.01   0.62
                  150        0.26  0.01   0.74
                  150        0.26  0.01   0.83
                  300        0.25  0.01   0.93
                  300        0.19  0.01   0.93
                  300        0.21  0.01   0.93
                Analysis: Thickness=[150, 150, 150, 150, 150, 150, 300, 300, 300]; PH=[6.5, 6.2, 6.3, 6.4, 6.5, 6.6, 6.6, 6.5, 6.5]; PHUnits=Water; BoronUnits=HotWater
                Sample InitialN: NO3Units=ppm; NH4Units=ppm; SWUnits=Volumetric; OCUnits=Total; PHUnits=Water
                  Thickness  NO3  NH4
                  150        2    1
                  150        2    1
                  150        2    1
                  150        2    1
                  150        2    1
                  150        2    1
                  300        2    1
                  300        2    1
                  300        2    1
                Sample InitialSW: Thickness=[150, 150, 150, 150, 150, 150, 300, 300, 300]; NO3Units=ppm; NH4Units=ppm; SWUnits=Volumetric; OCUnits=Total; PHUnits=Water
                  SW=[0.304, 0.31, 0.31, 0.324, 0.328, 0.328, 0.325, 0.337, 0.35]
                CERESSoilTemperature
        Experiment Katherine1989
          Factors
            Factor Sow: Specifications=[Operations]
              Operations Jan10
                1989-01-10  [Soybean].Sow(population:35, cultivar:Buchanan, depth:40, rowSpacing:360, budNumber:1);
                1989-01-15  [Irrigation].Apply(17)
              Operations Feb07
                1989-02-07  [Soybean].Sow(population:35, cultivar:Buchanan, depth:40, rowSpacing:360, budNumber:1);
          Simulation Katherine1989Base
            Clock: StartDate=1989-01-10; EndDate=1989-05-31
            Summary summaryfile
            Weather: FileName=katherine1989.met
            SoilArbitrator Soil Arbitrator
            Zone paddock: Area=1; Slope=0
              MicroClimate: a_interception=0; b_interception=1; c_interception=0; d_interception=0; soil_albedo=0.23; sun_angle=15; soil_heat_flux_fraction=0.4; night_interception_fraction=0.5; refheight=2; albedo=0.26; emissivity=0.96; RadIntTotal=0
              Irrigation
              Fertiliser
              SurfaceOrganicMatter: same as Validation.USA.Arkansas.Arkansas2001.Arkansas2001Base.paddock.SurfaceOrganicMatter
              Report DailyReport: same as Validation.USA.FACTS.Ames2015.Ames2015Base.paddock.DailyReport
              Manager HarvestRule: same as Validation.USA.FACTS.Ames2015.Ames2015Base.paddock.HarvestRule
              Report HarvestReport: EventNames=[Soybean].Harvesting
                VariableNames:
                  [Clock].Today
                  [Soybean].Structure.MainStemPrimordiaNo
                  [Soybean].Phenology.NFF.Value()
                  [Soybean].Script.FinalTag
              Plant Soybean: CropType=Soybean
              SoluteManager
              Soil: same as Validation.Australia.Katherine.Katherine1988.Katherine1988Base.paddock.Soil
              Operations
      Folder Kununurra
        Experiment Kununurra1980
          Factors
            Factor Water: Specifications=[IrrigationSchedule]
              Operations Wet
                1980-04-01  [Irrigation].Apply(20)
                1980-04-04  [Irrigation].Apply(20)
                1980-04-07  [Irrigation].Apply(20)
                1980-04-15  [Irrigation].Apply(50)
                1980-04-22  [Irrigation].Apply(50)
                1980-04-29  [Irrigation].Apply(50)
                1980-05-06  [Irrigation].Apply(50)
                1980-05-13  [Irrigation].Apply(50)
                1980-05-20  [Irrigation].Apply(50)
                1980-05-27  [Irrigation].Apply(50)
                1980-06-03  [Irrigation].Apply(50)
                1980-06-10  [Irrigation].Apply(50)
                1980-06-17  [Irrigation].Apply(50)
                1980-06-24  [Irrigation].Apply(50)
                1980-07-01  [Irrigation].Apply(50)
                1980-07-08  [Irrigation].Apply(50)
                1980-07-15  [Irrigation].Apply(50)
                1980-07-22  [Irrigation].Apply(50)
              Operations Dry
                1980-04-01  [Irrigation].Apply(20)
                1980-04-04  [Irrigation].Apply(20)
                1980-04-07  [Irrigation].Apply(20)
                1980-04-15  [Irrigation].Apply(50)
              Operations WetDry
                1980-04-01  [Irrigation].Apply(20)
                1980-04-04  [Irrigation].Apply(20)
                1980-04-07  [Irrigation].Apply(20)
                1980-04-15  [Irrigation].Apply(50)
                1980-04-22  [Irrigation].Apply(50)
                1980-04-29  [Irrigation].Apply(50)
                1980-05-06  [Irrigation].Apply(50)
                1980-05-13  [Irrigation].Apply(50)
          Simulation Kununurra1980Base
            Clock: StartDate=1980-04-01; EndDate=1980-07-31
            Summary summaryfile
            Weather: FileName=Kununurra.met
            SoilArbitrator Soil Arbitrator
            Zone paddock: Area=1; Slope=0
              MicroClimate: a_interception=0; b_interception=1; c_interception=0; d_interception=0; soil_albedo=0.23; sun_angle=15; soil_heat_flux_fraction=0.4; night_interception_fraction=0.5; refheight=2; albedo=0.26; emissivity=0.96; RadIntTotal=0
              Irrigation
              Fertiliser
              SurfaceOrganicMatter: same as Validation.USA.Arkansas.Arkansas2001.Arkansas2001Base.paddock.SurfaceOrganicMatter
              Report DailyReport: same as Validation.USA.FACTS.Ames2015.Ames2015Base.paddock.DailyReport
              Manager SowingRule
                RowSpacing = 500
                SowingDepth = 40
                SowingRate = 35
                CultivarName = Buchanan
                SowingDate = 1980-04-01
                script: same as in Validation.USA.FACTS.Ames2015.Ames2015Base.paddock.SowingRule
              Manager HarvestRule: same as Validation.USA.FACTS.Ames2015.Ames2015Base.paddock.HarvestRule
              Report HarvestReport: EventNames=[Soybean].Harvesting
                VariableNames:
                  [Clock].Today
                  [Soybean].Structure.MainStemPrimordiaNo
                  [Soybean].Phenology.NFF.Value()
                  [Soybean].Script.FinalTag
              Plant Soybean: CropType=Soybean
              SoluteManager
              Soil: same as Validation.Australia.Katherine.Katherine1988.Katherine1988Base.paddock.Soil
              Operations IrrigationSchedule
        Experiment Kununurra1979
          Factors
            Factor Water: Specifications=[IrrigationSchedule]
              Operations Wet
                1979-04-10  [Irrigation].Apply(20)
                1979-04-13  [Irrigation].Apply(20)
                1979-04-16  [Irrigation].Apply(20)
                1979-04-23  [Irrigation].Apply(50)
                1979-04-30  [Irrigation].Apply(50)
                1979-05-07  [Irrigation].Apply(50)
                1979-05-14  [Irrigation].Apply(50)
                1979-05-21  [Irrigation].Apply(50)
                1979-05-28  [Irrigation].Apply(50)
                1979-06-04  [Irrigation].Apply(50)
                1979-06-11  [Irrigation].Apply(50)
                1979-06-18  [Irrigation].Apply(50)
                1979-06-25  [Irrigation].Apply(50)
                1979-07-02  [Irrigation].Apply(50)
                1979-07-09  [Irrigation].Apply(50)
                1979-07-16  [Irrigation].Apply(50)
                1979-07-23  [Irrigation].Apply(50)
              Operations Dry
                1979-04-10  [Irrigation].Apply(20)
                1979-04-13  [Irrigation].Apply(20)
                1979-04-16  [Irrigation].Apply(20)
                1979-04-23  [Irrigation].Apply(50)
              Operations WetDry
                1979-04-10  [Irrigation].Apply(20)
                1979-04-13  [Irrigation].Apply(20)
                1979-04-16  [Irrigation].Apply(20)
                1979-04-23  [Irrigation].Apply(50)
                1979-04-30  [Irrigation].Apply(50)
                1979-05-07  [Irrigation].Apply(50)
          Simulation Kununurra1979Base
            Clock: StartDate=1979-04-01; EndDate=1979-07-31
            Summary summaryfile
            Weather: FileName=Kununurra.met
            SoilArbitrator Soil Arbitrator
            Zone paddock: Area=1; Slope=0
              MicroClimate: a_interception=0; b_interception=1; c_interception=0; d_interception=0; soil_albedo=0.23; sun_angle=15; soil_heat_flux_fraction=0.4; night_interception_fraction=0.5; refheight=2; albedo=0.26; emissivity=0.96; RadIntTotal=0
              Irrigation
              Fertiliser
              SurfaceOrganicMatter: same as Validation.USA.Arkansas.Arkansas2001.Arkansas2001Base.paddock.SurfaceOrganicMatter
              Report DailyReport: same as Validation.USA.FACTS.Ames2015.Ames2015Base.paddock.DailyReport
              Manager SowingRule
                RowSpacing = 500
                SowingDepth = 50
                SowingRate = 25
                CultivarName = Buchanan
                SowingDate = 1979-04-10
                script: same as in Validation.USA.FACTS.Ames2015.Ames2015Base.paddock.SowingRule
              Manager HarvestRule: same as Validation.USA.FACTS.Ames2015.Ames2015Base.paddock.HarvestRule
              Report HarvestReport: EventNames=[Soybean].Harvesting
                VariableNames:
                  [Clock].Today
                  [Soybean].Structure.MainStemPrimordiaNo
                  [Soybean].Phenology.NFF.Value()
                  [Soybean].Script.FinalTag
              Plant Soybean: CropType=Soybean
              SoluteManager
              Soil: Latitude=0; Longitude=0
                Water: same as Validation.Australia.Katherine.Katherine1988.Katherine1988Base.paddock.Soil.Water
                SoilWater: same as Validation.Australia.Katherine.Katherine1988.Katherine1988Base.paddock.Soil.SoilWater
                SoilNitrogen: fom_type=[default, manure, mucuna, lablab, shemp, stable]; fract_carb=[0.2, 0.3, 0.54, 0.57, 0.45, 0]; fract_cell=[0.7, 0.3, 0.37, 0.37, 0.47, 0.1]; fract_lign=[0.1, 0.4, 0.09, 0.06, 0.08, 0.9]
                SoilOrganicMatter: same as Validation.Australia.Katherine.Katherine1988.Katherine1988Base.paddock.Soil.SoilOrganicMatter
                Analysis: Thickness=[150, 150, 150, 150, 150, 150, 300, 300, 300]; PH=[6.5, 6.2, 6.3, 6.4, 6.5, 6.6, 6.6, 6.5, 6.5]; PHUnits=Water; BoronUnits=HotWater
                Sample InitialN: NO3Units=ppm; NH4Units=ppm; SWUnits=Volumetric; OCUnits=Total; PHUnits=Water
                  Thickness  NO3  NH4
                  150        2    1
                  150        2    1
                  150        2    1
                  150        2    1
                  150        2    1
                  150        2    1
                  300        2    1
                  300        2    1
                  300        2    1
                Sample InitialSW: Thickness=[150, 150, 150, 150, 150, 150, 300, 300, 300]; NO3Units=ppm; NH4Units=ppm; SWUnits=Volumetric; OCUnits=Total; PHUnits=Water
                  SW=[0.304, 0.31, 0.31, 0.235, 0.233, 0.242, 0.248, 0.277, 0.285]
                CERESSoilTemperature
              Operations IrrigationSchedule
    Folder Combined Results
      Memo Combined Results
        Simulation results for the combined datasets from the various countries are shown in the following graphs.  The model is able to adequately capture the influence of growing conditions (soil, climate) and management (population, Nitrogen, irrigation, sowing date).
    Folder FixationTest
      Experiment FixationTest
        Factors
          Factor Sow
            Factor Jan9: Specifications=[SowingRule].Script.SowingDate=1990-01-09
          Factor NRate: Specifications=[Operations]
            Operations 0
              1990-01-10  [Fertiliser].Apply(0, Fertiliser.Types.NO3N, 50);
            Operations 300
              1990-01-10  [Fertiliser].Apply(300, Fertiliser.Types.NO3N, 50);
        Simulation FixationTestBase
          Clock: StartDate=1990-01-01; EndDate=1990-05-31
          Summary summaryfile
          Weather: FileName=Gatton.met
          SoilArbitrator Soil Arbitrator
          Zone paddock: Area=1; Slope=0
            MicroClimate: a_interception=0; b_interception=1; c_interception=0; d_interception=0; soil_albedo=0.23; sun_angle=15; soil_heat_flux_fraction=0.4; night_interception_fraction=0.5; refheight=2; albedo=0.26; emissivity=0.96; RadIntTotal=0
            Irrigation
            Fertiliser
            SurfaceOrganicMatter: same as Validation.Australia.Coleambally.Coleambally.ColeaballyBase.paddock.SurfaceOrganicMatter
            Report DailyReport: same as Validation.USA.FACTS.Ames2015.Ames2015Base.paddock.DailyReport
            Manager SowingRule: same as Validation.Australia.Gatton.Gatton.GattonBase.paddock.SowingRule
            Manager HarvestRule: same as Validation.USA.FACTS.Ames2015.Ames2015Base.paddock.HarvestRule
            Report HarvestReport: EventNames=[Soybean].Harvesting
              VariableNames:
                [Clock].Today
                [Soybean].Structure.MainStemPrimordiaNo
                [Soybean].Phenology.NFF.Value()
                [Soybean].Script.FinalTag
            Plant Soybean: CropType=Soybean
            SoluteManager
            Soil: SoilType=APS6Soil; LocalName=APS6Site; Site=APS6Site; NearestTown=Unknown; Region=Lawes; NaturalVegetation=Unknown; Latitude=0; Longitude=0
              Water: same as Validation.Australia.Coleambally.Coleambally.ColeaballyBase.paddock.Soil.Water
              SoilWater: same as Validation.Australia.Coleambally.Coleambally.ColeaballyBase.paddock.Soil.SoilWater
              SoilNitrogen: fom_type=[default, manure, mucuna, lablab, shemp, stable]; fract_carb=[0.2, 0.3, 0.54, 0.57, 0.45, 0]; fract_cell=[0.7, 0.3, 0.37, 0.37, 0.47, 0.1]; fract_lign=[0.1, 0.4, 0.09, 0.06, 0.08, 0.9]
              SoilOrganicMatter: same as Validation.Australia.Coleambally.Coleambally.ColeaballyBase.paddock.Soil.SoilOrganicMatter
              Analysis: Thickness=[150, 150, 300, 300, 300, 300, 300]; PH=[7.5, 8, 8, 8, 8, 8, 8]; PHUnits=Water; BoronUnits=HotWater
              Sample Initial Water: Thickness=[150, 150, 300, 300, 300, 300, 300]; SW=[0.326, 0.326, 0.346, 0.333, 0.315, 0.326, 0.326]; NO3Units=ppm; NH4Units=ppm; SWUnits=Volumetric; OCUnits=Total; PHUnits=Water
              Sample Initial Nitrogen: NO3Units=ppm; NH4Units=ppm; SWUnits=Volumetric; OCUnits=Total; PHUnits=Water
                Thickness  NO3  NH4
                150        10   1.3
                150        5    1
                300        3    1
                300        1    0.8
                300        0.1  0.8
                300        0.1  0.5
                300        0.1  0.5
              CERESSoilTemperature
            Operations
              1993-06-29  [Barley].Sow(population: 90, cultivar: Grimmett, depth: 30, rowSpacing: 500, budNumber: 1);
              1993-06-29  [Fertiliser].Apply(100, Fertiliser.Types.NO3N, 50);
              1993-12-20  [Barley].Harvest();
              1993-12-20  [Barley].EndCrop();
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