Simulations: Version=69
  DataStore
  Simulation AnimalSlurp
    Clock: Start=2004-09-01; End=2007-07-27
    Weather: FileName=%root%\Examples\WeatherFiles\lincoln.met
    MicroClimate: a_interception=0; b_interception=1; c_interception=0; d_interception=0; soil_albedo=0.3; SoilHeatFluxFraction=0.4; NightInterceptionFraction=0.5; ReferenceHeight=2
    Manager ManageStock
```csharp
using System;
using Models.Core;
using Models.Utilities;
using Models.GrazPlan;
using APSIM.Shared.Utilities;

namespace Models
{
    [Serializable]
    public class Script : Model
    {
        [Link] Clock Calendar;
        [Link] Stock Animals;
        [Link] Supplement Feed;

        private double sale_age = 3.0;
        private int no_to_buy;
        private int group_count;
        private int g;
        
        [EventSubscribe("DoManagement")]
        private void OnDoManagement(object sender, EventArgs e)
        {
            // purchase animals annually
            //if (DateUtilities.DatesEqual("1-jan", Calendar.Today))
            if (Calendar.Today == new DateTime(2004,9,01))
            {
                g = Animals.NoGroups + 1;
                //no_to_buy = 500 - Animals.NumberAll;
                
                StockBuy purchase = new StockBuy();
                purchase.Genotype = "EternalKiwiCross";
                purchase.Number = 10;
                purchase.Sex = "cow";
                purchase.Age = 36;
                purchase.Weight = 450.0;
                purchase.UseTag = g + 1;

                Animals.Buy(purchase);
                Animals.Move(g, "Paddock");
            }


            //if (Animals.NumberAll > 0)
            //    Feed.Feed("wheat, crushed", 0.5 * Animals.NumberAll, "Feedlot");
        }
    }
}
```
    Stock: RandSeed=9999
      GenoTypes:
        {Conception=[0, 1, 0, 0], Name=EternalKiwiCross, DamBreed=Friesian, SireBreed=Jersey, Generation=1, SRW=500, DeathRate=0, RefFleeceWt=0, MaxFibreDiam=0, FleeceYield=0, PeakMilk=35, WnrDeathRate=0}
      PaddockList:
        {Area=1, Slope=0}
    Supplement: SpoilageTime=0
      Stores:
        Name            Stored  IsRoughage  DMContent  DMD  MEContent  CPConc  ProtDg  PConc   SConc   EEConc  ADIP2CP  AshAlk  MaxPassage
        fodder          0       true        0.85       0    0          0       0       0       0       0       0        0       0
        wheat, crushed  500000  false       0.89       0.9  13.8       0.14    0.92    0.0038  0.0014  0.02    0.02     0.18    0
    Summary SummaryFile
    Zone Paddock: Area=1; Slope=0; AspectAngle=0; Altitude=50
      Manager SlurpPreGrazingSet
        SSheetFileName = C:\aaUnderVC\apsimNextGen\Prototypes\StockAndSupplement\LUDF_Observed.xlsx
        CultivarName = Pasture
        SSheetWorksheetName = clean data no zeros
```csharp
using System;
using Models.Core;
using Models.Utilities;
using Models.GrazPlan;
using APSIM.Shared.Utilities;
using Models.PMF;
using Models.PMF.Organs;
using System.Data;
using System.IO;
using System.Diagnostics;
    
namespace Models
{
	[Serializable]
	public class Script : Model
	{
		[Link] Clock clock;
		[Link] Plant slurp;
		[Link] Simulation simulation;

		[NonSerialized]
		private DataView data;

		[NonSerialized]
		private SimpleLeaf slurpLeaf;

		[Separator("Slurp will be 'sown' on the first day of the simulation")]

        [Description("Slurp 'cultivar', select 'Pasture'")]
        [Display(Type=DisplayType.CultivarName)]
        public string CultivarName { get; set; }


        [Description("EXCEL file name with the resetting data (must be .xlsx)")]
        [Display(Type=DisplayType.FileName)]
		public string SSheetFileName { get; set; }

		[Description ("Name of worksheet containing the data")]
		public string SSheetWorksheetName { get; set; }

		[EventSubscribe("StartOfSimulation")]
		private void OnStartOfSimulation(object sender, EventArgs e)
		{
			var fullFileName = SSheetFileName;
			if (simulation != null && simulation.FileName != null)
                fullFileName = PathUtilities.GetAbsolutePath(SSheetFileName, simulation.FileName);

			if (!File.Exists(fullFileName))
				throw new Exception("Cannot find file: " + fullFileName);
			data = new DataView(ExcelUtilities.ReadExcelFileData(fullFileName, SSheetWorksheetName, headerRow:true));

			slurpLeaf = Apsim.Child(slurp, typeof(SimpleLeaf)) as SimpleLeaf;

			double wt = 300;
			slurpLeaf.Live.StructuralWt = wt;
			slurpLeaf.Live.StorageWt = 0;
			slurpLeaf.Live.StructuralN = wt * slurpLeaf.MinNconc;
			slurpLeaf.Live.StorageN = wt * slurpLeaf.MaxNconc - slurpLeaf.Live.StructuralN;
		}

		[EventSubscribe("DoManagement")]
		private void OnDoManagement(object sender, EventArgs e)
		{
			double DM = 0;
			double digestibility = 0;

	        if (clock.Today.Date == clock.StartDate)
                slurp.Sow(cultivar: CultivarName, population: 1, depth: 600, rowSpacing: 150);


			// Find last DM value - This will be the most recent day.
			data.RowFilter = "Date <=#" + clock.Today.ToString("yyyy-MM-dd") + "# and Pre_Cover >0";
			if (data.Count > 0)
			{
				var mostRecentRow = data[data.Count-1];

				if (!Convert.IsDBNull(mostRecentRow["Pre_Cover"]))
					DM = Convert.ToDouble(mostRecentRow["Pre_Cover"]) / 10; // to g/m2
			}

			// Find last ME value - This will be the most recent day.
			data.RowFilter = "Date <=#" + clock.Today.ToString("yyyy-MM-dd") + "# and Pasture_ME >0";
			if (data.Count > 0)
			{
				var mostRecentRow = data[data.Count-1];

				if (!Convert.IsDBNull(mostRecentRow["Pasture_ME"]))
					digestibility = Convert.ToDouble(mostRecentRow["Digestibility"]);
			}
			if (digestibility == 0)
				digestibility = 0.84;

			if (DM > 0)
			{
				slurpLeaf.Live.StructuralWt = DM;
				slurpLeaf.Live.StorageWt = 0;
				slurpLeaf.Live.DMDOfStructural = digestibility;
				slurpLeaf.Live.StructuralN = DM * slurpLeaf.MinNconc;
				slurpLeaf.Live.StorageN = DM * slurpLeaf.MaxNconc - slurpLeaf.Live.StructuralN;
			}

			// Columns in spreadsheet:
			// Date
			// Pasture_Growth_Rate	(kgDM/ha/day)
			// Pre_Cover  (kgDM/ha)
			// Post_Cover (kgDM/ha)
			// PastureOffered_Obs (kgDM/cow/d)
			// PastureOffered_ObsMJ (MJME/cow/d)
			// PastureOffered_Mlcalc (MJME/kgDM)
			// Milkers offered Grass Silage (kgDM/cow/d)
			// ME Silage Obs or Assumed (MJME/kgDM)
			// EstmSilageIntake_Obs (MJME)
			// EstmSilageIntake_Calc (MJME)
			// EstmTotalIntake_Obs (MJME)
			// EstmTotalIntake_Calc (MJME)
			// Pasture_ME (ME/kgDM)
			// Pasture_Protein (%)
			// Pasture_DM (%)
			// Pasture_WSC (%)
			// Pasture_NDF (%)
			// Digestability
		}
    }
}
```
      Plant Slurp: CropType=Slurp; IsEnding=false; DaysAfterEnding=0
      SurfaceOrganicMatter: InitialResidueName=wheat_stubble; InitialResidueType=wheat; InitialResidueMass=0; InitialStandingFraction=0; InitialCPR=0; InitialCNR=100; FractionFaecesAdded=0.5
      Soil: ASCOrder=Vertosol; ASCSubOrder=Black; SoilType=Clay; Site=Norwin; NearestTown=Norwin; Region=Darling Downs and Granite Belt; State=Queensland; Country=Australia; NaturalVegetation=Qld. Bluegrass, possible Qld. Blue gum; ApsoilNumber=900; Latitude=-27.581836; Longitude=151.320206; LocationAccuracy=+/- 20m
        DataSource=CSIRO Sustainable Ecosystems, Toowoomba; Characteriesd as part of the GRDC funded project"Doing it better, doing it smarter, managing soil water in Australian agriculture' 2011
        Comments=OC, CLL for all crops estimated-based on Bongeen Mywybilla Soil No1
        Physical
          Thickness  BD       AirDry    LL15      DUL       SAT       KS
          150        1.01056  0.13025   0.2605    0.521     0.588655  20
          150        1.07146  0.198689  0.248362  0.496723  0.565677  20
          300        1.09394  0.28      0.28      0.488438  0.557193  20
          300        1.15861  0.28      0.28      0.480297  0.532787  20
          300        1.17301  0.28      0.28      0.471584  0.527354  20
          300        1.16287  0.28      0.28      0.457071  0.53118   20
          300        1.1875   0.28      0.28      0.452332  0.521888  20
          SoilCrop SlurpSoil: LL=[0.261, 0.248, 0.28, 0.306, 0.36, 0.392, 0.446]; KL=[0.06, 0.06, 0.06, 0.04, 0.04, 0.02, 0.01]; XF=[1, 1, 1, 1, 1, 1, 1]
        SoilWater: SummerDate=1-Nov; SummerU=5; SummerCona=5; WinterDate=1-Apr; WinterU=5; WinterCona=5; DiffusConst=40; DiffusSlope=16; Salb=0.12; CN2Bare=73; CNRed=20; CNCov=0.8; max_pond=0; Thickness=[150, 150, 300, 300, 300, 300, 300]; SWCON=[0.3, 0.3, 0.3, 0.3, 0.3, 0.3, 0.3]; PrecipitationInterception=0
        SoilNitrogen: fom_types=[default, manure, mucuna, lablab, shemp, stable]; fract_carb=[0.2, 0.3, 0.54, 0.57, 0.45, 0]; fract_cell=[0.7, 0.3, 0.37, 0.37, 0.47, 0.1]; fract_lign=[0.1, 0.4, 0.09, 0.06, 0.08, 0.9]
          SoilNitrogenNO3 NO3
          SoilNitrogenNH4 NH4
          SoilNitrogenUrea Urea
          SoilNitrogenPlantAvailableNO3 PlantAvailableNO3
          SoilNitrogenPlantAvailableNH4 PlantAvailableNH4
        Organic: FOMCNRatio=40
          Thickness  Carbon  SoilCNRatio  FBiom  FInert  FOM
          150        1.2     12           0.04   0.4     347.129
          150        0.96    12           0.02   0.6     270.344
          300        0.6     12           0.02   0.8     163.972
          300        0.3     12           0.02   1       99.4541
          300        0.18    12           0.01   1       60.322
          300        0.12    12           0.01   1       36.5871
          300        0.12    12           0.01   1       22.1912
        Chemical
          Thickness  NO3N  NH4N  PH
          150        1     0.1   8
          150        1     0.1   8
          300        1     0.1   8
          300        1     0.1   8
          300        1     0.1   8
          300        1     0.1   8
          300        1     0.1   8
        InitialWater: PercentMethod=1; FractionFull=1
        Sample InitialN: Thickness=[150, 150, 300, 300, 300, 300, 300]; SWUnits=Volumetric; OCUnits=Total; PHUnits=Water
        CERESSoilTemperature
      Report: EventNames=[Clock].EndOfDay
        VariableNames:
          [Clock].Today
          [Slurp].Leaf.Live.Wt
          [Slurp].Leaf.Live.N
          [Slurp].Leaf.LAI
          [Stock].NumberAll
          [Stock].WeightAll
          [Stock].IntakeAll.Weight
  Folder (disabled)
    Manager SlurpSowingRule
      CultivarName = Pasture
      InitialRootDepth = 600
```csharp
using System;
using Models.Core;
using Models.PMF;
using APSIM.Shared.Utilities;
        
namespace Models
{
    [Serializable] 
    [System.Xml.Serialization.XmlInclude(typeof(Model))]
    public class Script : Model
    {
        [Link] Plant Slurp;
        [Link] Clock Clock;

        [Separator("Slurp will be 'sown' on the first day of the simulation")]

        [Description("Cultivar")]
        [Display(Type=DisplayType.CultivarName)]
        public string CultivarName { get; set; }

        [Description("Initial Root Depth")]
        public double InitialRootDepth { get; set; }
              
        [EventSubscribe("DoManagement")]
        private void OnDoManagement(object sender, EventArgs e)
        {
            if (Clock.Today.Date == Clock.StartDate)
                Slurp.Sow(cultivar: CultivarName, population: 1, depth: InitialRootDepth, rowSpacing: 150);
            //Potato.Sow(... Contains the following arguements:
            //Population  double  Optional  Seeds sowing/m2.  Default is zero
            //Cultivar    string  Required  "NameOfCultivar"
            //Depth       double  Optional  Depth (mm) seed sown.   Default is 100mm 
            //MaxCover    double  Optional  Proportion (0-1) of the ground row crop will cover.   Default is 1.0
            //BudNumber   double  Optional  Number of mainstems per seed sown.  Default is 1.0
            //RowSpacing  double  Optional  Spaceing (mm) between drill rows when crop is sown.  Default is 150mm
            //CropClass   string  Optional  Crop class to instantiate when crop is sown.  Default is "Plant"
        }
    }
}
```
    Manager ResetSlurp
      SSheetFileName = C:\aaUnderVC\apsimNextGen\Prototypes\StockAndSupplement\LUDF_Observed.xlsx
```csharp
using System;
using Models.Core;
using Models.Utilities;
using Models.GrazPlan;
using APSIM.Shared.Utilities;
using Models.PMF;
using Models.PMF.Organs;
using System.Data;
using System.IO;
using System.Diagnostics;
    
namespace Models
{
	[Serializable]
	public class Script : Model
	{
		[Link] Clock clock;
		[Link] Plant slurp;
		[Link] Simulation simulation;

		[NonSerialized]
		private DataView data;

		[NonSerialized]
		private SimpleLeaf slurpLeaf;

        [Description("EXCEL file name (must be .xlsx)")]
        [Display(Type=DisplayType.FileName)]
		public string SSheetFileName { get; set; }

		[EventSubscribe("StartOfSimulation")]
		private void OnStartOfSimulation(object sender, EventArgs e)
		{
			var fullFileName = SSheetFileName;
			if (simulation != null && simulation.FileName != null)
                fullFileName = PathUtilities.GetAbsolutePath(SSheetFileName, simulation.FileName);

			if (!File.Exists(fullFileName))
				throw new Exception("Cannot find file: " + fullFileName);
			data = new DataView(ExcelUtilities.ReadExcelFileData(fullFileName, "Data", headerRow:true));

			slurpLeaf = Apsim.Child(slurp, typeof(SimpleLeaf)) as SimpleLeaf;

			double wt = 300;
			slurpLeaf.Live.StructuralWt = wt;
			slurpLeaf.Live.StorageWt = 0;
			slurpLeaf.Live.StructuralN = wt * slurpLeaf.MinNconc;
			slurpLeaf.Live.StorageN = wt * slurpLeaf.MaxNconc - slurpLeaf.Live.StructuralN;
		}

		[EventSubscribe("DoManagement")]
		private void OnDoManagement(object sender, EventArgs e)
		{
			double DM = 0;
			double digestibility = 0;

			// Find last DM value - This will be the most recent day.
			data.RowFilter = "Date<=#" + clock.Today.ToString("yyyy-MM-dd") + "# and Pre_Cover>0";
			if (data.Count > 0)
			{
				var mostRecentRow = data[data.Count-1];

				if (!Convert.IsDBNull(mostRecentRow["Pre_Cover"]))
					DM = Convert.ToDouble(mostRecentRow["Pre_Cover"]) / 10; // to g/m2
			}

			// Find last ME value - This will be the most recent day.
			data.RowFilter = "Date<=#" + clock.Today.ToString("yyyy-MM-dd") + "# and Pasture_ME>0";
			if (data.Count > 0)
			{
				var mostRecentRow = data[data.Count-1];

				if (!Convert.IsDBNull(mostRecentRow["Pasture_ME"]))
					digestibility = Convert.ToDouble(mostRecentRow["Digestibility"]);
			}
			if (digestibility == 0)
				digestibility = 0.84;

			if (DM > 0)
			{
				slurpLeaf.Live.StructuralWt = DM;
				slurpLeaf.Live.StorageWt = 0;
				slurpLeaf.Live.DMDOfStructural = digestibility;
				slurpLeaf.Live.StructuralN = DM * slurpLeaf.MinNconc;
				slurpLeaf.Live.StorageN = DM * slurpLeaf.MaxNconc - slurpLeaf.Live.StructuralN;
			}

			// Columns in spreadsheet:
			// Date
			// Pasture_Growth_Rate	(kgDM/ha/day)
			// Pre_Cover  (kgDM/ha)
			// Post_Cover (kgDM/ha)
			// PastureOffered_Obs (kgDM/cow/d)
			// PastureOffered_ObsMJ (MJME/cow/d)
			// PastureOffered_Mlcalc (MJME/kgDM)
			// Milkers offered Grass Silage (kgDM/cow/d)
			// ME Silage Obs or Assumed (MJME/kgDM)
			// EstmSilageIntake_Obs (MJME)
			// EstmSilageIntake_Calc (MJME)
			// EstmTotalIntake_Obs (MJME)
			// EstmTotalIntake_Calc (MJME)
			// Pasture_ME (ME/kgDM)
			// Pasture_Protein (%)
			// Pasture_DM (%)
			// Pasture_WSC (%)
			// Pasture_NDF (%)
			// Digestability
		}
    }
}
```
    Manager ManageStock
```csharp
using System;
using Models.Core;
using Models.Utilities;
using Models.GrazPlan;
using APSIM.Shared.Utilities;

namespace Models
{
    [Serializable]
    public class Script : Model
    {
        [Link] Clock Calendar;
        [Link] Stock Animals;
        [Link] Supplement Feed;

        private double sale_age = 3.0;
        private int no_to_buy;
        private int group_count;
        private int g;
        
        [EventSubscribe("DoManagement")]
        private void OnDoManagement(object sender, EventArgs e)
        {
            // purchase animals annually
            //if (DateUtilities.DatesEqual("1-jan", Calendar.Today))
            if (Calendar.Today == new DateTime(2004,6,25))
            {
                g = Animals.NoGroups + 1;
                //no_to_buy = 500 - Animals.NumberAll;
                
                StockBuy purchase = new StockBuy();
                purchase.Genotype = "Friesian";
                purchase.Number = 10;
                purchase.Sex = "cow";
                purchase.Age = 36;
                purchase.Weight = 450.0;
                purchase.UseTag = g + 1;
                
                Animals.Buy(purchase);
                Animals.Move(g, "Paddock");
            }


            //if (Animals.NumberAll > 0)
            //    Feed.Feed("wheat, crushed", 0.5 * Animals.NumberAll, "Feedlot");
        }
    }
}
```
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