Simulations: Version=80
  DataStore
  Simulation DetailOutputs
    Clock: Start=1999-01-01; End=1999-02-20
    Summary SummaryFile
    Weather: FileName=lincoln.met
    Zone Field: Area=1; Slope=0; AspectAngle=0; Altitude=50
      Report: EventNames=[Soil].WEIRDO.ReportDetails
        VariableNames:
          [Soil].WEIRDO.TimeStep as TimeStep
          [Clock].Today as Date
          [Soil].WEIRDO.Process as Process
          [Soil].WEIRDO.Hour as Hour
          [Soil].WEIRDO.ReportLayer as Layer
          [Soil].WEIRDO.PoreWater as PW
          sum([Soil].SoilWater.SWmm) as ProfileWater
          [Soil].SoilWater.SWmm as SWmm
          [Soil].SoilWater.SW as SW
          [Soil].WEIRDO.Drainage as Drainage
          [Soil].WEIRDO.Infiltration as Infiltration
          [Soil].WEIRDO.pond as Pond
          [Soil].WEIRDO.Thickness as Thickness
          [Irrigation].IrrigationApplied as Irrigation
      Fertiliser
      SurfaceOrganicMatter: InitialResidueName=wheat_stubble; InitialResidueType=wheat; InitialResidueMass=0; InitialStandingFraction=0; InitialCPR=0; InitialCNR=100; FractionFaecesAdded=1
      MicroClimate: a_interception=0; b_interception=1; c_interception=0; d_interception=0; soil_albedo=0.3; SoilHeatFluxFraction=0.4; MinimumHeightDiffForNewLayer=0; NightInterceptionFraction=0.5; ReferenceHeight=2
      Irrigation
      Manager Irrigate on a fixed date
        IrrigateDate = 2-Jan
        Amount = 100
        Depth = 0
        Efficiency = 1
        WillRunoff = False
        Duration = 2
```csharp
using System;
using Models.Core;
using Models.PMF;
using APSIM.Shared.Utilities;
namespace Models
{
    [Serializable]
    public class Script : Model
    {
        [Link] Clock Clock;
        [Link] Irrigation Irrigation;
        
        [Description("Date to irrigate")]
        public string IrrigateDate { get; set; }
        
        [Description("Amount of irrigation to be applied (mm)")]
        public double Amount { get; set; }
        
        [Description("Depth of irrigation (mm)")]
        public double Depth { get; set; }
        
        [Description("Efficiency of irrigation (0-1)")]
        public double Efficiency { get; set; }
        
        [Description("Will the irrigation runoff?")]
        public bool WillRunoff { get; set; }
        
        [Description("How may hours did it take to apply irrigation?")]
        public double Duration { get; set; }
        
        
        [EventSubscribe("DoManagement")]
        private void OnDoManagement(object sender, EventArgs e)
        {
            if (DateUtilities.WithinDates(IrrigateDate, Clock.Today, IrrigateDate))
            {
                Irrigation.Apply(amount: Amount, depth: Depth, efficiency: Efficiency, willRunoff: WillRunoff, duration: Duration);
            }
        }
    }
}
```
      Report Initial: EventNames=[Clock].DoInitialSummary
        VariableNames:
          [Soil].WEIRDO.Thickness as Thickness
          [Soil].WEIRDO.Depth as Depth
          [Soil].WEIRDO.PsiUpper as PsiUp
          [Soil].WEIRDO.RelativePoreVolume as RelWC
      Manager ClimateControl
        StartDate = 1998-01-01
        EndDate = 1998-02-20
```csharp
using System;
using Models.Core;
using APSIM.Shared.Utilities;



using System.Collections.Generic;
using System.Text;
using Models.PMF;
using Models;
using System.Xml.Serialization;

namespace Models
{
    [Serializable] 
    [System.Xml.Serialization.XmlInclude(typeof(Model))]
    public class Script : Model
    {
        [Link] Weather Met;
        [Link] Clock Clock;
    
        [Description("Start Date")]
        public DateTime StartDate { get; set; }
        
        [Description("End Date")]
        public DateTime EndDate { get; set; }
 
    
        [EventSubscribe("PreparingNewWeatherData")]
        private void OnPreparingNewWeatherData(object sender, EventArgs e)
        {
            if ((Clock.Today.Date >= StartDate) && (Clock.Today.Date <= EndDate))
                Met.Rain = 0;        
        }
    }
}
```
      Soil: ASCOrder=Vertosol; ASCSubOrder=Black; SoilType=Clay; Site=Norwin; NearestTown=Norwin; Region=Darling Downs and Granite Belt; State=Queensland; Country=Australia; NaturalVegetation=Qld. Bluegrass, possible Qld. Blue gum; ApsoilNumber=900; Latitude=-27.581836; Longitude=151.320206; LocationAccuracy=+/- 20m
        DataSource=CSIRO Sustainable Ecosystems, Toowoomba; Characteriesd as part of the GRDC funded project"Doing it better, doing it smarter, managing soil water in Australian agriculture' 2011
        Comments=OC, CLL for all crops estimated-based on Bongeen Mywybilla Soil No1
        WEIRDO: PrecipitationInterception=0; Salb=0.15; SubProfileConductance=20; WaterTableDepth=10; CalculateInfiltration=true; CalculateDrainage=true; ReportDetail=false; IncludeSorption=true; CalculateEvaporation=true; CalculateDiffusion=true; DiffusivityMultiplier=2; ExtractionMultiplier=0; ProfileWaterExtraction=0; TotalCover=0; ResidueWater=0; Hour=0; ReportLayer=0; TimeStep=0
          Thickness  LL15  DUL   SAT   CFlow  XFlow  PsiBub  MinRepellancyFactor  LowerRepellentWC  UpperRepellentWC  XF   BD
          30         0.16  0.3   0.44  7e-11  3      -20     1                    0.2               0.8               1.1  1
          170        0.15  0.3   0.44  7e-11  3      -20     1                    0.2               0.8               1.1  1
          200        0.14  0.28  0.46  7e-11  3      -70     1                    0.2               0.8               1.1  1.2
          200        0.14  0.28  0.46  7e-11  3      -70     1                    0.2               0.8               1.1  1.2
          200        0.14  0.26  0.36  7e-11  3      -70     1                    0.2               0.8               1.1  1.3
          200        0.14  0.26  0.36  7e-11  3      -70     1                    0.2               0.8               1.1  1.4
          200        0.14  0.26  0.36  7e-11  3      -70     1                    0.2               0.8               1.1  1.5
          200        0.14  0.26  0.36  7e-11  3      -70     1                    0.2               0.8               1.1  1.6
        LayerStructure: Thickness=[30, 170, 200, 200, 200, 200, 200, 200]
        Evapotranspiration
        MRSpline
        SoilNitrogen: fom_types=[default, manure, mucuna, lablab, shemp, stable]; fract_carb=[0.2, 0.3, 0.54, 0.57, 0.45, 0]; fract_cell=[0.7, 0.3, 0.37, 0.37, 0.47, 0.1]; fract_lign=[0.1, 0.4, 0.09, 0.06, 0.08, 0.9]
          SoilNitrogenNO3 NO3
          SoilNitrogenNH4 NH4
          SoilNitrogenUrea Urea
          SoilNitrogenPlantAvailableNO3 PlantAvailableNO3
          SoilNitrogenPlantAvailableNH4 PlantAvailableNH4
        Organic: FOMCNRatio=40
          Thickness  Carbon  SoilCNRatio  FBiom  FInert  FOM
          200        2.63    11           0.03   0.4     366.824
          200        1.25    11           0.02   0.7     238.964
          200        0.32    11           0.01   0.8     155.67
          200        0.21    11           0.01   0.9     101.41
          200        0.2     11           0.01   1       66.0622
          200        0.2     11           0.01   1       43.0355
          200        0.2     11           0.01   1       28.035
        Chemical
          Thickness  NO3N  NH4N  PH
          200        10    0.1   6
          200        10    0.1   6
          200        10    0.1   6
          200        10    0.1   6
          200        10    0.1   6
          200        10    0.1   6
          200        1     0.1   6
        Sample InitialN: Thickness=[150, 150, 300, 300, 300, 300, 300]; SWUnits=Volumetric; OCUnits=Total; PHUnits=Water
        Sample InitialWater: Thickness=[50, 150, 200, 200, 200, 200, 200, 200]; SW=[0.27, 0.27, 0.25, 0.25, 0.2, 0.25, 0.25, 0.25]; SWUnits=Volumetric; OCUnits=Total; PHUnits=Water
        CERESSoilTemperature
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