Simulations: Version=2
  Memo TitlePage
    # The APSIM Wheat Model

    _Brown, H.E., Huth, N.I. and Holzworth, D.P._
  Memo Introduction
    The APSIM wheat model has been developed using the Plant Modelling Framework (PMF) of [brown_plant_2014]. This new framework provides a library of plant organ and process submodels that can be coupled, at runtime, to construct a model in much the same way that models can be coupled to construct a simulation. This means that dynamic composition of lower level process and organ classes (e.g. photosynthesis, leaf) into larger constructions (e.g. maize, wheat, sorghum) can be achieved by the model developer without additional coding.

    The wheat model consists of:

    * a phenology model to simulate development through sequential growth phases
    * a structure model to simulate plant morphology
    * a collection of organs to simulate the various plant parts
    * an arbitrator to allocate resources (N, biomass) to the various plant organs
  Memo Combined Results
    #Combined Results
    Simulation results for the combined datasets from the various countries are shown in the following graphs.  The model is able to adequately capture the influence of growing conditions (soil, climate) and management (population, Nitrogen, irrigation, sowing date).
  Replacements
    Plant Wheat: CropType=Wheat
      Memo TitlePage
        # The APSIM Wheat Model

        _Brown, H.E., Huth, N.I. and Holzworth, D.P._

        The APSIM wheat model has been developed using the Plant Modelling Framework (PMF) of [brown_plant_2014]. This new framework provides a library of plant organ and process submodels that can be coupled, at runtime, to construct a model in much the same way that models can be coupled to construct a simulation. This means that dynamic composition of lower level process and organ classes (e.g. photosynthesis, leaf) into larger constructions (e.g. maize, wheat, sorghum) can be achieved by the model developer without additional coding.

        The model consists of:

        * a phenology model to simulate development between growth phases
        * a structure model to simulate plant morphology
        * a collection of organs to simulate the various plant parts
        * an arbitrator to allocate resources (N, biomass) to the various plant organs
      OrganArbitrator Arbitrator: NArbitrationOption=RelativeAllocation; DMArbitrationOption=RelativeAllocation
      Phenology
        DivideFunction MeanTemp
          AddFunction
            VariableReference MaxT: VariableName=[Weather].MaxT
            VariableReference MinT: VariableName=[Weather].MinT
          Constant Two: Value=2
        AddFunction ThermalTime
          AirTemperatureFunction ThermalTime
            XYPairs: X=[0, 26, 37]; Y=[0, 26, 0]
            Memo
              Thermal time determines the rate of developmental progress through many of the crops phases and is used by organs to determing potential growth rates.
          PhaseLookup SoilTemperatureCorrection
            PhaseLookupValue ApexBelowGround: Start=Germination; End=TerminalSpikelet
              MultiplyFunction NetDailyRadiativeHeating
                LinearInterpolationFunction DaylengthRadiationFactor: XProperty=[Phenology].Photoperiod.Value
                  XYPairs: X=[4, 12, 20]; Y=[0, 0, 0]
                LinearInterpolationFunction CanopyInsulationEffect: XProperty=[Leaf].RadIntTot
                  XYPairs: X=[0, 1]; Y=[1, 0.3]
        MovingAverageFunction MeanThermalTime: NumberOfDays=10; InitialValue=15
          VariableReference ThermalTime: VariableName=[Phenology].ThermalTime.Value
        MultiplyFunction DailyVernalisation
          VariableReference DeltaHaunStage: VariableName=[Structure].DeltaHaunStage
          AirTemperatureFunction TempResponseProfile
            Memo
              Thermal time determines the rate of developmental progress through many of the crops phases and is used by organs to determing potential growth rates.
            XYPairs
              X=[0, 1, 2, 3, 4, 5, 6, 7, 8, 9, 10, 11, 12, 13, 14, 15, 16, 17, 18, 19, 20, 30, 32]
              Y=[0, 1.20499, 1.03715, 0.892679, 0.768336, 0.661313, 0.569198, 0.489913, 0.421672, 0.362936, 0.312382, 0.26887, 0.231418, 0.1991837, 0.171439, 0.147559, 0.127005, 0.109314, 0.0940877, 0.080982, 0, 0, -0.5]
        PhotoperiodFunction Photoperiod: Twilight=-6
        PhaseLookup PercievedPhotoPeriod
          PhaseLookupValue ApexBelowGround: Start=Germination; End=Emergence
            Constant: Value=0; Units=h
          PhaseLookupValue ApexAboveGround: Start=Emergence; End=HarvestRipe
            VariableReference Photoperiod: VariableName=[Phenology].Photoperiod.Value
        MinimumFunction Vrn1
          Constant Saturation: Value=1; Units=Relative Experssion
          AccumulateFunction CurrentExpression: StartStageName=Germination; EndStageName=TerminalSpikelet
            LessThanFunction Vernalisation
              VariableReference If_Vrn4: VariableName=[Phenology].Vrn4.Value
              VariableReference IsLessThanLag: VariableName=[Phenology].VernLag.Value
              Constant Return_Zero: Value=0
              VariableReference elseReturn_Vernalisation: VariableName=[Phenology].DailyVernalisation.Value
        MinimumFunction Vrn4
          VariableReference MaxExpression: VariableName=[Phenology].VernLag.Value
          AccumulateFunction CurrentExpression: StartStageName=Germination; EndStageName=TerminalSpikelet
            VariableReference VernalisationConditioning: VariableName=[Phenology].DailyVernalisation.Value
        GerminatingPhase Germinating: Start=Sowing; End=Germination
        EmergingPhase Emerging: Start=Germination; End=Emergence; ShootLag=40; ShootRate=1.5
          VariableReference ThermalTime: VariableName=[Phenology].ThermalTime.Value
        GenericPhase Vegetative: Start=Emergence; End=TerminalSpikelet
          VariableReference ThermalTime: VariableName=[Phenology].ThermalTime.Value
          MultiplyFunction Target
            VariableReference Phyllochron: VariableName=[Structure].MeanPhyllochron.Value
            VariableReference HSTS: VariableName=[Structure].HaunStageTerminalSpikelet.Value
        LeafAppearancePhase StemElongation: Start=TerminalSpikelet; End=FlagLeaf
          VariableReference ThermalTime: VariableName=[Phenology].ThermalTime.Value
        GenericPhase EarlyReproductive: Start=FlagLeaf; End=Flowering
          VariableReference ThermalTime: VariableName=[Phenology].ThermalTime.Value
          MultiplyFunction Target
            VariableReference Phyllochron
              VariableName=[Structure].MainStemNodeAppearanceRate.BasePhyllochron.Value
            AddFunction Phyllochrons
              VariableReference LongDayBase: VariableName=[Phenology].EarlyReproductiveLongDayBase.Value
              MultiplyFunction IncreaseDueToShortPhotoPeriod
                LinearInterpolationFunction PhotoPeriodResponse: XProperty=[Phenology].Photoperiod.Value
                  XYPairs: X=[11, 16]; Y=[1, 0]
                VariableReference PpSensitivity: VariableName=[Phenology].EarlyReproductivePpSensitivity.Value
        GenericPhase GrainDevelopment: Start=Flowering; End=StartGrainFill
          Constant Target: Value=120
          VariableReference ThermalTime: VariableName=[Phenology].ThermalTime.Value
        GenericPhase GrainFilling: Start=StartGrainFill; End=EndGrainFill
          Constant Target: Value=545
          VariableReference ThermalTime: VariableName=[Phenology].ThermalTime.Value
        GenericPhase Maturing: Start=EndGrainFill; End=Maturity
          Constant Target: Value=35
          VariableReference ThermalTime: VariableName=[Phenology].ThermalTime.Value
        GenericPhase Ripening: Start=Maturity; End=HarvestRipe
          Constant Target: Value=300
          VariableReference ThermalTime: VariableName=[Phenology].ThermalTime.Value
        EndPhase ReadyForHarvesting: Start=HarvestRipe; End=Unused
          VariableReference ThermalTime: VariableName=[Phenology].ThermalTime.Value
        ZadokPMF Zadok
        OnEventFunction FlagLeafDAS: SetEvent=FlagLeaf; ReSetEvent=never
          Memo
            A function is used to provide flowering date as days after sowing(DAS).
          Constant PreEventValue: Value=0
          VariableReference PostEventValue: VariableName=[Phenology].DaysAfterSowing
        OnEventFunction FloweringDAS: SetEvent=Flowering; ReSetEvent=never
          Memo
            A function is used to provide flowering date as days after sowing(DAS).
          Constant PreEventValue: Value=0
          VariableReference PostEventValue: VariableName=[Phenology].DaysAfterSowing
        OnEventFunction MaturityDAS: SetEvent=Maturity; ReSetEvent=never
          Memo
            A function is used to provide maturity date as days after sowing(DAS).
          Constant PreEventValue: Value=0
          VariableReference PostEventValue: VariableName=[Phenology].DaysAfterSowing
        Constant MinimumLeafNumber: Value=7; Units=Leaves
          Memo
            Number of leaves the plant will produce when fully vernalised early and grown in long photoperiod
        Constant VrnSensitivity: Value=0; Units=Leaves
          Memo
            The difference between Inherent earlyness leaf number and the number of leaves produced when the plant is unvernalisaed and grown in long photoperiod
        Constant PpSensitivity: Value=3; Units=Leaves
          Memo
            The reduction in leaf number going from 8 to 16 h Pp
        Constant VernLag: Value=1; Units=Unitless
          Memo
            The amount of vernalising temperature required before vernalisation response will be evident.  Value of relative to the amount offl vernalisation temperature required from the end of the lag until vernalisation saturation.  A value of 0 means there is no lag, a value of 1 means the lag is the same (in vernal time) as the vernalisation requirement and a value of 2 means the lag is twice as long as the vernalisation response phase
        Constant EarlyReproductivePpSensitivity: Value=0
          Memo
            The phyllochrons duration for the plant to go from flag leaf ligual appearance at 16 h Pp compared to the phyllochron duration for the same phase at 8 h Pp.
        Constant EarlyReproductiveLongDayBase: Value=2.5
          Memo
            The phyllochrons duration for the plant to go from flag leaf ligual appearance at 16 h Pp.
      Structure: Initialised=false; Germinated=false; Emerged=false
        VariableReference ThermalTime: VariableName=[Phenology].ThermalTime.Value
        MultiplyFunction MainStemNodeAppearanceRate
          LinearInterpolationFunction LeafStageFactor: XProperty=[Leaf].AppearedCohortNo
            XYPairs: X=[0, 2, 3, 7, 8, 11, 12]; Y=[0.75, 0.75, 1, 1, 1.4, 1.4, 1.4]
          Constant BasePhyllochron: Value=120
          Memo Rational
            Based on [Jamieson_SIRIUS_1998] where leaf appearace could be described by a base phyllochron determined between leaves 2 and 7 and a phyllochron that was 70% of base phyllochron for leaves < 2 and 130% of base phyllochron for leaves > 7
          LinearInterpolationFunction PhotoPeriodEffect: XProperty=[Phenology].Photoperiod.Value
            XYPairs: X=[8, 12, 14]; Y=[1.6, 1, 1]
        MultiplyFunction BranchingRate
          PhaseLookup PotentialBranchingRate
            PhaseLookupValue Vegetative: Start=Emergence; End=TerminalSpikelet
              LinearInterpolationFunction PotentialBranchingRate: XProperty=[Leaf].AppearedCohortNo
                XYPairs: X=[1, 2, 3, 4, 5, 6, 7]; Y=[0, 0, 1, 1, 2, 2, 3]
            PhaseLookupValue Reproductive: Start=TerminalSpikelet; End=HarvestRipe
              Constant Zero: Value=0
          MinimumFunction StressFactors
            LinearInterpolationFunction WSC: XProperty=[Stem].PercentWSC.Value
              XYPairs: X=[0.1, 0.2]; Y=[1, 1]
            LinearInterpolationFunction Nitrogen: XProperty=[Arbitrator].FN
              XYPairs: X=[0.5, 1.5, 2]; Y=[0, 1, 1]
            LinearInterpolationFunction Cover: XProperty=[Leaf].CoverTotal
              XYPairs: X=[0, 0.5, 0.7]; Y=[1, 1, 0]
            LinearInterpolationFunction Growth: XProperty=[Structure].MeanTillerGrowthRate.Value
              XYPairs: X=[0, 0.001, 0.005]; Y=[0, 1, 1]
        PhaseLookup BranchMortality
          PhaseLookupValue MortalityPhase: Start=FlagLeaf; End=Flowering
            MultiplyFunction Mortality
              LinearInterpolationFunction MortalityPerDegDay: XProperty=[Structure].MeanTillerGrowthRate.Value
                XYPairs: X=[0, 0.005, 0.005]; Y=[0.002, 0, 0]
              VariableReference ThermalTime: VariableName=[Phenology].ThermalTime.Value
        HeightFunction HeightModel
          LinearInterpolationFunction PotentialHeight: XProperty=[Phenology].Stage
            XYPairs: X=[3, 4, 5, 6, 7]; Y=[10, 200, 1000, 1100, 1200]
          LinearInterpolationFunction WaterStress: XProperty=[Wheat].WaterSupplyDemandRatio
            XYPairs: X=[0.3, 1]; Y=[0, 1]
        MovingAverageFunction MeanTillerGrowthRate: NumberOfDays=5; InitialValue=0
          DivideFunction TillerGrowthRate
            VariableReference DailyGrowth: VariableName=[Arbitrator].DMSupply
            VariableReference ThermalTime: VariableName=[Phenology].ThermalTime.Value
            VariableReference StemPopulation: VariableName=[Structure].TotalStemPopn
        MovingAverageFunction MeanPhyllochron: NumberOfDays=300; InitialValue=80
          VariableReference Phyllochron: VariableName=[Structure].MainStemNodeAppearanceRate.Value
        HoldFunction MainStemFinalNodeNumber: WhenToHold=TerminalSpikelet
          AddFunction ValueToHold
            VariableReference MineafNumber: VariableName=[Phenology].MinimumLeafNumber.Value
            MultiplyFunction VernalLeaves
              VariableReference UnVernalisedLeaves: VariableName=[Phenology].VrnSensitivity.Value
              SubtractFunction VernalisationReductionFactor
                Constant One: Value=1
                VariableReference RelativeVrn1Expression: VariableName=[Phenology].Vrn1.Value
            MultiplyFunction PhotoPLeaves
              VariableReference ShortPpLeaves: VariableName=[Phenology].PpSensitivity.Value
              LinearInterpolationFunction PhotoPeriodReductionFactor: XProperty=[Phenology].Photoperiod.Value
                XYPairs: X=[10, 16]; Y=[1, 0]
        DivideFunction HaunStageTerminalSpikelet
          SubtractFunction FLNlessIntercept
            VariableReference FinalLeafNumber: VariableName=[Structure].MainStemFinalNodeNumber.Value
            Constant Intercept: Value=2.85
          Constant Slope: Value=1.1
        AddFunction HaunStage
          VariableReference AppearedLeaves: VariableName=[Leaf].ExpandedCohortNo
          VariableReference ProportionOfExpandingLeaf: VariableName=[Leaf].NextExpandingLeafProportion
      ReproductiveOrgan Grain: RipeStage=Ripe
        Biomass Live
        Biomass Dead
        Constant MaxNConcDailyGrowth: Value=0.03
        Constant WaterContent: Value=0.12
        Constant MinimumNConc: Value=0.006
        Constant MaximumNConc: Value=0.03
        Constant MaximumPotentialGrainSize: Value=0.043; Units=g
        PhaseBasedSwitch NitrogenDemandSwitch: Start=Germination; End=Maturity
        AccumulateFunction AccumThermalTime: StartStageName=Flowering; EndStageName=Maturity
          VariableReference DailyThermalTimeValue: VariableName=[Phenology].ThermalTime.Value
        AirTemperatureFunction FillingRate
          XYPairs: X=[0, 26, 30, 35]; Y=[0, 0.0015, 0.0015, 0.0015]
        PhaseLookup DMDemandFunction
          PhaseLookupValue InitialPhase: Start=Flowering; End=StartGrainFill
            FillingRateFunction
              VariableReference GrainNumber: VariableName=[Grain].NumberFunction.Value
              VariableReference FillingDuration: VariableName=[Phenology].GrainDevelopment.Target.Value
              VariableReference ThermalTime: VariableName=[Phenology].ThermalTime.Value
              MultiplyFunction PotentialSizeIncrement
                VariableReference InitialProportion: VariableName=[Grain].InitialGrainProportion.Value
                VariableReference MaximumSize: VariableName=[Grain].MaximumPotentialGrainSize.Value
          PhaseLookupValue LinearPhase: Start=StartGrainFill; End=EndGrainFill
            FillingRateFunction
              VariableReference GrainNumber: VariableName=[Grain].NumberFunction.Value
              VariableReference FillingDuration: VariableName=[Phenology].GrainFilling.Target.Value
              VariableReference ThermalTime: VariableName=[Phenology].ThermalTime.Value
              MultiplyFunction PotentialSizeIncrement
                SubtractFunction ProportionLinearPhase
                  Constant One: Value=1
                  VariableReference InitialProportion: VariableName=[Grain].InitialGrainProportion.Value
                VariableReference MaximumSize: VariableName=[Grain].MaximumPotentialGrainSize.Value
        ExpressionFunction Protein
          Expression=([Grain].Live.N + [Grain].Dead.N)/([Grain].Live.Wt + [Grain].Dead.Wt) * 100 * 5.71
        DivideFunction GrowthRateGrainDevelopment
          AccumulateFunction GrowthGrainDevelopment: StartStageName=FlagLeaf; EndStageName=StartGrainFill
            VariableReference DailyBiomassProduction: VariableName=[Arbitrator].DMSupply
          AccumulateFunction DaysGrainDevelopment: StartStageName=FlagLeaf; EndStageName=StartGrainFill
            Constant LenthOfADay: Value=1; Units=days/day
        Constant InitialGrainProportion: Value=0.05
        PhaseLookup NFillingRate
          PhaseLookupValue GrainFilling: Start=Flowering; End=EndGrainFill
            FillingRateFunction
              VariableReference GrainNumber: VariableName=[Grain].NumberFunction.Value
              AddFunction FillingDuration
                VariableReference FloweringToGrainFilling: VariableName=[Phenology].GrainDevelopment.Target.Value
                VariableReference GrainFilling: VariableName=[Phenology].GrainFilling.Target.Value
              VariableReference ThermalTime: VariableName=[Phenology].ThermalTime.Value
              MultiplyFunction PotentialSizeIncrement
                Constant MaximumFinalNConc: Value=0.026; Units=g/g
                VariableReference MaximumSize: VariableName=[Grain].MaximumPotentialGrainSize.Value
        Folder BiomassRemovalDefaults
          OrganBiomassRemovalType Harvest: FractionLiveToRemove=1; FractionDeadToRemove=0; FractionLiveToResidue=0; FractionDeadToResidue=0
          OrganBiomassRemovalType Cut: FractionLiveToRemove=1; FractionDeadToRemove=0; FractionLiveToResidue=0; FractionDeadToResidue=0
          OrganBiomassRemovalType Prune: FractionLiveToRemove=0; FractionDeadToRemove=0; FractionLiveToResidue=0.8; FractionDeadToResidue=0
          OrganBiomassRemovalType Graze: FractionLiveToRemove=0.6; FractionDeadToRemove=0; FractionLiveToResidue=0.2; FractionDeadToResidue=0
          OrganBiomassRemovalType Thin: FractionLiveToRemove=0; FractionDeadToRemove=0; FractionLiveToResidue=0.05; FractionDeadToResidue=0
        HoldFunction NumberFunction: WhenToHold=Flowering
          MultiplyFunction ValueToHold
            Constant GrainsPerGramOfStem: Value=25; Units=grains
            VariableReference StemMass: VariableName=[StemPlusSpike].Wt
      Root: NuptakeSupply=0
        CompositeBiomass Live: Propertys=[[Root].LayerLive]
        CompositeBiomass Dead: Propertys=[[Root].LayerDead]
        LinearInterpolationFunction KLModifier: XProperty=[Leaf].LAI
          XYPairs: X=[0, 3]; Y=[1, 1]
        Constant SoilWaterEffect: Value=1
        AirTemperatureFunction TemperatureEffect
          XYPairs: X=[0, 26, 35]; Y=[0, 1, 0]
        Constant MaxDailyNUptake: Value=20
        Constant SenescenceRate: Value=0.005
        Constant StructuralFraction: Value=1
        PhaseLookup PartitionFraction
          PhaseLookupValue PreEmergence: Start=Germination; End=Emergence
            Constant Value: Value=0
          PhaseLookupValue PreFlowering: Start=Emergence; End=Flowering
            Constant Value: Value=0.2
          PhaseLookupValue PostFlowering: Start=Emergence; End=Flowering
            Constant Value: Value=0
        Constant MaximumNConc: Value=0.01
        Constant MinimumNConc: Value=0.01
        PhaseLookup RootFrontVelocity
          PhaseLookupValue PreEmergence: Start=Germination; End=Emergence
            Constant Value: Value=5
          PhaseLookupValue PostEmergence: Start=Emergence; End=Maturity
            Constant Value: Value=20
        PhaseBasedSwitch NitrogenDemandSwitch: Start=Germination; End=Maturity
        Folder BiomassRemovalDefaults
          OrganBiomassRemovalType Harvest: FractionLiveToRemove=0; FractionDeadToRemove=0; FractionLiveToResidue=0.2; FractionDeadToResidue=0
          OrganBiomassRemovalType Cut: FractionLiveToRemove=0; FractionDeadToRemove=0; FractionLiveToResidue=0.3; FractionDeadToResidue=0
          OrganBiomassRemovalType Prune: FractionLiveToRemove=0; FractionDeadToRemove=0; FractionLiveToResidue=0.1; FractionDeadToResidue=0
          OrganBiomassRemovalType Graze: FractionLiveToRemove=0; FractionDeadToRemove=0; FractionLiveToResidue=0.15; FractionDeadToResidue=0
          OrganBiomassRemovalType Thin: FractionLiveToRemove=0; FractionDeadToRemove=0; FractionLiveToResidue=0.05; FractionDeadToResidue=0
        LinearInterpolationFunction KNO3: XProperty=[Root].RootLengthDenisty
          XYPairs: X=[0, 0.004]; Y=[0.002, 0.02]
        LinearInterpolationFunction KNH4: XProperty=[Root].RootLengthDenisty
          XYPairs: X=[0, 0.004]; Y=[0.001, 0.01]
        LinearInterpolationFunction NUptakeSWFactor: XProperty=[Root].RWC
          XYPairs: X=[0, 0.2, 1]; Y=[1, 1, 1]
        Constant InitialDM: Value=0.2; Units=g/plant
        Constant SpecificRootLength: Value=40; Units=m/g
      Leaf: MaxCover=1; Albedo=0.2; Gsmax=0.015; R50=150; KDead=0.3; MaximumMainStemLeafNumber=30
        zero: CurrentExpandingLeaf, StartFractionExpanded, FractionNextleafExpanded, DeadNodesYesterday, FRGR, PotentialEP, FudgeToGetETDemandRight, TipsAtEmergence, CohortsAtInitialisation, FractionDied
        LeafCohort InitialLeaves[1]: Rank=1; Area=200
        LeafCohort InitialLeaves[2]: Rank=2; Area=0
        CompositeBiomass Live: Propertys=[[Leaf].CohortLive]
        CompositeBiomass Dead: Propertys=[[Leaf].CohortDead]
        ArrayBiomass CohortArrayLive: Propertys=[[Leaf].Live]; ArraySize=[Leaf].MaxNodeNo
        ArrayBiomass CohortArrayDead: Propertys=[[Leaf].Dead]; ArraySize=[Leaf].MaxNodeNo
        LeafCohortParameters CohortParameters
          Constant NReallocationFactor: Value=0.3
          Constant NRetranslocationFactor: Value=0.1
          Constant DMReallocationFactor: Value=0
          Constant DMRetranslocationFactor: Value=0
          MinimumFunction CellDivisionStress
            LinearInterpolationFunction WaterStressFactor: XProperty=[Wheat].WaterSupplyDemandRatio
              XYPairs: X=[0.5, 1]; Y=[0.1, 1]
            LinearInterpolationFunction NitrogenStressFactor: XProperty=[Wheat].Leaf.Fn
              XYPairs: X=[0, 0.5, 1]; Y=[0.1, 0.1, 1]
          MinimumFunction ExpansionStress
            LinearInterpolationFunction WaterStress: XProperty=[Wheat].WaterSupplyDemandRatio
              XYPairs: X=[0.1, 0.7, 1.3]; Y=[0, 1, 1]
            LinearInterpolationFunction TemperatuerEffect: XProperty=[Phenology].MeanTemp.Value
              XYPairs: X=[0, 12, 14]; Y=[0, 1, 1]
          MultiplyFunction MaxArea
            Constant AreaLargestLeaves: Value=2600; Units=mm^2
            LinearInterpolationFunction AgeFactor: XProperty=[Phenology].Stage
              XYPairs: X=[3, 3.45, 4]; Y=[0.1, 0.5, 1]
          VariableReference GrowthDuration: VariableName=[Structure].MainStemNodeAppearanceRate.Value
          PhaseLookup LagDuration
            PhaseLookupValue VegetativeGrowth: Start=Emergence; End=TerminalSpikelet
              MultiplyFunction LagDuration
                Constant Multiplier: Value=3
                VariableReference Phyllochron: VariableName=[Structure].MainStemNodeAppearanceRate.Value
            PhaseLookupValue StemElongation: Start=TerminalSpikelet; End=FlagLeaf
              ExpressionFunction LagDuration
                Expression=[Phenology].GrainFilling.Target.Value+[Phenology].GrainDevelopment.Target.Value + [Phenology].EarlyReproductive.Target.Value - [Leaf].CohortParameters.SenescenceDuration.Value
          MultiplyFunction SenescenceDuration
            Constant Multiplier: Value=3
            VariableReference Phyllochron: VariableName=[Structure].MainStemNodeAppearanceRate.Value
          Constant DetachmentLagDuration: Value=1000000
          Constant DetachmentDuration: Value=1000000
          Constant RelativeBranchLeafSize: Value=1
          LinearInterpolationFunction MaximumNConc: XProperty=[Phenology].Stage
            XYPairs: X=[3, 4, 6]; Y=[0.08, 0.05, 0.02]
          LinearInterpolationFunction CriticalNConc: XProperty=[Phenology].Stage
            XYPairs: X=[3, 4, 6]; Y=[0.07, 0.04, 0.015]
          LinearInterpolationFunction MinimumNConc: XProperty=[Phenology].Stage
            XYPairs: X=[3, 4]; Y=[0.01, 0.005]
          AddFunction DroughtInducedSenAcceleration
            Constant One: Value=1
            MultiplyFunction Stress
              Constant StressResponseCoefficient: Value=1
              LinearInterpolationFunction StressFactor: XProperty=[Wheat].WaterSupplyDemandRatio
                XYPairs: X=[0, 0.7]; Y=[1, 0]
          LinearInterpolationFunction SpecificLeafAreaMax: XProperty=[Phenology].Stage
            XYPairs: X=[3, 4]; Y=[18000, 30000]
          LinearInterpolationFunction SpecificLeafAreaMin: XProperty=[Leaf].Fn
            XYPairs: X=[0.4, 1]; Y=[10000, 18000]
          Constant InitialNConc: Value=0
          Constant StructuralFraction: Value=0.5
          Constant NonStructuralFraction: Value=0
          Constant LeafSizeShapeParameter: Value=0.3
          Constant SenessingLeafRelativeSize: Value=1; Units=0-1
          MultiplyFunction ShadeInducedSenescenceRate
            LinearInterpolationFunction RatePerDegDay: XProperty=[Leaf].CohortCurrentRankCoverAbove
              XYPairs: X=[0.99, 1]; Y=[0, 0]
              Memo
                1% per degree day means it takes one phyllochron for a shaded leaf to fully sceness
            VariableReference ThermalTime: VariableName=[Phenology].ThermalTime.Value
        RUEModel Photosynthesis
          Constant RUE: Value=1.5
          WeightedTemperatureFunction FT: MaximumTemperatureWeighting=0.5
            XYPairs: X=[0, 10, 25, 35]; Y=[0, 1, 1, 0]
          LinearInterpolationFunction FVPD: XProperty=[Leaf].Photosynthesis.VPD
            XYPairs: X=[0, 10, 50]; Y=[1, 1, 1]
          LinearInterpolationFunction FN: XProperty=[Leaf].Fn
            XYPairs: X=[0, 1, 1.5]; Y=[0, 1, 1]
          LinearInterpolationFunction FW: XProperty=[Leaf].Fw
            XYPairs: X=[0, 1, 1]; Y=[0, 1, 1]
          RUECO2Function FCO2: PhotosyntheticPathway=C3
          VariableReference RadnInt: VariableName=[Leaf].RadIntTot
        MultiplyFunction ExtinctionCoeff
          LinearInterpolationFunction PotentialExtinctionCoeff: XProperty=[Leaf].LAI
            XYPairs: X=[0, 0.5]; Y=[0.5, 0.5]
          LinearInterpolationFunction WaterStress: XProperty=[Wheat].WaterSupplyDemandRatio
            XYPairs: X=[0, 0.7]; Y=[0.5, 1]
        LinearInterpolationFunction FrostFraction: XProperty=[Weather].MinT
          XYPairs: X=[-1, 0]; Y=[0, 0]
        VariableReference ThermalTime: VariableName=[Phenology].ThermalTime.Value
        MinimumFunction FRGRFunction
          VariableReference RUE_FT: VariableName=[Leaf].Photosynthesis.FT.Value
          MinimumFunction Others
            VariableReference RUE_FN: VariableName=[Leaf].Photosynthesis.FN.Value
            VariableReference RUE_FVPD: VariableName=[Leaf].Photosynthesis.FVPD.Value
        Folder BiomassRemovalDefaults
          OrganBiomassRemovalType Harvest: FractionLiveToRemove=0; FractionDeadToRemove=0; FractionLiveToResidue=0.3; FractionDeadToResidue=0.3
          OrganBiomassRemovalType Cut: FractionLiveToRemove=0.8; FractionDeadToRemove=0.8; FractionLiveToResidue=0; FractionDeadToResidue=0
          OrganBiomassRemovalType Prune: FractionLiveToRemove=0; FractionDeadToRemove=0; FractionLiveToResidue=0.6; FractionDeadToResidue=0.6
          OrganBiomassRemovalType Graze: FractionLiveToRemove=0.6; FractionDeadToRemove=0.6; FractionLiveToResidue=0.1; FractionDeadToResidue=0.1
          OrganBiomassRemovalType Thin: FractionLiveToRemove=0; FractionDeadToRemove=0; FractionLiveToResidue=0.05; FractionDeadToResidue=0.05
      GenericAboveGroundOrgan Spike
        PopulationBasedDemandFunction DMDemandFunction
          VariableReference ThermalTime: VariableName=[Phenology].ThermalTime.Value
          Constant ExpansionStress: Value=1
          VariableReference OrganPopulation: VariableName=[Spike].HeadNumber.Value
          Constant StartStage: Value=5.2
          Constant MaximumOrganWt: Value=0.5
          Constant GrowthDuration: Value=453
        Biomass Live
        Biomass Dead
        Constant NReallocationFactor: Value=0
        Constant NRetranslocationFactor: Value=0.1
        Constant MaximumNConc: Value=0.01
        Constant StructuralFraction: Value=0.7
        Constant MinimumNConc: Value=0.003
        MultiplyFunction HeadNumber
          Constant FertileTillers: Value=1
          VariableReference StemPopulation: VariableName=[Structure].TotalStemPopn
        Folder BiomassRemovalDefaults
          OrganBiomassRemovalType Harvest: FractionLiveToRemove=0.5; FractionDeadToRemove=0; FractionLiveToResidue=0.1; FractionDeadToResidue=0
          OrganBiomassRemovalType Cut: FractionLiveToRemove=0.8; FractionDeadToRemove=0; FractionLiveToResidue=0; FractionDeadToResidue=0
          OrganBiomassRemovalType Prune: FractionLiveToRemove=0; FractionDeadToRemove=0; FractionLiveToResidue=0.6; FractionDeadToResidue=0
          OrganBiomassRemovalType Graze: FractionLiveToRemove=0.6; FractionDeadToRemove=0; FractionLiveToResidue=0.2; FractionDeadToResidue=0
          OrganBiomassRemovalType Thin: FractionLiveToRemove=0; FractionDeadToRemove=0; FractionLiveToResidue=0.05; FractionDeadToResidue=0
      GenericAboveGroundOrgan Stem
        Biomass Live
        Biomass Dead
        Constant StructuralFraction: Value=0.7
        LinearInterpolationFunction MaximumNConc: XProperty=[Phenology].Stage
          XYPairs: X=[3, 4, 6]; Y=[0.07, 0.03, 0.015]
        LinearInterpolationFunction MinimumNConc: XProperty=[Phenology].Stage
          XYPairs: X=[3, 4, 6]; Y=[0.015, 0.01, 0.0025]
        PhaseBasedSwitch NitrogenDemandSwitch: Start=Emergence; End=StartGrainFill
        Constant NReallocationFactor: Value=0
        Constant NRetranslocationFactor: Value=0.5
        PhaseLookup DMRetranslocationFactor
          PhaseLookupValue VegetativeGrowth: Start=Emergence; End=Flowering
            Constant DMRetranslocationFactor: Value=0
          PhaseLookupValue ReproductiveGrowth: Start=Flowering; End=EndGrainFill
            Constant DMRetranslocationFactor: Value=0.5
        PartitionFractionDemandFunction DMDemandFunction
          PhaseLookup PartitionFraction
            PhaseLookupValue PreStemElongation: Start=Emergence; End=TerminalSpikelet
              Constant StemFraction: Value=0.4
            PhaseLookupValue StemElongation: Start=TerminalSpikelet; End=FlagLeaf
              Constant StemFraction: Value=0.6
            PhaseLookupValue EarEmergence: Start=FlagLeaf; End=Flowering
              Constant StemFraction: Value=0.3
        Folder BiomassRemovalDefaults: same as Replacements.Wheat.Spike.BiomassRemovalDefaults
        DivideFunction PercentWSC
          VariableReference WSC: VariableName=[Stem].Live.NonStructuralWt
          VariableReference StemWt: VariableName=[Stem].Live.Wt
      CompositeBiomass AboveGround
        Propertys=[[Leaf].Live, [Leaf].Dead, [Stem].Live, [Stem].Dead, [Spike].Live, [Spike].Dead, [Grain].Live, [Grain].Dead]
      CompositeBiomass AboveGroundLive: Propertys=[[Leaf].Live, [Stem].Live, [Spike].Live, [Grain].Live]
      CompositeBiomass AboveGroundDead: Propertys=[[Leaf].Dead, [Stem].Dead, [Spike].Dead, [Grain].Dead]
      CompositeBiomass BelowGround: Propertys=[[Root].Live, [Root].Dead]
      CompositeBiomass Total
        Propertys=[[Leaf].Live, [Leaf].Dead, [Stem].Live, [Stem].Dead, [Root].Live, [Root].Dead, [Spike].Live, [Spike].Dead, [Grain].Live, [Grain].Dead]
      CompositeBiomass TotalLive
        Propertys=[[Leaf].Live, [Stem].Live, [Root].Live, [Spike].Live, [Grain].Live]
      CompositeBiomass TotalDead
        Propertys=[[Leaf].Dead, [Stem].Dead, [Root].Dead, [Spike].Dead, [Grain].Dead]
      CompositeBiomass Ear: Propertys=[[Spike].Live, [Grain].Live, [Spike].Dead, [Grain].Dead]
        Memo
          The Ear composite biomass object includes the Live and dead pools of all organs within the Ear to allow output for total dry matter and Nutrient contents, including total structural, non-structural and metabolic pools.
      CompositeBiomass StemPlusSpike: Propertys=[[Stem].Live, [Spike].Live, [Stem].Dead, [Spike].Dead]
      CultivarFolder Cultivars
        CultivarFolder New Zealand
          Cultivar Alberic
            Command:
              [Phenology].MinimumLeafNumber.Value = 9
              [Phenology].VrnSensitivity.Value = 7
              [Phenology].PpSensitivity.Value = 3
          Cultivar Amarok
            Command:
              [Phenology].MinimumLeafNumber.Value = 9
              [Phenology].VrnSensitivity.Value = 10
              [Phenology].PpSensitivity.Value = 6
              [Phenology].EarlyReproductivePpSensitivity.Value = 5
              [Structure].MainStemNodeAppearanceRate.BasePhyllochron.Value = 80
          Cultivar Aspiring
            Command:
              [Phenology].MinimumLeafNumber.Value = 9
              [Phenology].VrnSensitivity.Value = 7
              [Phenology].PpSensitivity.Value = 3
          Cultivar BattenWinter
            Command:
              [Phenology].MinimumLeafNumber.Value = 8
              [Phenology].VrnSensitivity.Value = 8
              [Phenology].PpSensitivity.Value = 5
              [Phenology].EarlyReproductivePpSensitivity.Value = 3
              [Structure].MainStemNodeAppearanceRate.BasePhyllochron.Value = 100
          Cultivar BattenSpring
            Command:
              [Phenology].MinimumLeafNumber.Value = 7
              [Phenology].VrnSensitivity.Value = 0
              [Phenology].PpSensitivity.Value = 5
              [Phenology].EarlyReproductivePpSensitivity.Value = 3
              [Structure].MainStemNodeAppearanceRate.BasePhyllochron.Value = 100
          Cultivar Centaur
            Command:
              [Phenology].MinimumLeafNumber.Value = 9
              [Phenology].VrnSensitivity.Value = 7
              [Phenology].PpSensitivity.Value = 3
          Cultivar Claire
            Command:
              [Phenology].MinimumLeafNumber.Value = 8
              [Phenology].VrnSensitivity.Value = 8
              [Phenology].PpSensitivity.Value = 8
              [Phenology].EarlyReproductivePpSensitivity.Value = 3
              [Structure].MainStemNodeAppearanceRate.BasePhyllochron.Value = 100
          Cultivar Conquest
            Command:
              [Phenology].MinimumLeafNumber.Value = 9
              [Phenology].VrnSensitivity.Value = 7
              [Phenology].PpSensitivity.Value = 3
          Cultivar Einstein
            Command:
              [Phenology].MinimumLeafNumber.Value = 9
              [Phenology].VrnSensitivity.Value = 7
              [Phenology].PpSensitivity.Value = 3
          Cultivar Exceed
            Command:
              [Phenology].MinimumLeafNumber.Value = 9
              [Phenology].VrnSensitivity.Value = 7
              [Phenology].PpSensitivity.Value = 3
          Cultivar Majestic
            Command:
              [Phenology].MinimumLeafNumber.Value = 9
              [Phenology].VrnSensitivity.Value = 7
              [Phenology].PpSensitivity.Value = 3
          Cultivar Option
            Command:
              [Phenology].MinimumLeafNumber.Value = 9
              [Phenology].VrnSensitivity.Value = 7
              [Phenology].PpSensitivity.Value = 3
          Cultivar Otane
            Command:
              [Phenology].MinimumLeafNumber.Value = 6
              [Phenology].VrnSensitivity.Value = 0
              [Phenology].PpSensitivity.Value = 4
              [Phenology].EarlyReproductivePpSensitivity.Value = 2
              [Structure].MainStemNodeAppearanceRate.BasePhyllochron.Value = 100
          Cultivar Pennant
            Command:
              [Phenology].MinimumLeafNumber.Value = 9
              [Phenology].VrnSensitivity.Value = 7
              [Phenology].PpSensitivity.Value = 3
          Cultivar Regency
            Command:
              [Phenology].MinimumLeafNumber.Value = 9
              [Phenology].VrnSensitivity.Value = 7
              [Phenology].PpSensitivity.Value = 3
          Cultivar Richmond
            Command:
              [Phenology].MinimumLeafNumber.Value = 9
              [Phenology].VrnSensitivity.Value = 7
              [Phenology].PpSensitivity.Value = 3
          Cultivar Robigus
            Command:
              [Phenology].MinimumLeafNumber.Value = 9
              [Phenology].VrnSensitivity.Value = 7
              [Phenology].PpSensitivity.Value = 3
          Cultivar Rongotea
            Command:
              [Phenology].MinimumLeafNumber.Value = 7
              [Phenology].VrnSensitivity.Value = 0
              [Phenology].PpSensitivity.Value = 2
              [Phenology].EarlyReproductivePpSensitivity.Value = 3
              [Structure].MainStemNodeAppearanceRate.BasePhyllochron.Value = 100
          Cultivar Rubric
            Command:
              [Phenology].MinimumLeafNumber.Value = 9
              [Phenology].VrnSensitivity.Value = 7
              [Phenology].PpSensitivity.Value = 3
          Cultivar Sage
            Command:
              [Phenology].MinimumLeafNumber.Value = 9
              [Phenology].VrnSensitivity.Value = 7
              [Phenology].PpSensitivity.Value = 3
          Cultivar Saracen
            Command:
              [Phenology].MinimumLeafNumber.Value = 9
              [Phenology].VrnSensitivity.Value = 7
              [Phenology].PpSensitivity.Value = 3
          Cultivar Savannah
            Command:
              [Phenology].MinimumLeafNumber.Value = 9
              [Phenology].VrnSensitivity.Value = 7
              [Phenology].PpSensitivity.Value = 3
          Cultivar Solstice
            Command:
              [Phenology].MinimumLeafNumber.Value = 9
              [Phenology].VrnSensitivity.Value = 7
              [Phenology].PpSensitivity.Value = 3
          Cultivar Tanker
            Command:
              [Phenology].MinimumLeafNumber.Value = 9
              [Phenology].VrnSensitivity.Value = 7
              [Phenology].PpSensitivity.Value = 3
          Cultivar Tribute
            Command:
              [Phenology].MinimumLeafNumber.Value = 9
              [Phenology].VrnSensitivity.Value = 7
              [Phenology].PpSensitivity.Value = 3
          Cultivar Wakanui
            Command:
              [Phenology].MinimumLeafNumber.Value = 8
              [Phenology].VrnSensitivity.Value = 10
              [Phenology].PpSensitivity.Value = 0
              [Phenology].EarlyReproductiveLongDayBase.Value = 4
              [Structure].MainStemNodeAppearanceRate.BasePhyllochron.Value = 100
              [Phenology].DailyVernalisation.TempResponseProfile.XYPairs.X = 0,1,8
              [Phenology].DailyVernalisation.TempResponseProfile.XYPairs.Y = 0,1.204,0
              [Leaf].ExtinctionCoeff.PotentialExtinctionCoeff.XYPairs.Y = 1.0,1.0
              [Grain].NumberFunction.ValueToHold.GrainsPerGramOfStem.Value = 20
              [Leaf].CohortParameters.MaxArea.AreaLargestLeaves.Value = 3000
          Cultivar Weston
            Command:
              [Phenology].MinimumLeafNumber.Value = 9
              [Phenology].VrnSensitivity.Value = 7
              [Phenology].PpSensitivity.Value = 3
        CultivarFolder Australia
          Cultivar Axe
            Command:
              [Phenology].MinimumLeafNumber.Value = 5
              [Phenology].VrnSensitivity.Value = 0
              [Phenology].PpSensitivity.Value = 4
              [Structure].MainStemNodeAppearanceRate.BasePhyllochron.Value = 100
          Cultivar Bolac
            Command:
              [Phenology].MinimumLeafNumber.Value = 8
              [Phenology].VrnSensitivity.Value = 0
              [Phenology].PpSensitivity.Value = 4
          Cultivar Derrimut
            Command:
              [Phenology].MinimumLeafNumber.Value = 8
              [Phenology].VrnSensitivity.Value = 0
              [Phenology].PpSensitivity.Value = 4
          Cultivar EGAGregory
            Command:
              [Phenology].MinimumLeafNumber.Value = 6
              [Phenology].VrnSensitivity.Value = 1
              [Phenology].PpSensitivity.Value = 4
              [Structure].MainStemNodeAppearanceRate.BasePhyllochron.Value = 100
          Cultivar GattonHartog
            Command:
              [Phenology].MinimumLeafNumber.Value = 8
              [Phenology].VrnSensitivity.Value = 0
              [Phenology].PpSensitivity.Value = 4
          Cultivar Gamenya
            Command:
              [Phenology].MinimumLeafNumber.Value = 8
              [Phenology].VrnSensitivity.Value = 0
              [Phenology].PpSensitivity.Value = 4
          Cultivar Gladius
            Command:
              [Phenology].MinimumLeafNumber.Value = 8
              [Phenology].VrnSensitivity.Value = 0
              [Phenology].PpSensitivity.Value = 4
          Cultivar Gutha
            Command:
              [Phenology].MinimumLeafNumber.Value = 8
              [Phenology].VrnSensitivity.Value = 0
              [Phenology].PpSensitivity.Value = 4
          Cultivar H45
            Command:
              [Phenology].MinimumLeafNumber.Value = 6
              [Phenology].VrnSensitivity.Value = 0
              [Phenology].PpSensitivity.Value = 5
              [Structure].MainStemNodeAppearanceRate.BasePhyllochron.Value = 100
          Cultivar H46
            Command:
              [Phenology].MinimumLeafNumber.Value = 8
              [Phenology].VrnSensitivity.Value = 0
              [Phenology].PpSensitivity.Value = 4
          Cultivar Hartog
            Command:
              [Phenology].MinimumLeafNumber.Value = 7
              [Phenology].VrnSensitivity.Value = 0
              [Phenology].PpSensitivity.Value = 4
              [Structure].MainStemNodeAppearanceRate.BasePhyllochron.Value = 100
          Cultivar Janz
            Command:
              [Phenology].MinimumLeafNumber.Value = 6
              [Phenology].VrnSensitivity.Value = 1
              [Phenology].PpSensitivity.Value = 4
              [Structure].MainStemNodeAppearanceRate.BasePhyllochron.Value = 100
          Cultivar Kelallac
            Command:
              [Phenology].MinimumLeafNumber.Value = 8
              [Phenology].VrnSensitivity.Value = 0
              [Phenology].PpSensitivity.Value = 4
          Cultivar Kennedy
            Command:
              [Phenology].MinimumLeafNumber.Value = 8
              [Phenology].VrnSensitivity.Value = 0
              [Phenology].PpSensitivity.Value = 4
          Cultivar Lang
            Command:
              [Phenology].MinimumLeafNumber.Value = 6
              [Phenology].VrnSensitivity.Value = 0
              [Phenology].PpSensitivity.Value = 5
              [Structure].MainStemNodeAppearanceRate.BasePhyllochron.Value = 100
          Cultivar Livingston
            Command:
              [Phenology].MinimumLeafNumber.Value = 8
              [Phenology].VrnSensitivity.Value = 0
              [Phenology].PpSensitivity.Value = 4
          Cultivar Lorikeet
            Command:
              [Phenology].MinimumLeafNumber.Value = 8
              [Phenology].VrnSensitivity.Value = 0
              [Phenology].PpSensitivity.Value = 4
          Cultivar MacKellar
            Command:
              [Phenology].MinimumLeafNumber.Value = 7
              [Phenology].VrnSensitivity.Value = 5
              [Phenology].PpSensitivity.Value = 5
              [Phenology].EarlyReproductiveLongDayBase.Value = 3.5
              [Structure].MainStemNodeAppearanceRate.BasePhyllochron.Value = 100
          Cultivar McCubbin
            Command:
              [Phenology].MinimumLeafNumber.Value = 8
              [Phenology].VrnSensitivity.Value = 0
              [Phenology].PpSensitivity.Value = 5
              [Structure].MainStemNodeAppearanceRate.BasePhyllochron.Value = 90
          Cultivar Mercury
            Command:
              [Phenology].MinimumLeafNumber.Value = 8
              [Phenology].VrnSensitivity.Value = 0
              [Phenology].PpSensitivity.Value = 4
          Cultivar Ruby
            Command:
              [Phenology].MinimumLeafNumber.Value = 8
              [Phenology].VrnSensitivity.Value = 0
              [Phenology].PpSensitivity.Value = 4
          Cultivar Spear
            Command:
              [Phenology].MinimumLeafNumber.Value = 8
              [Phenology].VrnSensitivity.Value = 0
              [Phenology].PpSensitivity.Value = 4
              [Grain].MaximumPotentialGrainSize.Value = 1
              [Phenology].GrainFilling.Target.Value = 580
          Cultivar Sunco
            Command:
              [Phenology].MinimumLeafNumber.Value = 6.5
              [Phenology].VrnSensitivity.Value = 0
              [Phenology].PpSensitivity.Value = 3.5
              [Phenology].EarlyReproductivePpSensitivity.Value = 4
              [Structure].MainStemNodeAppearanceRate.BasePhyllochron.Value = 100
          Cultivar Suntop
            Command:
              [Phenology].Vernalisation.VernSens = 1.5
              [Phenology].Vernalisation.PhotopSens = 3.0
          Cultivar Ventura
            Command:
              [Phenology].MinimumLeafNumber.Value = 8
              [Phenology].VrnSensitivity.Value = 0
              [Phenology].PpSensitivity.Value = 4
          Cultivar Wedgetail
            Command:
              [Phenology].MinimumLeafNumber.Value = 8
              [Phenology].VrnSensitivity.Value = 0
              [Phenology].PpSensitivity.Value = 4
          Cultivar Wilgoyne
            Command:
              [Phenology].MinimumLeafNumber.Value = 8
              [Phenology].VrnSensitivity.Value = 0
              [Phenology].PpSensitivity.Value = 4
              [Grain].MaximumPotentialGrainSize.Value = 1
              [Phenology].GrainFilling.Target.Value = 580
          Cultivar Wyalkatchem
            Command:
              [Phenology].MinimumLeafNumber.Value = 8
              [Phenology].VrnSensitivity.Value = 0
              [Phenology].PpSensitivity.Value = 4
          Cultivar Yitpi
            Command:
              [Phenology].MinimumLeafNumber.Value = 8
              [Phenology].VrnSensitivity.Value = 0
              [Phenology].PpSensitivity.Value = 5
              [Phenology].EarlyReproductiveLongDayBase.Value = 2.5
              [Phenology].EarlyReproductivePpSensitivity.Value = 5
              [Structure].MainStemNodeAppearanceRate.BasePhyllochron.Value = 80
          Cultivar Young
            Command:
              [Phenology].MinimumLeafNumber.Value = 8
              [Phenology].VrnSensitivity.Value = 0
              [Phenology].PpSensitivity.Value = 4
        CultivarFolder Turkey
          Cultivar Konya
            Command:
              [Phenology].MinimumLeafNumber.Value = 9
              [Phenology].VrnSensitivity.Value = 7
              [Phenology].PpSensitivity.Value = 3
              [Grain].NumberFunction.ValueToHold.GrainsPerGramOfStem.Value = 20
              [Grain].MaximumPotentialGrainSize.Value = 0.050
        CultivarFolder China
          Cultivar Keyu13
            Command:
              [Phenology].MinimumLeafNumber.Value = 9
              [Phenology].VrnSensitivity.Value = 7
              [Phenology].PpSensitivity.Value = 3
        CultivarFolder USA
          Cultivar Yecora
            Command:
              [Phenology].MinimumLeafNumber.Value = 9
              [Phenology].VrnSensitivity.Value = 7
              [Phenology].PpSensitivity.Value = 3
        CultivarFolder Europe
          Cultivar Dekan
            Command:
              [Phenology].MinimumLeafNumber.Value = 9
              [Phenology].VrnSensitivity.Value = 7
              [Phenology].PpSensitivity.Value = 3
          Cultivar Rosario
            Command:
              [Phenology].MinimumLeafNumber.Value = 9
              [Phenology].VrnSensitivity.Value = 7
              [Phenology].PpSensitivity.Value = 3
          Cultivar Ararat
            Command:
              [Phenology].MinimumLeafNumber.Value = 9
              [Phenology].VrnSensitivity.Value = 7
              [Phenology].PpSensitivity.Value = 3
        CultivarFolder Africa
          Cultivar HAR1685
            Command:
              [Phenology].MinimumLeafNumber.Value = 9
              [Phenology].VrnSensitivity.Value = 7
              [Phenology].PpSensitivity.Value = 3
    Report HarvestReport: EventNames=[Wheat].Harvesting
      VariableNames:
        [Clock].Today
        [Wheat].Phenology.CurrentPhaseName
        [Wheat].Phenology.CurrentStageName
        [Wheat].Phenology.FlagLeafDAS.Value
        [Wheat].Phenology.FloweringDAS.Value
        [Wheat].Phenology.MaturityDAS.Value
        [Wheat].Grain.Wt
        [Wheat].Grain.N
        [Wheat].Grain.Number
        [Wheat].Grain.Nconc
        [Wheat].AboveGround.Wt
        [Wheat].AboveGround.N
        [Wheat].Grain.Protein
        [Wheat].Grain.Size
        [Wheat].Structure.HaunStage.ValueTerminalSpikelet.Value
        [Wheat].Structure.MainStemFinalNodeNumber.Value
        [Wheat].Structure.MainStemPopn
        [Wheat].SowingData.Cultivar
        [Wheat].SowingDate.DayOfYear
        [Wheat].Leaf.CohortMaxSize
    Report DailyReport: EventNames=[Clock].DoReport
      VariableNames:
        [Clock].Today
        [Soil].SoilWater.SW
        sum([Soil].SoilWater.SWmm) as ProfileWater
        [Wheat].AboveGround.N
        [Wheat].AboveGround.Wt
        [Wheat].AboveGroundLive.N
        [Wheat].AboveGroundLive.Wt
        [Wheat].AboveGroundDead.N
        [Wheat].AboveGroundDead.Wt
        [Wheat].Ear.N
        [Wheat].Ear.Nconc
        [Wheat].Ear.Wt
        [Wheat].Grain.N
        [Wheat].Grain.NConc
        [Wheat].Grain.Number
        [Wheat].Grain.Wt
        [Wheat].Leaf.AppearedCohortNo
        [Wheat].Leaf.CoverDead
        [Wheat].Leaf.CoverGreen
        [Wheat].Leaf.CoverTotal
        [Wheat].Leaf.Dead.N
        [Wheat].Leaf.Dead.NConc
        [Wheat].Leaf.Dead.Wt
        [Wheat].Leaf.DeadCohortNo
        [Wheat].Leaf.ExpandedCohortNo
        [Wheat].Leaf.Fn
        [Wheat].Leaf.Fw
        [Wheat].Leaf.Height
        [Wheat].Leaf.InitialisedCohortNo
        [Wheat].Leaf.LAI
        [Wheat].Leaf.Live.N
        [Wheat].Leaf.Live.NConc
        [Wheat].Leaf.Live.Wt
        [Wheat].Leaf.SpecificArea
        [Wheat].Leaf.Transpiration
        [Wheat].Phenology.CurrentPhaseName
        [Wheat].Phenology.CurrentStageName
        [Wheat].Phenology.DailyVernalisation.Value
        [Wheat].Phenology.MeanTemp.Value
        [Wheat].Phenology.Photoperiod.Value
        [Wheat].Phenology.Stage
        [Wheat].Phenology.ThermalTime.Value
        [Wheat].Phenology.Vrn1.Value
        [Wheat].Phenology.Vrn2.Value
        [Wheat].Phenology.Vrn4.Value
        [Wheat].Phenology.Zadok.Stage
        [Wheat].Root.Depth
        [Wheat].Root.N
        [Wheat].Root.Wt
        [Wheat].Root.Nconc
        [Wheat].Root.WaterUptake
        [Wheat].Spike.N
        [Wheat].Spike.NConc
        [Wheat].Spike.Wt
        [Wheat].Stem.N
        [Wheat].Stem.NConc
        [Wheat].Stem.Wt
        [Wheat].StemPlusSpike.Wt
        [Wheat].StemPlusSpike.N
        [Wheat].SowingData.Cultivar
        [Wheat].Structure.HaunStage.ValueTerminalSpikelet.Value
        [Wheat].Structure.HaunStage.Value
        [Wheat].Structure.Height
        [Wheat].Structure.LeafTipsAppeared
        [Wheat].Structure.MainStemFinalNodeNumber.Value
        [Wheat].Structure.MainStemFinalNodeNumber.ValueToHold.PhotoPLeaves.Value
        [Wheat].Structure.MainStemPopn
        [Wheat].Structure.TotalStemPopn
        [Wheat].Total.N
        [Wheat].Total.Wt
        [SurfaceOrganicMatter].Wt
        ([Wheat].Leaf.Transpiration + [Soil].SoilWater.Es + [MicroClimate].interception) as ET
        sum([Soil].SoilNitrogen.NO3) as TotalSoilNitrogen
    Plant Maize: CropType=Maize
      Memo TitlePage
        # The APSIM Maize Model

        _Brown, H.E., Teixeira, E.I., Huth, N.I. and Holzworth, D.P._

        The APSIM maize model has been developed using the Plant Modelling Framework (PMF) of [brown_plant_2014]. This new framework provides a library of plant organ and process submodels that can be coupled, at runtime, to construct a model in much the same way that models can be coupled to construct a simulation. This means that dynamic composition of lower level process and organ classes (e.g. photosynthesis, leaf) into larger constructions (e.g. maize, wheat, sorghum) can be achieved by the model developer without additional coding.

        The model consists of:

        * a phenology model to simulate development between growth phases
        * a structure model to simulate plant morphology
        * a collection of organs to simulate the various plant parts
        * an arbitrator to allocate resources (N, biomass) to the various plant organs
      OrganArbitrator Arbitrator: NArbitrationOption=RelativeAllocation; DMArbitrationOption=RelativeAllocation
      Phenology
        MultiplyFunction ThermalTime
          AirTemperatureFunction BaseThermalTime
            XYPairs: X=[0, 18, 26, 34, 44]; Y=[0, 10, 18, 26, 0]
        GerminatingPhase Germinating: Start=Sowing; End=Germination
        EmergingPhase Emerging: Start=Germination; End=Emergence; ShootLag=55; ShootRate=0.6
          VariableReference ThermalTime: VariableName=[Phenology].ThermalTime.Value
        GenericPhase Juvenile: Start=Emergence; End=EndJuvenile
          Constant Target: Value=200; Units=deg day
          VariableReference ThermalTime: VariableName=[Phenology].ThermalTime.Value
        GenericPhase Photosensitive: Start=EndJuvenile; End=FloralInitiation
          VariableReference ThermalTime: VariableName=[Phenology].ThermalTime.Value
          LinearInterpolationFunction Target: XProperty=[Phenology].Photoperiod.Value
            Memo
              The photoperiod is likely to vary with individual maize cultivars.  Therefore, the response shown here is indicative only.  See the descriptions of individual cultivars for more detail on photoperiod responses used by the maize model.
            XYPairs: X=[0, 12.5, 24]; Y=[0, 0, 10]
        LeafAppearancePhase LeafAppearance: Start=FloralInitiation; End=FlagLeaf
          VariableReference ThermalTime: VariableName=[Phenology].ThermalTime.Value
        GenericPhase FlagLeafToFlowering: Start=FlagLeaf; End=Flowering
          Constant Target: Value=50; Units=deg day
          VariableReference ThermalTime: VariableName=[Phenology].ThermalTime.Value
        GenericPhase FloweringToGrainFilling: Start=Flowering; End=StartGrainFill
          Constant Target: Value=120; Units=deg day
          VariableReference ThermalTime: VariableName=[Phenology].ThermalTime.Value
        GenericPhase GrainFilling: Start=StartGrainFill; End=EndGrainFill
          Constant Target: Value=550; Units=deg day
          VariableReference ThermalTime: VariableName=[Phenology].ThermalTime.Value
        GenericPhase Maturing: Start=EndGrainFill; End=Maturity
          Constant Target: Value=10; Units=deg day
          VariableReference ThermalTime: VariableName=[Phenology].ThermalTime.Value
        GenericPhase MaturityToHarvestRipe: Start=Maturity; End=HarvestRipe
          Constant Target: Value=10; Units=deg day
          VariableReference ThermalTime: VariableName=[Phenology].ThermalTime.Value
        EndPhase ReadyForHarvesting: Start=HarvestRipe; End=Unused
          VariableReference ThermalTime: VariableName=[Phenology].ThermalTime.Value
        PhotoperiodFunction Photoperiod: Twilight=-6
        OnEventFunction FloweringDAS: same as Replacements.Wheat.Phenology.FloweringDAS
        OnEventFunction MaturityDAS: same as Replacements.Wheat.Phenology.MaturityDAS
      Structure: Initialised=false; Germinated=false; Emerged=false
        Memo
          Though tillering is common in some maize varieties under certain agronomic conditions, no tillering is accounted for within this model.  Therefore all branching has been parameterised out of the current maize model.
        VariableReference ThermalTime: VariableName=[Phenology].ThermalTime.Value
        PhaseLookup MainStemPrimordiaInitiationRate
          PhaseLookupValue Plastochron: Start=Emergence; End=FloralInitiation
            MultiplyFunction Plastochron
              VariableReference Phyllochron: VariableName=[Structure].MainStemNodeAppearanceRate.Value
              Constant LeafTipsPerPrimordia: Value=0.5
        PhaseLookup MainStemNodeAppearanceRate
          PhaseLookupValue Phyllochron: Start=Emergence; End=FlagLeaf
            LinearInterpolationFunction Phyllochron: XProperty=[Structure].LeafTipsAppeared
              XYPairs: X=[1, 3.4, 4]; Y=[30, 30, 42]
        OnEventFunction MainStemFinalNodeNumber: SetEvent=FloralInitiation
          AddFunction PreEventValue
            Constant PrimordiaAtEmergence: Value=6
            DivideFunction PrimordiaDuringJuvenilePhase
              VariableReference JuvenilePhaseDuration: VariableName=[Phenology].Juvenile.Target.Value
              Constant ApproximatePlastochron: Value=15
          VariableReference PostEventValue: VariableName=[Structure].MainStemPrimordiaNo
        HeightFunction HeightModel
          LinearInterpolationFunction PotentialHeight: XProperty=[Phenology].Stage
            XYPairs: X=[3, 4, 5, 6]; Y=[20, 400, 450, 1700]
          LinearInterpolationFunction WaterStress: XProperty=[Maize].WaterSupplyDemandRatio
            XYPairs: X=[0, 0.6]; Y=[0, 1]
        Constant BranchingRate: Value=0
        AddFunction BranchMortality
          Constant ShadeInducedBranchMortality: Value=0
          Constant DroughtInducedBranchMortality: Value=0
      ReproductiveOrgan Grain
        Constant InitialGrainProportion: Value=0.05
        Constant MaximumPotentialGrainSize: Value=0.3; Units=g
        Constant MaximumGrainsPerCob: Value=700; Units=number
        PhaseLookup DMDemandFunction
          PhaseLookupValue InitialPhase: Start=Flowering; End=StartGrainFill
            FillingRateFunction
              VariableReference GrainNumber: VariableName=[Grain].NumberFunction.Value
              VariableReference FillingDuration: VariableName=[Phenology].FloweringToGrainFilling.Target.Value
              VariableReference ThermalTime: VariableName=[Phenology].ThermalTime.Value
              MultiplyFunction PotentialSizeIncrement
                VariableReference InitialProportion: VariableName=[Grain].InitialGrainProportion.Value
                VariableReference MaximumSize: VariableName=[Grain].MaximumPotentialGrainSize.Value
          PhaseLookupValue LinearPhase: same as Replacements.Wheat.Grain.DMDemandFunction.LinearPhase
        Biomass Live
        Biomass Dead
        Constant MinimumNConc: Value=0.008; Units=g/g
        PhaseLookup MaximumNConc
          PhaseLookupValue InitialPhase: Start=Flowering; End=StartGrainFill
            Constant InitialNconc: Value=0.05
          PhaseLookupValue LinearPhase: Start=StartGrainFill; End=EndGrainFill
            Constant FinalNconc: Value=0.013
        Constant WaterContent: Value=0.12; Units=g/g
        PhaseLookup NFillingRate
          PhaseLookupValue GrainFilling: Start=Flowering; End=EndGrainFill
            FillingRateFunction
              VariableReference GrainNumber: VariableName=[Grain].NumberFunction.Value
              AddFunction FillingDuration
                VariableReference FloweringToGrainFilling: VariableName=[Phenology].FloweringToGrainFilling.Target.Value
                VariableReference GrainFilling: VariableName=[Phenology].GrainFilling.Target.Value
              VariableReference ThermalTime: VariableName=[Phenology].ThermalTime.Value
              MultiplyFunction PotentialSizeIncrement
                Constant MaximumFinalNConc: Value=0.013
                VariableReference MaximumSize: VariableName=[Grain].MaximumPotentialGrainSize.Value
        MultiplyFunction NumberFunction
          VariableReference PotentialGrainNumber: VariableName=[MaximumGrainsPerCob].Value
          LinearInterpolationFunction GrowthRateFactor: XProperty=[GrowthRateGrainDevelopment].Value
            XYPairs: X=[0.55, 3.3, 6.6, 10]; Y=[0, 0.6, 1, 1]
          VariableReference Population: VariableName=[Maize].Population
        ExpressionFunction YieldBuPerAcre: Expression=[Grain].Live.Wt * 10 * 56 * 0.4536 * 2.471
        AccumulateFunction GrowthGrainDevelopment: StartStageName=FlagLeaf; EndStageName=StartGrainFill
          VariableReference DailyBiomassProduction: VariableName=[Arbitrator].DMSupply
        AccumulateFunction DaysGrainDevelopment: StartStageName=FlagLeaf; EndStageName=StartGrainFill
          Constant LenthOfADay: Value=1; Units=days/day
        DivideFunction GrowthRateGrainDevelopment
          VariableReference AccumulatedGrowth: VariableName=[GrowthGrainDevelopment].Value
          VariableReference GrowthDuration: VariableName=[DaysGrainDevelopment].Value
          VariableReference Population: VariableName=[Maize].Population
        Folder BiomassRemovalDefaults
          OrganBiomassRemovalType Harvest: FractionLiveToRemove=1; FractionDeadToRemove=0; FractionLiveToResidue=0; FractionDeadToResidue=0
          OrganBiomassRemovalType Cut: FractionLiveToRemove=1; FractionDeadToRemove=0; FractionLiveToResidue=0; FractionDeadToResidue=0
          OrganBiomassRemovalType Prune: FractionLiveToRemove=0; FractionDeadToRemove=0; FractionLiveToResidue=0.8; FractionDeadToResidue=0
          OrganBiomassRemovalType Graze: FractionLiveToRemove=0.6; FractionDeadToRemove=0; FractionLiveToResidue=0.2; FractionDeadToResidue=0
      Root: NuptakeSupply=0
        CompositeBiomass Live: Propertys=[[Root].LayerLive]
        CompositeBiomass Dead: Propertys=[[Root].LayerDead]
        LinearInterpolationFunction KLModifier: XProperty=[Maize].Population
          Memo
            The parameter KL is is described by Meinke et al (1993) to combine elements of soil conductivity (K) with root length (L) in determining root water uptake.  Peake et al (2013) demonstrated that in maize KL varied with plant population through impacts on root length density.  Here we adjust KL linearly with plant population.
          XYPairs: X=[0, 10]; Y=[1, 1]
        Constant SoilWaterEffect: Value=1
          Memo
            No effect of soil water content on root growth is currently captured in the model.
        Constant TemperatureEffect: Value=1
          Memo
            No effect of temperature on root growth is currently captured in the model.
        Constant MaxDailyNUptake: Value=20; Units=g/m2/d
          Memo
            Maximum daily N uptake is set to an arbitrarily high value.
        Constant SenescenceRate: Value=0.005; Units=/d
          Memo
            Jones and Kiniry (1986) used a constant root senescence fraction in the CERES-Maize model.
        Constant StructuralFraction: Value=1
        Constant MaximumNConc: Value=0.01; Units=g/g
        Constant MinimumNConc: Value=0.01; Units=g/g
        LinearInterpolationFunction PartitionFraction: XProperty=[Phenology].Stage
          XYPairs: X=[0, 2.99, 3, 6, 7]; Y=[0, 0, 0.2, 0.2, 0]
        PhaseLookup RootFrontVelocity
          Memo
            [Hammer_etal_2009] used a constant extraction front velocity of 2.5cm per day in their analysis of historical maize yield trends in the US corn belt.
          PhaseLookupValue PreFlowering: Start=Germination; End=Flowering
            Constant RootFrontVelocity: Value=25; Units=mm/d
          PhaseLookupValue PostFlowering: Start=Flowering; End=Maturity
            Constant RootFrontVelocity: Value=0; Units=mm/d
        PhaseBasedSwitch NitrogenDemandSwitch: Start=Germination; End=Maturity
        Folder BiomassRemovalDefaults
          OrganBiomassRemovalType Harvest: FractionLiveToRemove=0; FractionDeadToRemove=0; FractionLiveToResidue=0.2; FractionDeadToResidue=0
          OrganBiomassRemovalType Cut: FractionLiveToRemove=0; FractionDeadToRemove=0; FractionLiveToResidue=0.3; FractionDeadToResidue=0
          OrganBiomassRemovalType Prune: FractionLiveToRemove=0; FractionDeadToRemove=0; FractionLiveToResidue=0.1; FractionDeadToResidue=0
          OrganBiomassRemovalType Graze: FractionLiveToRemove=0; FractionDeadToRemove=0; FractionLiveToResidue=0.15; FractionDeadToResidue=0
        Constant InitialDM: Value=0.2; Units=g/plant
        Constant SpecificRootLength: Value=40; Units=m/g
        LinearInterpolationFunction KNO3: XProperty=[Root].RootLengthDenisty
          XYPairs: X=[0.003, 0.003]; Y=[0.03, 0.03]
        LinearInterpolationFunction KNH4: XProperty=[Root].RootLengthDenisty
          XYPairs: X=[0, 0.003]; Y=[0, 0.0003]
        LinearInterpolationFunction NUptakeSWFactor: XProperty=[Root].RWC
          XYPairs: X=[0, 1]; Y=[0, 1]
      Leaf: MaxCover=1; Albedo=0.18; Gsmax=0.009; R50=160; KDead=0.03; MaximumMainStemLeafNumber=30
        zero: CurrentExpandingLeaf, StartFractionExpanded, FractionNextleafExpanded, DeadNodesYesterday, FRGR, PotentialEP, FudgeToGetETDemandRight, TipsAtEmergence, CohortsAtInitialisation, FractionDied
        LeafCohort InitialLeaves[1]: Rank=1; Area=380
        LeafCohort InitialLeaves[2]: Rank=2; Area=0
        LeafCohort InitialLeaves[3]: Rank=3; Area=0
        LeafCohort InitialLeaves[4]: Rank=4; Area=0
        LeafCohort InitialLeaves[5]: Rank=5; Area=0
        LeafCohort InitialLeaves[6]: Rank=6; Area=0
        CompositeBiomass Live: Propertys=[[Leaf].CohortLive]
        CompositeBiomass Dead: Propertys=[[Leaf].CohortDead]
        ArrayBiomass CohortArrayLive: Propertys=[[Leaf].Live]; ArraySize=[Leaf].MaxNodeNo
        ArrayBiomass CohortArrayDead: Propertys=[[Leaf].Dead]; ArraySize=[Leaf].MaxNodeNo
        LeafCohortParameters CohortParameters
          Constant SenessingLeafRelativeSize: Value=1; Units=0-1
          BellCurveFunction MaxArea
            Memo
              Potential leaf area is calculated from leaf number using the approach of Keating and Wafula (1992).
              Individual leaf size is described using a bell-shaped curve, the parameters of which are derived from final leaf number.
            MultiplyFunction LargestLeafPosition
              VariableReference FinalLeafNumber: VariableName=[Structure].MainStemFinalNodeNumber.Value
              Constant RelativePositionOfLargestLeaf: Value=0.67
            LinearInterpolationFunction AreaMax: XProperty=[Structure].MainStemFinalNodeNumber.Value
              XYPairs: X=[1, 5, 10, 15, 20, 25]; Y=[32530, 39259, 49659, 60000, 75000, 90000]
            LinearInterpolationFunction Breadth: XProperty=[Structure].MainStemFinalNodeNumber.Value
              XYPairs: X=[5, 10, 15, 20, 25]; Y=[-0.377, -0.144, -0.059, -0.027, -0.016]
            Constant Skewness: Value=0.00025
          Constant NReallocationFactor: Value=1
          Constant NRetranslocationFactor: Value=0.03
          Constant DMRetranslocationFactor: Value=0.5
          LinearInterpolationFunction CellDivisionStress: XProperty=[Maize].WaterSupplyDemandRatio
            XYPairs: X=[0.9, 1]; Y=[1, 1]
          LinearInterpolationFunction ExpansionStress: XProperty=[Maize].WaterSupplyDemandRatio
            XYPairs: X=[0.1, 0.7, 1]; Y=[0, 1, 1]
          LinearInterpolationFunction GrowthDuration: XProperty=[Structure].RelativeNodeApperance
            XYPairs: X=[0, 0.3, 0.5, 1]; Y=[0, 200, 250, 100]
          LinearInterpolationFunction LagDuration: XProperty=[Structure].RelativeNodeApperance
            XYPairs: X=[0, 0.4, 0.6]; Y=[300, 300, 650]
          LinearInterpolationFunction SenescenceDuration: XProperty=[Structure].RelativeNodeApperance
            XYPairs: X=[0, 0.4, 0.6]; Y=[150, 150, 350]
          Constant DetachmentLagDuration: Value=1000000
          Constant DetachmentDuration: Value=1000000
          LinearInterpolationFunction MaximumNConc: XProperty=[Structure].LeafTipsAppeared
            XYPairs: X=[1, 10]; Y=[0.054, 0.03]
          Constant CriticalNConc: Value=0.015; Units=g/g
          Constant MinimumNConc: Value=0.008; Units=g/g
          AddFunction DroughtInducedSenAcceleration
            Constant One: Value=1
            MultiplyFunction Stress
              Constant StressResponseCoefficient: Value=1
              LinearInterpolationFunction StressFactor: XProperty=[Maize].WaterSupplyDemandRatio
                XYPairs: X=[0, 1]; Y=[0.5, 0]
          LinearInterpolationFunction SpecificLeafAreaMax: XProperty=[Structure].LeafTipsAppeared
            XYPairs: X=[1, 9]; Y=[50000, 25000]
          LinearInterpolationFunction SpecificLeafAreaMin: XProperty=[Structure].LeafTipsAppeared
            XYPairs: X=[1, 9]; Y=[8000, 8000]
          Constant StructuralFraction: Value=0.7
          Constant NonStructuralFraction: Value=0
          LinearInterpolationFunction ShadeInducedSenescenceRate: XProperty=[Leaf].CohortCurrentRankCoverAbove
            XYPairs: X=[0, 0.7, 0.8, 0.96, 0.99]; Y=[0, 0, 0, 0, 0]
          Constant InitialNConc: Value=0; Units=g/g
        RUEModel Photosynthesis
          Constant RUE: Value=2
          WeightedTemperatureFunction FT: MaximumTemperatureWeighting=0.75
            XYPairs: X=[0, 8, 15, 35, 50]; Y=[0, 0, 1, 1, 0]
          LinearInterpolationFunction FVPD: XProperty=[Leaf].Photosynthesis.VPD
            XYPairs: X=[0, 10, 50]; Y=[1, 1, 1]
          LinearInterpolationFunction FN: XProperty=[Leaf].Fn
            XYPairs: X=[0, 1]; Y=[0.3, 1]
          LinearInterpolationFunction FW: XProperty=[Leaf].Fw
            XYPairs: X=[0, 0.3]; Y=[0, 1]
          RUECO2Function FCO2: PhotosyntheticPathway=C4
          VariableReference RadnInt: VariableName=[Leaf].RadIntTot
        MultiplyFunction ExtinctionCoeff
          Memo
            Extinction coefficient is specified in terms of a potential extinction coefficient which is then discounted during periods of water stress to account for the impact of leaf curling.
          LinearInterpolationFunction PotentialExtinctionCoeff: XProperty=[Maize].SowingData.RowSpacing
            XYPairs: X=[0.2, 0.5, 1]; Y=[0.7, 0.5, 0.4]
          LinearInterpolationFunction WaterStressImpact: XProperty=[Maize].WaterSupplyDemandRatio
            XYPairs: X=[0, 0.7]; Y=[0.5, 1]
        LinearInterpolationFunction FrostFraction: XProperty=[Weather].MinT
          XYPairs: X=[-2, 2]; Y=[1, 0]
        VariableReference ThermalTime: VariableName=[Phenology].ThermalTime.Value
        MinimumFunction FRGRFunction
          VariableReference FT: VariableName=[Leaf].Photosynthesis.FT.Value
          VariableReference FN: VariableName=[Leaf].Photosynthesis.FN.Value
          VariableReference FVPD: VariableName=[Leaf].Photosynthesis.FVPD.Value
        Folder BiomassRemovalDefaults
          OrganBiomassRemovalType Harvest: FractionLiveToRemove=0; FractionDeadToRemove=0; FractionLiveToResidue=0.3; FractionDeadToResidue=0
          OrganBiomassRemovalType Cut: FractionLiveToRemove=0.8; FractionDeadToRemove=0; FractionLiveToResidue=0; FractionDeadToResidue=0
          OrganBiomassRemovalType Prune: FractionLiveToRemove=0; FractionDeadToRemove=0; FractionLiveToResidue=0.6; FractionDeadToResidue=0
          OrganBiomassRemovalType Graze: FractionLiveToRemove=0.6; FractionDeadToRemove=0; FractionLiveToResidue=0.1; FractionDeadToResidue=0
      GenericAboveGroundOrgan Husk
        PopulationBasedDemandFunction DMDemandFunction
          VariableReference ThermalTime: VariableName=[Phenology].ThermalTime.Value
          Constant StartStage: Value=5.2
          Constant GrowthDuration: Value=120
          Constant MaximumOrganWt: Value=25
          VariableReference OrganPopulation: VariableName=[Rachis].CobNumber.Value
          LinearInterpolationFunction ExpansionStress: XProperty=[Maize].WaterSupplyDemandRatio
            XYPairs: X=[0.3, 0.8]; Y=[0, 1]
        Biomass Live
        Biomass Dead
        Constant NReallocationFactor: Value=0
        Constant NRetranslocationFactor: Value=0.1
        Constant MaximumNConc: Value=0.01; Units=g/g
        Constant StructuralFraction: Value=0.3; Units=g/g
        Constant MinimumNConc: Value=0.01; Units=g/g
        Constant DMRetranslocationFactor: Value=0.1
        Folder BiomassRemovalDefaults
          OrganBiomassRemovalType Harvest: FractionLiveToRemove=0.5; FractionDeadToRemove=0; FractionLiveToResidue=0.1; FractionDeadToResidue=0
          OrganBiomassRemovalType Cut: FractionLiveToRemove=0.8; FractionDeadToRemove=0; FractionLiveToResidue=0; FractionDeadToResidue=0
          OrganBiomassRemovalType Prune: FractionLiveToRemove=0; FractionDeadToRemove=0; FractionLiveToResidue=0.6; FractionDeadToResidue=0
          OrganBiomassRemovalType Graze: FractionLiveToRemove=0.6; FractionDeadToRemove=0; FractionLiveToResidue=0.2; FractionDeadToResidue=0
      GenericAboveGroundOrgan Rachis
        MultiplyFunction CobNumber
          VariableReference StemNumber: VariableName=[Structure].TotalStemPopn
          Constant CobsPerStem: Value=1.1
        DivideFunction CobSize
          VariableReference CobMass: VariableName=[Rachis].Live.Wt
          VariableReference CobNumber: VariableName=[Rachis].CobNumber.Value
        PopulationBasedDemandFunction DMDemandFunction
          VariableReference ThermalTime: VariableName=[Phenology].ThermalTime.Value
          Constant StartStage: Value=5.5
          Constant GrowthDuration: Value=300
          Constant MaximumOrganWt: Value=23
          VariableReference OrganPopulation: VariableName=[Rachis].CobNumber.Value
          LinearInterpolationFunction ExpansionStress: XProperty=[Maize].WaterSupplyDemandRatio
            XYPairs: X=[0, 0.35]; Y=[0, 1]
        Biomass Live
        Biomass Dead
        Constant NReallocationFactor: Value=0
        Constant NRetranslocationFactor: Value=0.1
        Constant MaximumNConc: Value=0.008; Units=g/g
        Constant StructuralFraction: Value=1; Units=g/g
        Constant MinimumNConc: Value=0.003; Units=g/g
        LinearInterpolationFunction ExpansionStress: XProperty=[Maize].WaterSupplyDemandRatio
          XYPairs: X=[0.1, 0.7]; Y=[0, 1]
        Folder BiomassRemovalDefaults: same as Replacements.Maize.Husk.BiomassRemovalDefaults
      GenericAboveGroundOrgan Stem
        Biomass Live
        Biomass Dead
        Constant StructuralFraction: Value=0.7
        LinearInterpolationFunction MaximumNConc: XProperty=[Structure].LeafTipsAppeared
          XYPairs: X=[0, 10, 11]; Y=[0.03, 0.03, 0.005]
        Constant MinimumNConc: Value=0.006; Units=g/g
        PhaseBasedSwitch NitrogenDemandSwitch: Start=Emergence; End=StartGrainFill
        Constant NReallocationFactor: Value=0
        Constant NRetranslocationFactor: Value=0.5
        Constant DMRetranslocationFactor: Value=0.1
        MinimumFunction DMDemandFunctionX
          MultiplyFunction PotentialDMAccumulation
            VariableReference NodesAppearing: VariableName=[Structure].DeltaTipNumber
            VariableReference Branches: VariableName=[Structure].TotalStemPopn
            LinearInterpolationFunction PotentialInternodeWt: XProperty=[Structure].RelativeNodeApperance
              XYPairs: X=[0, 0.2, 0.8, 1]; Y=[0, 2, 16, 16]
          MultiplyFunction HightLimitedDMAccumulation
            Constant SpecificStemLengthMax: Value=0.1
              Constant SpecificStemLengthMax: Value=0.1
            VariableReference Branches: VariableName=[Structure].TotalStemPopn
            VariableReference DeltaHeight: VariableName=[Structure].HeightModel.DeltaHeight
        PartitionFractionDemandFunction DMDemandFunction
          PhaseLookup PartitionFraction
            PhaseLookupValue PreStemElongation: Start=Emergence; End=FloralInitiation
              Constant StemFraction: Value=0.6
            PhaseLookupValue StemElongation: Start=FloralInitiation; End=Flowering
              Constant StemFraction: Value=0.82
        Folder BiomassRemovalDefaults: same as Replacements.Maize.Husk.BiomassRemovalDefaults
      CompositeBiomass AboveGround
        Propertys=[[Leaf].Live, [Leaf].Dead, [Stem].Live, [Stem].Dead, [Husk].Live, [Husk].Dead, [Grain].Live, [Grain].Dead, [Rachis].Live, [Rachis].Dead]
        Memo
          The AboveGround composite biomass object includes all organs occurring above the soil surface to allow output for total dry matter and Nutrient contents, including total structural, non-structural and metabolic pools.
      CompositeBiomass BelowGround: Propertys=[[Root].Live, [Root].Dead]
        Memo
          The BelowGround composite biomass object includes all root biomass pools to allow output for total dry matter and Nutrient contents, including total structural, non-structural and metabolic pools.
      CompositeBiomass Total
        Propertys=[[Leaf].Live, [Leaf].Dead, [Stem].Live, [Stem].Dead, [Husk].Live, [Husk].Dead, [Grain].Live, [Grain].Dead, [Rachis].Live, [Rachis].Dead, [Root].Live, [Root].Dead]
        Memo
          The Total composite biomass object includes all organs (above+below ground) to allow output for total dry matter and Nutrient contents, including total structural, non-structural and metabolic pools.
      CompositeBiomass TotalLive
        Propertys=[[Leaf].Live, [Stem].Live, [Husk].Live, [Grain].Live, [Rachis].Live, [Root].Live]
        Memo
          The TotalLive composite biomass object includes the Live pools of all organs (above+below ground) to allow output for total dry matter and Nutrient contents, including total structural, non-structural and metabolic pools.
      CompositeBiomass TotalDead
        Propertys=[[Leaf].Dead, [Stem].Dead, [Husk].Dead, [Grain].Dead, [Rachis].Dead, [Root].Dead]
        Memo
          The TotalDead composite biomass object includes the Dead pools of all organs (above+below ground) to allow output for total dry matter and Nutrient contents, including total structural, non-structural and metabolic pools.
      CompositeBiomass EarLive: Propertys=[[Husk].Live, [Grain].Live, [Rachis].Live]
        Memo
          The EarLive composite biomass object includes the Live pools of all organs within the Ear to allow output for total dry matter and Nutrient contents, including total structural, non-structural and metabolic pools.
      CompositeBiomass AboveGroundLive
        Propertys=[[Leaf].Live, [Stem].Live, [Husk].Live, [Grain].Live, [Rachis].Live]
        Memo
          The AboveGroundLive composite biomass object includes the Live pools of all organs occurring above the soil surface to allow output for total dry matter and Nutrient contents, including total structural, non-structural and metabolic pools.
      CompositeBiomass AboveGroundDead
        Propertys=[[Leaf].Dead, [Stem].Dead, [Husk].Dead, [Grain].Dead, [Rachis].Dead]
        Memo
          The AboveGroundDead composite biomass object includes the Dead pools of all organs occurring above the soil surface to allow output for total dry matter and Nutrient contents, including total structural, non-structural and metabolic pools.
      Memo Future Development Needs
        ##Future Development requirements

        * Phenology not responding to stress events.  Requires better data sets for quantifying the effects of water and nitrogen on leaf apperance and the timing of development stages.
        * Phosphorus response
        * Improved parameterisation of supply and demand for N and DM from organs and arbitration of these resources.
        * Heat Stress responses in grain number
        * More validation under a wider range of environments with more detailed datasets
        * Seedling mortality
        * Water demand (MicroClimate) needs validation
      Cultivar Pioneer_39G12
        Command:
          [Phenology].GrainFilling.Target.Value = 550
          [Grain].MaximumGrainsPerCob.Value = 550
          [Grain].NumberFunction.GrowthRateFactor.XYPairs.X = 0.2,2,4,10
          [Grain].NumberFunction.GrowthRateFactor.XYPairs.Y = 0,0.6,1,1
      Cultivar Pioneer_3153
      Cultivar Katumani
        Command:
          [Phenology].Juvenile.Target.Value = 150
          [Phenology].Photosensitive.Target.XYPairs.X = 0, 12.5, 24
          [Phenology].Photosensitive.Target.XYPairs.Y = 0, 0, 115
          [Phenology].FlagLeafToFlowering.Target.Value = 10
          [Phenology].FloweringToGrainFilling.Target.Value = 120
          [Phenology].GrainFilling.Target.Value = 530
          [Rachis].DMDemandFunction.MaximumOrganWt.Value = 14
          [Grain].MaximumGrainsPerCob.Value = 405
          [Grain].MaximumPotentialGrainSize.Value = 0.375
        Memo
          The variety Katumani Composite B was formed in 1966 and released in 1968 as part of the maize breeding work undertaken at the Katumani Research Station in Kenya which started in 1956.  Katumani Composite B was an advanced generation of Katumani Synthetic V X Katumani Synthetic VI.  It has slight photoperiod sensitivity and relatively small potential cob size.
      Cultivar Makueni
        Command:
          [Phenology].Juvenile.Target.Value = 150
          [Phenology].Photosensitive.Target.XYPairs.X = 0, 12.5, 24
          [Phenology].Photosensitive.Target.XYPairs.Y = 0, 0, 115
          [Phenology].FlagLeafToFlowering.Target.Value = 10
          [Phenology].FloweringToGrainFilling.Target.Value = 120
          [Phenology].GrainFilling.Target.Value = 530
          [Rachis].DMDemandFunction.MaximumOrganWt.Value = 14
          [Grain].MaximumGrainsPerCob.Value = 432
          [Grain].MaximumPotentialGrainSize.Value = 0.375
        Memo
          The variety Makueni Composite is a kenyan variety with similar phenology but slightly higher cob size than Katumani composite.
      Cultivar NSCM_41
        Command:
          [Phenology].Juvenile.Target.Value = 230
          [Phenology].Photosensitive.Target.XYPairs.X = 0, 12.5, 24
          [Phenology].Photosensitive.Target.XYPairs.Y = 0, 0, 264.5
          [Phenology].FlagLeafToFlowering.Target.Value = 10
          [Phenology].FloweringToGrainFilling.Target.Value = 170
          [Phenology].GrainFilling.Target.Value = 550
          [Rachis].DMDemandFunction.MaximumOrganWt.Value = 14
          [Grain].MaximumGrainsPerCob.Value = 450
          [Grain].MaximumPotentialGrainSize.Value = 0.375
        Memo
          The variety NSCM_41 is a Zimbabwean early maturing hybrid.  Photoperiod response is taken from Ellis et al Crop Sci 32:1225 for SR52.
      Cultivar sc401: same as Replacements.Maize.NSCM_41
      Cultivar r201
        Command:
          [Phenology].Juvenile.Target.Value = 230
          [Phenology].Photosensitive.Target.XYPairs.X = 0, 12.5, 24
          [Phenology].Photosensitive.Target.XYPairs.Y = 0, 0, 264.5
          [Phenology].FlagLeafToFlowering.Target.Value = 10
          [Phenology].FloweringToGrainFilling.Target.Value = 170
          [Phenology].GrainFilling.Target.Value = 550
          [Rachis].DMDemandFunction.MaximumOrganWt.Value = 14
          [Grain].MaximumGrainsPerCob.Value = 450
          [Grain].MaximumPotentialGrainSize.Value = 0.375
        Memo
          The variety r201 is a Zimbabwean early maturing hybrid.  Photoperiod response is taken from Ellis et al Crop Sci 32:1225 for SR52.
      Cultivar sc501
        Command:
          [Phenology].Juvenile.Target.Value = 250
          [Phenology].Photosensitive.Target.XYPairs.X = 0, 12.5, 24
          [Phenology].Photosensitive.Target.XYPairs.Y = 0, 0, 264.5
          [Phenology].FlagLeafToFlowering.Target.Value = 10
          [Phenology].FloweringToGrainFilling.Target.Value = 170
          [Phenology].GrainFilling.Target.Value = 550
          [Rachis].DMDemandFunction.MaximumOrganWt.Value = 14
          [Grain].MaximumGrainsPerCob.Value = 468
          [Grain].MaximumPotentialGrainSize.Value = 0.361
        Memo
          The variety sc501 is a Zimbabwean early-medium maturing hybrid.  Photoperiod response is taken from Ellis et al Crop Sci 32:1225 for SR52.
      Cultivar sr52
        Command:
          [Phenology].Juvenile.Target.Value = 250
          [Phenology].Photosensitive.Target.XYPairs.X = 0, 12.5, 24
          [Phenology].Photosensitive.Target.XYPairs.Y = 0, 0, 264.5
          [Phenology].FlagLeafToFlowering.Target.Value = 10
          [Phenology].FloweringToGrainFilling.Target.Value = 170
          [Phenology].GrainFilling.Target.Value = 550
          [Rachis].DMDemandFunction.MaximumOrganWt.Value = 14
          [Grain].MaximumGrainsPerCob.Value = 468
          [Grain].MaximumPotentialGrainSize.Value = 0.361
        Memo
          The variety sr52 is a Zimbabwean early-medium maturing hybrid.  Photoperiod response is taken from Ellis et al Crop Sci 32:1225 for SR52.
      Cultivar Melkassa
        Command:
          [Phenology].Juvenile.Target.Value = 230
          [Phenology].Photosensitive.Target.XYPairs.X = 0, 12.5, 24
          [Phenology].Photosensitive.Target.XYPairs.Y = 0, 0, 264.5
          [Phenology].FlagLeafToFlowering.Target.Value = 10
          [Phenology].FloweringToGrainFilling.Target.Value = 160
          [Phenology].GrainFilling.Target.Value = 550
          [Rachis].DMDemandFunction.MaximumOrganWt.Value = 14
          [Grain].MaximumGrainsPerCob.Value = 387
          [Grain].MaximumPotentialGrainSize.Value = 0.33
        Memo
          The variety Melkassa is a local early-medium maturing Ethiopian variety.
      Cultivar r215
        Command:
          [Phenology].Juvenile.Target.Value = 250
          [Phenology].Photosensitive.Target.XYPairs.X = 0, 12.5, 24
          [Phenology].Photosensitive.Target.XYPairs.Y = 0, 0, 264.5
          [Phenology].FlagLeafToFlowering.Target.Value = 10
          [Phenology].FloweringToGrainFilling.Target.Value = 170
          [Phenology].GrainFilling.Target.Value = 550
          [Rachis].DMDemandFunction.MaximumOrganWt.Value = 14
          [Grain].MaximumGrainsPerCob.Value = 468
          [Grain].MaximumPotentialGrainSize.Value = 0.361
        Memo
          The variety r215 is a Zimbabwean early-medium maturing hybrid.  Photoperiod response is taken from Ellis et al Crop Sci 32:1225 for SR52.
      Cultivar mh18
        Command:
          [Phenology].Juvenile.Target.Value = 260
          [Phenology].Photosensitive.Target.XYPairs.X = 0, 12.5, 24
          [Phenology].Photosensitive.Target.XYPairs.Y = 0, 0, 264.5
          [Phenology].FlagLeafToFlowering.Target.Value = 10
          [Phenology].FloweringToGrainFilling.Target.Value = 170
          [Phenology].GrainFilling.Target.Value = 550
          [Rachis].DMDemandFunction.MaximumOrganWt.Value = 14
          [Grain].MaximumGrainsPerCob.Value = 486
          [Grain].MaximumPotentialGrainSize.Value = 0.361
        Memo
          The variety mh18 is a Zimbabwean early-medium maturing hybrid.  Photoperiod response is taken from Ellis et al Crop Sci 32:1225 for SR52.
      Cultivar CG4141
        Command:
          [Phenology].Juvenile.Target.Value = 233
          [Phenology].Photosensitive.Target.XYPairs.X = 0, 12.5, 24
          [Phenology].Photosensitive.Target.XYPairs.Y = 0, 0, 264.5
          [Phenology].FlagLeafToFlowering.Target.Value = 10
          [Phenology].FloweringToGrainFilling.Target.Value = 170
          [Phenology].GrainFilling.Target.Value = 550
          [Rachis].DMDemandFunction.MaximumOrganWt.Value = 14
          [Grain].MaximumGrainsPerCob.Value = 468
          [Grain].MaximumPotentialGrainSize.Value = 0.361
        Memo
          The variety CG4141 is a Zimbabwean early-medium maturing hybrid.  Photoperiod response is taken from Ellis et al Crop Sci 32:1225 for SR52.
      Cultivar sc601
        Command:
          [Phenology].Juvenile.Target.Value = 280
          [Phenology].Photosensitive.Target.XYPairs.X = 0, 12.5, 24
          [Phenology].Photosensitive.Target.XYPairs.Y = 0, 0, 264.5
          [Phenology].FlagLeafToFlowering.Target.Value = 10
          [Phenology].FloweringToGrainFilling.Target.Value = 170
          [Phenology].GrainFilling.Target.Value = 560
          [Rachis].DMDemandFunction.MaximumOrganWt.Value = 14
          [Grain].MaximumGrainsPerCob.Value = 495
          [Grain].MaximumPotentialGrainSize.Value = 0.361
        Memo
          The variety sc601 is a Zimbabwean medium-late maturing hybrid.  Photoperiod response is taken from Ellis et al Crop Sci 32:1225 for SR52.
      Cultivar sc625
        Command:
          [Phenology].Juvenile.Target.Value = 280
          [Phenology].Photosensitive.Target.XYPairs.X = 0, 12.5, 24
          [Phenology].Photosensitive.Target.XYPairs.Y = 0, 0, 264.5
          [Phenology].FlagLeafToFlowering.Target.Value = 10
          [Phenology].FloweringToGrainFilling.Target.Value = 170
          [Phenology].GrainFilling.Target.Value = 570
          [Rachis].DMDemandFunction.MaximumOrganWt.Value = 14
          [Grain].MaximumGrainsPerCob.Value = 504
          [Grain].MaximumPotentialGrainSize.Value = 0.361
        Memo
          The variety sc625 is a Zimbabwean medium-late maturing hybrid.  Photoperiod response is taken from Ellis et al Crop Sci 32:1225 for SR52.
      Cultivar sc623
        Command:
          [Phenology].Juvenile.Target.Value = 280
          [Phenology].Photosensitive.Target.XYPairs.X = 0, 12.5, 24
          [Phenology].Photosensitive.Target.XYPairs.Y = 0, 0, 264.5
          [Phenology].FlagLeafToFlowering.Target.Value = 10
          [Phenology].FloweringToGrainFilling.Target.Value = 170
          [Phenology].GrainFilling.Target.Value = 550
          [Rachis].DMDemandFunction.MaximumOrganWt.Value = 14
          [Grain].MaximumGrainsPerCob.Value = 504
          [Grain].MaximumPotentialGrainSize.Value = 0.361
        Memo
          The variety sc623 is a Zimbabwean medium-late maturing hybrid.  Photoperiod response is taken from Ellis et al Crop Sci 32:1225 for SR52.
      Cultivar mh12
        Command:
          [Phenology].Juvenile.Target.Value = 290
          [Phenology].Photosensitive.Target.XYPairs.X = 0, 12.5, 24
          [Phenology].Photosensitive.Target.XYPairs.Y = 0, 0, 264.5
          [Phenology].FlagLeafToFlowering.Target.Value = 10
          [Phenology].FloweringToGrainFilling.Target.Value = 170
          [Phenology].GrainFilling.Target.Value = 570
          [Rachis].DMDemandFunction.MaximumOrganWt.Value = 14
          [Grain].MaximumGrainsPerCob.Value = 504
          [Grain].MaximumPotentialGrainSize.Value = 0.361
        Memo
          The variety mh12 is a Malawian medium-late maturing hybrid.  Photoperiod response is taken from Ellis et al Crop Sci 32:1225 for SR52.
      Cultivar mh16
        Command:
          [Phenology].Juvenile.Target.Value = 290
          [Phenology].Photosensitive.Target.XYPairs.X = 0, 12.5, 24
          [Phenology].Photosensitive.Target.XYPairs.Y = 0, 0, 264.5
          [Phenology].FlagLeafToFlowering.Target.Value = 10
          [Phenology].FloweringToGrainFilling.Target.Value = 170
          [Phenology].GrainFilling.Target.Value = 570
          [Rachis].DMDemandFunction.MaximumOrganWt.Value = 14
          [Grain].MaximumGrainsPerCob.Value = 504
          [Grain].MaximumPotentialGrainSize.Value = 0.361
        Memo
          The variety mh16 is a Malawian medium-late maturing hybrid.  Photoperiod response is taken from Ellis et al Crop Sci 32:1225 for SR52.
      Cultivar mh17
        Command:
          [Phenology].Juvenile.Target.Value = 290
          [Phenology].Photosensitive.Target.XYPairs.X = 0, 12.5, 24
          [Phenology].Photosensitive.Target.XYPairs.Y = 0, 0, 264.5
          [Phenology].FlagLeafToFlowering.Target.Value = 10
          [Phenology].FloweringToGrainFilling.Target.Value = 170
          [Phenology].GrainFilling.Target.Value = 570
          [Rachis].DMDemandFunction.MaximumOrganWt.Value = 14
          [Grain].MaximumGrainsPerCob.Value = 504
          [Grain].MaximumPotentialGrainSize.Value = 0.361
        Memo
          The variety mh17 is a Malawian medium-late maturing hybrid.  Photoperiod response is taken from Ellis et al Crop Sci 32:1225 for SR52.
      Cultivar mh19
        Command:
          [Phenology].Juvenile.Target.Value = 290
          [Phenology].Photosensitive.Target.XYPairs.X = 0, 12.5, 24
          [Phenology].Photosensitive.Target.XYPairs.Y = 0, 0, 264.5
          [Phenology].FlagLeafToFlowering.Target.Value = 10
          [Phenology].FloweringToGrainFilling.Target.Value = 170
          [Phenology].GrainFilling.Target.Value = 570
          [Rachis].DMDemandFunction.MaximumOrganWt.Value = 14
          [Grain].MaximumGrainsPerCob.Value = 504
          [Grain].MaximumPotentialGrainSize.Value = 0.361
        Memo
          The variety mh19 is a Malawian medium-late maturing hybrid.  Photoperiod response is taken from Ellis et al Crop Sci 32:1225 for SR52.
      Cultivar malawi_local
        Command:
          [Phenology].Juvenile.Target.Value = 280
          [Phenology].Photosensitive.Target.XYPairs.X = 0, 12.5, 24
          [Phenology].Photosensitive.Target.XYPairs.Y = 0, 0, 264.5
          [Phenology].FlagLeafToFlowering.Target.Value = 10
          [Phenology].FloweringToGrainFilling.Target.Value = 170
          [Phenology].GrainFilling.Target.Value = 600
          [Rachis].DMDemandFunction.MaximumOrganWt.Value = 14
          [Grain].MaximumGrainsPerCob.Value = 360
          [Grain].MaximumPotentialGrainSize.Value = 0.217
        Memo
          The variety malawi_local is a Malawian medium-late maturing local variety.  Photoperiod response is taken from Ellis et al Crop Sci 32:1225 for SR52.
      Cultivar Dekalb_XL82
        Command:
          [Phenology].Juvenile.Target.Value = 211
          [Phenology].Photosensitive.Target.XYPairs.X = 0, 12.5, 24
          [Phenology].Photosensitive.Target.XYPairs.Y = 0, 0, 472
          [Phenology].FlagLeafToFlowering.Target.Value = 101
          [Phenology].FloweringToGrainFilling.Target.Value = 170
          [Phenology].GrainFilling.Target.Value = 813
          [Rachis].DMDemandFunction.MaximumOrganWt.Value = 25
          [Grain].MaximumGrainsPerCob.Value = 550
      Cultivar GH_5009
        Command:
          [Phenology].Juvenile.Target.Value = 220
          [Phenology].Photosensitive.Target.XYPairs.X = 0, 12.5, 24
          [Phenology].Photosensitive.Target.XYPairs.Y = 0, 0, 300
          [Phenology].FlagLeafToFlowering.Target.Value = 50
          [Phenology].FloweringToGrainFilling.Target.Value = 170
          [Phenology].GrainFilling.Target.Value = 713
          [Rachis].DMDemandFunction.MaximumOrganWt.Value = 25
          [Grain].MaximumGrainsPerCob.Value =  550
      Cultivar Hycorn_40
        Command:
          [Phenology].Juvenile.Target.Value = 220
          [Phenology].Photosensitive.Target.XYPairs.X = 0, 12.5, 24
          [Phenology].Photosensitive.Target.XYPairs.Y = 0, 0, 124
          [Phenology].FlagLeafToFlowering.Target.Value = 50
          [Phenology].FloweringToGrainFilling.Target.Value = 170
          [Phenology].GrainFilling.Target.Value = 713
          [Rachis].DMDemandFunction.MaximumOrganWt.Value = 25
          [Grain].MaximumGrainsPerCob.Value =  550
      Cultivar GH_5019WX
        Command:
          [Phenology].Juvenile.Target.Value = 255
          [Phenology].Photosensitive.Target.XYPairs.X = 0, 12.5, 24.0
          [Phenology].Photosensitive.Target.XYPairs.Y = 0, 0, 124
          [Phenology].FlagLeafToFlowering.Target.Value = 101
          [Phenology].FloweringToGrainFilling.Target.Value = 170
          [Phenology].GrainFilling.Target.Value = 694
          [Rachis].DMDemandFunction.MaximumOrganWt.Value = 25
          [Grain].MaximumGrainsPerCob.Value = 550
      Cultivar Laila
        Command:
          [Phenology].Juvenile.Target.Value = 211
          [Phenology].Photosensitive.Target.XYPairs.X = 0, 12.5, 24
          [Phenology].Photosensitive.Target.XYPairs.Y = 0, 0, 0
          [Phenology].FlagLeafToFlowering.Target.Value = 1
          [Phenology].FloweringToGrainFilling.Target.Value = 170
          [Phenology].GrainFilling.Target.Value = 812
          [Phenology].Maturing.Target.Value = 1
          [Phenology].MaturityToHarvestRipe.Target.Value = 1
          [Rachis].DMDemandFunction.MaximumOrganWt.Value = 36
          [Grain].MaximumGrainsPerCob.Value =  720
      Cultivar Pioneer_39V43
        Command:
          [Phenology].Juvenile.Target.Value = 150
          [Phenology].GrainFilling.Target.Value = 450
          [Phenology].FloweringToGrainFilling.Target.Value = 170
          [Structure].MainStemNodeAppearanceRate.Phyllochron.Phyllochron.XYPairs.X = 1, 4, 4.2, 10.5, 11
          [Structure].MainStemNodeAppearanceRate.Phyllochron.Phyllochron.XYPairs.Y = 26, 26, 46, 46, 70
          [Rachis].DMDemandFunction.MaximumOrganWt.Value = 18
          [Structure].HeightModel.PotentialHeight.XYPairs.X = 3, 4, 5, 6
          [Structure].HeightModel.PotentialHeight.XYPairs.Y = 20, 40, 50, 1300
        Memo
          VShort duration variety released in New Zealand by Pioneer
      Cultivar Pioneer_34K77
        Command:
          [Phenology].Juvenile.Target.Value = 280
          [Phenology].GrainFilling.Target.Value = 550
        Memo
          VShort duration variety released in New Zealand by Pioneer
      Cultivar Pioneer_38H20
        Command:
          [Phenology].Juvenile.Target.Value = 210
          [Phenology].GrainFilling.Target.Value = 550
      Cultivar Pioneer_33M54
        Command:
          [Phenology].GrainFilling.Target.Value = 550
          [Phenology].Juvenile.Target.Value = 270
      Cultivar Hycorn_53
        Command:
          [Phenology].Juvenile.Target.Value = 235
          [Phenology].Photosensitive.Target.XYPairs.X = 0, 12.5, 24
          [Phenology].Photosensitive.Target.XYPairs.Y = 0, 0, 124
          [Phenology].FlagLeafToFlowering.Target.Value = 10
          [Phenology].FloweringToGrainFilling.Target.Value = 170
          [Phenology].GrainFilling.Target.Value = 520
          [Rachis].DMDemandFunction.MaximumOrganWt.Value = 25
          [Grain].MaximumGrainsPerCob.Value =  550
    Manager MaxLeafSize
```csharp
using System;
using System.Collections.Generic;
using System.Xml.Serialization;
using Models.Core;
using Models.Interfaces;
using Models.PMF;
using Models.Soils.Arbitrator;
using APSIM.Shared.Utilities;



namespace Models
{
	[Serializable] 
	public class Script : Model
	{
		[Link] Clock Clock;
		[Link] Plant Wheat;
		
		public event EventHandler LeafReport;
		
		[XmlIgnore] public int LeafPosition { get; set; }
		[XmlIgnore] public double MaxLeafSize { get; set; }
		
		[EventSubscribe("DoManagement")]
		private void OnDoManagement(object sender, EventArgs e)
		{
			if ((Wheat.Leaf.ExpandedCohortNo > LeafPosition) & (Wheat.Structure.NextLeafProportion == 1))
			{
				LeafPosition = (int)
				Wheat.Leaf.ExpandedCohortNo;
				MaxLeafSize = Wheat.Leaf.CohortSize[LeafPosition - 1];
				LeafReport.Invoke(this, new EventArgs());
			}
		}
	}
}
```
    Report MaxLeafSizeReport: EventNames=[MaxLeafSize].Script.LeafReport
      VariableNames:
        [MaxLeafSize].Script.MaxLeafSize
        [MaxLeafSize].Script.LeafPosition
  DataStore
    ExcelInput Observed: FileName=Observed.xlsx; SheetNames=[Observed, MaxLeafSize]
    PredictedObserved DailyObsPred: PredictedTableName=DailyReport; ObservedTableName=Observed; FieldNameUsedForMatch=Clock.Today
      Tests: POName=DailyObsPred
        AcceptedStats:
          Name                   n    Slope        Intercept  SEslope      SEintercept  R2          RMSE       NSE        ME          MAE        RSR
          ET                     123  1.11569      -0.444675  0.0598366    0.23211      0.741816    1.0138     0.55295    -0.0316106  0.758333   0.665895
          ProfileWater           449  1.02428      9.0735     0.0222863    8.65821      0.825346    60.4843    0.755692   18.0272     34.5033    0.493724
          Soil.SoilWater.SW(1)   422  0.000368894  0.192832   0.000147905  0.00494278   0.014595    33.3125    -0.306302  -16.1501    16.1848    1.14158
          Soil.SoilWater.SW(10)  8    -0.411366    0.612473   0.207584     0.0889497    0.395592    0.0114125  -3.18072   0.0077546   0.0092228  1.91262
          Soil.SoilWater.SW(2)   445  0.000123655  0.220368   0.000106824  0.00432853   0.00301561  40.4085    -0.304533  -19.5314    19.5521    1.14088
          Soil.SoilWater.SW(3)   445  0.000313269  0.204125   8.48098e-05  0.0042737    0.0298788   50.2765    -0.306951  -24.3899    24.4032    1.14193
          Soil.SoilWater.SW(4)   445  0.000448569  0.199619   7.63284e-05  0.00421157   0.0723233   55.0554    -0.304617  -26.6423    26.6628    1.14091
          Soil.SoilWater.SW(5)   445  0.000517237  0.207842   6.64665e-05  0.00380131   0.120261    57.0606    -0.30712   -27.7052    27.7222    1.14201
          Soil.SoilWater.SW(6)   340  0.868242     0.0412338  0.0209252    0.00478308   0.835894    0.031609   0.803298   0.0126178   0.0243063  0.442858
          Soil.SoilWater.SW(7)   340  0.733798     0.0704248  0.0224501    0.00516955   0.759662    0.037197   0.729902   0.0121631   0.0270602  0.518945
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        AcceptedStatsName=Name n Slope Intercept SEslope SEintercept R2 RMSE NSE ME MAE RSR
    PredictedObserved HarvestObsPred: PredictedTableName=HarvestReport; ObservedTableName=Observed; FieldNameUsedForMatch=Wheat.Phenology.CurrentStageName
      Tests: POName=HarvestObsPred
        AcceptedStats:
          Name                                n    Slope      Intercept  SEslope     SEintercept  R2          RMSE        NSE        ME         MAE         RSR
          Wheat.AboveGround.N                 43   1.11391    -1.62976   0.078543    1.03192      0.830672    3.19495     0.731596   -0.308273  2.50327     0.512017
          Wheat.AboveGround.Wt                111  1.03634    -354.629   0.0396966   64.8269      0.862122    415.701     0.63661    -300.829   339.652     0.600097
          Wheat.Grain.N                       78   0.821242   -2.23595   0.0647277   0.650355     0.679293    4.54051     -0.309881  -3.88609   3.89651     1.13714
          Wheat.Grain.Nconc                   79   -0.090907  0.0292544  0.0706703   0.00144337   0.0210376   0.00906526  -3.80974   0.0074347  0.00746512  2.17919
          Wheat.Grain.Number                  76   0.997656   665.978    0.056871    906.343      0.806149    3690.35     0.753401   632.936    2983.95     0.493309
          Wheat.Grain.Protein                 52   0.141714   13.6582    0.11027     1.31546      0.0319762   4.51548     -2.75104   3.61671    3.62138     1.91805
          Wheat.Grain.Wt                      123  1.01996    -235.428   0.0515183   29.133       0.764116    264.669     -0.166418  -225.253   233.089     1.07561
          Wheat.Leaf.CohortMaxSize(1)         10   0.0600582  293.781    0.0392633   8.96262      0.226287    89.1893     -4.82849   82.0494    82.0494     2.29034
          Wheat.Leaf.CohortMaxSize(10)        10   0.701987   474.434    0.235943    479.143      0.525279    192.521     0.0437497  -127.906   180.999     0.927699
          Wheat.Leaf.CohortMaxSize(11)        10   0.950884   219.648    0.408323    915.553      0.404012    311.5       -0.527457  110.216    278.698     1.17248
          Wheat.Leaf.CohortMaxSize(12)        10   1.07601    -196.582   0.341582    753.589      0.553645    194.817     0.038641   -29.576    113.771     0.930174
          Wheat.Leaf.CohortMaxSize(13)        10   0.886519   4.76541    0.556638    1283.31      0.240732    451.877     -2.66239   -255.487   334.791     1.81553
          Wheat.Leaf.CohortMaxSize(14)        10   1.40611    -1111.38   0.335047    795.764      0.687657    520.466     -0.1843    -166.583   292.126     1.03241
          Wheat.Leaf.CohortMaxSize(15)        9    0.707075   769.798    0.266127    607.055      0.502105    349.298     0.349417   113.766    330.767     0.760458
          Wheat.Leaf.CohortMaxSize(16)        3    0.646981   237.546    3.88708     6599.33      0.0269569   697.956     -19.7287   -359.347   496.895     3.71741
          Wheat.Leaf.CohortMaxSize(17)        2    0.0883332  892.476    0           0            1           539.226     -3.53967   -487.371   487.371     1.5066
          Wheat.Leaf.CohortMaxSize(18)        1    -          -          -           -            -           11.696      -INF       11.696     11.696      -
          Wheat.Leaf.CohortMaxSize(2)         10   0.087866   345.999    0.286853    119.185      0.0115923   89.222      -0.648544  -27.646    62.835      1.21807
          Wheat.Leaf.CohortMaxSize(3)         10   0.344917   439.039    0.236004    125.982      0.21073     130.428     -0.862982  94.9959    113.79      1.29487
          Wheat.Leaf.CohortMaxSize(4)         10   -0.026135  869.46     0.367777    237.977      0.00063083  279.491     -4.38209   217.089    269.404     2.20088
          Wheat.Leaf.CohortMaxSize(5)         10   0.331669   691.257    0.0986604   80.3226      0.585518    200.232     -0.416519  158.892    191.328     1.1291
          Wheat.Leaf.CohortMaxSize(6)         10   0.46711    583.871    0.0985356   94.4755      0.737469    168.541     0.498784   88.9385    147.765     0.671636
          Wheat.Leaf.CohortMaxSize(7)         10   0.254788   853.407    0.228983    252.11       0.13402     213.768     -0.026868  48.1325    140.472     0.961343
          Wheat.Leaf.CohortMaxSize(8)         10   0.835244   240.535    0.277415    355.421      0.531204    210.884     0.340203   33.8306    154.289     0.770596
          Wheat.Leaf.CohortMaxSize(9)         10   0.791446   400.272    0.284431    440.173      0.491826    226.435     0.205336   81.9004    178.682     0.845693
          Wheat.Phenology.FlagLeafDAS.Value   259  0.984399   3.54662    0.0106155   1.46689      0.970981    8.23121     0.969763   1.52124    5.66023     0.173553
          Wheat.Phenology.FloweringDAS.Value  297  0.951844   6.34786    0.00945317  1.48254      0.971726    8.80159     0.971091   -0.781145  5.69697     0.169739
        AcceptedStatsName=Name n Slope Intercept SEslope SEintercept R2 RMSE NSE ME MAE RSR
    PredictedObserved LeafSizeObsPred: PredictedTableName=MaxLeafSizeReport; ObservedTableName=MaxLeafSize; FieldNameUsedForMatch=MaxLeafSize.Script.LeafPosition
      Tests: POName=LeafSizeObsPred
        AcceptedStats:
          {Name=MaxLeafSize.Script.MaxLeafSize, n=158, Slope=0.913669, Intercept=148.034, SEslope=0.0216782, SEintercept=33.339, R2=0.91927, RMSE=222.338, NSE=0.917384, ME=33.2818, MAE=172.501, RSR=0.286519}
        AcceptedStatsName=Name n Slope Intercept SEslope SEintercept R2 RMSE NSE ME MAE RSR
  Folder SE Queensland
    Experiment APS26
      Memo
        This trial was conducted at Gatton in 1995 using the local variety, Hartog.  It consisted of 4 Nitrogen rates (0,40,80,160) with two irrigation rates (minimal amount for establishment, fully irrigated).  Yields ranged from 1.4 t/ha to 5.4 t/ha.
      Factors
        Factor NRate: Specifications=[ApplyFertiliser].Script.Amount=0,40,80,160
        Factor Water: Specifications=[IrrigationSchedule]
          Operations Wet
            1995-05-31  [Irrigation].Apply(amount:31);
            1995-06-01  [Irrigation].Apply(amount:13);
            1995-06-02  [Irrigation].Apply(amount:26);
            1995-06-05  [Irrigation].Apply(amount:26);
            1995-06-06  [Irrigation].Apply(amount:26);
            1995-06-07  [Irrigation].Apply(amount:26);
            1995-06-08  [Irrigation].Apply(amount:26);
            1995-06-15  [Wheat].Sow(population:120, cultivar:"Hartog", depth:40, rowSpacing:250);
            1995-07-05  [Irrigation].Apply(amount:26);
            1995-07-21  [Irrigation].Apply(amount:14);
            1995-08-01  [Irrigation].Apply(amount:28);
            1995-08-11  [Irrigation].Apply(amount:30);
            1995-08-25  [Irrigation].Apply(amount:15);
            1995-08-31  [Irrigation].Apply(amount:14);
            1995-09-04  [Irrigation].Apply(amount:15);
            1995-09-15  [Irrigation].Apply(amount:25);
            1995-09-22  [Irrigation].Apply(amount:20);
            1995-10-02  [Irrigation].Apply(amount:11);
          Operations Dry
            1995-06-15  [Wheat].Sow(population:120, cultivar:"Hartog", depth:40, rowSpacing:250);
      Simulation APS26NRate160WaterWet: Area=0; Slope=0
        Clock: StartDate=1995-06-13; EndDate=1995-10-30
        Summary summaryfile
        Weather: FileName=APS26.met
        SoilArbitrator Soil Arbitrator
        Zone paddock: Area=1; Slope=0
          Irrigation
          Fertiliser
          Manager ApplyFertiliser
            FertDayOfYear = 186
            Amount = 160
```csharp
using System;
using Models.Core;
using Models.PMF;
using APSIM.Shared.Utilities;

namespace Models
{
	[Serializable]
	public class Script : Model
	{
		[Link] Clock Clock;
		[Link] Fertiliser Fertiliser;
		[Link] Summary Summary;
		
		[Description("Day of year fertiliser is to be applied")]
		public int FertDayOfYear { get; set; }

		[Description("Amount of fertiliser to be applied")]
		public double Amount { get; set; }

		[EventSubscribe("DoManagement")]
		private void OnDoManagement(object sender, EventArgs e)
		{
			if (Clock.Today.DayOfYear == FertDayOfYear)
			{
				Fertiliser.Apply(Amount: Amount, Type: Fertiliser.Types.NO3N);
			}
		
		}
		
	}
}
```
          Soil APS26Field: SoilType=APS26Soil; LocalName=APS26Site; Site=APS26Site; NearestTown=Unknown; Region=Lawes; NaturalVegetation=Unknown; Latitude=0; Longitude=0
            Water
              Thickness  BD    AirDry  LL15   DUL      SAT
              150        1.38  0.1     0.235  0.37277  0.44
              150        1.38  0.1     0.235  0.36     0.44
              300        1.38  0.1     0.22   0.35     0.44
              300        1.46  0.1     0.24   0.35     0.43
              300        1.51  0.1     0.23   0.36     0.42
              300        1.49  0.1     0.23   0.35     0.43
              300        1.47  0.1     0.19   0.33     0.43
              300        1.47  0.1     0.19   0.33     0.43
              300        1.47  0.1     0.19   0.33     0.43
              SoilCrop WheatSoil: LL=[0.24, 0.24, 0.22, 0.24, 0.23, 0.23, 0.18, 0.18, 0.18]; KL=[0.06, 0.045, 0.045, 0.04, 0.04, 0.06, 0.06, 0.06, 0.06]; XF=[1, 1, 1, 1, 1, 1, 1, 1, 1]
            SoilWater: residueinterception=0; SummerDate=1-Nov; SummerU=6; SummerCona=3.5; WinterDate=1-Apr; WinterU=6; WinterCona=3.5; DiffusConst=10; DiffusSlope=16; Salb=0.13; CN2Bare=78; CNRed=20; CNCov=0.8; slope=0; discharge_width=0; catchment_area=0; max_pond=0
              Thickness  SWCON  KLAT
              150        0.3    0
              150        0.3    0
              150        0.3    0
              150        0.3    0
              300        0.3    0
              300        0.3    0
              300        0.3    0
              300        0.3    0
              300        0.3    0
              300        0.3    0
            SoilNitrogen: fom_type=[default, manure, mucuna, lablab, shemp, stable]; fract_carb=[0.2, 0.3, 0.54, 0.57, 0.45, 0]; fract_cell=[0.7, 0.3, 0.37, 0.37, 0.47, 0.1]; fract_lign=[0.1, 0.4, 0.09, 0.06, 0.08, 0.9]; wfpsN2N2O_x=[22, 88]; wfpsN2N2O_y=[0.1, 1]
            SoilOrganicMatter: RootCN=40; RootWt=500; SoilCN=14.5; EnrACoeff=1; EnrBCoeff=1; OCUnits=Total
              Thickness  OC    FBiom  FInert
              150        2.2   0.024  0.45
              150        1.6   0.024  0.6
              150        1.35  0.01   0.7
              150        0.95  0.01   0.85
              300        1     0.01   0.9
              300        0.8   0.01   0.95
              300        0.45  0.01   0.95
              300        0.45  0.01   0.95
              300        0.45  0.01   0.95
              300        0.45  0.01   0.95
            Analysis: Thickness=[150, 150, 150, 150, 300, 300, 300, 300, 300, 300]; PH=[7.5, 8, 8, 8, 8, 8, 8, 8, 8, 8]; PHUnits=Water; BoronUnits=HotWater
            Sample Initial Water: Thickness=[150, 150, 150, 150, 300, 300, 300, 300, 300, 300]; NO3Units=ppm; NH4Units=ppm; SWUnits=Volumetric; OCUnits=Total; PHUnits=Water
              SW=[0.327449, 0.34295, 0.334038, 0.334038, 0.330344, 0.310632, 0.30604, 0.269447, 0.269, 0.269]
            Sample Initial Nitrogen: NO3Units=ppm; NH4Units=ppm; SWUnits=Volumetric; OCUnits=Total; PHUnits=Water
              Thickness  NO3  NH4
              150        1.5  0.5
              150        1.8  0.8
              150        1.5  0.5
              150        1.5  0.5
              300        0.4  0.42
              300        0.2  0.42
              300        0.4  0.37
              300        0.3  0.25
              300        0.3  0.3
              300        0.3  0.3
          SurfaceOrganicMatter: PoolName=wheat_stubble; type=Wheat; mass=0; standing_fraction=0; cpr=0; cnr=80; CriticalResidueWeight=2000; OptimumDecompTemp=20; MaxCumulativeEOS=20; CNRatioDecompCoeff=0.277; CNRatioDecompThreshold=25; TotalLeachRain=25; MinRainToLeach=10; CriticalMinimumOrganicC=0.004; DefaultCPRatio=0; DefaultStandingFraction=0; StandingExtinctCoeff=0.5; FractionFaecesAdded=0.5
            Pools:
              {PoolName=wheat_stubble, ResidueType=Wheat, Mass=0, CNRatio=80, CPRatio=0, StandingFraction=0}
            ResidueTypes: LoadFromResource=ResidueTypes
          Plant Wheat: CropType=Wheat
          Operations IrrigationSchedule: same as SE Queensland.APS26.Factors.Water.Wet
          MicroClimate: a_interception=0; b_interception=1; c_interception=0; d_interception=0; soil_albedo=0.3; air_pressure=1010; soil_emissivity=0.96; sun_angle=15; soil_heat_flux_fraction=0.4; night_interception_fraction=0.5; windspeed_default=3; refheight=2; albedo=0.15; emissivity=0.96; gsmax=0.01; r50=200
          Manager Calculations
            NitTot = 27077.4
            CarbonTot = 0
```csharp
using System;
using Models.Core;
using Models.PMF;
using Models.PMF.OilPalm;
using Models.Soils;
using Models.SurfaceOM;
using APSIM.Shared.Utilities;

namespace Models
{
	[Serializable]
	[System.Xml.Serialization.XmlInclude(typeof(Model))]
	public class Script : Model
	{
		[Link] Clock Clock;
		[Link] Soil Soil;
		[Link] SurfaceOrganicMatter SurfaceOM;
		[Link] Summary Summary;
		
		public double NitTot { get; set; }
		public double CarbonTot { get; set; }
		
		[EventSubscribe("Commencing")]
		private void OnSimulationCommencing(object sender, EventArgs e)
		{	
			NitTot = 0;
			CarbonTot = 0;
		}
		
		
		[EventSubscribe("DoManagement")]
		private void OnDoManagement(object sender, EventArgs e)
		{
			NitTot = MathUtilities.Sum(Soil.SoilNitrogen.TotalN);
			CarbonTot = MathUtilities.Sum(Soil.SoilNitrogen.TotalC);
		}
	}
}
```
          Report DailyReport
          Report HarvestReport
          Report SupReport: EventNames=[Clock].DoReport
            VariableNames:
              [Clock].Today
              [Leaf].CohortSize
              [Wheat].Arbitrator.DMAllocated
              [Wheat].Arbitrator.DMDemand
              [Wheat].Arbitrator.DMNutrientLimitation
              [Wheat].Arbitrator.DMSinkLimitation
              [Wheat].Arbitrator.DMSupply
              [Wheat].Arbitrator.FN
              [Wheat].Arbitrator.NDemand
              [Wheat].Leaf.CohortMaxSize
              [Wheat].Leaf.CohortParameters.GrowthDuration.Value
              [Wheat].Leaf.CohortParameters.LagDuration.Value
              [Wheat].Leaf.CohortParameters.MaxArea.Value
              [Wheat].Leaf.CohortParameters.SenescenceDuration.Value
              [Wheat].Leaf.CohortParameters.SpecificLeafAreaMax.Value
              [Wheat].Leaf.CohortParameters.SpecificLeafAreaMin.Value
              [Wheat].Leaf.Photosynthesis.FT.Value
              [Wheat].Leaf.Photosynthesis.FVPD.Value
              [Wheat].Leaf.Photosynthesis.RueAct
              [Wheat].Stem.DMDemandFunction.HightLimitedDMAccumulation.Value
              [Wheat].Stem.DMDemandFunction.PotentialDMAccumulation.Value
              sum([Soil].SoilWater.SWmm[2:7]) as ProfileWater180cm
          Manager Harvesting
```csharp
using System;
using Models.Core;
using System.Collections.Generic;
using System.Text;
using Models.Soils;
using Models.PMF;
using Models;
using System.Xml.Serialization;
using APSIM.Shared.Utilities;

namespace Models
{
	[Serializable] 
	public class Script : Model
	{
		[Link] Plant Wheat;
		[EventSubscribe("DoManagement")]
		private void OnDoManagement(object sender, EventArgs e)
		{
			if (Wheat.Phenology.CurrentPhaseName == "Ripening")
			{
				Wheat.Harvest();
				Wheat.EndCrop();
			}
		}
	}
}
```
    Experiment APS6
      Factors
        Factor NRate: Specifications=[ApplyFertiliser]
          Operations 0
          Operations 40
            1992-06-16  [Fertiliser].Apply(Amount: 40, Type: Fertiliser.Types.NO3N);
          Operations 80
            1992-06-16  [Fertiliser].Apply(Amount: 80, Type: Fertiliser.Types.NO3N);
          Operations 120
            1992-06-16  [Fertiliser].Apply(Amount: 60, Type: Fertiliser.Types.NO3N);
            1992-08-05  [Fertiliser].Apply(Amount: 60, Type: Fertiliser.Types.NO3N);
          Operations 160
            1992-06-16  [Fertiliser].Apply(Amount: 40, Type: Fertiliser.Types.NO3N);
            1992-08-05  [Fertiliser].Apply(Amount: 120, Type: Fertiliser.Types.NO3N);
          Operations 360
            1992-06-16  [Fertiliser].Apply(Amount: 120, Type: Fertiliser.Types.NO3N);
            1992-08-05  [Fertiliser].Apply(Amount: 120, Type: Fertiliser.Types.NO3N);
            1992-09-08  [Fertiliser].Apply(Amount: 120, Type: Fertiliser.Types.NO3N);
      Simulation APS6NRate0: Area=0; Slope=0
        Clock: StartDate=1992-06-14; EndDate=1992-11-17
        Summary summaryfile
        Weather: FileName=APS6.met
        Zone paddock: Area=1; Slope=0
          Irrigation
          Fertiliser
          Soil APS6Field: SoilType=APS6Soil; LocalName=APS6Site; Site=APS6Site; NearestTown=Unknown; Region=Lawes; NaturalVegetation=Unknown; Latitude=0; Longitude=0
            Water
              Thickness  BD    AirDry  LL15  DUL   SAT
              150        1.38  0.1     0.2   0.38  0.43
              150        1.34  0.1     0.2   0.38  0.43
              300        1.35  0.1     0.22  0.4   0.43
              300        1.5   0.1     0.18  0.4   0.43
              300        1.49  0.1     0.14  0.39  0.42
              300        1.46  0.1     0.2   0.38  0.4
              300        1.46  0.1     0.2   0.38  0.4
              SoilCrop WheatSoil: LL=[0.2, 0.2, 0.22, 0.18, 0.14, 0.25, 0.28]; KL=[0.06, 0.06, 0.06, 0.06, 0.06, 0.06, 0.06]; XF=[1, 1, 1, 1, 1, 1, 1]
            SoilWater: residueinterception=0; SummerDate=1-Nov; SummerU=6; SummerCona=3.5; WinterDate=1-Apr; WinterU=6; WinterCona=3.5; DiffusConst=88; DiffusSlope=35.4; Salb=0.13; CN2Bare=60; CNRed=20; CNCov=0.8; slope=0; discharge_width=0; catchment_area=0; max_pond=0
              Thickness  SWCON  KLAT
              150        0.3    0
              150        0.3    0
              300        0.3    0
              300        0.3    0
              300        0.3    0
              300        0.3    0
              300        0.3    0
            SoilNitrogen: fom_type=[default, manure, mucuna, lablab, shemp, stable]; fract_carb=[0.2, 0.3, 0.54, 0.57, 0.45, 0]; fract_cell=[0.7, 0.3, 0.37, 0.37, 0.47, 0.1]; fract_lign=[0.1, 0.4, 0.09, 0.06, 0.08, 0.9]; wfpsN2N2O_x=[22, 88]; wfpsN2N2O_y=[0.1, 1]
            SoilOrganicMatter: RootCN=60; RootWt=2000; SoilCN=14.5; EnrACoeff=1; EnrBCoeff=1; OCUnits=Total
              Thickness  OC    FBiom  FInert
              150        2.2   0.03   0.45
              150        1.6   0.02   0.6
              300        1.15  0.01   0.78
              300        1     0.01   0.9
              300        0.8   0.01   0.99
              300        0.45  0.01   0.99
              300        0.45  0.01   0.99
            Analysis: Thickness=[150, 150, 300, 300, 300, 300, 300]; PH=[7.5, 8, 8, 8, 8, 8, 8]; PHUnits=Water; BoronUnits=HotWater
            Sample Initial Water: Thickness=[150, 150, 300, 300, 300, 300, 300]; SW=[0.326, 0.326, 0.346, 0.333, 0.315, 0.326, 0.326]; NO3Units=ppm; NH4Units=ppm; SWUnits=Volumetric; OCUnits=Total; PHUnits=Water
            Sample Initial Nitrogen: NO3Units=ppm; NH4Units=ppm; SWUnits=Volumetric; OCUnits=Total; PHUnits=Water
              Thickness  NO3   NH4
              150        1.3   1.3
              150        0.6   1
              300        0.25  1
              300        0.2   0.8
              300        0.1   0.8
              300        0.1   0.5
              300        0.1   0.5
          SurfaceOrganicMatter: PoolName=wheat_stubble; type=wheat; mass=500; standing_fraction=0; cnr=100; CriticalResidueWeight=2000; OptimumDecompTemp=20; MaxCumulativeEOS=20; CNRatioDecompCoeff=0.277; CNRatioDecompThreshold=25; TotalLeachRain=25; MinRainToLeach=10; CriticalMinimumOrganicC=0.004; DefaultCPRatio=0; DefaultStandingFraction=0; StandingExtinctCoeff=0.5; FractionFaecesAdded=0.5
            Pools:
              {PoolName=wheat_stubble, ResidueType=wheat, Mass=500, CNRatio=100, StandingFraction=0}
            ResidueTypes: LoadFromResource=ResidueTypes
          Plant Wheat: CropType=Wheat
          Operations ApplyFertiliser
            1992-06-16  [Fertiliser].Apply(Amount: 0, Type: Fertiliser.Types.NO3N);
          Operations IrrigationSchedule
            1992-06-17  [Wheat].Sow(population:121.61, cultivar:"Hartog", depth:30, rowSpacing:250);
            1992-06-24  [Irrigation].Apply(amount:10);
            1992-06-26  [Irrigation].Apply(amount:10);
            1992-07-28  [Irrigation].Apply(amount:30);
            1992-08-05  [Irrigation].Apply(amount:30);
            1992-08-19  [Irrigation].Apply(amount:40);
            1992-08-26  [Irrigation].Apply(amount:40);
            1992-09-09  [Irrigation].Apply(amount:40);
            1992-09-21  [Irrigation].Apply(amount:40);
            1992-10-01  [Irrigation].Apply(amount:50);
            1992-10-07  [Irrigation].Apply(amount:20);
            1992-10-08  [Irrigation].Apply(amount:20);
            1992-10-09  [Irrigation].Apply(amount:20);
            1992-10-13  [Irrigation].Apply(amount:20);
          MicroClimate: same as SE Queensland.APS26.APS26NRate160WaterWet.paddock.MicroClimate
          Report DailyReport
          Report HarvestReport
          Manager Harvesting
```csharp
using System;
using Models.Core;
using System.Collections.Generic;
using System.Text;
using Models.Soils;
using Models.PMF;
using Models;
using System.Xml.Serialization;
using APSIM.Shared.Utilities;

namespace Models
{
	[Serializable] 
	public class Script : Model
	{
		[Link] Plant Wheat;
		[EventSubscribe("DoManagement")]
		private void OnDoManagement(object sender, EventArgs e)
		{
			if (Wheat.Phenology.CurrentPhaseName == "ReadyForHarvesting")
			{
				Wheat.Harvest();
				Wheat.EndCrop();
			}
		}
	}
}
```
          Report SupReport: EventNames=[Clock].DoReport
            VariableNames:
              [Clock].Today
              [Leaf].CohortSize
              [Wheat].Arbitrator.DMAllocated
              [Wheat].Arbitrator.DMDemand
              [Wheat].Arbitrator.DMNutrientLimitation
              [Wheat].Arbitrator.DMSinkLimitation
              [Wheat].Arbitrator.DMSupply
              [Wheat].Arbitrator.FN
              [Wheat].Arbitrator.NDemand
              [Wheat].Leaf.CohortMaxSize
              [Wheat].Leaf.CohortParameters.GrowthDuration.Value
              [Wheat].Leaf.CohortParameters.LagDuration.Value
              [Wheat].Leaf.CohortParameters.MaxArea.Value
              [Wheat].Leaf.CohortParameters.SenescenceDuration.Value
              [Wheat].Leaf.CohortParameters.SpecificLeafAreaMax.Value
              [Wheat].Leaf.CohortParameters.SpecificLeafAreaMin.Value
              [Wheat].Leaf.Photosynthesis.FT.Value
              [Wheat].Leaf.Photosynthesis.FVPD.Value
              [Wheat].Leaf.Photosynthesis.RueAct
              [Wheat].Stem.DMDemandFunction.HightLimitedDMAccumulation.Value
              [Wheat].Stem.DMDemandFunction.PotentialDMAccumulation.Value
              [Wheat].Structure.MeanTillerGrowthRate.Value
        SoilArbitrator Soil Arbitrator
    Experiment APS14
      Factors
        Factor Stubble: Specifications=[OMSchedule]
          Operations Bare
            1993-06-03  [SurfaceOrganicMatter].Incorporate(fraction: 1.0, depth:100);
          Operations Lucerne
            1993-06-03  [SurfaceOrganicMatter].Add(mass: 3560, N: 108.8, P:0.0, type: "lucerne", name: "");
            1993-06-03  [SurfaceOrganicMatter].Incorporate(fraction: 1.0, depth:100);
          Operations Straw
            1993-06-03  [SurfaceOrganicMatter].Add(mass: 3584, N: 28.8, P:0.0, type: "barley", name: "");
            1993-06-03  [SurfaceOrganicMatter].Incorporate(fraction: 1.0, depth:100);
        Factor NRate: Specifications=[FertiliserSchedule]
          Operations 000
            1993-06-18  [Fertiliser].Apply(Amount: 0, Type: Fertiliser.Types.NO3N);
          Operations 040
            1993-06-18  [Fertiliser].Apply(Amount: 40, Type: Fertiliser.Types.NO3N);
          Operations 080
            1993-06-18  [Fertiliser].Apply(Amount: 80, Type: Fertiliser.Types.NO3N);
          Operations 200
            1993-06-18  [Fertiliser].Apply(Amount: 120, Type: Fertiliser.Types.NO3N);
            1993-08-18  [Fertiliser].Apply(Amount: 80, Type: Fertiliser.Types.NO3N);
      Simulation APS14StubbleBareNRate0: Area=0; Slope=0
        Clock: StartDate=1993-06-02; EndDate=1993-11-26
        Summary summaryfile
        Weather: FileName=APS14.met
        Zone paddock: Area=1; Slope=0
          Irrigation
          Fertiliser
          Soil APS14Field: SoilType=Clay Loam; LocalName=Gatton; Site=Gatton; NearestTown=Gatton; Region=Lockyer Valley; State=Qld; Country=Australia; NaturalVegetation=Unknown; Latitude=0; Longitude=0
            Water
              Thickness  BD    AirDry  LL15  DUL   SAT
              150        1.38  0.1     0.2   0.38  0.43
              150        1.34  0.2     0.2   0.38  0.43
              150        1.31  0.24    0.24  0.4   0.45
              150        1.4   0.19    0.19  0.41  0.45
              300        1.5   0.18    0.18  0.4   0.43
              300        1.49  0.14    0.14  0.39  0.43
              300        1.46  0.2     0.2   0.38  0.4
              300        1.46  0.2     0.2   0.38  0.4
              SoilCrop WheatSoil: LL=[0.2, 0.2, 0.24, 0.19, 0.18, 0.14, 0.25, 0.28]; KL=[0.06, 0.06, 0.06, 0.05, 0.04, 0.03, 0.02, 0.02]; XF=[1, 1, 1, 1, 1, 1, 1, 1]
            SoilWater: residueinterception=0; SummerDate=1-Nov; SummerU=6; SummerCona=3.5; WinterDate=1-Apr; WinterU=6; WinterCona=3.5; DiffusConst=40; DiffusSlope=16; Salb=0.13; CN2Bare=60; CNRed=20; CNCov=0.8; slope=0; discharge_width=0; catchment_area=0; max_pond=0
              Thickness  SWCON  KLAT
              150        0.3    0
              150        0.3    0
              150        0.3    0
              150        0.3    0
              300        0.3    0
              300        0.3    0
              300        0.3    0
              300        0.3    0
            SoilNitrogen: fom_type=[default, manure, mucuna, lablab, shemp, stable]; fract_carb=[0.2, 0.3, 0.54, 0.57, 0.45, 0]; fract_cell=[0.7, 0.3, 0.37, 0.37, 0.47, 0.1]; fract_lign=[0.1, 0.4, 0.09, 0.06, 0.08, 0.9]; wfpsN2N2O_x=[22, 88]; wfpsN2N2O_y=[0.1, 1]
            SoilOrganicMatter: RootCN=40; RootWt=1500; SoilCN=14.5; EnrACoeff=0; EnrBCoeff=0; OCUnits=Total
              Thickness  OC    FBiom  FInert
              150        2.2   0.02   0.4
              150        1.6   0.02   0.6
              150        1.35  0.01   0.7
              150        0.95  0.01   0.8
              300        1     0.01   0.9
              300        0.8   0.01   0.9
              300        0.45  0.01   0.9
              300        0.45  0.01   0.9
            Analysis: Thickness=[150, 150, 150, 150, 300, 300, 300, 300]; PH=[7.5, 8, 8, 8, 8, 8, 8, 8]; PHUnits=Water; BoronUnits=HotWater
            Sample Initial Water: Thickness=[150, 150, 150, 150, 300, 300, 300, 300]; SW=[0.336, 0.336, 0.302, 0.302, 0.319, 0.345, 0.294, 0.264]; NO3Units=ppm; NH4Units=ppm; SWUnits=Volumetric; OCUnits=Total; PHUnits=Water
            Sample Initial Nitrogen: NO3Units=ppm; NH4Units=ppm; SWUnits=Volumetric; OCUnits=Total; PHUnits=Water
              Thickness  NO3  NH4
              150        2    0.3
              150        0.5  0.3
              150        0.2  0.2
              150        0.2  0.1
              300        0.2  0.1
              300        0.2  0.1
              300        0.2  0.1
              300        0.2  0.1
          SurfaceOrganicMatter: PoolName=wheat_stubble; type=Wheat; mass=500; standing_fraction=0; cpr=0; cnr=120; CriticalResidueWeight=2000; OptimumDecompTemp=20; MaxCumulativeEOS=20; CNRatioDecompCoeff=0.277; CNRatioDecompThreshold=25; TotalLeachRain=25; MinRainToLeach=10; CriticalMinimumOrganicC=0.004; DefaultCPRatio=0; DefaultStandingFraction=0; StandingExtinctCoeff=0.5; FractionFaecesAdded=0.5
            Pools:
              {PoolName=wheat_stubble, ResidueType=Wheat, Mass=500, CNRatio=120, CPRatio=0, StandingFraction=0}
            ResidueTypes: LoadFromResource=ResidueTypes
          Plant Wheat: CropType=Wheat
          Operations IrrigationSchedule
            1993-06-04  [Irrigation].Apply(amount:14);
            1993-06-18  [Irrigation].Apply(amount:26);
            1993-06-23  [Irrigation].Apply(amount:13);
            1993-07-09  [Irrigation].Apply(amount:25);
            1993-07-22  [Irrigation].Apply(amount:20);
            1993-08-06  [Irrigation].Apply(amount:31);
            1993-08-18  [Irrigation].Apply(amount:36);
            1993-08-27  [Irrigation].Apply(amount:38);
            1993-09-06  [Irrigation].Apply(amount:33);
            1993-09-24  [Irrigation].Apply(amount:35);
            1993-10-01  [Irrigation].Apply(amount:36);
          MicroClimate: same as SE Queensland.APS26.APS26NRate160WaterWet.paddock.MicroClimate
          Operations FertiliserSchedule
            1993-06-18  [Fertiliser].Apply(Amount: 0, Type: Fertiliser.Types.NO3N);
          Operations OMSchedule
            1993-06-03  [SurfaceOrganicMatter].Add(mass: 0, N: 0, P:0.0, type: "wheat", name: "");
            1993-06-03  [SurfaceOrganicMatter].Incorporate(fraction: 1.0, depth:100);
          Operations SowingSchedule
            1993-06-29  [Wheat].Sow(population:114, cultivar:"GattonHartog", depth:30, rowSpacing:250);
          PredictedObserved: FieldNameUsedForMatch=Wheat.Zadok.Stage
          Manager ExtraVariables
```csharp
        using System;
        using Models.Core;
		using System.Collections.Generic;
        using System.Text;
        using Models.PMF.OldPlant;
        using Models.PMF;
        using Models.Soils;
        using Models;
        using System.Xml.Serialization;
        using APSIM.Shared.Utilities;

        namespace Models
        {
[Serializable] 
public class Script : Model
{      
[Link] Clock Clock;
[Link] Soils.Soil Soil;
[Link] Models.SurfaceOM.SurfaceOrganicMatter SOM;
[Link] Plant Plant;          
[Link] Weather Met;   
[Link] Fertiliser Fert;
[Link] Irrigation Irrig;  
               
[XmlIgnore] public bool InitialDay { get; set; }

[XmlIgnore] public double AccumPlantN { get; set; }
[XmlIgnore] public double AccumMineralisation { get; set; }
[XmlIgnore] public double AccumDenit { get; set; }
[XmlIgnore] public double AccumFert { get; set; }
[XmlIgnore] public double AccumLeach { get; set; }
[XmlIgnore] public double AccumDetach { get; set; }
[XmlIgnore] public double DeltaSoilOMN { get; set; }
[XmlIgnore] public double DeltaSurfaceOMN { get; set; }
[XmlIgnore] public double DeltaSoilMineralN { get; set; }
[XmlIgnore] public double SoilNitrogenContent { get; set; }

[XmlIgnore] public double AccumEO { get; set; }
[XmlIgnore] public double AccumEP { get; set; }
[XmlIgnore] public double AccumES { get; set; }
[XmlIgnore] public double AccumDrainage { get; set; }
[XmlIgnore] public double AccumRunoff { get; set; }
[XmlIgnore] public double AccumOutflowLat { get; set; }
[XmlIgnore] public double AccumIrrigation { get; set; }
[XmlIgnore] public double AccumRainfall { get; set; }
[XmlIgnore] public double SoilWaterDeficit { get; set; }

[XmlIgnore] public double AccumTtemerg { get; set; }

[XmlIgnore] public double  InitialSoilOMN { get; set; }
[XmlIgnore] public double  InitialSurfaceOMN { get; set; }
[XmlIgnore] public double  InitialMineralN { get; set; }

[XmlIgnore] public double SWC { get; set; }
[XmlIgnore] public double DUL { get; set; }
[XmlIgnore] public double OutFlowLat { get; set; }
[XmlIgnore] public double MineralN {get; set;}
[XmlIgnore] public double TotalNO3 {get; set;}
[XmlIgnore] public double TotalNH4 {get; set;}

[EventSubscribe("Initialised")]
private void OnInitialised(object sender, EventArgs e)
{
InitialDay = true;
AccumPlantN = 0;
AccumMineralisation = 0;
AccumDenit = 0;
AccumFert = 0;
AccumLeach = 0;
AccumDetach = 0;
DeltaSoilOMN = 0;
DeltaSurfaceOMN = 0;
DeltaSoilMineralN = 0;
SoilNitrogenContent = 0;

AccumEO = 0;
AccumEP = 0;
AccumES = 0;
AccumDrainage = 0;
AccumRunoff = 0;
AccumOutflowLat = 0;
AccumIrrigation = 0;
AccumRainfall = 0;
SoilWaterDeficit = 0;

AccumTtemerg = 0;

SWC = 0;
DUL = 0;
}	   

[EventSubscribe("DoManagementCalculations")]
private void OnDoManagementCalculations(object sender, EventArgs e)
{
	int layers = Soil.Thickness.Length;
    if (InitialDay)
	{
      InitialSurfaceOMN = SOM.N;
      for (int layer = 0; layer < layers; layer++)
      { 
      InitialSoilOMN += (Soil.SoilNitrogen.MicrobialN[layer] + Soil.SoilNitrogen.FOMN[layer] + Soil.SoilNitrogen.HumicN[layer]);
      InitialMineralN += (Soil.NO3N[layer] + Soil.NH4N[layer] + Soil.SoilNitrogen.urea[layer]);
      }
      InitialDay = false;
    }

//!!!!!! Nitrogen balance components !!!!!!
//!!!!!!^^^^^^^^^^^^^^^^^^^^^^^^^^^^^!!!!!!
//AccumPlantN -= (double)this.Get("[Plant].Root.NUptake");
AccumFert += Fert.NitrogenApplied;
DeltaSurfaceOMN = SOM.N - InitialSurfaceOMN;
AccumDetach = 0; //plant2 doesn't detach yet
MineralN = 0;
TotalNO3 = 0;
TotalNH4 = 0;
double OrganicN = 0;
//AccumLeach = AccumLeach - Soil.SoilNitrogen.leach_urea - Soil.SoilNitrogen.leach_no3 - Soil.SoilNitrogen.leach_nh4; //Fails
   for (int layer = 0; layer < layers; layer++)
    { 
    AccumMineralisation += (Soil.SoilNitrogen.MineralisedN[layer] + Soil.SoilNitrogen.dlt_n_min_res[layer]);
    AccumDenit -= MathUtilities.Sum(Soil.SoilNitrogen.Denitrification);
    OrganicN += (Soil.SoilNitrogen.MicrobialN[layer] + Soil.SoilNitrogen.FOMN[layer] + Soil.SoilNitrogen.HumicN[layer]);
    MineralN += (Soil.NO3N[layer] + Soil.NH4N[layer] + Soil.SoilNitrogen.urea[layer]);
    TotalNO3 += Soil.NO3N[layer];
    TotalNH4 += Soil.NH4N[layer];
    }
DeltaSoilOMN = OrganicN - InitialSoilOMN;
DeltaSoilMineralN = MineralN - InitialMineralN;
SoilNitrogenContent = MineralN;
//!!!!!! Water balance components !!!!!!
//!!!!!!^^^^^^^^^^^^^^^^^^^^^^^^^^!!!!!!
AccumEO -= Soil.SoilWater.Eo;
//AccumEP -= (double)this.Get("[Plant].Leaf.Transpiration");
AccumES -= Soil.SoilWater.Es; 
AccumDrainage -= Soil.SoilWater.Drainage; 
AccumRunoff -= Soil.SoilWater.Runoff; 
AccumIrrigation += Irrig.IrrigationApplied; 
AccumRainfall += Met.Rain;
SWC = 0;
DUL = 0;
double OutFlowLat = 0;
   for (int layer = 0; layer < layers; layer++)
   {
     SWC += Soil.SoilWater.SWmm[layer];
     DUL += Soil.SoilWater.DULmm[layer];
     OutFlowLat = Soil.SoilWater.outflow_lat[layer];
   }
AccumOutflowLat -= OutFlowLat;
SoilWaterDeficit =  (SWC - DUL);
}

[EventSubscribe("DoManagement")]
private void OnDoManagement(object sender, EventArgs e)
{
//!!!!!! Thermal time calculation !!!!!!
//!!!!!! ^^^^^^^^^^^^^^^^^^^^^^^^ !!!!!!

}
}
}
```
          Report DailyReport
          Report HarvestReport
          Manager Harvesting: same as SE Queensland.APS26.APS26NRate160WaterWet.paddock.Harvesting
        SoilArbitrator Soil Arbitrator
    Experiment APS2
      Memo
        This simple experiment was conducted to investigate the impact of time of sowing on canopy development and growth of wheat.  Wheat (cv. Hartog) was sown at Gatton on 30th of May and 30th of July in 1991.  Data were collected on canopy development, biomass accumulation and yield.
      Factors
        Factor TOS: Specifications=[Sowing]
          Operations 1
            1991-05-29  [Wheat].Sow(population: 60, cultivar: "Hartog", depth: 30, rowSpacing: 250);
            1991-05-29  [Fertiliser].Apply(Amount: 40, Type: Fertiliser.Types.UreaN);
            1991-06-18  [Fertiliser].Apply(Amount: 60, Type: Fertiliser.Types.UreaN);
            1991-08-20  [Fertiliser].Apply(Amount: 60, Type: Fertiliser.Types.UreaN);
            1991-05-31  [Irrigation].Apply(amount:20, depth:0,efficiency:1, willRunoff:false);
            1991-06-03  [Irrigation].Apply(amount:20, depth:0,efficiency:1, willRunoff:false);
            1991-06-17  [Irrigation].Apply(amount:40, depth:0,efficiency:1, willRunoff:false);
            1991-07-07  [Irrigation].Apply(amount:40, depth:0,efficiency:1, willRunoff:false);
            1991-07-31  [Irrigation].Apply(amount:40, depth:0,efficiency:1, willRunoff:false);
            1991-08-20  [Irrigation].Apply(amount:40, depth:0,efficiency:1, willRunoff:false);
            1991-08-30  [Irrigation].Apply(amount:40, depth:0,efficiency:1, willRunoff:false);
            1991-09-09  [Irrigation].Apply(amount:40, depth:0,efficiency:1, willRunoff:false);
            1991-09-19  [Irrigation].Apply(amount:40, depth:0,efficiency:1, willRunoff:false);
            1991-09-29  [Irrigation].Apply(amount:50, depth:0,efficiency:1, willRunoff:false);
            1991-10-09  [Irrigation].Apply(amount:50, depth:0,efficiency:1, willRunoff:false);
            1991-10-19  [Irrigation].Apply(amount:50, depth:0,efficiency:1, willRunoff:false);
            1991-10-29  [Irrigation].Apply(amount:50, depth:0,efficiency:1, willRunoff:false);
            1991-11-08  [Irrigation].Apply(amount:50, depth:0,efficiency:1, willRunoff:false);
          Operations 2
            1991-05-29  [Fertiliser].Apply(Amount: 40, Type: Fertiliser.Types.UreaN);
            1991-07-30  [Wheat].Sow(population: 60, cultivar: "Hartog", depth: 30, rowSpacing: 250);
            1991-08-20  [Fertiliser].Apply(Amount: 40, Type: Fertiliser.Types.UreaN);
            1991-09-02  [Fertiliser].Apply(Amount: 20, Type: Fertiliser.Types.UreaN);
            1991-05-31  [Irrigation].Apply(amount:20, depth:0,efficiency:1, willRunoff:false);
            1991-06-03  [Irrigation].Apply(amount:20, depth:0,efficiency:1, willRunoff:false);
            1991-06-17  [Irrigation].Apply(amount:40, depth:0,efficiency:1, willRunoff:false);
            1991-07-07  [Irrigation].Apply(amount:40, depth:0,efficiency:1, willRunoff:false);
            1991-07-31  [Irrigation].Apply(amount:40, depth:0,efficiency:1, willRunoff:false);
            1991-08-20  [Irrigation].Apply(amount:40, depth:0,efficiency:1, willRunoff:false);
            1991-08-30  [Irrigation].Apply(amount:40, depth:0,efficiency:1, willRunoff:false);
            1991-09-09  [Irrigation].Apply(amount:40, depth:0,efficiency:1, willRunoff:false);
            1991-09-19  [Irrigation].Apply(amount:40, depth:0,efficiency:1, willRunoff:false);
            1991-09-29  [Irrigation].Apply(amount:50, depth:0,efficiency:1, willRunoff:false);
            1991-10-09  [Irrigation].Apply(amount:50, depth:0,efficiency:1, willRunoff:false);
            1991-10-19  [Irrigation].Apply(amount:50, depth:0,efficiency:1, willRunoff:false);
            1991-10-29  [Irrigation].Apply(amount:50, depth:0,efficiency:1, willRunoff:false);
            1991-11-08  [Irrigation].Apply(amount:50, depth:0,efficiency:1, willRunoff:false);
      Simulation APS2Base: Area=0; Slope=0
        Clock: StartDate=1991-05-29; EndDate=1991-12-30
        Summary summaryfile
        Weather: FileName=aps02.met
        SoilArbitrator Soil Arbitrator
        Zone Field: Area=1; Slope=0
          Irrigation
          Fertiliser
          Soil APS6Field: SoilType=APS6Soil; LocalName=APS6Site; Site=APS6Site; NearestTown=Unknown; Region=Lawes; NaturalVegetation=Unknown; Latitude=0; Longitude=0
            Water
              Thickness  BD    AirDry  LL15  DUL   SAT
              150        1.38  0.1     0.2   0.38  0.43
              150        1.34  0.1     0.2   0.38  0.43
              300        1.35  0.1     0.22  0.4   0.43
              300        1.5   0.1     0.18  0.4   0.43
              300        1.49  0.1     0.14  0.39  0.42
              300        1.46  0.1     0.2   0.38  0.4
              300        1.46  0.1     0.2   0.38  0.4
              SoilCrop WheatSoil: LL=[0.2, 0.2, 0.22, 0.18, 0.14, 0.2, 0.2]; KL=[0.06, 0.06, 0.06, 0.06, 0.06, 0.06, 0.06]; XF=[1, 1, 1, 1, 1, 1, 1]
            SoilWater: same as SE Queensland.APS6.APS6NRate0.paddock.APS6Field.SoilWater
            SoilNitrogen: fom_type=[default, manure, mucuna, lablab, shemp, stable]; fract_carb=[0.2, 0.3, 0.54, 0.57, 0.45, 0]; fract_cell=[0.7, 0.3, 0.37, 0.37, 0.47, 0.1]; fract_lign=[0.1, 0.4, 0.09, 0.06, 0.08, 0.9]; wfpsN2N2O_x=[22, 88]; wfpsN2N2O_y=[0.1, 1]
            SoilOrganicMatter: RootCN=20; RootWt=500; SoilCN=14.5; EnrACoeff=1; EnrBCoeff=1; OCUnits=Total
              Thickness  OC    FBiom  FInert
              150        2.2   0.03   0.45
              150        1.6   0.02   0.6
              300        1.15  0.01   0.78
              300        1     0.01   0.9
              300        0.8   0.01   0.99
              300        0.45  0.01   0.99
              300        0.45  0.01   0.99
            Analysis: Thickness=[150, 150, 300, 300, 300, 300, 300]; PH=[7.5, 8, 8, 8, 8, 8, 8]; PHUnits=Water; BoronUnits=HotWater
            Sample Initial Water: Thickness=[150, 150, 300, 300, 300, 300, 300]; SW=[0.2, 0.28, 0.29, 0.34, 0.32, 0.32, 0.32]; NO3Units=ppm; NH4Units=ppm; SWUnits=Volumetric; OCUnits=Total; PHUnits=Water
            Sample Initial Nitrogen: NO3Units=ppm; NH4Units=ppm; SWUnits=Volumetric; OCUnits=Total; PHUnits=Water
              Thickness  NO3   NH4
              150        14.3  1.5
              150        5.9   1.5
              300        1.35  1
              300        1     1
              300        0.2   0.5
              300        0.1   0.5
              300        0.1   0.5
          Operations Sowing
          SurfaceOrganicMatter: same as SE Queensland.APS6.APS6NRate0.paddock.SurfaceOrganicMatter
          Plant Wheat: CropType=Wheat
          MicroClimate: same as SE Queensland.APS26.APS26NRate160WaterWet.paddock.MicroClimate
          Report DailyReport
          Report HarvestReport
          Manager Harvesting: same as SE Queensland.APS26.APS26NRate160WaterWet.paddock.Harvesting
          Manager MaxLeafSize
```csharp
using System;
using System.Collections.Generic;
using System.Xml.Serialization;
using Models.Core;
using Models.Interfaces;
using APSIM.Shared.Utilities;



namespace Models
{
	[Serializable] 
	public class Script : Model
	{
	
		
	}
}
```
          Report MaxLeafSizeReport
          Report SupReport: EventNames=[Clock].DoReport
            VariableNames:
              [Clock].Today
              [Leaf].CohortSize
              [Wheat].Arbitrator.DMAllocated
              [Wheat].Arbitrator.DMDemand
              [Wheat].Arbitrator.DMNutrientLimitation
              [Wheat].Arbitrator.DMSinkLimitation
              [Wheat].Arbitrator.DMSupply
              [Wheat].Arbitrator.FN
              [Wheat].Arbitrator.NDemand
              [Wheat].Leaf.CohortMaxSize
              [Wheat].Leaf.CohortParameters.GrowthDuration.Value
              [Wheat].Leaf.CohortParameters.LagDuration.Value
              [Wheat].Leaf.CohortParameters.MaxArea.Value
              [Wheat].Leaf.CohortParameters.SenescenceDuration.Value
              [Wheat].Leaf.CohortParameters.SpecificLeafAreaMax.Value
              [Wheat].Leaf.CohortParameters.SpecificLeafAreaMin.Value
              [Wheat].Leaf.Photosynthesis.FT.Value
              [Wheat].Leaf.Photosynthesis.FVPD.Value
              [Wheat].Leaf.Photosynthesis.RueAct
              [Wheat].Stem.DMDemandFunction.HightLimitedDMAccumulation.Value
              [Wheat].Stem.DMDemandFunction.PotentialDMAccumulation.Value
              [Wheat].Leaf.NextExpandingLeafProportion
    Experiment GattonRowSpacing
      Memo
        This simple experiment was conducted to investigate the light interception and subsequent growth of wheat under different populations invoked using row spacing.  Wheat was sown at Gatton on 22nd of June 2011 at 25cm row spacing.  Soon after emergence, alternate rows were removed from selected plots to produce half populations at 50cm row spacing.  A zero N treatment was used to identfy the inherent fertility of the site to assist in model parameterisation.  Data were collected on light interception,  canopy development, biomass accumulation and yield.
      Factors
        Factor RowSpace: Specifications=[Sowing]
          Operations 25cm
            2011-06-22  [Wheat].Sow(population:160, cultivar:"Hartog", depth:30, rowSpacing:250);
            2011-08-15  [Fertiliser].Apply(Amount: 100, Type: Fertiliser.Types.UreaN);
          Operations 50cm
            2011-06-22  [Wheat].Sow(population:80, cultivar:"Hartog", depth:30, rowSpacing:500);
            2011-08-15  [Fertiliser].Apply(Amount: 100, Type: Fertiliser.Types.UreaN);
          Operations N0
            2011-06-22  [Wheat].Sow(population:160, cultivar:"Hartog", depth:30, rowSpacing:250);
      Simulation RowSpace: Area=0; Slope=0
        Clock: StartDate=2011-05-01; EndDate=2011-11-12
        Summary summaryfile
        Weather: FileName=Gatton2011.met
        SoilArbitrator Soil Arbitrator
        Zone Field: Area=1; Slope=0
          Irrigation
          Fertiliser
          Operations Sowing
            2011-06-22  [Wheat].Sow(population:160, cultivar:"Hartog", depth:30, rowSpacing:250);
          Soil: SoilType=Black Vertosol; Site=Lawes; NearestTown=Lawes, Q 4343; Region=Lockyer; State=Queensland; Country=Australia; NaturalVegetation=Blue Gum, Moreton Bay Ash, Tea Tree; ApsoilNumber=37; Latitude=-27.537; Longitude=152.336; LocationAccuracy=+-20m; DataSource=CSIRO Sustainable Ecosystems, Toowoomba
            Comments=Soil naming structure: \State\Region\Classification-Local Name (Site/district and locator number); oc and ph estimated
            Water
              Thickness  BD    AirDry  LL15  DUL   SAT
              150        1.32  0.13    0.26  0.41  0.47
              150        1.3   0.208   0.26  0.43  0.48
              300        1.23  0.26    0.26  0.46  0.51
              300        1.27  0.26    0.26  0.44  0.49
              300        1.37  0.25    0.25  0.4   0.45
              300        1.35  0.26    0.26  0.41  0.46
              300        1.35  0.26    0.26  0.38  0.46
              SoilCrop WheatSoil: LL=[0.26, 0.26, 0.26, 0.26, 0.25, 0.29, 0.36]; KL=[0.06, 0.06, 0.06, 0.04, 0.04, 0.02, 0.02]; XF=[1, 1, 1, 1, 1, 1, 1]
            SoilWater: residueinterception=0; SummerDate=1-Nov; SummerU=6; SummerCona=3.5; WinterDate=1-Apr; WinterU=4; WinterCona=2.5; DiffusConst=40; DiffusSlope=16; Salb=0.12; CN2Bare=73; CNRed=20; CNCov=0.8; max_pond=0; Thickness=[150, 150, 300, 300, 300, 300, 300]; SWCON=[0.3, 0.3, 0.3, 0.3, 0.3, 0.3, 0.3]
            SoilNitrogen: fom_type=[default, manure, mucuna, lablab, shemp, stable]; fract_carb=[0.2, 0.3, 0.54, 0.57, 0.45, 0]; fract_cell=[0.7, 0.3, 0.37, 0.37, 0.47, 0.1]; fract_lign=[0.1, 0.4, 0.09, 0.06, 0.08, 0.9]; wfpsN2N2O_x=[22, 88]; wfpsN2N2O_y=[0.1, 1]
            SoilOrganicMatter: RootCN=40; RootWt=1000; SoilCN=12; EnrACoeff=7.4; EnrBCoeff=0.2; OCUnits=Total
              Thickness  OC        FBiom  FInert
              150        0.953846  0.04   0.4
              150        0.953846  0.02   0.6
              300        0.961538  0.02   0.8
              300        0.846154  0.02   1
              300        0.546154  0.01   1
              300        0.261538  0.01   1
              300        0.2       0.01   1
            Analysis: Thickness=[150, 150, 300, 300, 300, 300, 300]; PH=[8, 8, 8, 8, 8, 8, 8]; PHUnits=Water; BoronUnits=HotWater
            InitialWater: PercentMethod=FilledFromTop; FractionFull=1
            Sample Initial nitrogen: NO3Units=kgha; NH4Units=kgha; SWUnits=Volumetric; OCUnits=Total; PHUnits=Water
              Thickness  NO3  NH4
              200        100  1
              1800       10   1
          SurfaceOrganicMatter: same as SE Queensland.APS6.APS6NRate0.paddock.SurfaceOrganicMatter
          Plant Wheat: CropType=Wheat
          MicroClimate: same as SE Queensland.APS26.APS26NRate160WaterWet.paddock.MicroClimate
          Manager Automatic irrigation based on water deficit
            FASW = 0
            WaterDeficit = 0
            AutoIrrigationOn = True
            FASWThreshold = 0.9
            FASWDepth = 600
```csharp
using System;
using Models.Core;
using System.Collections.Generic;
using System.Text;
using Models.Soils;
using Models.PMF;
using Models;
using System.Xml.Serialization;
using APSIM.Shared.Utilities;

namespace Models
{
	[Serializable] 
	public class Script : Model
	{
		public double FASW { get; set; }
		public double WaterDeficit  { get; set; }
	
		[Link] Zone zone;
		[Link] Irrigation irrigation;
		[Link] Soil soil;
		
		[Description("Auto irrigation on?")]
		public bool AutoIrrigationOn { get; set; }

		[Description("Threshold fraction available water (0-1)")]
		public double FASWThreshold { get; set; }

		[Description("Soil depth (mm) to which fraction available water is calculated")]
		public double FASWDepth { get; set; }

		[EventSubscribe("DoManagement")]
		private void OnDoManagement(object sender, EventArgs e)
		{
			CalculateFASW();
			if (AutoIrrigationOn)
			{
				if (FASW < FASWThreshold)
				{
					double amount = 10;
					irrigation.Apply(WaterDeficit, depth: 0);
				}
			}
		}
		
		private void CalculateFASW()
		{
			double[] LL15 = MathUtilities.Multiply(soil.LL15, soil.Thickness);
			double[] DUL = MathUtilities.Multiply(soil.DUL, soil.Thickness);
		
			int nlayr = GetLayerIndex();
			double cumdep = MathUtilities.Sum(soil.Thickness, 0, nlayr, 0.0);

			double excess_fr = MathUtilities.Divide((cumdep - FASWDepth), soil.Thickness[nlayr], 0.0);

			// note that results may be strange if swdep < ll15
			double avail_sw = (MathUtilities.Sum(soil.Water, 0, nlayr, 0.0)
			                  - excess_fr * soil.Water[nlayr])
			                  - (MathUtilities.Sum(LL15, 0, nlayr, 0.0)
			                  - excess_fr * LL15[nlayr]);


			double pot_avail_sw = (MathUtilities.Sum(DUL, 0, nlayr, 0.0)
			                      - excess_fr * DUL[nlayr])
			                      - (MathUtilities.Sum(LL15, 0, nlayr, 0.0)
			                      - excess_fr * LL15[nlayr]);

			FASW = MathUtilities.Divide(avail_sw, pot_avail_sw, 0.0);
			WaterDeficit = MathUtilities.Constrain(pot_avail_sw - avail_sw, 0.0, 100000);
		}

		private int GetLayerIndex()
		{
			double[] cumThickness = Soil.ToCumThickness(soil.Thickness);
			for (int i = 1; i < cumThickness.Length; i++)
			{
				if (FASWDepth < cumThickness[i])
					return i - 1;
			}
			
			return cumThickness.Length - 1;
		}

	}
}
```
          Report HarvestReport
          Report DailyReport
          Manager Harvesting: same as SE Queensland.APS6.APS6NRate0.paddock.Harvesting
    Experiment Gatton94
      Memo
        This simple experiment was conducted to investigate the impact of time of sowing on  wheat.  Wheat (cv. Hartog) was sown at Gatton on six dates 1994.  Various data were collected. However final growth data was compromised by mouse damage.  The dataset is used here to study the impact of sowing time on phenological development.
      Factors
        Factor TOS: Specifications=[Sowing]
          Manager 1
            SowDate = 29-Apr
            CultivarName = Hartog
            SowingDepth = 40
            RowSpacing = 250
            Population = 100
```csharp
using System;
using Models.Core;
using Models.PMF;
using Models.Soils;
using Models.Utilities;
using APSIM.Shared.Utilities;

namespace Models
{
	[Serializable]
	public class Script : Model
	{
		[Link] Clock Clock;
		[Link] Fertiliser Fertiliser;
		[Link] Summary Summary;
		[Link] Plant Wheat;
		[Link] Soil Soil;
		Accumulator accumulatedRain;
		
		[Description("Sowing date (d-mmm)")]
		public string SowDate { get; set; }
		[Description("Cultivar to be sown")]
		public string CultivarName { get; set; }
		[Description("Sowing depth (mm)")]
		public double SowingDepth { get; set; }
		[Description("Row spacing (mm)")]
		public double RowSpacing { get; set; }
		[Description("Plant population (/m2)")]
		public double Population { get; set; }
		
		


		[EventSubscribe("DoManagement")]
		private void OnDoManagement(object sender, EventArgs e)
		{
		
			
			if (DateUtilities.WithinDates(SowDate, Clock.Today, SowDate))
			{
				Wheat.Sow(population: Population, cultivar: CultivarName, depth: SowingDepth, rowSpacing: RowSpacing);	
			}
		
		}
		
	}
}
```
          Manager 2
            SowDate = 20-May
            CultivarName = Hartog
            SowingDepth = 40
            RowSpacing = 250
            Population = 100
            script: same as in SE Queensland.Gatton94.Factors.TOS.1
          Manager 3
            SowDate = 10-Jun
            CultivarName = Hartog
            SowingDepth = 40
            RowSpacing = 250
            Population = 100
            script: same as in SE Queensland.Gatton94.Factors.TOS.1
          Manager 4
            SowDate = 4-Jul
            CultivarName = Hartog
            SowingDepth = 40
            RowSpacing = 250
            Population = 100
            script: same as in SE Queensland.Gatton94.Factors.TOS.1
          Manager 5
            SowDate = 22-Jul
            CultivarName = Hartog
            SowingDepth = 40
            RowSpacing = 250
            Population = 100
            script: same as in SE Queensland.Gatton94.Factors.TOS.1
          Manager 6
            SowDate = 15-Aug
            CultivarName = Hartog
            SowingDepth = 40
            RowSpacing = 250
            Population = 100
            script: same as in SE Queensland.Gatton94.Factors.TOS.1
      Simulation Gatton94Base: Area=0; Slope=0
        Clock: StartDate=1994-04-29; EndDate=1994-12-30
        Summary summaryfile
        Weather: FileName=Gatton1994.met
        SoilArbitrator Soil Arbitrator
        Zone Field: Area=1; Slope=0
          Irrigation
          Fertiliser
          Soil APS6Field: same as SE Queensland.APS6.APS6NRate0.paddock.APS6Field
          SurfaceOrganicMatter: same as SE Queensland.APS6.APS6NRate0.paddock.SurfaceOrganicMatter
          Plant Wheat: CropType=Wheat
          MicroClimate: same as SE Queensland.APS26.APS26NRate160WaterWet.paddock.MicroClimate
          Report DailyReport
          Report HarvestReport
          Manager Sowing
            SowDate = 25-May
            CultivarName = Hartog
            SowingDepth = 40
            RowSpacing = 250
            Population = 100
            script: same as in SE Queensland.Gatton94.Factors.TOS.1
          Manager Harvesting: same as SE Queensland.APS26.APS26NRate160WaterWet.paddock.Harvesting
          Manager AutoIrrigate
            FASW = 0
            WaterDeficit = 0
            AutoIrrigationOn = True
            StartStageName = Emergence
            EndStageName = EndGrainFill
            FASWThreshold = 0.9
            FASWDepth = 1000
```csharp
using System;
using Models.Core;
using System.Collections.Generic;
using System.Text;
using Models.Soils;
using Models.PMF;
using Models;
using System.Xml.Serialization;
using APSIM.Shared.Utilities;

namespace Models
{
	[Serializable] 
	public class Script : Model
	{
		public double FASW { get; set; }
		public double WaterDeficit  { get; set; }
	
		[Link] Plant Chickpea;
		[Link] Zone zone;
		[Link] Irrigation irrigation;
		[Link] Soil soil;
		
		[Description("Auto irrigation on?")]
		public bool AutoIrrigationOn { get; set; }
		
		[Description("Irrigation window start stage")]
		public string StartStageName { get; set; }
		[Description("Irrigation window end stage")]
		public string EndStageName { get; set; }

		[Description("Threshold fraction available water (0-1)")]
		public double FASWThreshold { get; set; }

		[Description("Soil depth (mm) to which fraction available water is calculated")]
		public double FASWDepth { get; set; }

		[EventSubscribe("DoManagement")]
		private void OnDoManagement(object sender, EventArgs e)
		{
			CalculateFASW();
			if (AutoIrrigationOn && Chickpea.Phenology.Between(StartStageName, EndStageName))
			{
				if (FASW < FASWThreshold)
				{
					double amount = 10;
					irrigation.Apply(WaterDeficit, depth: 0);
				}
			}
		}
		
		private void CalculateFASW()
		{
			double[] LL15 = MathUtilities.Multiply(soil.LL15, soil.Thickness);
			double[] DUL = MathUtilities.Multiply(soil.DUL, soil.Thickness);
		
			int nlayr = GetLayerIndex();
			double cumdep = MathUtilities.Sum(soil.Thickness, 0, nlayr, 0.0);

			double excess_fr = MathUtilities.Divide((cumdep - FASWDepth), soil.Thickness[nlayr], 0.0);

			// note that results may be strange if swdep < ll15
			double avail_sw = (MathUtilities.Sum(soil.Water, 0, nlayr, 0.0)
			                  - excess_fr * soil.Water[nlayr])
			                  - (MathUtilities.Sum(LL15, 0, nlayr, 0.0)
			                  - excess_fr * LL15[nlayr]);


			double pot_avail_sw = (MathUtilities.Sum(DUL, 0, nlayr, 0.0)
			                      - excess_fr * DUL[nlayr])
			                      - (MathUtilities.Sum(LL15, 0, nlayr, 0.0)
			                      - excess_fr * LL15[nlayr]);

			FASW = MathUtilities.Divide(avail_sw, pot_avail_sw, 0.0);
			WaterDeficit = MathUtilities.Constrain(pot_avail_sw - avail_sw, 0.0, 100000);
		}

		private int GetLayerIndex()
		{
			double[] cumThickness = Soil.ToCumThickness(soil.Thickness);
			for (int i = 1; i < cumThickness.Length; i++)
			{
				if (FASWDepth < cumThickness[i])
					return i - 1;
			}
			
			return cumThickness.Length - 1;
		}

	}
}
```
          Operations ApplyFertiliser
            1994-04-29  [Fertiliser].Apply(Amount: 200, Type: Fertiliser.Types.NO3N);
            Memo
              Add sufficient N to remove limitation
    Experiment Goondiwindi2011
      Memo
        INSERT TEXT HERE
      Factors
        Factor Cv: Specifications=[Sowing].Script.CultivarName = Janz, Lang, EGAGregory
        Factor TOS: Specifications=[Sowing].Script.SowDate = 19-May, 9-Jun, 28-Jun
      Simulation Goondiwindi2011Base: Area=0; Slope=0
        Clock: StartDate=2011-04-01; EndDate=2011-12-30
        Summary summaryfile
        Weather: FileName=Goondiwindi2011.met
        SoilArbitrator Soil Arbitrator
        Zone Field: same as SE Queensland.Gatton94.Gatton94Base.Field
    Experiment Nagwee2012
      Memo
        INSERT TEXT HERE
      Factors
        Factor Cv: Specifications=[Sowing].Script.CultivarName = Janz, Lang, EGAGregory
        Factor TOS: Specifications=[Sowing].Script.SowDate = 17-May, 31-May, 23-Jun
      Simulation Nangwee2012Base: Area=0; Slope=0
        Clock: StartDate=2012-04-01; EndDate=2012-12-30
        Summary summaryfile
        Weather: FileName=Nangwee2012.met
        SoilArbitrator Soil Arbitrator
        Zone Field: same as SE Queensland.Gatton94.Gatton94Base.Field
    Experiment Bungunya2012
      Memo
        INSERT TEXT HERE
      Factors
        Factor Cv: Specifications=[Sowing].Script.CultivarName = Janz, Lang, EGAGregory
        Factor TOS: Specifications=[Sowing].Script.SowDate = 10-May, 22-May, 23-Jun
      Simulation Bungunya2012Base: Area=0; Slope=0
        Clock: StartDate=2012-04-01; EndDate=2012-12-30
        Summary summaryfile
        Weather: FileName=Bungunya2012.met
        SoilArbitrator Soil Arbitrator
        Zone Field: same as SE Queensland.Gatton94.Gatton94Base.Field
    Experiment Gatton2009
      Factors
        Factor TOS: Specifications=[SowingRule].Script.TOS = 1, 2, 3
        Factor Cv
          Specifications=[SowingRule].Script.Cultivar = Bolac, Derrimut, EGAGregory, Gladius, H46, Hartog, Janz, Kelallac, Kennedy, MacKellar, Ruby, Ventura, Wedgetail, Wyalkatchem, Yitpi, Young
      Simulation Gatton2009Base: Area=0; Slope=0
        Clock: StartDate=2009-04-01; EndDate=2009-12-30
        Summary summaryfile
        Weather: FileName=Gatton2009.met
        SoilArbitrator Soil Arbitrator
        Zone Field: Area=1; Slope=0
          Irrigation
          Fertiliser
          Soil APS6Field: same as SE Queensland.APS6.APS6NRate0.paddock.APS6Field
          Manager SowingRule
            TOS = 1
            Cultivar = Hartog
```csharp
using System;
using Models.Core;
using Models.PMF;
namespace Models
{
           
	[Serializable] 
	[System.Xml.Serialization.XmlInclude(typeof(Model))]
	public class Script : Model
	{
	
		[Link] Plant Wheat;
		[Link] Clock Clock;
			
		[Description("Time of Sowing")]
		public int TOS { get; set; }

		[Description("Cultivar")]
		public String Cultivar { get; set; }
		
		[EventSubscribe("DoManagement")]
		private void OnDoManagement(object sender, EventArgs e)
		{
			if (((Clock.Today.DayOfYear == 120) && (TOS == 1)) ||
			    ((Clock.Today.DayOfYear == 150) && (TOS == 2)) ||
			    ((Clock.Today.DayOfYear == 177) && (TOS == 3)))
			{
				Wheat.Sow(population: 100, cultivar: Cultivar, depth: 30, rowSpacing: 250);
			}
		}


	}
}
```
          SurfaceOrganicMatter: same as SE Queensland.APS6.APS6NRate0.paddock.SurfaceOrganicMatter
          Plant Wheat: CropType=Wheat
          MicroClimate: same as SE Queensland.APS26.APS26NRate160WaterWet.paddock.MicroClimate
          Report DailyReport
  Folder Western Australia
    Experiment Mer86
      Factors
        Factor NRate: Specifications=[FertiliserOperations]
          Operations 15
            1986-06-14  [Fertiliser].Apply(Amount: 15, Type: Fertiliser.Types.NO3N, Depth: 50);
          Operations 60
            1986-05-29  [Fertiliser].Apply(Amount: 30, Type: Fertiliser.Types.NO3N, Depth: 50);
        Factor Water: Specifications=[IrrigationOperations]
          Operations Dry
            1986-09-03  [Irrigation].Apply (amount:0);
            1986-09-05  [Irrigation].Apply (amount:0);
            1986-09-10  [Irrigation].Apply (amount:0);
            1986-09-11  [Irrigation].Apply (amount:0);
            1986-09-14  [Irrigation].Apply (amount:0);
            1986-09-16  [Irrigation].Apply (amount:0);
            1986-09-18  [Irrigation].Apply (amount:0);
            1986-09-21  [Irrigation].Apply (amount:0);
            1986-09-23  [Irrigation].Apply (amount:0);
            1986-09-24  [Irrigation].Apply (amount:0);
            1986-09-30  [Irrigation].Apply (amount:0);
            1986-10-02  [Irrigation].Apply (amount:0);
            1986-10-04  [Irrigation].Apply (amount:0);
            1986-10-10  [Irrigation].Apply (amount:0);
            1986-10-12  [Irrigation].Apply (amount:0);
            1986-10-14  [Irrigation].Apply (amount:0);
            1986-10-16  [Irrigation].Apply (amount:0);
            1986-10-18  [Irrigation].Apply (amount:0);
            1986-10-20  [Irrigation].Apply (amount:0);
            1986-10-22  [Irrigation].Apply (amount:0);
            1986-10-25  [Irrigation].Apply (amount:0);
            1986-10-26  [Irrigation].Apply (amount:0);
            1986-10-28  [Irrigation].Apply (amount:0);
            1986-10-30  [Irrigation].Apply (amount:0);
            1986-11-01  [Irrigation].Apply (amount:0);
            1986-11-03  [Irrigation].Apply (amount:0);
            1986-11-05  [Irrigation].Apply (amount:0);
            1986-11-07  [Irrigation].Apply (amount:0);
          Operations Wet
            1986-09-03  [Irrigation].Apply (amount:10);
            1986-09-05  [Irrigation].Apply (amount:20);
            1986-09-10  [Irrigation].Apply (amount:20);
            1986-09-11  [Irrigation].Apply (amount:10);
            1986-09-14  [Irrigation].Apply (amount:10);
            1986-09-16  [Irrigation].Apply (amount:10);
            1986-09-18  [Irrigation].Apply (amount:10);
            1986-09-21  [Irrigation].Apply (amount:10);
            1986-09-23  [Irrigation].Apply (amount:10);
            1986-09-24  [Irrigation].Apply (amount:20);
            1986-09-30  [Irrigation].Apply (amount:30);
            1986-10-02  [Irrigation].Apply (amount:20);
            1986-10-04  [Irrigation].Apply (amount:20);
            1986-10-10  [Irrigation].Apply (amount:20);
            1986-10-12  [Irrigation].Apply (amount:20);
            1986-10-14  [Irrigation].Apply (amount:20);
            1986-10-16  [Irrigation].Apply (amount:20);
            1986-10-18  [Irrigation].Apply (amount:20);
            1986-10-20  [Irrigation].Apply (amount:20);
            1986-10-22  [Irrigation].Apply (amount:20);
            1986-10-25  [Irrigation].Apply (amount:20);
            1986-10-26  [Irrigation].Apply (amount:20);
            1986-10-28  [Irrigation].Apply (amount:20);
            1986-10-30  [Irrigation].Apply (amount:20);
            1986-11-01  [Irrigation].Apply (amount:20);
            1986-11-03  [Irrigation].Apply (amount:20);
            1986-11-05  [Irrigation].Apply (amount:20);
            1986-11-07  [Irrigation].Apply (amount:20);
      Simulation Mer86Base: Area=0; Slope=0
        Clock: StartDate=1986-05-01; EndDate=1986-11-30
        Summary summaryfile
        Weather: FileName=MER-86.met
        Zone paddock: Area=1; Slope=0
          Soil MER-86Field: SoilType=sand; LocalName=Merredin; Site=Merredin; NearestTown=Unknown; Region=WA; NaturalVegetation=Unknown; Latitude=0; Longitude=0
            Water
              Thickness  BD    AirDry  LL15  DUL   SAT
              100        1.7   0.03    0.03  0.16  0.26
              100        1.75  0.03    0.03  0.21  0.26
              100        1.8   0.03    0.03  0.22  0.25
              100        1.85  0.04    0.05  0.23  0.24
              100        1.85  0.04    0.1   0.22  0.23
              100        1.85  0.04    0.12  0.22  0.22
              100        1.85  0.04    0.17  0.22  0.22
              200        1.85  0.04    0.17  0.22  0.23
              200        1.85  0.04    0.17  0.22  0.23
              200        1.85  0.04    0.17  0.22  0.23
              SoilCrop WheatSoil
                LL=[0.03, 0.03, 0.03, 0.05, 0.1, 0.12, 0.17, 0.17, 0.17, 0.17]
                KL=[0.06, 0.06, 0.06, 0.06, 0.06, 0.06, 0.06, 0.06, 0.06, 0.06]
                XF=[0.2, 0.6, 0.6, 0.6, 0.6, 0.6, 0.6, 0.6, 0.6, 0.6]
            SoilWater: residueinterception=0; SummerDate=1-Nov; SummerU=6; SummerCona=2; WinterDate=1-Apr; WinterU=6; WinterCona=2; DiffusConst=88; DiffusSlope=35; Salb=0.13; CN2Bare=60; CNRed=20; CNCov=0.8; slope=0; discharge_width=0; catchment_area=0; max_pond=0
              Thickness  SWCON  KLAT
              100        1      0
              100        1      0
              100        1      0
              100        1      0
              100        0.3    0
              100        1      0
              100        1      0
              200        1      0
              200        1      0
              200        1      0
            SoilNitrogen: fom_type=[default, manure, mucuna, lablab, shemp, stable]; fract_carb=[0.2, 0.3, 0.54, 0.57, 0.45, 0]; fract_cell=[0.7, 0.3, 0.37, 0.37, 0.47, 0.1]; fract_lign=[0.1, 0.4, 0.09, 0.06, 0.08, 0.9]; wfpsN2N2O_x=[22, 88]; wfpsN2N2O_y=[0.1, 1]
            SoilOrganicMatter: RootCN=40; RootWt=1000; SoilCN=13; EnrACoeff=1; EnrBCoeff=1; OCUnits=Total
              Thickness  OC    FBiom  FInert
              100        0.5   0.04   0.1
              100        0.1   0.03   0.1
              100        0.1   0.02   0.2
              100        0.05  0.01   0.8
              100        0.05  0.01   0.9
              100        0.05  0.01   0.9
              100        0.05  0.01   0.9
              200        0.05  0.01   0.9
              200        0.05  0.01   0.9
              200        0.05  0.01   0.9
            Analysis: Thickness=[100, 100, 100, 100, 100, 100, 100, 200, 200, 200]; PH=[4.7, 4.7, 4.7, 6, 6, 6, 6, 6, 6, 6]; PHUnits=Water; BoronUnits=HotWater
            Sample Initial Water: Thickness=[100, 100, 100, 100, 100, 100, 100, 200, 200, 200]; SW=[0.03, 0.03, 0.07, 0.1, 0.22, 0.22, 0.22, 0.22, 0.21, 0.19]; NO3Units=ppm; NH4Units=ppm; SWUnits=Volumetric; OCUnits=Total; PHUnits=Water
            Sample Initial Nitrogen: NO3Units=ppm; NH4Units=ppm; SWUnits=Volumetric; OCUnits=Total; PHUnits=Water
              Thickness  NO3  NH4
              100        10   5
              100        5    3
              100        0.3  1
              100        0    0
              100        0    0
              100        0    0
              100        0    0
              200        0    0
              200        0    0
              200        0    0
          Irrigation
          SurfaceOrganicMatter: PoolName=wheat_stubble; type=wheat; mass=0; standing_fraction=0; cpr=0; cnr=80; CriticalResidueWeight=2000; OptimumDecompTemp=20; MaxCumulativeEOS=20; CNRatioDecompCoeff=0.277; CNRatioDecompThreshold=25; TotalLeachRain=25; MinRainToLeach=10; CriticalMinimumOrganicC=0.004; DefaultCPRatio=0; DefaultStandingFraction=0; StandingExtinctCoeff=0.5; FractionFaecesAdded=0.5
            Pools:
              {PoolName=wheat_stubble, ResidueType=wheat, Mass=0, CNRatio=80, CPRatio=0, StandingFraction=0}
            ResidueTypes: LoadFromResource=ResidueTypes
          Operations SowingOperations
            1986-05-29  [Wheat].Sow(population:149, cultivar:"Gutha", depth:30, rowSpacing:250);
          Plant Wheat: CropType=Wheat
          MicroClimate: same as SE Queensland.APS26.APS26NRate160WaterWet.paddock.MicroClimate
          Fertiliser
          Operations FertiliserOperations
            1986-06-14  [Fertiliser].Apply(Amount: 15, Type: Fertiliser.Types.NO3N, Depth: 50);
          Operations IrrigationOperations: same as Western Australia.Mer86.Factors.Water.Wet
          MicroClimate: same as SE Queensland.APS26.APS26NRate160WaterWet.paddock.MicroClimate
          Report DailyReport
          Report HarvestReport
          Manager Harvesting: same as SE Queensland.APS6.APS6NRate0.paddock.Harvesting
        SoilArbitrator Soil Arbitrator
    Experiment Mer73
      Factors
        Factor NRate: Specifications=[FertiliserOperations]
          Operations 0
            1986-06-14  [Fertiliser].Apply(Amount: 0, Type: Fertiliser.Types.NO3N, Depth: 50);
          Operations 15
            1973-06-21  [Fertiliser].Apply(Amount: 15, Type: Fertiliser.Types.NO3N, Depth: 50);
        Factor Water: Specifications=[IrrigationOperations]
          Operations Dry: same as Western Australia.Mer86.Factors.Water.Dry
          Operations 40
            1973-09-21  [Irrigation].Apply (amount:40);
          Operations 150
            1973-08-28  [Irrigation].Apply (amount:20);
            1973-09-21  [Irrigation].Apply (amount:30);
            1973-10-12  [Irrigation].Apply (amount:50);
            1973-10-28  [Irrigation].Apply (amount:50);
      Simulation Mer73Base: Area=0; Slope=0
        Clock: StartDate=1973-05-01; EndDate=1973-11-30
        Summary summaryfile
        Weather: FileName=MER-73.met
        Zone paddock: Area=1; Slope=0
          Soil MER-73Field: SoilType=sand; LocalName=Merredin; Site=Merredin; NearestTown=Unknown; Region=WA; NaturalVegetation=Unknown; Latitude=0; Longitude=0
            Water
              Thickness  BD    AirDry  LL15  DUL   SAT
              100        1.7   0.03    0.03  0.15  0.28
              100        1.85  0.03    0.04  0.2   0.27
              100        1.75  0.03    0.04  0.2   0.27
              100        1.7   0.04    0.05  0.2   0.25
              100        1.7   0.04    0.05  0.21  0.25
              100        1.85  0.04    0.08  0.21  0.25
              100        1.95  0.04    0.11  0.21  0.25
              200        2     0.04    0.14  0.21  0.23
              200        2     0.04    0.16  0.23  0.23
              200        2     0.04    0.14  0.23  0.23
              SoilCrop WheatSoil
                LL=[0.03, 0.03, 0.03, 0.05, 0.1, 0.12, 0.17, 0.17, 0.17, 0.17]
                KL=[0.06, 0.06, 0.06, 0.06, 0.06, 0.06, 0.06, 0.06, 0.06, 0.06]
                XF=[0.2, 0.2, 0.4, 0.4, 0.4, 0.4, 0.4, 0.4, 0.2, 0]
            SoilWater: residueinterception=0; SummerDate=1-Nov; SummerU=6; SummerCona=2; WinterDate=1-Apr; WinterU=6; WinterCona=2; DiffusConst=88; DiffusSlope=35; Salb=0.13; CN2Bare=60; CNRed=20; CNCov=0.8; slope=0; discharge_width=0; catchment_area=0; max_pond=0
              Thickness  SWCON  KLAT
              100        1      0
              100        1      0
              100        1      0
              100        1      0
              100        0.1    0
              100        1      0
              100        1      0
              200        1      0
              200        1      0
              200        1      0
            SoilNitrogen: fom_type=[default, manure, mucuna, lablab, shemp, stable]; fract_carb=[0.2, 0.3, 0.54, 0.57, 0.45, 0]; fract_cell=[0.7, 0.3, 0.37, 0.37, 0.47, 0.1]; fract_lign=[0.1, 0.4, 0.09, 0.06, 0.08, 0.9]; wfpsN2N2O_x=[22, 88]; wfpsN2N2O_y=[0.1, 1]
              oc=[1.2033, 0.792285, 0.299009, 0.0513806, 0.0510005, 0.0506757, 0.0504969, 0.0501203, 0.0500588, 0.05002]
            SoilOrganicMatter: RootCN=20; RootWt=1500; SoilCN=13; EnrACoeff=1; EnrBCoeff=1; OCUnits=Total
              Thickness  OC    FBiom  FInert
              100        1.2   0.04   0.1
              100        0.8   0.03   0.1
              100        0.3   0.02   0.2
              100        0.05  0.01   0.8
              100        0.05  0.01   0.9
              100        0.05  0.01   0.9
              100        0.05  0.01   0.9
              200        0.05  0.01   0.9
              200        0.05  0.01   0.9
              200        0.05  0.01   0.9
            Analysis: Thickness=[100, 100, 100, 100, 100, 100, 100, 200, 200, 200]; PH=[4.7, 4.7, 4.7, 6, 6, 6, 6, 6, 6, 6]; PHUnits=Water; BoronUnits=HotWater
            Sample Initial Water: Thickness=[100, 100, 100, 100, 100, 100, 100, 200, 200, 200]; SW=[0.03, 0.03, 0.07, 0.1, 0.22, 0.22, 0.22, 0.22, 0.21, 0.19]; NO3Units=ppm; NH4Units=ppm; SWUnits=Volumetric; OCUnits=Total; PHUnits=Water
            Sample Initial Nitrogen: NO3Units=ppm; NH4Units=ppm; SWUnits=Volumetric; OCUnits=Total; PHUnits=Water
              Thickness  NO3  NH4
              100        2    1
              100        1    0
              100        0    0
              100        0    0
              100        0    0
              100        0    0
              100        0    0
              200        0    0
              200        0    0
              200        0    0
          Irrigation
          SurfaceOrganicMatter: PondActive=no; ReportAdditions=no; ReportRemovals=no; PoolName=wheat_stubble; type=wheat; mass=2500; standing_fraction=0; cpr=0; cnr=30; CriticalResidueWeight=2000; OptimumDecompTemp=20; MaxCumulativeEOS=20; CNRatioDecompCoeff=0.277; CNRatioDecompThreshold=25; TotalLeachRain=25; MinRainToLeach=10; CriticalMinimumOrganicC=0.004; DefaultCPRatio=0; DefaultStandingFraction=0; StandingExtinctCoeff=0.5; FractionFaecesAdded=0.5
            Pools:
              {PoolName=wheat_stubble, ResidueType=wheat, Mass=2500, CNRatio=30, CPRatio=0, StandingFraction=0}
            ResidueTypes: LoadFromResource=ResidueTypes
            TillageTypes TillageTypesList
          Operations SowingOperations
            1973-06-21  [Wheat].Sow(population:100, cultivar:"Gamenya", depth:30, rowSpacing:250);
          Plant Wheat: CropType=Wheat
          MicroClimate: same as SE Queensland.APS26.APS26NRate160WaterWet.paddock.MicroClimate
          Fertiliser
          Operations FertiliserOperations
            1986-06-14  [Fertiliser].Apply(Amount: 15, Type: Fertiliser.Types.NO3N, Depth: 50);
          Operations IrrigationOperations: same as Western Australia.Mer86.Factors.Water.Wet
          Manager ExtraVariables: same as SE Queensland.APS14.APS14StubbleBareNRate0.paddock.ExtraVariables
          Report HarvestReport
          Manager Harvesting: same as SE Queensland.APS26.APS26NRate160WaterWet.paddock.Harvesting
          Report DailyReport
        SoilArbitrator Soil Arbitrator
    Experiment Cunderdin97
      Factors
        Factor Sow: Specifications=[SowingSchedule]
          Operations SpearEarly
            1997-06-06  [Wheat].Sow(population:150, cultivar:"Spear", depth:30, rowSpacing:250);
          Operations SpearMid
            1997-07-08  [Wheat].Sow(population:108, cultivar:"Spear", depth:30, rowSpacing:250);
          Operations WilgoyneEarly
            1997-06-06  [Wheat].Sow(population:150, cultivar:"Wilgoyne", depth:30, rowSpacing:250);
          Operations WilgoyneMid
            1997-07-08  [Wheat].Sow(population:108, cultivar:"Wilgoyne", depth:30, rowSpacing:250);
          Operations WilgoyneLate
            1997-07-08  [Wheat].Sow(population:100, cultivar:"Wilgoyne", depth:30, rowSpacing:250);
        Factor SowN: Specifications=[SowingFertiliser].Script.Amount=0,50
        Factor TopN: Specifications=[SowingFertiliser].Script.Amount=0,30
        Factor Irr: Specifications=[IrrigationSchedule]
          Operations Wet
            1997-09-23  [Irrigation].Apply(amount:15);
            1997-10-01  [Irrigation].Apply(amount:15);
            1997-10-06  [Irrigation].Apply(amount:15);
            1997-10-14  [Irrigation].Apply(amount:20);
            1997-10-21  [Irrigation].Apply(amount:17.5);
            1997-10-26  [Irrigation].Apply(amount:17.5);
          Operations Dry
      Simulation Cunderdin97Base: Area=0; Slope=0
        Clock: StartDate=1997-04-16; EndDate=1997-12-30
        Summary summaryfile
        Weather: FileName=Cunderdin.met
        Zone paddock: Area=1; Slope=0
          Irrigation
          Soil: SoilType=heavy; LocalName=Beverley; Site=Cunderdin; NearestTown=Cunderdin; Region=WA; NaturalVegetation=Unknown; Latitude=0; Longitude=0
            Water
              Thickness  BD   AirDry  LL15   DUL    SAT
              50         1.3  0.034   0.07   0.156  0.48
              50         1.3  0.034   0.07   0.156  0.48
              100        1.4  0.121   0.121  0.22   0.44
              100        1.4  0.123   0.123  0.224  0.44
              100        1.5  0.132   0.132  0.243  0.4
              100        1.5  0.132   0.132  0.243  0.4
              100        1.5  0.135   0.135  0.243  0.4
              100        1.5  0.145   0.145  0.243  0.4
              200        1.5  0.145   0.145  0.243  0.4
              200        1.5  0.145   0.145  0.243  0.4
              200        1.5  0.145   0.145  0.243  0.4
              200        1.5  0.145   0.145  0.243  0.4
              200        1.5  0.145   0.145  0.243  0.4
              200        1.5  0.145   0.145  0.243  0.4
              200        1.5  0.145   0.145  0.243  0.4
              200        1.5  0.145   0.145  0.243  0.4
              200        1.5  0.145   0.145  0.243  0.4
              SoilCrop wheatSoil
                LL=[0.07, 0.07, 0.121, 0.123, 0.132, 0.132, 0.135, 0.145, 0.145, 0.145, 0.145, 0.145, 0.145, 0.145, 0.145, 0.145, 0.145]
                KL=[0.06, 0.06, 0.05, 0.05, 0.04, 0.04, 0.04, 0.04, 0.03, 0.03, 0.03, 0.03, 0.03, 0.03, 0.03, 0.03, 0.03]
                XF=[0.7, 0.6, 0.5, 0.5, 0.5, 0.5, 0.5, 0.5, 0.3, 0.3, 0.3, 0.3, 0.3, 0.3, 0.3, 0.3, 0.3]
            SoilWater: residueinterception=0; SummerDate=1-Nov; SummerU=7.5; SummerCona=3; WinterDate=1-Apr; WinterU=7.5; WinterCona=3; DiffusConst=88; DiffusSlope=35; Salb=0.13; CN2Bare=25; CNRed=20; CNCov=0.8; slope=0; discharge_width=0; catchment_area=0; max_pond=0
              Thickness  SWCON  KLAT
              50         0.6    0
              50         0.6    0
              100        0.6    0
              100        0.6    0
              100        0.6    0
              100        0.6    0
              100        0.6    0
              100        0.6    0
              200        0.6    0
              200        0.6    0
              200        0.6    0
              200        0.6    0
              200        0.6    0
              200        0.6    0
              200        0.6    0
              200        0.6    0
              200        0.6    0
            SoilOrganicMatter: RootCN=40; RootWt=500; SoilCN=13; EnrACoeff=1; EnrBCoeff=1; OCUnits=Total
              Thickness  OC    FBiom  FInert
              50         0.73  0.03   0.3
              50         0.73  0.03   0.3
              100        0.46  0.02   0.3
              100        0.39  0.01   0.4
              100        0.3   0.01   0.8
              100        0.22  0.01   0.9
              100        0.19  0.01   0.9
              100        0.19  0.01   0.9
              200        0.1   0.01   0.9
              200        0.1   0.01   0.9
              200        0.1   0.01   0.9
              200        0.1   0.01   0.9
              200        0.1   0.01   0.9
              200        0.1   0.01   0.9
              200        0.1   0.01   0.9
              200        0.1   0.01   0.9
              200        0.1   0.01   0.9
            Analysis: PH=[4.7, 4.7, 4.7, 4.7, 6, 6, 6, 6, 6, 6, 6, 6, 6, 6, 6, 6, 6]; PHUnits=Water; BoronUnits=HotWater
              Thickness=[50, 50, 100, 100, 100, 100, 100, 100, 200, 200, 200, 200, 200, 200, 200, 200, 200]
            Sample: NO3Units=ppm; NH4Units=ppm; SWUnits=Volumetric; OCUnits=Total; PHUnits=Water
              Thickness  NO3  NH4  SW
              50         23   2    0.034
              50         23   2    0.156
              100        12   1    0.22
              100        9    2    0.224
              100        4    1    0.244
              100        2    1    0.245
              100        2    1    0.246
              100        2    1    0.243
              200        2    1    0.24
              200        2    1    0.145
              200        2    1    0.145
              200        2    1    0.145
              200        2    1    0.145
              200        2    1    0.145
              200        2    1    0.145
              200        2    1    0.145
              200        2    1    0.145
            SoilNitrogen: fom_type=[default, manure, mucuna, lablab, shemp, stable]; fract_carb=[0.2, 0.3, 0.54, 0.57, 0.45, 0]; fract_cell=[0.7, 0.3, 0.37, 0.37, 0.47, 0.1]; fract_lign=[0.1, 0.4, 0.09, 0.06, 0.08, 0.9]; wfpsN2N2O_x=[22, 88]; wfpsN2N2O_y=[0.1, 1]
              oc=[0.723526, 0.723012, 0.45528, 0.387092, 0.299501, 0.219998, 0.190011, 0.189986, 0.099965, 0.0999681, 0.0999903, 0.100014, 0.100005, 0.1, 0.1, 0.1, 0.0999999]
          SurfaceOrganicMatter: PondActive=no; ReportAdditions=no; ReportRemovals=no; PoolName=wheat_stubble; type=wheat; mass=500; standing_fraction=0; cpr=0; cnr=120; CriticalResidueWeight=2000; OptimumDecompTemp=20; MaxCumulativeEOS=20; CNRatioDecompCoeff=0.277; CNRatioDecompThreshold=25; TotalLeachRain=25; MinRainToLeach=10; CriticalMinimumOrganicC=0.004; DefaultCPRatio=0; DefaultStandingFraction=0; StandingExtinctCoeff=0.5; FractionFaecesAdded=0.5
            Pools:
              {PoolName=wheat_stubble, ResidueType=wheat, Mass=500, CNRatio=120, CPRatio=0, StandingFraction=0}
            ResidueTypes: LoadFromResource=ResidueTypes
            TillageTypes TillageTypesList
          Fertiliser
          Plant Wheat: CropType=Wheat
          Operations IrrigationSchedule: same as SE Queensland.APS14.APS14StubbleBareNRate0.paddock.IrrigationSchedule
          MicroClimate: same as SE Queensland.APS26.APS26NRate160WaterWet.paddock.MicroClimate
          Operations SowingSchedule
            1993-06-29  [Wheat].Sow(population:114, cultivar:"GattonHartog", depth:30, rowSpacing:250);
          PredictedObserved: FieldNameUsedForMatch=Wheat.Zadok.Stage
          Manager ExtraVariables: same as SE Queensland.APS14.APS14StubbleBareNRate0.paddock.ExtraVariables
          Manager SowingFertiliser
            Amount = 160
```csharp
using System;
using Models.Core;
using Models.PMF;
using APSIM.Shared.Utilities;

namespace Models
{
	[Serializable]
	public class Script : Model
	{
		[Link] Clock Clock;
		[Link] Fertiliser Fertiliser;
		[Link] Summary Summary;
		
		[Description("Amount of fertiliser to be applied")]
		public double Amount { get; set; }

		[EventSubscribe("Sowing")]
		private void OnSowing(object sender, EventArgs e)
		{
			Fertiliser.Apply(Amount: Amount, Type: Fertiliser.Types.NO3N);
		}
		
	}
}
```
          Manager TopdressFertiliser
            FertDayOfYear = 239
            Amount = 0
            script: same as in SE Queensland.APS26.APS26NRate160WaterWet.paddock.ApplyFertiliser
          Report
            VariableNames:
              [Clock].Today
              Wheat.Zadok.Stage
              Wheat.Phenology.CurrentStageName
              Wheat.AboveGround.Wt
              Wheat.AboveGround.N
              Wheat.Grain.Wt
              Wheat.Grain.Protein
              Wheat.Grain.Size
              Wheat.Grain.Number
              Wheat.Grain.Live.Wt
              Wheat.Grain.Live.N
              Wheat.Leaf.LAI
              Wheat.Leaf.Live.Wt
              Wheat.Leaf.Live.N
              Wheat.Spike.Wt
              Wheat.Spike.N
              Wheat.Stem.Live.Wt
              Wheat.Stem.Live.N
              Wheat.Root.Depth
              [Wheat].Root.WaterUptake
              [Wheat].Leaf.Fw
              [Wheat].Leaf.Fn
              [Wheat].Total.Wt
            EventNames:
              [Clock].DoReport
          Report DailyReport
          Report HarvestReport
          Manager Harvesting: same as SE Queensland.APS26.APS26NRate160WaterWet.paddock.Harvesting
        SoilArbitrator Soil Arbitrator
    Experiment Wongan83
      Factors
        Factor Soil: Specifications=[WonganSoil]
          Soil Ripped: SoilType=sand; LocalName=WonganSite; Site=WonganSite; NearestTown=Unknown; Region=WA; NaturalVegetation=Unknown; Latitude=0; Longitude=0
            Water
              Thickness  BD    AirDry  LL15  DUL   SAT
              50         1.31  0.04    0.07  0.11  0.35
              50         1.31  0.05    0.07  0.11  0.35
              100        1.45  0.05    0.08  0.14  0.35
              200        1.48  0.05    0.09  0.14  0.35
              200        1.53  0.05    0.09  0.15  0.35
              200        1.5   0.05    0.09  0.15  0.35
              400        1.5   0.05    0.1   0.16  0.35
              400        1.5   0.05    0.11  0.17  0.35
              600        1.5   0.05    0.13  0.17  0.35
              600        1.5   0.05    0.13  0.17  0.35
              SoilCrop WheatSoil
                LL=[0.08, 0.08, 0.09, 0.1, 0.11, 0.12, 0.12, 0.12, 0.14, 0.14]
                KL=[0.06, 0.06, 0.06, 0.06, 0.06, 0.06, 0.06, 0.06, 0.06, 0.06]
                XF=[1, 1, 1, 1, 1, 1, 1, 1, 1, 1]
            SoilWater: residueinterception=0; SummerDate=1-Nov; SummerU=6; SummerCona=2; WinterDate=1-Apr; WinterU=6; WinterCona=2; DiffusConst=88; DiffusSlope=35; Salb=0.13; CN2Bare=60; CNRed=20; CNCov=0.8; max_pond=0; Thickness=[50, 50, 100, 200, 200, 200, 400, 400, 600, 600]
              SWCON=[0.35, 0.35, 0.35, 0.35, 0.35, 0.35, 0.35, 0.35, 0.35, 0.35]
            SoilOrganicMatter: RootCN=40; RootWt=1500; SoilCN=13; EnrACoeff=1; EnrBCoeff=1; OCUnits=Total
              Thickness  OC    FBiom  FInert
              50         1.23  0.04   0.1
              50         0.43  0.04   0.1
              100        0.37  0.03   0.1
              200        0.26  0.02   0.2
              200        0.21  0.01   0.8
              200        0.2   0.01   0.9
              400        0.18  0.01   0.9
              400        0.18  0.01   0.9
              600        0.17  0.01   0.9
              600        0.17  0.01   0.9
            Analysis: Thickness=[50, 50, 100, 200, 200, 200, 400, 400, 600, 600]; PH=[4.7, 5.1, 5.1, 6, 6, 6, 6, 6, 6, 6]; PHUnits=Water; BoronUnits=HotWater
            Sample: NO3Units=ppm; NH4Units=ppm; SWUnits=Volumetric; OCUnits=Total; PHUnits=Water
              Thickness  NO3  NH4  SW
              50         7    2    0.07
              50         7    2    0.07
              100        5    1    0.13
              200        3    1    0.14
              200        2    0    0.14
              200        2    0    0.11
              400        2    0    0.1
              400        1    0    0.11
              600        1    0    0.12
              600        1    0    0.13
            SoilNitrogen: fom_type=[default, manure, mucuna, lablab, shemp, stable]; fract_carb=[0.2, 0.3, 0.54, 0.57, 0.45, 0]; fract_cell=[0.7, 0.3, 0.37, 0.37, 0.47, 0.1]; fract_lign=[0.1, 0.4, 0.09, 0.06, 0.08, 0.9]; wfpsN2N2O_x=[22, 88]; wfpsN2N2O_y=[0.1, 1]
              oc=[0.830987, 0.349129, 0.329455, 0.220339, 0.220441, 0.220335, 0.190667, 0.170504, 0.150477, 0.120544, 0.110476, 0.100412, 0.100356, 0.100312, 0.100249, 0.100216, 0.100177, 0.100129, 0.100094, 0.100043]
          Soil Unripped: SoilType=sand; LocalName=WonganSite; Site=WonganSite; NearestTown=Unknown; Region=WA; NaturalVegetation=Unknown; Latitude=0; Longitude=0
            Water
              Thickness  BD    AirDry  LL15  DUL   SAT
              50         1.31  0.04    0.07  0.13  0.35
              50         1.31  0.05    0.07  0.13  0.35
              100        1.45  0.05    0.08  0.14  0.35
              200        1.48  0.05    0.09  0.14  0.35
              200        1.53  0.05    0.09  0.15  0.35
              200        1.5   0.05    0.09  0.15  0.35
              400        1.5   0.05    0.1   0.16  0.35
              400        1.5   0.05    0.11  0.17  0.35
              600        1.5   0.05    0.13  0.17  0.35
              600        1.5   0.05    0.13  0.17  0.35
              SoilCrop WheatSoil
                LL=[0.08, 0.08, 0.09, 0.1, 0.11, 0.12, 0.12, 0.12, 0.14, 0.14]
                KL=[0.06, 0.06, 0.06, 0.06, 0.06, 0.06, 0.06, 0.06, 0.06, 0.06]
                XF=[0.2, 0.1, 0.2, 0.7, 1, 1, 1, 1, 1, 1]
            SoilWater: same as Western Australia.Wongan83.Factors.Soil.Ripped.SoilWater
            SoilOrganicMatter: same as Western Australia.Wongan83.Factors.Soil.Ripped.SoilOrganicMatter
            Analysis: Thickness=[50, 50, 100, 200, 200, 200, 400, 400, 600, 600]; PH=[4.7, 5.1, 5.1, 6, 6, 6, 6, 6, 6, 6]; PHUnits=Water; BoronUnits=HotWater
            Sample: same as Western Australia.Wongan83.Factors.Soil.Ripped.Sample
            SoilNitrogen: same as Western Australia.Wongan83.Factors.Soil.Ripped.SoilNitrogen
        Factor N: Specifications=[SowingFertiliser].Script.Amount=0,10,25,50,100
      Simulation WonganBase: Area=0; Slope=0
        Clock: StartDate=1983-06-13; EndDate=1983-11-11
        Summary summaryfile
        Weather: FileName=Wongan83.met
        Zone paddock: Area=1; Slope=0
          Irrigation
          Soil WonganSoil: SoilType=unknown; LocalName=Ginninderra; Site=Ginninderra; NearestTown=Ginninderra; Region=ACT; NaturalVegetation=Unknown; Latitude=0; Longitude=0
            InitialWater: PercentMethod=FilledFromTop; FractionFull=1
            Water
              Thickness  BD    AirDry  LL15   DUL    SAT
              100        1.45  0.04    0.073  0.21   0.414
              100        1.5   0.04    0.075  0.234  0.394
              100        1.55  0.06    0.074  0.22   0.375
              100        1.5   0.1     0.12   0.29   0.394
              100        1.52  0.1     0.16   0.293  0.386
              100        1.55  0.1     0.25   0.37   0.375
              100        1.57  0.1     0.25   0.36   0.367
              100        1.6   0.1     0.24   0.35   0.355
              100        1.62  0.1     0.259  0.34   0.347
              100        1.65  0.1     0.281  0.33   0.335
              100        1.62  0.1     0.295  0.34   0.347
              100        1.6   0.1     0.272  0.35   0.355
              100        1.58  0.1     0.269  0.36   0.363
              100        1.55  0.1     0.264  0.37   0.375
              100        1.55  0.1     0.256  0.37   0.375
              100        1.55  0.1     0.256  0.355  0.375
              100        1.55  0.1     0.256  0.35   0.375
              100        1.55  0.1     0.256  0.33   0.375
              100        1.55  0.1     0.256  0.33   0.375
              100        1.55  0.1     0.256  0.33   0.375
              SoilCrop wheatSoil
                LL=[0.073, 0.075, 0.074, 0.12, 0.16, 0.25, 0.25, 0.24, 0.259, 0.281, 0.295, 0.272, 0.269, 0.264, 0.256, 0.256, 0.256, 0.256, 0.256, 0.256]
                KL=[0.08, 0.08, 0.08, 0.08, 0.08, 0.08, 0.08, 0.08, 0.08, 0.07, 0.07, 0.06, 0.06, 0.05, 0.05, 0.04, 0.04, 0.03, 0.02, 0.01]
                XF=[1, 1, 1, 1, 1, 1, 1, 1, 1, 1, 1, 1, 1, 1, 1, 1, 1, 1, 0, 0]
            SoilWater: residueinterception=0; SummerDate=1-Nov; SummerU=2; SummerCona=2; WinterDate=1-Apr; WinterU=2; WinterCona=2; DiffusConst=88; DiffusSlope=35.4; Salb=0.13; CN2Bare=72; CNRed=20; CNCov=0.8; slope=0; discharge_width=0; catchment_area=0; max_pond=0
              Thickness  SWCON  KLAT
              100        0.4    0
              100        0.4    0
              100        0.4    0
              100        0.4    0
              100        0.4    0
              100        0.4    0
              100        0.4    0
              100        0.4    0
              100        0.4    0
              100        0.4    0
              100        0.4    0
              100        0.4    0
              100        0.4    0
              100        0.4    0
              100        0.4    0
              100        0.4    0
              100        0.4    0
              100        0.4    0
              100        0.4    0
              100        0.4    0
            SoilOrganicMatter: RootCN=40; RootWt=2000; SoilCN=14.5; EnrACoeff=1; EnrBCoeff=1; OCUnits=Total
              Thickness  OC    FBiom  FInert
              100        0.83  0.04   0.36
              100        0.35  0.03   0.35
              100        0.33  0.03   0.45
              100        0.22  0.02   0.45
              100        0.22  0.02   0.59
              100        0.22  0.02   0.6
              100        0.19  0.02   0.84
              100        0.17  0.02   0.8
              100        0.15  0.01   0.8
              100        0.12  0.01   0.99
              100        0.11  0.01   0.99
              100        0.1   0.01   0.99
              100        0.1   0.01   0.99
              100        0.1   0.01   0.99
              100        0.1   0.01   0.99
              100        0.1   0.01   0.99
              100        0.1   0.01   0.99
              100        0.1   0.01   0.99
              100        0.1   0.01   0.99
              100        0.1   0.01   0.99
            Analysis: PHUnits=Water; BoronUnits=HotWater
              Thickness=[100, 100, 100, 100, 100, 100, 100, 100, 100, 100, 100, 100, 100, 100, 100, 100, 100, 100, 100, 100]
              PH=[5.8, 5.9, 6.6, 6.8, 7, 7.1, 7.2, 7.3, 7.4, 7.4, 7.6, 7.8, 8, 8.2, 8.3, 8.4, 8.4, 8.5, 8.5, 8.5]
            Sample: NO3Units=ppm; NH4Units=ppm; SWUnits=Volumetric; OCUnits=Total; PHUnits=Water
              Thickness  NO3  NH4
              100        10   1
              100        15   1
              100        10   1
              100        8    1
              100        5    1
              100        2    1
              100        1    1
              100        1    1
              100        1    1
              100        1    1
              100        1    1
              100        1    1
              100        1    1
              100        1    1
              100        0    0
              100        0    0
              100        0    0
              100        0    0
              100        0    0
              100        0    0
            SoilNitrogen: fom_type=[default, manure, mucuna, lablab, shemp, stable]; fract_carb=[0.2, 0.3, 0.54, 0.57, 0.45, 0]; fract_cell=[0.7, 0.3, 0.37, 0.37, 0.47, 0.1]; fract_lign=[0.1, 0.4, 0.09, 0.06, 0.08, 0.9]; wfpsN2N2O_x=[22, 88]; wfpsN2N2O_y=[0.1, 1]
              oc=[0.835354, 0.35073, 0.330728, 0.221338, 0.221193, 0.220685, 0.191071, 0.170898, 0.150786, 0.120778, 0.110619, 0.100528, 0.100411, 0.100323, 0.100272, 0.100233, 0.100199, 0.10017, 0.100144, 0.100122]
          SurfaceOrganicMatter: PondActive=no; ReportAdditions=no; ReportRemovals=no; PoolName=wheat_stubble; type=wheat; mass=1000; standing_fraction=0; cpr=0; cnr=20; CriticalResidueWeight=2000; OptimumDecompTemp=20; MaxCumulativeEOS=20; CNRatioDecompCoeff=0.277; CNRatioDecompThreshold=25; TotalLeachRain=25; MinRainToLeach=10; CriticalMinimumOrganicC=0.004; DefaultCPRatio=0; DefaultStandingFraction=0; StandingExtinctCoeff=0.5; FractionFaecesAdded=0.5
            Pools:
              {PoolName=wheat_stubble, ResidueType=wheat, Mass=1000, CNRatio=20, CPRatio=0, StandingFraction=0}
            ResidueTypes: LoadFromResource=ResidueTypes
            TillageTypes TillageTypesList
          Fertiliser
          Plant Wheat: CropType=Wheat
          MicroClimate: same as SE Queensland.APS26.APS26NRate160WaterWet.paddock.MicroClimate
          Operations SowingSchedule
            1983-06-14  [Wheat].Sow(population:159, cultivar:"gamenya", depth:80, rowSpacing:250);
          Manager SowingFertiliser
            Amount = 0
            script: same as in Western Australia.Cunderdin97.Cunderdin97Base.paddock.SowingFertiliser
          Manager ExtraVariables: same as SE Queensland.APS14.APS14StubbleBareNRate0.paddock.ExtraVariables
          Report HarvestReport
          Report DailyReport
          Manager Harvesting: same as SE Queensland.APS26.APS26NRate160WaterWet.paddock.Harvesting
        SoilArbitrator Soil Arbitrator
  Folder Turkey
    Memo
      The dataset of [Tari2016] includes 4 irrigation deficit treatments applied at each of 3 plant growth stages.  The experiment was conducted at Konya in the Central Anatolia region of Turkey. Yields ranged from 2.88 t/ha to 6.82 t/ha.
    Experiment Konya09
      Factors
        Factor Water: Specifications=[IrrigationSchedule]
          Operations AAA
            2010-04-09  [Irrigation].Apply(amount:150);
            2010-05-06  [Irrigation].Apply(amount:154);
            2010-05-26  [Irrigation].Apply(amount:152);
          Operations BAA
            2010-04-09  [Irrigation].Apply(amount:97);
            2010-05-06  [Irrigation].Apply(amount:154);
            2010-05-26  [Irrigation].Apply(amount:152);
          Operations CAA
            2010-04-09  [Irrigation].Apply(amount:52);
            2010-05-06  [Irrigation].Apply(amount:154);
            2010-05-26  [Irrigation].Apply(amount:152);
          Operations DAA
            2010-04-09  [Irrigation].Apply(amount:0);
            2010-05-06  [Irrigation].Apply(amount:154);
            2010-05-26  [Irrigation].Apply(amount:152);
          Operations ABA
            2010-04-09  [Irrigation].Apply(amount:150);
            2010-05-06  [Irrigation].Apply(amount:100);
            2010-05-26  [Irrigation].Apply(amount:152);
          Operations ACA
            2010-04-09  [Irrigation].Apply(amount:150);
            2010-05-06  [Irrigation].Apply(amount:54);
            2010-05-26  [Irrigation].Apply(amount:152);
          Operations ADA
            2010-04-09  [Irrigation].Apply(amount:150);
            2010-05-06  [Irrigation].Apply(amount:0);
            2010-05-26  [Irrigation].Apply(amount:152);
          Operations AAB
            2010-04-09  [Irrigation].Apply(amount:150);
            2010-05-06  [Irrigation].Apply(amount:154);
            2010-05-26  [Irrigation].Apply(amount:98);
          Operations AAC
            2010-04-09  [Irrigation].Apply(amount:150);
            2010-05-06  [Irrigation].Apply(amount:154);
            2010-05-26  [Irrigation].Apply(amount:53);
          Operations AAD
            2010-04-09  [Irrigation].Apply(amount:150);
            2010-05-06  [Irrigation].Apply(amount:154);
            2010-05-26  [Irrigation].Apply(amount:0);
          Operations ABB
            2010-04-09  [Irrigation].Apply(amount:150);
            2010-05-06  [Irrigation].Apply(amount:100);
            2010-05-26  [Irrigation].Apply(amount:99);
          Operations ACC
            2010-04-09  [Irrigation].Apply(amount:150);
            2010-05-06  [Irrigation].Apply(amount:54);
            2010-05-26  [Irrigation].Apply(amount:53);
          Operations ADD
            2010-04-09  [Irrigation].Apply(amount:150);
            2010-05-06  [Irrigation].Apply(amount:0);
            2010-05-26  [Irrigation].Apply(amount:0);
          Operations BAB
            2010-04-09  [Irrigation].Apply(amount:97);
            2010-05-06  [Irrigation].Apply(amount:154);
            2010-05-26  [Irrigation].Apply(amount:99);
          Operations CAC
            2010-04-09  [Irrigation].Apply(amount:52);
            2010-05-06  [Irrigation].Apply(amount:154);
            2010-05-26  [Irrigation].Apply(amount:53);
          Operations DAD
            2010-04-09  [Irrigation].Apply(amount:0);
            2010-05-06  [Irrigation].Apply(amount:154);
            2010-05-26  [Irrigation].Apply(amount:0);
          Operations BBA
            2010-04-09  [Irrigation].Apply(amount:97);
            2010-05-06  [Irrigation].Apply(amount:100);
            2010-05-26  [Irrigation].Apply(amount:152);
          Operations CCA
            2010-04-09  [Irrigation].Apply(amount:52);
            2010-05-06  [Irrigation].Apply(amount:54);
            2010-05-26  [Irrigation].Apply(amount:152);
          Operations DDA
            2010-04-09  [Irrigation].Apply(amount:0);
            2010-05-06  [Irrigation].Apply(amount:0);
            2010-05-26  [Irrigation].Apply(amount:152);
          Operations BBB
            2010-04-09  [Irrigation].Apply(amount:97);
            2010-05-06  [Irrigation].Apply(amount:100);
            2010-05-26  [Irrigation].Apply(amount:99);
          Operations CCC
            2010-04-09  [Irrigation].Apply(amount:52);
            2010-05-06  [Irrigation].Apply(amount:54);
            2010-05-26  [Irrigation].Apply(amount:53);
          Operations DDD
            2010-04-09  [Irrigation].Apply(amount:0);
            2010-05-06  [Irrigation].Apply(amount:0);
            2010-05-26  [Irrigation].Apply(amount:0);
      Simulation Konya09: Area=0; Slope=0
        Clock: StartDate=2009-11-12; EndDate=2010-07-30
        Summary summaryfile
        Weather: FileName=Konya.met
        SoilArbitrator Soil Arbitrator
        Zone paddock: Area=1; Slope=0
          Irrigation
          Fertiliser
          SurfaceOrganicMatter: PoolName=wheat; type=wheat; mass=1000; standing_fraction=0; cpr=0; cnr=80; CriticalResidueWeight=2000; OptimumDecompTemp=20; MaxCumulativeEOS=20; CNRatioDecompCoeff=0.277; CNRatioDecompThreshold=25; TotalLeachRain=25; MinRainToLeach=10; CriticalMinimumOrganicC=0.004; DefaultCPRatio=0; DefaultStandingFraction=0; StandingExtinctCoeff=0.5; FractionFaecesAdded=0.5
            Pools:
              {PoolName=wheat, ResidueType=wheat, Mass=1000, CNRatio=80, CPRatio=0, StandingFraction=0}
            ResidueTypes: LoadFromResource=ResidueTypes
          Plant Wheat: CropType=Wheat
          Operations CropSchedule
            2009-11-12  [Wheat].Sow(population:120, cultivar:"Konya", depth:50, rowSpacing:135);
            2009-11-12  [Fertiliser].Apply(Amount: 80, Type: Fertiliser.Types.UreaN);
            2010-02-01  [Fertiliser].Apply(Amount: 80, Type: Fertiliser.Types.UreaN);
          Operations IrrigationSchedule
          MicroClimate: same as SE Queensland.APS26.APS26NRate160WaterWet.paddock.MicroClimate
          Manager Calculations: same as SE Queensland.APS26.APS26NRate160WaterWet.paddock.Calculations
          Soil: Site=Konya; NearestTown=Konya; Region=Central Anatolia; Country=Turkey; Latitude=0; Longitude=0
            Water
              Thickness  BD    AirDry  LL15   DUL    SAT
              150        1.56  0.05    0.118  0.253  0.411
              150        1.56  0.05    0.118  0.253  0.411
              300        1.58  0.05    0.114  0.256  0.403
              300        1.63  0.05    0.105  0.257  0.39
              SoilCrop Wheatsoil: LL=[0.118, 0.118, 0.114, 0.105]; KL=[0.06, 0.06, 0.04, 0.04]; XF=[1, 1, 1, 1]
            SoilWater: residueinterception=0; SummerDate=1-Nov; SummerU=6; SummerCona=3.5; WinterDate=1-Apr; WinterU=2; WinterCona=2; DiffusConst=44; DiffusSlope=16; Salb=0.13; CN2Bare=84; CNRed=20; CNCov=0.8; max_pond=0; Thickness=[150, 150, 300, 300, 300, 300, 300, 300]; SWCON=[0.5, 0.4, 0.3, 0.3, 0.2, 0.1, 0.1, 0.1]
            SoilNitrogen: fom_type=[default, manure, mucuna, lablab, shemp, stable]; fract_carb=[0.2, 0.3, 0.54, 0.57, 0.45, 0]; fract_cell=[0.7, 0.3, 0.37, 0.37, 0.47, 0.1]; fract_lign=[0.1, 0.4, 0.09, 0.06, 0.08, 0.9]; wfpsN2N2O_x=[22, 88]; wfpsN2N2O_y=[0.1, 1]
            SoilOrganicMatter: RootCN=45; RootWt=1500; SoilCN=12.5; EnrACoeff=7.4; EnrBCoeff=0.2; OCUnits=Total
              Thickness  OC   FBiom  FInert
              150        1    0.03   0.4
              150        0.5  0.02   0.6
              300        0.5  0.02   0.7
              300        0.5  0.02   0.8
              300        0.5  0.01   0.9
              300        0.5  0.01   0.9
              300        0.5  0.01   1
              300        0.5  0.01   1
            Analysis: Thickness=[150, 150, 300, 300, 300, 300, 300, 300]; PH=[7.9, 7.9, 7.9, 8, 8, 8, 8, 8]; PHUnits=Water; BoronUnits=HotWater
            InitialWater: PercentMethod=EvenlyDistributed; FractionFull=0.9
            Sample: NO3Units=ppm; NH4Units=ppm; SWUnits=Volumetric; OCUnits=Total; PHUnits=Water
              Thickness  NO3  NH4
              300        20   0
              600        10   0
              1200       0    0
          Report DailyReport
          Report HarvestReport
          Manager Harvesting: same as SE Queensland.APS26.APS26NRate160WaterWet.paddock.Harvesting
    Experiment Konya11
      Factors
        Factor Water: Specifications=[IrrigationSchedule]
          Operations AAA
            2012-04-16  [Irrigation].Apply(amount:100);
            2012-05-21  [Irrigation].Apply(amount:148);
            2012-06-08  [Irrigation].Apply(amount:161);
          Operations BAA
            2012-04-16  [Irrigation].Apply(amount:65);
            2012-05-21  [Irrigation].Apply(amount:148);
            2012-06-08  [Irrigation].Apply(amount:161);
          Operations CAA
            2012-04-16  [Irrigation].Apply(amount:35);
            2012-05-21  [Irrigation].Apply(amount:148);
            2012-06-08  [Irrigation].Apply(amount:161);
          Operations DAA
            2012-04-16  [Irrigation].Apply(amount:0);
            2012-05-21  [Irrigation].Apply(amount:148);
            2012-06-08  [Irrigation].Apply(amount:161);
          Operations ABA
            2012-04-16  [Irrigation].Apply(amount:100);
            2012-05-21  [Irrigation].Apply(amount:96);
            2012-06-08  [Irrigation].Apply(amount:161);
          Operations ACA
            2012-04-16  [Irrigation].Apply(amount:100);
            2012-05-21  [Irrigation].Apply(amount:52);
            2012-06-08  [Irrigation].Apply(amount:161);
          Operations ADA
            2012-04-16  [Irrigation].Apply(amount:100);
            2012-05-21  [Irrigation].Apply(amount:0);
            2012-06-08  [Irrigation].Apply(amount:161);
          Operations AAB
            2012-04-16  [Irrigation].Apply(amount:100);
            2012-05-21  [Irrigation].Apply(amount:148);
            2012-06-08  [Irrigation].Apply(amount:105);
          Operations AAC
            2012-04-16  [Irrigation].Apply(amount:100);
            2012-05-21  [Irrigation].Apply(amount:148);
            2012-06-08  [Irrigation].Apply(amount:56);
          Operations AAD
            2012-04-16  [Irrigation].Apply(amount:100);
            2012-05-21  [Irrigation].Apply(amount:148);
            2012-06-08  [Irrigation].Apply(amount:0);
          Operations ABB
            2012-04-16  [Irrigation].Apply(amount:100);
            2012-05-21  [Irrigation].Apply(amount:96);
            2012-06-08  [Irrigation].Apply(amount:105);
          Operations ACC
            2012-04-16  [Irrigation].Apply(amount:100);
            2012-05-21  [Irrigation].Apply(amount:52);
            2012-06-08  [Irrigation].Apply(amount:56);
          Operations ADD
            2012-04-16  [Irrigation].Apply(amount:100);
            2012-05-21  [Irrigation].Apply(amount:0);
            2012-06-08  [Irrigation].Apply(amount:0);
          Operations BAB
            2012-04-16  [Irrigation].Apply(amount:65);
            2012-05-21  [Irrigation].Apply(amount:148);
            2012-06-08  [Irrigation].Apply(amount:105);
          Operations CAC
            2012-04-16  [Irrigation].Apply(amount:35);
            2012-05-21  [Irrigation].Apply(amount:148);
            2012-06-08  [Irrigation].Apply(amount:56);
          Operations DAD
            2012-04-16  [Irrigation].Apply(amount:0);
            2012-05-21  [Irrigation].Apply(amount:148);
            2012-06-08  [Irrigation].Apply(amount:0);
          Operations BBA
            2012-04-16  [Irrigation].Apply(amount:65);
            2012-05-21  [Irrigation].Apply(amount:96);
            2012-06-08  [Irrigation].Apply(amount:161);
          Operations CCA
            2012-04-16  [Irrigation].Apply(amount:35);
            2012-05-21  [Irrigation].Apply(amount:52);
            2012-06-08  [Irrigation].Apply(amount:161);
          Operations DDA
            2012-04-16  [Irrigation].Apply(amount:0);
            2012-05-21  [Irrigation].Apply(amount:0);
            2012-06-08  [Irrigation].Apply(amount:161);
          Operations BBB
            2012-04-16  [Irrigation].Apply(amount:65);
            2012-05-21  [Irrigation].Apply(amount:96);
            2012-06-08  [Irrigation].Apply(amount:105);
          Operations CCC
            2012-04-16  [Irrigation].Apply(amount:35);
            2012-05-21  [Irrigation].Apply(amount:52);
            2012-06-08  [Irrigation].Apply(amount:56);
          Operations DDD
            2012-04-16  [Irrigation].Apply(amount:0);
            2012-05-21  [Irrigation].Apply(amount:0);
            2012-06-08  [Irrigation].Apply(amount:0);
      Simulation Konya11: Area=0; Slope=0
        Clock: StartDate=2011-11-16; EndDate=2012-07-30
        Summary summaryfile
        Weather: FileName=Konya.met
        SoilArbitrator Soil Arbitrator
        Zone paddock: Area=1; Slope=0
          Irrigation
          Fertiliser
          SurfaceOrganicMatter: PoolName=canola; type=canola; mass=1000; standing_fraction=0; cpr=0; cnr=80; CriticalResidueWeight=2000; OptimumDecompTemp=20; MaxCumulativeEOS=20; CNRatioDecompCoeff=0.277; CNRatioDecompThreshold=25; TotalLeachRain=25; MinRainToLeach=10; CriticalMinimumOrganicC=0.004; DefaultCPRatio=0; DefaultStandingFraction=0; StandingExtinctCoeff=0.5; FractionFaecesAdded=0.5
            Pools:
              {PoolName=canola, ResidueType=canola, Mass=1000, CNRatio=80, CPRatio=0, StandingFraction=0}
            ResidueTypes: LoadFromResource=ResidueTypes
          Plant Wheat: CropType=Wheat
          Operations CropSchedule
            2011-11-16  [Wheat].Sow(population:120, cultivar:"Konya", depth:50, rowSpacing:135);
            2011-11-16  [Fertiliser].Apply(Amount: 80, Type: Fertiliser.Types.UreaN);
            2012-02-01  [Fertiliser].Apply(Amount: 80, Type: Fertiliser.Types.UreaN);
          Operations IrrigationSchedule
          MicroClimate: same as SE Queensland.APS26.APS26NRate160WaterWet.paddock.MicroClimate
          Manager Calculations: same as SE Queensland.APS26.APS26NRate160WaterWet.paddock.Calculations
          Soil: same as Turkey.Konya09.Konya09.paddock.Soil
          Report DailyReport
          Report HarvestReport
          Manager Harvesting: same as SE Queensland.APS26.APS26NRate160WaterWet.paddock.Harvesting
  Folder New Zealand
    Experiment Lincoln9192
      Factors
        Factor Irrig
          Factor 01
            Specifications:
              [IrrigationEvents]
              [Water]
            Operations IrrigationEvents
              1991-06-10  [Irrigation].Apply(7);
              1991-08-16  [Irrigation].Apply(7);
              1991-08-29  [Irrigation].Apply(20);
              1991-09-07  [Irrigation].Apply(12);
              1991-09-12  [Irrigation].Apply(22);
              1991-09-19  [Irrigation].Apply(4);
              1991-09-26  [Irrigation].Apply(7);
              1991-10-03  [Irrigation].Apply(27);
              1991-10-10  [Irrigation].Apply(18);
              1991-10-17  [Irrigation].Apply(30);
              1991-10-24  [Irrigation].Apply(42);
              1991-10-31  [Irrigation].Apply(33);
              1991-11-07  [Irrigation].Apply(24);
              1991-11-14  [Irrigation].Apply(28);
              1991-11-21  [Irrigation].Apply(37);
              1991-11-27  [Irrigation].Apply(51);
              1991-12-05  [Irrigation].Apply(36);
              1991-12-12  [Irrigation].Apply(38);
              1991-12-19  [Irrigation].Apply(35);
              1991-12-26  [Irrigation].Apply(47);
              1992-01-03  [Irrigation].Apply(40);
              1992-01-09  [Irrigation].Apply(41);
            Water
              Thickness  BD   AirDry  LL15  DUL   SAT
              100        1.3  0.05    0.08  0.31  0.44
              200        1.3  0.05    0.07  0.3   0.44
              200        1.3  0.05    0.07  0.28  0.44
              200        1.3  0.05    0.09  0.31  0.44
              200        1.3  0.05    0.11  0.3   0.44
              200        1.3  0.05    0.16  0.28  0.44
              200        1.3  0.05    0.15  0.3   0.44
              200        1.3  0.05    0.12  0.34  0.44
              SoilCrop WheatSoil: LL=[0.08, 0.07, 0.07, 0.09, 0.11, 0.16, 0.15, 0.12]; KL=[0.06, 0.06, 0.06, 0.04, 0.03, 0.02, 0.02, 0.02]; XF=[1, 1, 1, 1, 0.6, 0.4, 0.4, 0.4]
          Factor 03
            Specifications:
              [IrrigationEvents]
              [Water]
            Operations IrrigationEvents
              1991-06-10  [Irrigation].Apply(7);
              1991-08-16  [Irrigation].Apply(7);
              1991-08-29  [Irrigation].Apply(20);
              1991-09-26  [Irrigation].Apply(7);
              1991-10-24  [Irrigation].Apply(42);
              1991-10-31  [Irrigation].Apply(33);
              1991-11-07  [Irrigation].Apply(24);
              1991-11-14  [Irrigation].Apply(28);
              1991-11-21  [Irrigation].Apply(37);
              1991-11-27  [Irrigation].Apply(51);
              1991-12-05  [Irrigation].Apply(36);
              1991-12-12  [Irrigation].Apply(38);
              1991-12-19  [Irrigation].Apply(35);
              1991-12-26  [Irrigation].Apply(47);
              1992-01-03  [Irrigation].Apply(40);
              1992-01-09  [Irrigation].Apply(41);
            Water: same as New Zealand.Lincoln9192.Factors.Irrig.01.Water
          Factor 05
            Specifications:
              [IrrigationEvents]
              [Water]
            Operations IrrigationEvents
              1991-06-10  [Irrigation].Apply(7);
              1991-08-16  [Irrigation].Apply(7);
              1991-08-29  [Irrigation].Apply(20);
              1991-09-26  [Irrigation].Apply(7);
              1991-12-19  [Irrigation].Apply(35);
              1991-12-26  [Irrigation].Apply(47);
              1992-01-03  [Irrigation].Apply(40);
            Water: same as New Zealand.Lincoln9192.Factors.Irrig.01.Water
          Factor 06
            Specifications:
              [IrrigationEvents]
              [Water]
            Operations IrrigationEvents
              1991-06-10  [Irrigation].Apply(7);
              1991-08-16  [Irrigation].Apply(7);
              1991-08-29  [Irrigation].Apply(20);
              1991-09-07  [Irrigation].Apply(12);
              1991-09-12  [Irrigation].Apply(22);
              1991-09-19  [Irrigation].Apply(14);
              1991-09-26  [Irrigation].Apply(7);
            Water: same as New Zealand.Lincoln9192.Factors.Irrig.01.Water
          Factor 07
            Specifications:
              [IrrigationEvents]
              [Water]
            Operations IrrigationEvents
              1991-06-10  [Irrigation].Apply(7);
              1991-08-16  [Irrigation].Apply(7);
              1991-08-29  [Irrigation].Apply(20);
              1991-09-07  [Irrigation].Apply(12);
              1991-09-12  [Irrigation].Apply(22);
              1991-09-19  [Irrigation].Apply(14);
              1991-09-26  [Irrigation].Apply(7);
              1991-10-03  [Irrigation].Apply(27);
              1991-10-10  [Irrigation].Apply(18);
              1991-10-17  [Irrigation].Apply(30);
            Water: same as New Zealand.Lincoln9192.Factors.Irrig.01.Water
          Factor 08
            Specifications:
              [IrrigationEvents]
              [Water]
            Operations IrrigationEvents
              1991-06-10  [Irrigation].Apply(7);
              1991-08-16  [Irrigation].Apply(7);
              1991-08-29  [Irrigation].Apply(20);
              1991-09-07  [Irrigation].Apply(12);
              1991-09-12  [Irrigation].Apply(22);
              1991-09-19  [Irrigation].Apply(14);
              1991-09-26  [Irrigation].Apply(7);
              1991-10-03  [Irrigation].Apply(27);
              1991-10-10  [Irrigation].Apply(18);
              1991-10-17  [Irrigation].Apply(30);
              1991-10-24  [Irrigation].Apply(42);
              1991-10-31  [Irrigation].Apply(33);
              1991-11-07  [Irrigation].Apply(24);
            Water: same as New Zealand.Lincoln9192.Factors.Irrig.01.Water
          Factor 11
            Specifications:
              [IrrigationEvents]
              [Water]
            Operations IrrigationEvents
              1991-06-10  [Irrigation].Apply(7);
              1991-08-16  [Irrigation].Apply(7);
              1991-09-26  [Irrigation].Apply(7);
            Water
              Thickness  BD   AirDry  LL15  DUL   SAT
              100        1.3  0.08    0.13  0.31  0.44
              200        1.3  0.13    0.13  0.3   0.44
              200        1.3  0.15    0.15  0.28  0.44
              200        1.3  0.09    0.09  0.23  0.34
              200        1.3  0.13    0.13  0.23  0.24
              200        1.3  0.17    0.17  0.23  0.34
              200        1.3  0.15    0.15  0.22  0.3
              200        1.3  0.12    0.12  0.18  0.28
              SoilCrop WheatSoil: LL=[0.08, 0.13, 0.15, 0.09, 0.13, 0.17, 0.15, 0.12]; KL=[0.06, 0.05, 0.02, 0.02, 0.03, 0.03, 0.02, 0.01]; XF=[1, 1, 1, 1, 1, 1, 1, 1]
      Simulation LincolnBase: Area=0; Slope=0
        Clock: StartDate=1991-06-08; EndDate=1992-02-28
        Summary summaryfile
        Weather: FileName=lincoln.met
        Zone paddock: Area=1; Slope=0
          Folder Manager folder
            Operations
              1991-06-08  [Wheat].Sow(population:300, cultivar:"BattenSpring", depth:40, rowSpacing:150);
            Operations IrrigationEvents
              1991-08-30  [Irrigation].Apply(0);
              1991-09-08  [Irrigation].Apply(0);
              1991-09-13  [Irrigation].Apply(0);
              1991-09-20  [Irrigation].Apply(0);
              1991-10-04  [Irrigation].Apply(0);
              1991-10-11  [Irrigation].Apply(18);
              1991-10-18  [Irrigation].Apply(30);
              1991-10-25  [Irrigation].Apply(42);
              1991-11-01  [Irrigation].Apply(33);
              1991-11-08  [Irrigation].Apply(24);
              1991-11-15  [Irrigation].Apply(28);
              1991-11-22  [Irrigation].Apply(37);
              1991-11-28  [Irrigation].Apply(51);
              1991-12-06  [Irrigation].Apply(36);
              1991-12-13  [Irrigation].Apply(38);
              1991-12-20  [Irrigation].Apply(35);
              1991-12-27  [Irrigation].Apply(47);
              1992-01-04  [Irrigation].Apply(40);
              1992-01-10  [Irrigation].Apply(41);
            Operations FertiliserEvents
              1991-06-10  [Fertiliser].Apply(30, Fertiliser.Types.NO3N, 0);
              1991-08-16  [Fertiliser].Apply(100, Fertiliser.Types.NO3N,0);
              1991-09-26  [Fertiliser].Apply(50, Fertiliser.Types.NO3N,0);
          Irrigation
          Soil: SoilType=LincolnSoil; LocalName=Lincoln; Site=Lincoln; NearestTown=Unknown; Region=NZ; NaturalVegetation=Unknown; Latitude=0; Longitude=0
            Water: same as New Zealand.Lincoln9192.Factors.Irrig.01.Water
            SoilWater: residueinterception=0; SummerDate=1-Nov; SummerU=7; SummerCona=3; WinterDate=1-Apr; WinterU=3; WinterCona=2; DiffusConst=40; DiffusSlope=16; Salb=0.2; CN2Bare=75; CNRed=20; CNCov=0.8; slope=0; discharge_width=0; catchment_area=0; max_pond=0
              Thickness  SWCON  KLAT
              100        0.6    0
              200        0.6    0
              200        0.6    0
              200        0.6    0
              200        0.6    0
              200        0.6    0
              200        0.6    0
              200        0.6    0
            SoilNitrogen: fom_type=[default, manure, mucuna, lablab, shemp, stable]; fract_carb=[0.2, 0.3, 0.54, 0.57, 0.45, 0]; fract_cell=[0.7, 0.3, 0.37, 0.37, 0.47, 0.1]; fract_lign=[0.1, 0.4, 0.09, 0.06, 0.08, 0.9]; wfpsN2N2O_x=[22, 88]; wfpsN2N2O_y=[0.1, 1]
              oc=[0.360302, 0.270806, 0.241057, 0.16141, 0.160396, 0.299235, 0.0996345, 0.0996568]
            SoilOrganicMatter: RootCN=0; RootWt=0; SoilCN=0; EnrACoeff=0; EnrBCoeff=0; OCUnits=Total
              Thickness  OC    FBiom  FInert
              100        0.35  0.04   0.31
              200        0.27  0.03   0.31
              200        0.24  0.02   0.31
              200        0.16  0.01   0.31
              200        0.16  0.01   0.31
              200        0.3   0.01   0.25
              200        0.1   0.01   0.2
              200        0.1   0.01   0.2
            Analysis: Thickness=[100, 200, 200, 200, 200, 200, 200, 200]; PH=[8.5, 8.5, 8.6, 8.6, 8.6, 8.6, 8.6, 8.6]; PHUnits=Water; BoronUnits=HotWater
            Sample Initial nitrogen: NO3Units=ppm; NH4Units=ppm; SWUnits=Volumetric; OCUnits=Total; PHUnits=Water
              Thickness  NO3   NH4
              100        24.9  1.3
              200        16    1
              200        9.8   1
              200        9.8   0.8
              200        2.1   0.8
              200        2.1   0.5
              200        2.1   0.5
              200        2.1   0.5
            Sample Initial water: Thickness=[100, 200, 200, 200, 200, 200, 200, 200]; SW=[0.27, 0.3, 0.28, 0.25, 0.24, 0.27, 0.27, 0.21]; NO3Units=ppm; NH4Units=ppm; SWUnits=Volumetric; OCUnits=Total; PHUnits=Water
          SurfaceOrganicMatter Surface Organic Matter: PoolName=wheat_stubble; type=wheat; mass=1000; standing_fraction=0; cnr=80; CriticalResidueWeight=2000; OptimumDecompTemp=20; MaxCumulativeEOS=20; CNRatioDecompCoeff=0.277; CNRatioDecompThreshold=25; TotalLeachRain=25; MinRainToLeach=10; CriticalMinimumOrganicC=0.004; DefaultCPRatio=0; DefaultStandingFraction=0; StandingExtinctCoeff=0.5; FractionFaecesAdded=0.5
            Pools:
              {PoolName=wheat_stubble, ResidueType=wheat, Mass=1000, CNRatio=80, StandingFraction=0}
            ResidueTypes: LoadFromResource=ResidueTypes
          Fertiliser
          MicroClimate: a_interception=0; b_interception=1; c_interception=0; d_interception=0; soil_albedo=0.3; air_pressure=1010; soil_emissivity=0.96; sun_angle=15; soil_heat_flux_fraction=0.4; night_interception_fraction=0.5; windspeed_default=3; refheight=2; albedo=0.293662; emissivity=0.96; gsmax=0.01; r50=200
          Plant Wheat: CropType=Wheat
          Manager ResetSW
            reset_date = 1991-09-02
```csharp
using System;
using Models.Core;
using Models.PMF;
using Models.PMF.OilPalm;
using Models.Soils;
using Models.SurfaceOM;
using APSIM.Shared.Utilities;

namespace Models
{
	[Serializable]
	[System.Xml.Serialization.XmlInclude(typeof(Model))]
	public class Script : Model
	{
		[Link] Clock Clock;
		[Link] Soil Soil;
		[Link] SurfaceOrganicMatter SurfaceOM;
		[Description("Reset date")]
		public DateTime reset_date { get; set; }

		
		[EventSubscribe("DoManagement")]
		private void OnDoManagement(object sender, EventArgs e)
		{
			if (Clock.Today == reset_date)
				Soil.SoilWater.Reset();
		}
	}
}
```
          Manager ClimateControl
            StartDate = 1991-06-08
            EndDate = 1992-12-31
```csharp
using System;
using Models.Core;
using APSIM.Shared.Utilities;



using System.Collections.Generic;
using System.Text;
using Models.PMF;
using Models;
using System.Xml.Serialization;

namespace Models
{
	[Serializable] 
	[System.Xml.Serialization.XmlInclude(typeof(Model))]
	public class Script : Model
	{
		[Link] Weather Met;
		[Link] Clock Clock;
    
		[Description("Start Date")]
		public DateTime StartDate { get; set; }
        
		[Description("End Date")]
		public DateTime EndDate { get; set; }
 
    
		[EventSubscribe("PreparingNewWeatherData")]
		private void OnPreparingNewWeatherData(object sender, EventArgs e)
		{
			if ((Clock.Today.Date >= StartDate) && (Clock.Today.Date <= EndDate))
				Met.Rain = 0;		
		}
	}
}
```
          Report DailyReport
          Report HarvestReport
          Manager Harvesting: same as SE Queensland.APS26.APS26NRate160WaterWet.paddock.Harvesting
        SoilArbitrator Soil Arbitrator
    Experiment Lincoln2014
      Factors
        Factor Irrig: Specifications=[IrrigationEvents]
          Operations Full
            2013-05-14  [Irrigation].Apply(25);
            2013-05-29  [Irrigation].Apply(9.2);
            2013-06-11  [Irrigation].Apply(12);
            2013-09-16  [Irrigation].Apply(34.6);
            2013-09-25  [Irrigation].Apply(46.3);
            2013-10-01  [Irrigation].Apply(19.3);
            2013-10-08  [Irrigation].Apply(24.9);
            2013-10-15  [Irrigation].Apply(21);
            2013-10-22  [Irrigation].Apply(39);
            2013-10-29  [Irrigation].Apply(44);
            2013-11-05  [Irrigation].Apply(40);
            2013-11-12  [Irrigation].Apply(35);
            2013-11-19  [Irrigation].Apply(33);
            2013-11-26  [Irrigation].Apply(32);
            2013-12-03  [Irrigation].Apply(35);
            2013-12-10  [Irrigation].Apply(49);
            2013-12-17  [Irrigation].Apply(47);
            2013-12-24  [Irrigation].Apply(0);
            2013-12-31  [Irrigation].Apply(0);
          Operations Nil
            2013-09-16  [Irrigation].Apply(4.6);
            2013-09-25  [Irrigation].Apply(3.5);
          Operations VeryEarly
            2013-09-16  [Irrigation].Apply(4.6);
            2013-09-25  [Irrigation].Apply(3.5);
            2013-11-19  [Irrigation].Apply(33);
            2013-11-26  [Irrigation].Apply(32);
            2013-12-03  [Irrigation].Apply(35);
            2013-12-10  [Irrigation].Apply(49);
            2013-12-17  [Irrigation].Apply(47);
            2013-12-24  [Irrigation].Apply(49);
          Operations Early
            2013-05-14  [Irrigation].Apply(25);
            2013-05-29  [Irrigation].Apply(9.2);
            2013-06-11  [Irrigation].Apply(12);
            2013-09-16  [Irrigation].Apply(34.6);
            2013-09-25  [Irrigation].Apply(46.5);
            2013-12-10  [Irrigation].Apply(49);
            2013-12-17  [Irrigation].Apply(47);
            2013-12-24  [Irrigation].Apply(49);
            2013-12-31  [Irrigation].Apply(20.3);
            2013-12-24  [Irrigation].Apply(49);
            2013-12-31  [Irrigation].Apply(20.3);
          Operations Middle
            2013-05-14  [Irrigation].Apply(25);
            2013-05-29  [Irrigation].Apply(9.2);
            2013-06-11  [Irrigation].Apply(12);
            2013-09-16  [Irrigation].Apply(34.6);
            2013-09-25  [Irrigation].Apply(46.3);
            2013-10-01  [Irrigation].Apply(19.3);
            2013-12-17  [Irrigation].Apply(47);
            2013-12-24  [Irrigation].Apply(49);
            2013-12-31  [Irrigation].Apply(20.3);
          Operations Late
            2013-05-14  [Irrigation].Apply(25);
            2013-05-29  [Irrigation].Apply(9.2);
            2013-06-11  [Irrigation].Apply(12);
            2013-09-16  [Irrigation].Apply(34.6);
            2013-09-25  [Irrigation].Apply(46.3);
            2013-10-01  [Irrigation].Apply(19.3);
            2013-10-08  [Irrigation].Apply(24.9);
            2013-10-15  [Irrigation].Apply(21);
            2013-10-22  [Irrigation].Apply(39);
      Simulation Rainshelter2013: Area=0; Slope=0
        Clock: StartDate=2013-02-01; EndDate=2014-04-01
        Summary summaryfile
        Weather: FileName=%root%\Examples\WeatherFiles\lincoln.met
        SoilArbitrator Soil Arbitrator
        Zone paddock: Area=1; Slope=0
          Soil TempletonSiltLoam: SoilType=NZ_sedementary; Region=Plains; State=Canterbury; Country=New Zealand; Latitude=0; Longitude=0
            DataSource=Generic profile descriptions provided by Trevor Webb and data for functional horizions based on SWAMP project results
            Comments=Bulk density values were measured on the fine earth fraction so values entered into apsim soil are adjusted down to account for stone content (assuming stones are inert from all soil process so their mass and volume is removed from model paramaters).  SAT, DUL, LL15 and Air dry have been adjusted down to account for stone content.  OC has not been adjusted so the model will get the correct carbon and N amounts using the adjusted BD.
            Analysis: Thickness=[180, 150, 400, 270, 500]; PH=[6, 6, 6, 6, 6]; PHUnits=Water; BoronUnits=HotWater
            Water
              Thickness  BD     AirDry  LL15  DUL   SAT
              200        1      0.05    0.1   0.32  0.419
              200        1.324  0.12    0.15  0.35  0.405
              200        1.35   0.1     0.1   0.3   0.37
              200        1.301  0.08    0.08  0.3   0.37
              200        1.301  0.06    0.07  0.28  0.33
              200        1.301  0.06    0.08  0.25  0.32
              200        1.301  0.1     0.1   0.23  0.3
              200        1.301  0.1     0.1   0.24  0.31
              SoilCrop WheatSoil: LL=[0.1, 0.12, 0.1, 0.08, 0.06, 0.08, 0.1, 0.1]; KL=[0.06, 0.06, 0.1, 0.1, 0.05, 0.03, 0.02, 0.01]; XF=[1, 1, 1, 1, 1, 1, 1, 1]
            SoilWater: residueinterception=0; SummerDate=1-sep; SummerU=9; SummerCona=4.4; WinterDate=1-Apr; WinterU=2; WinterCona=1.5; DiffusConst=88; DiffusSlope=35; Salb=0.13; CN2Bare=73; CNRed=20; CNCov=0.8; max_pond=0; Thickness=[200, 200, 200, 200, 200, 200, 200, 200]; SWCON=[0.9, 0.5, 0.6, 0.4, 0.4, 0.4, 0.9, 0.9]
            SoilNitrogen: fom_type=[default, manure, mucuna, lablab, shemp, stable]; fract_carb=[0.2, 0.3, 0.54, 0.57, 0.45, 0]; fract_cell=[0.7, 0.3, 0.37, 0.37, 0.47, 0.1]; fract_lign=[0.1, 0.4, 0.09, 0.06, 0.08, 0.9]; wfpsN2N2O_x=[22, 88]; wfpsN2N2O_y=[0.1, 1]
            SoilOrganicMatter: RootCN=40; RootWt=1000; SoilCN=11; EnrACoeff=7.4; EnrBCoeff=0.2; OCUnits=Total
              Thickness  OC        FBiom      FInert
              180        2.6251    0.0333099  0.437121
              150        1.24694   0.0186614  0.656885
              400        0.316004  0.0116634  0.849635
              270        0.207954  0.0102229  0.94496
              500        0.200366  0.0100221  0.982659
            Sample: NO3Units=kgha; NH4Units=kgha; SWUnits=Volumetric; OCUnits=Total; PHUnits=Water
              Thickness  NO3  NH4  SW
              200        530  3    0.35
              200        15   2    0.35
              200        15   1    0.25
              200        10   1    0.25
              200        5    1    0.25
              200        5    1    0.2
              200        5    1    0.18
              200        5    1    0.2
          Plant Wheat: CropType=Wheat
          Folder Manager folder
            Operations SowingAndHarvest
              2013-03-25  [Wheat].Sow(population:165, cultivar:"Wakanui", depth:30, rowSpacing:130);
            Operations IrrigationEvents
              2013-05-14  [Irrigation].Apply(25);
              2013-05-29  [Irrigation].Apply(9.2);
              2013-06-11  [Irrigation].Apply(12);
              2013-09-16  [Irrigation].Apply(34.6);
              2013-09-25  [Irrigation].Apply(43);
              2013-10-01  [Irrigation].Apply(19.3);
              2013-10-08  [Irrigation].Apply(24.9);
              2013-10-15  [Irrigation].Apply(21);
              2013-10-22  [Irrigation].Apply(39);
              2013-10-29  [Irrigation].Apply(44);
              2013-11-05  [Irrigation].Apply(40);
              2013-11-12  [Irrigation].Apply(35);
              2013-11-19  [Irrigation].Apply(33);
              2013-11-26  [Irrigation].Apply(32);
              2013-12-03  [Irrigation].Apply(35);
              2013-12-10  [Irrigation].Apply(49);
              2013-12-17  [Irrigation].Apply(47);
              2013-12-24  [Irrigation].Apply(0);
              2013-12-31  [Irrigation].Apply(0);
            Operations FertiliserEvents
              2013-09-26  [Fertiliser].Apply(100, Fertiliser.Types.UreaN, 10);
              2013-11-13  [Fertiliser].Apply(100, Fertiliser.Types.UreaN, 10);
            Operations Flood
              2013-06-18  [Irrigation].Apply(80);
          Irrigation
          Manager ClimateControl
            StartDate = 2013-04-01
            EndDate = 2014-05-01
            script: same as in New Zealand.Lincoln9192.LincolnBase.paddock.ClimateControl
          SurfaceOrganicMatter Surface Organic Matter: PoolName=wheat_stubble; type=wheat; mass=0; standing_fraction=0; cnr=80; CriticalResidueWeight=2000; OptimumDecompTemp=20; MaxCumulativeEOS=20; CNRatioDecompCoeff=0.277; CNRatioDecompThreshold=25; TotalLeachRain=25; MinRainToLeach=10; CriticalMinimumOrganicC=0.004; DefaultCPRatio=0; DefaultStandingFraction=0; StandingExtinctCoeff=0.5; FractionFaecesAdded=0.5
            Pools:
              {PoolName=wheat_stubble, ResidueType=wheat, Mass=0, CNRatio=80, StandingFraction=0}
            ResidueTypes: LoadFromResource=ResidueTypes
          Fertiliser
          MicroClimate: same as New Zealand.Lincoln9192.LincolnBase.paddock.MicroClimate
          Report DailyReport
          Report SupReport: EventNames=[Clock].DoReport
            VariableNames:
              [Clock].Today
              [Leaf].CohortSize
              [Wheat].Arbitrator.DMAllocated
              [Wheat].Arbitrator.DMDemand
              [Wheat].Arbitrator.DMNutrientLimitation
              [Wheat].Arbitrator.DMSinkLimitation
              [Wheat].Arbitrator.DMSupply
              [Wheat].Arbitrator.FN
              [Wheat].Arbitrator.NDemand
              [Wheat].Leaf.CohortMaxSize
              [Wheat].Leaf.CohortParameters.GrowthDuration.Value
              [Wheat].Leaf.CohortParameters.LagDuration.Value
              [Wheat].Leaf.CohortParameters.MaxArea.Value
              [Wheat].Leaf.CohortParameters.SenescenceDuration.Value
              [Wheat].Leaf.CohortParameters.SpecificLeafAreaMax.Value
              [Wheat].Leaf.CohortParameters.SpecificLeafAreaMin.Value
              [Wheat].Leaf.Photosynthesis.FT.Value
              [Wheat].Leaf.Photosynthesis.FVPD.Value
              [Wheat].Leaf.Photosynthesis.RueAct
              [Wheat].Stem.DMDemandFunction.HightLimitedDMAccumulation.Value
              [Wheat].Stem.DMDemandFunction.PotentialDMAccumulation.Value
              [Wheat].Leaf.NextExpandingLeafProportion
              [Wheat].Structure.MeanTillerGrowthRate.Value
          Report HarvestReport
          Manager Harvesting: same as SE Queensland.APS26.APS26NRate160WaterWet.paddock.Harvesting
          Manager FudgeWaterDemand
            FudgeFactor = 1
```csharp
using System;
using Models.Core;
using System.Collections.Generic;
using System.Text;
using Models.PMF;
using Models;
using System.Xml.Serialization;
using APSIM.Shared.Utilities;
using System.Data;

namespace Models
{
	[Serializable] 
	//[System.Xml.Serialization.XmlInclude(typeof(Model))]
	public class Script : Model
	{
		[Link] Zone zone;
		
		[Description("Multiply Water Demand by this amount")]
		public  double FudgeFactor { get; set; }
		
		[EventSubscribe("StartOfDay")]
		private void OnStartOfDay(object sender, EventArgs e)
		{
			object FudgeFactorVAlue = FudgeFactor;
			zone.Set("Wheat.Leaf.FudgeToGetETDemandRight", FudgeFactor);   
		}
	}
}
```
          Manager MaxLeafSize
            script: same as in SE Queensland.APS2.APS2Base.Field.MaxLeafSize
          Report MaxLeafSizeReport
    Experiment Lincoln1992
      Factors
        Factor Sow: Specifications=[Operations]
          Operations 5May
            1992-05-05  [Wheat].Sow(population:400, cultivar:"BattenWinter", depth:20, rowSpacing:150);
          Operations 5Aug
            1992-08-05  [Wheat].Sow(population:400, cultivar:"BattenWinter", depth:20, rowSpacing:150);
        Factor Irr: Specifications=[IrrigationEvents]
          Operations Nil
          Operations Some
            1991-08-30  [Irrigation].Apply(0);
            1991-09-08  [Irrigation].Apply(0);
            1992-11-25  [Irrigation].Apply(60);
            1992-11-26  [Irrigation].Apply(50);
            1992-12-31  [Irrigation].Apply(60);
        Factor Nit: Specifications=[FertiliserEvents]
          Operations 0
          Operations 81
            1992-11-25  [Fertiliser].Apply(16, Fertiliser.Types.NO3N, 0);
            1992-09-10  [Fertiliser].Apply(33, Fertiliser.Types.NO3N, 0);
            1992-10-20  [Fertiliser].Apply(16, Fertiliser.Types.NO3N, 0);
          Operations 162
            1992-11-25  [Fertiliser].Apply(32, Fertiliser.Types.NO3N, 0);
            1992-09-10  [Fertiliser].Apply(66, Fertiliser.Types.NO3N, 0);
            1992-10-20  [Fertiliser].Apply(32, Fertiliser.Types.NO3N, 0);
          Operations 250
            1992-11-25  [Fertiliser].Apply(50, Fertiliser.Types.NO3N, 0);
            1992-09-10  [Fertiliser].Apply(100, Fertiliser.Types.NO3N, 0);
            1992-10-20  [Fertiliser].Apply(50, Fertiliser.Types.NO3N, 0);
      Simulation SDtrialBase: Area=0; Slope=0
        Clock: StartDate=1992-05-01; EndDate=1993-05-01
        Summary summaryfile
        Weather: FileName=lincoln.met
        Zone paddock: Area=1; Slope=0
          Folder Manager folder
            Operations
              1991-06-08  [Wheat].Sow(population:300, cultivar:"Rongotea", depth:40, rowSpacing:250);
            Operations IrrigationEvents
            Operations FertiliserEvents
          Irrigation
          Soil: SoilType=LincolnSoil; LocalName=Lincoln; Site=Lincoln; NearestTown=Unknown; Region=NZ; NaturalVegetation=Unknown; Latitude=0; Longitude=0
            Water
              Thickness  BD   AirDry  LL15  DUL   SAT
              100        1.3  0.08    0.12  0.31  0.44
              200        1.3  0.12    0.12  0.3   0.44
              200        1.3  0.1     0.1   0.28  0.44
              200        1.3  0.09    0.09  0.31  0.44
              200        1.3  0.11    0.11  0.3   0.44
              200        1.3  0.16    0.16  0.28  0.44
              200        1.3  0.15    0.15  0.3   0.44
              200        1.3  0.12    0.12  0.34  0.44
              SoilCrop WheatSoil: LL=[0.12, 0.12, 0.1, 0.09, 0.11, 0.16, 0.15, 0.12]; KL=[0.06, 0.06, 0.06, 0.04, 0.03, 0.02, 0.02, 0.02]; XF=[1, 1, 0.3, 0.7, 0.9, 1, 1, 1]
            SoilWater: residueinterception=0; SummerDate=1-Nov; SummerU=7; SummerCona=3; WinterDate=1-Apr; WinterU=7; WinterCona=3; DiffusConst=40; DiffusSlope=16; Salb=0.2; CN2Bare=75; CNRed=20; CNCov=0.8; slope=0; discharge_width=0; catchment_area=0; max_pond=0
              Thickness  SWCON  KLAT
              100        0.6    0
              200        0.6    0
              200        0.6    0
              200        0.6    0
              200        0.6    0
              200        0.6    0
              200        0.6    0
              200        0.6    0
            SoilNitrogen: same as New Zealand.Lincoln9192.LincolnBase.paddock.Soil.SoilNitrogen
            SoilOrganicMatter: RootCN=30; RootWt=500; SoilCN=11.5; EnrACoeff=0; EnrBCoeff=0; OCUnits=Total
              Thickness  OC    FBiom  FInert
              100        1.82  0.025  0.3
              200        1.47  0.025  0.4
              200        1.2   0.015  0.75
              200        1.03  0.01   0.9
              200        0.47  0.01   0.96
              200        0.47  0.01   0.96
              200        0.47  0.01   0.96
              200        0.47  0.01   0.96
            Analysis: Thickness=[100, 200, 200, 200, 200, 200, 200, 200]; PH=[6.6, 6.2, 5.7, 5.5, 5.5, 5.5, 5.5, 5.5]; PHUnits=Water; BoronUnits=HotWater
            Sample Initial Nitrogen: NO3Units=ppm; NH4Units=ppm; SWUnits=Volumetric; OCUnits=Total; PHUnits=Water
              Thickness  NO3  NH4
              100        5    0.39
              200        11   0.6
              200        11   0.6
              200        10   0.5
              200        9    0.5
              200        4    0.5
              200        3    0.5
              200        2    0.5
            InitialWater: PercentMethod=EvenlyDistributed; FractionFull=1
          SurfaceOrganicMatter Surface Organic Matter: same as New Zealand.Lincoln2014.Rainshelter2013.paddock.Surface Organic Matter
          Fertiliser
          MicroClimate: same as New Zealand.Lincoln9192.LincolnBase.paddock.MicroClimate
          Plant Wheat: CropType=Wheat
          Report DailyReport
          Report HarvestReport
          Manager Harvesting: same as SE Queensland.APS26.APS26NRate160WaterWet.paddock.Harvesting
        SoilArbitrator Soil Arbitrator
    Experiment Leeston2014
      Factors
        Factor Sow: Specifications=[Sowing].Script.SowDate = 20-Feb,10-Mar,26-Mar,23-Apr
        Factor Popn: Specifications=[Sowing].Script.Population = 50,200
      Simulation Wakanui2015Base: Area=0; Slope=0
        Clock: StartDate=2014-02-01; EndDate=2015-02-15
        Summary summaryfile
        Weather: FileName=lincoln.met
        Zone paddock: Area=1; Slope=0
          Folder Manager folder
            Operations IrrigationEvents
              2014-10-13  [Irrigation].Apply(50,0,1.0);
              2014-10-27  [Irrigation].Apply(50,0,1.0);
              2014-11-05  [Irrigation].Apply(50,0,1.0);
              2014-11-18  [Irrigation].Apply(50,0,1.0);
            Operations FertiliserEvents
              2014-09-13  [Fertiliser].Apply(100, Fertiliser.Types.UreaN, 10);
              2014-10-13  [Fertiliser].Apply(150, Fertiliser.Types.UreaN, 10);
            Manager Sowing
              SowDate = 24-Jul
              CultivarName = Wakanui
              SowingDepth = 50
              RowSpacing = 150
              Population = 150
```csharp
using System;
using Models.Core;
using Models.PMF;
using Models.Soils;
using Models.Utilities;
using APSIM.Shared.Utilities;

namespace Models
{
	[Serializable]
	public class Script : Model
	{
		[Link] Clock Clock;
		[Link] Summary Summary;
		[Link] Soil Soil;
		[Link] Plant Wheat;
		Accumulator accumulatedRain;
		
		[Description("Sowing date (d-mmm)")]
		public string SowDate { get; set; }
		[Description("Cultivar to be sown")]
		public string CultivarName { get; set; }
		[Description("Sowing depth (mm)")]
		public double SowingDepth { get; set; }
		[Description("Row spacing (mm)")]
		public double RowSpacing { get; set; }
		[Description("Plant population (/m2)")]
		public double Population { get; set; }
		


		[EventSubscribe("DoManagement")]
		private void OnDoManagement(object sender, EventArgs e)
		{
			if (DateUtilities.WithinDates(SowDate, Clock.Today, SowDate))
			{
				Wheat.Sow(population: Population, cultivar: CultivarName, depth: SowingDepth, rowSpacing: RowSpacing);	
			}
		
		}
		
	}
}
```
          Irrigation
          Soil: SoilType=LincolnSoil; LocalName=Lincoln; Site=Lincoln; NearestTown=Unknown; Region=NZ; NaturalVegetation=Unknown; Latitude=0; Longitude=0
            Water
              Thickness  BD   AirDry  LL15  DUL   SAT
              100        1.3  0.05    0.08  0.31  0.44
              200        1.3  0.05    0.07  0.3   0.44
              200        1.3  0.05    0.07  0.28  0.44
              200        1.3  0.05    0.09  0.31  0.44
              200        1.3  0.05    0.11  0.3   0.44
              200        1.3  0.05    0.16  0.28  0.44
              200        1.3  0.05    0.15  0.3   0.44
              200        1.3  0.05    0.12  0.34  0.44
              SoilCrop WheatSoil: LL=[0.08, 0.07, 0.07, 0.09, 0.11, 0.16, 0.15, 0.12]; KL=[0.06, 0.06, 0.06, 0.06, 0.03, 0.02, 0.02, 0.02]; XF=[1, 1, 1, 1, 1, 1, 1, 1]
            SoilWater: same as New Zealand.Lincoln1992.SDtrialBase.paddock.Soil.SoilWater
            SoilNitrogen: same as New Zealand.Lincoln9192.LincolnBase.paddock.Soil.SoilNitrogen
            SoilOrganicMatter: RootCN=15; RootWt=3000; SoilCN=11; EnrACoeff=0; EnrBCoeff=0; OCUnits=Total
              Thickness  OC   FBiom  FInert
              100        4    0.04   0.31
              200        3    0.03   0.4
              200        2    0.02   0.5
              200        1    0.01   0.6
              200        1    0.01   0.7
              200        1    0.01   0.9
              200        0.9  0.01   0.99
              200        0.9  0.01   0.99
            Analysis: Thickness=[100, 200, 200, 200, 200, 200, 200, 200]; PH=[6, 6, 6, 6, 6, 6, 6, 6]; PHUnits=Water; BoronUnits=HotWater
            Sample Initial nitrogen: NO3Units=kgha; NH4Units=ppm; SWUnits=Volumetric; OCUnits=Total; PHUnits=Water
              Thickness  NO3  NH4
              100        40   1.3
              200        30   1
              200        20   1
              200        10   0.8
              200        10   0.8
              200        10   0.5
              200        10   0.5
              200        10   0.5
            Sample Initial water: Thickness=[100, 200, 200, 200, 200, 200, 200, 200]; SW=[0.24, 0.27, 0.26, 0.23, 0.24, 0.23, 0.23, 0.18]; NO3Units=ppm; NH4Units=ppm; SWUnits=Volumetric; OCUnits=Total; PHUnits=Water
          SurfaceOrganicMatter Surface Organic Matter: same as New Zealand.Lincoln9192.LincolnBase.paddock.Surface Organic Matter
          Fertiliser
          MicroClimate: same as New Zealand.Lincoln9192.LincolnBase.paddock.MicroClimate
          Plant Wheat: CropType=Wheat
          Manager Harvesting: same as SE Queensland.APS26.APS26NRate160WaterWet.paddock.Harvesting
          Report DailyReport
          Report HarvestReport
          Report SupReport: EventNames=[Clock].DoReport
            VariableNames:
              [Clock].Today
              [Leaf].CohortSize
              [Wheat].Arbitrator.DMAllocated
              [Wheat].Arbitrator.DMDemand
              [Wheat].Arbitrator.DMNutrientLimitation
              [Wheat].Arbitrator.DMSinkLimitation
              [Wheat].Arbitrator.DMSupply
              [Wheat].Arbitrator.FN
              [Wheat].Arbitrator.NDemand
              [Wheat].Leaf.CohortMaxSize
              [Wheat].Leaf.CohortParameters.GrowthDuration.Value
              [Wheat].Leaf.CohortParameters.LagDuration.Value
              [Wheat].Leaf.CohortParameters.MaxArea.Value
              [Wheat].Leaf.CohortParameters.SenescenceDuration.Value
              [Wheat].Leaf.CohortParameters.SpecificLeafAreaMax.Value
              [Wheat].Leaf.CohortParameters.SpecificLeafAreaMin.Value
              [Wheat].Leaf.Photosynthesis.FT.Value
              [Wheat].Leaf.Photosynthesis.FVPD.Value
              [Wheat].Leaf.Photosynthesis.RueAct
              [Wheat].Stem.DMDemandFunction.HightLimitedDMAccumulation.Value
              [Wheat].Stem.DMDemandFunction.PotentialDMAccumulation.Value
          Manager MaxLeafSize
            script: same as in SE Queensland.APS2.APS2Base.Field.MaxLeafSize
          Report MaxLeafSizeReport
        SoilArbitrator Soil Arbitrator
    Folder CPTPhenology
      Experiment CPTCultOtane
        Factors
          Factor Sow
            Specifications=[Clock].StartDate = 2000-03-03,2000-05-15,2001-04-09,2001-06-15,2001-08-09,2002-03-07,2002-05-15,2002-09-09,2003-03-14,2003-05-21,2003-09-02,2004-03-23,2004-05-28,2004-09-06,2005-04-04,2005-05-27,2005-09-05,2005-12-05,2006-03-13,2006-05-10,2006-12-14,2007-04-24,2007-06-28,2007-09-13,2007-11-29,2008-04-11,2008-06-06,2008-09-11,2008-12-05,2009-03-20,2009-06-05,2009-08-24,2009-12-07,2010-03-30,2010-07-06,2010-10-04,2010-11-30,2011-03-30,2011-05-11,2011-09-09,2011-12-09,2012-04-05,2012-06-28,2012-09-25
        Simulation LincolnCPTOtane: Area=0; Slope=0
          Clock: StartDate=1991-06-08; EndDate=2013-07-01
          Summary summaryfile
          Weather: FileName=lincoln.met
          Zone paddock: Area=1; Slope=0
            Irrigation
            Soil: SoilType=LincolnSoil; LocalName=Lincoln; Site=Lincoln; NearestTown=Unknown; Region=NZ; NaturalVegetation=Unknown; Latitude=0; Longitude=0
              Water: same as New Zealand.Lincoln9192.Factors.Irrig.01.Water
              SoilWater: same as New Zealand.Lincoln1992.SDtrialBase.paddock.Soil.SoilWater
              SoilNitrogen: same as New Zealand.Lincoln9192.LincolnBase.paddock.Soil.SoilNitrogen
              SoilOrganicMatter: same as New Zealand.Lincoln9192.LincolnBase.paddock.Soil.SoilOrganicMatter
              Analysis: Thickness=[100, 200, 200, 200, 200, 200, 200, 200]; PH=[8.5, 8.5, 8.6, 8.6, 8.6, 8.6, 8.6, 8.6]; PHUnits=Water; BoronUnits=HotWater
              Sample Initial nitrogen: NO3Units=ppm; NH4Units=ppm; SWUnits=Volumetric; OCUnits=Total; PHUnits=Water
                Thickness  NO3   NH4
                100        24.9  1.3
                200        16    1
                200        9.8   1
                200        9.8   0.8
                200        2.1   0.8
                200        2.1   0.5
                200        2.1   0.5
                200        2.1   0.5
              Sample Initial water: Thickness=[100, 200, 200, 200, 200, 200, 200, 200]; SW=[0.27, 0.3, 0.28, 0.25, 0.24, 0.27, 0.27, 0.21]; NO3Units=ppm; NH4Units=ppm; SWUnits=Volumetric; OCUnits=Total; PHUnits=Water
            SurfaceOrganicMatter Surface Organic Matter: same as New Zealand.Lincoln9192.LincolnBase.paddock.Surface Organic Matter
            Fertiliser
            MicroClimate: same as New Zealand.Lincoln9192.LincolnBase.paddock.MicroClimate
            Plant Wheat: CropType=Wheat
            Report HarvestReport
            Manager SowAndHarvest
              Cultivar = Otane
```csharp
using System;
using Models.Core;
using Models.PMF;
using APSIM.Shared.Utilities;
using System.Xml.Serialization;
        
namespace Models
{
	[Serializable] 
	[System.Xml.Serialization.XmlInclude(typeof(Model))]
	public class Script : Model
	{
		[Link] Plant Wheat;
		[Link] Clock Clock;
		[Link] Simulation sim;
		[Link] Summary Summary;
		
		[Description("Cultivar")]
		public string Cultivar { get; set; }
		
		[XmlIgnore] public bool Sown { get; set; }
		[XmlIgnore] public bool Harvested { get; set; }
		[XmlIgnore] public bool EndSet { get; set; }
		
		[EventSubscribe("Commencing")]
		private void OnSimulationCommencing(object sender, EventArgs e)
		{
			Sown = false;
			Harvested = false;
			EndSet = false;
		}
		
		[EventSubscribe("DoManagement")]
		private void OnDoManagement(object sender, EventArgs e)
		{
			if (Sown == false)
			{
				Wheat.Sow(population: 200, cultivar: Cultivar, depth: 15, rowSpacing: 150, budNumber: 1);
				Sown = true;
			}
			
			if (Wheat.Phenology.CurrentPhaseName == "ReadyForHarvesting")
			{
				Wheat.Harvest();
				Wheat.EndCrop();
				Harvested = true;
				Summary.WriteMessage(this, "Flowering reached so setting end date to stop simulation");
			}
			
			if ((Harvested == true) && (EndSet == false))
			{
				sim.Set("Clock.EndDate", Clock.Today.AddDays(1));
				EndSet = true;
			}
		}
	}
}
```
            Report DailyReport
          SoilArbitrator Soil Arbitrator
      Experiment CPTCultAmarok
        Factors
          Factor Sow
            Specifications=[Clock].StartDate = 2001-04-09,2001-06-15,2002-03-07,2002-05-15,2003-03-14,2003-05-21,2004-03-23,2004-05-28,2005-04-04,2005-05-27,2005-12-05,2006-03-13,2006-05-10,2007-04-24,2007-06-28,2008-04-11,2008-06-06,2009-03-20,2009-06-05,2009-08-24,2010-03-30,2010-07-06,2011-03-30,2011-05-11,2012-04-05,2012-06-28
        Simulation LincolnCPTAmarok: Area=0; Slope=0
          Clock: StartDate=1991-06-08; EndDate=2013-07-01
          Summary summaryfile
          Weather: FileName=lincoln.met
          Zone paddock: Area=1; Slope=0
            Irrigation
            Soil: same as New Zealand.CPTPhenology.CPTCultOtane.LincolnCPTOtane.paddock.Soil
            SurfaceOrganicMatter Surface Organic Matter: same as New Zealand.Lincoln9192.LincolnBase.paddock.Surface Organic Matter
            Fertiliser
            MicroClimate: same as New Zealand.Lincoln9192.LincolnBase.paddock.MicroClimate
            Plant Wheat: CropType=Wheat
            Report HarvestReport
            Manager SowAndHarvest
              Cultivar = Amarok
              script: same as in New Zealand.CPTPhenology.CPTCultOtane.LincolnCPTOtane.paddock.SowAndHarvest
          SoilArbitrator Soil Arbitrator
      Experiment CPTCultClaire
        Factors
          Factor Sow
            Specifications=[Clock].StartDate = 2000-03-03,2000-05-15,2001-04-09,2001-06-15,2001-08-09,2002-03-07,2002-05-15,2002-09-09,2003-03-14,2003-05-21,2003-09-02,2004-03-23,2004-05-28,2004-09-06,2005-04-04,2005-05-27,2005-09-05,2005-12-05,2006-03-13,2006-05-10,2006-12-14,2007-04-24,2007-06-28,2007-09-13,2007-11-29,2008-04-11,2008-06-06,2008-09-11,2008-12-05,2009-03-20,2009-06-05,2009-08-24,2009-12-07,2010-03-30,2010-07-06,2010-10-04,2010-11-30,2011-03-30,2011-05-11,2011-09-09,2011-12-09,2012-04-05,2012-06-28
        Simulation LincolnCPTClaire: Area=0; Slope=0
          Clock: StartDate=1991-06-08; EndDate=2013-07-01
          Summary summaryfile
          Weather: FileName=lincoln.met
          Zone paddock: Area=1; Slope=0
            Irrigation
            Soil: same as New Zealand.CPTPhenology.CPTCultOtane.LincolnCPTOtane.paddock.Soil
            SurfaceOrganicMatter Surface Organic Matter: same as New Zealand.Lincoln9192.LincolnBase.paddock.Surface Organic Matter
            Fertiliser
            MicroClimate: same as New Zealand.Lincoln9192.LincolnBase.paddock.MicroClimate
            Plant Wheat: CropType=Wheat
            Report HarvestReport
            Manager SowAndHarvest
              Cultivar = Claire
              script: same as in New Zealand.CPTPhenology.CPTCultOtane.LincolnCPTOtane.paddock.SowAndHarvest
            Report DailyReport
          SoilArbitrator Soil Arbitrator
      Experiment CPTCultWakanui
        Factors
          Factor Sow
            Specifications=[Clock].StartDate = 2005-04-04,2005-05-27,2006-03-13,2006-05-10,2008-04-11,2008-06-06
        Simulation LincolnCPTWakanui: Area=0; Slope=0
          Clock: StartDate=1991-06-08; EndDate=2013-07-01
          Summary summaryfile
          Weather: FileName=lincoln.met
          Zone paddock: Area=1; Slope=0
            Irrigation
            Soil: same as New Zealand.CPTPhenology.CPTCultOtane.LincolnCPTOtane.paddock.Soil
            SurfaceOrganicMatter Surface Organic Matter: same as New Zealand.Lincoln9192.LincolnBase.paddock.Surface Organic Matter
            Fertiliser
            MicroClimate: same as New Zealand.Lincoln9192.LincolnBase.paddock.MicroClimate
            Plant Wheat: CropType=Wheat
            Report HarvestReport
            Manager SowAndHarvest
              Cultivar = Wakanui
              script: same as in New Zealand.CPTPhenology.CPTCultOtane.LincolnCPTOtane.paddock.SowAndHarvest
          SoilArbitrator Soil Arbitrator
      Experiment CPTCultBattenSpring
        Factors
          Factor Sow
            Specifications=[Clock].StartDate = 2009-03-20,2009-06-05,2009-08-24,2010-03-30,2010-07-06,2010-10-04,2010-11-30,2011-03-30,2011-05-11,2011-09-09,2012-04-05,2012-06-28,2012-09-25
        Simulation LincolnCPTBattenSpring: Area=0; Slope=0
          Clock: StartDate=1991-06-08; EndDate=2013-07-01
          Summary summaryfile
          Weather: FileName=lincoln.met
          Zone paddock: Area=1; Slope=0
            Irrigation
            Soil: same as New Zealand.CPTPhenology.CPTCultOtane.LincolnCPTOtane.paddock.Soil
            SurfaceOrganicMatter Surface Organic Matter: same as New Zealand.Lincoln9192.LincolnBase.paddock.Surface Organic Matter
            Fertiliser
            MicroClimate: same as New Zealand.Lincoln9192.LincolnBase.paddock.MicroClimate
            Plant Wheat: CropType=Wheat
            Report HarvestReport
            Manager SowAndHarvest
              Cultivar = BattenSpring
              script: same as in New Zealand.CPTPhenology.CPTCultOtane.LincolnCPTOtane.paddock.SowAndHarvest
          SoilArbitrator Soil Arbitrator
      Experiment CPTCultBattenWinter
        Factors
          Factor Sow
            Specifications=[Clock].StartDate = 2009-03-20,2009-06-05,2009-08-24,2010-03-30,2010-07-06,2010-11-30,2011-03-30,2011-05-11,2011-09-09,2012-04-05,2012-06-28,2012-09-25
        Simulation LincolnCPTBattenWinter: Area=0; Slope=0
          Clock: StartDate=1991-06-08; EndDate=2013-07-01
          Summary summaryfile
          Weather: FileName=lincoln.met
          Zone paddock: Area=1; Slope=0
            Irrigation
            Soil: same as New Zealand.CPTPhenology.CPTCultOtane.LincolnCPTOtane.paddock.Soil
            SurfaceOrganicMatter Surface Organic Matter: same as New Zealand.Lincoln9192.LincolnBase.paddock.Surface Organic Matter
            Fertiliser
            MicroClimate: same as New Zealand.Lincoln9192.LincolnBase.paddock.MicroClimate
            Plant Wheat: CropType=Wheat
            Report HarvestReport
            Manager SowAndHarvest
              Cultivar = BattenWinter
              script: same as in New Zealand.CPTPhenology.CPTCultOtane.LincolnCPTOtane.paddock.SowAndHarvest
          SoilArbitrator Soil Arbitrator
      Experiment CPTCultYitpi
        Factors
          Factor Sow
            Specifications=[Clock].StartDate = 2009-03-20,2009-06-05,2009-08-24,2010-03-30,2010-07-06,2010-10-04,2010-11-30,2011-03-30,2011-05-11,2011-09-09,2012-04-05,2012-06-28,2012-09-25
        Simulation LincolnCPTYitpi: Area=0; Slope=0
          Clock: StartDate=1991-06-08; EndDate=2013-07-01
          Summary summaryfile
          Weather: FileName=lincoln.met
          Zone paddock: Area=1; Slope=0
            Irrigation
            Soil: same as New Zealand.CPTPhenology.CPTCultOtane.LincolnCPTOtane.paddock.Soil
            SurfaceOrganicMatter Surface Organic Matter: same as New Zealand.Lincoln9192.LincolnBase.paddock.Surface Organic Matter
            Fertiliser
            MicroClimate: same as New Zealand.Lincoln9192.LincolnBase.paddock.MicroClimate
            Plant Wheat: CropType=Wheat
            Report HarvestReport
            Manager SowAndHarvest
              Cultivar = Yitpi
              script: same as in New Zealand.CPTPhenology.CPTCultOtane.LincolnCPTOtane.paddock.SowAndHarvest
          SoilArbitrator Soil Arbitrator
      Experiment CPTCultSunco
        Factors
          Factor Sow
            Specifications=[Clock].StartDate = 2009-03-20,2009-06-05,2009-08-24,2010-03-30,2010-07-06,2010-10-04,2010-11-30,2011-03-30,2011-05-11,2011-09-09,2012-04-05,2012-06-28,2012-09-25
        Simulation LincolnCPTSunco: Area=0; Slope=0
          Clock: StartDate=1991-06-08; EndDate=2013-07-01
          Summary summaryfile
          Weather: FileName=lincoln.met
          Zone paddock: Area=1; Slope=0
            Irrigation
            Soil: same as New Zealand.CPTPhenology.CPTCultOtane.LincolnCPTOtane.paddock.Soil
            SurfaceOrganicMatter Surface Organic Matter: same as New Zealand.Lincoln9192.LincolnBase.paddock.Surface Organic Matter
            Fertiliser
            MicroClimate: same as New Zealand.Lincoln9192.LincolnBase.paddock.MicroClimate
            Plant Wheat: CropType=Wheat
            Report HarvestReport
            Manager SowAndHarvest
              Cultivar = Sunco
              script: same as in New Zealand.CPTPhenology.CPTCultOtane.LincolnCPTOtane.paddock.SowAndHarvest
          SoilArbitrator Soil Arbitrator
      Experiment CPTCultMcCubbin
        Factors
          Factor Sow
            Specifications=[Clock].StartDate = 2009-03-20,2009-06-05,2009-08-24,2010-03-30,2010-07-06,2010-10-04,2010-11-30,2011-03-30,2011-05-11,2011-09-09,2012-04-05,2012-06-28,2012-09-25
        Simulation LincolnCPTMcCubbin: Area=0; Slope=0
          Clock: StartDate=1991-06-08; EndDate=2013-07-01
          Summary summaryfile
          Weather: FileName=lincoln.met
          Zone paddock: Area=1; Slope=0
            Irrigation
            Soil: same as New Zealand.CPTPhenology.CPTCultOtane.LincolnCPTOtane.paddock.Soil
            SurfaceOrganicMatter Surface Organic Matter: same as New Zealand.Lincoln9192.LincolnBase.paddock.Surface Organic Matter
            Fertiliser
            MicroClimate: same as New Zealand.Lincoln9192.LincolnBase.paddock.MicroClimate
            Plant Wheat: CropType=Wheat
            Report HarvestReport
            Manager SowAndHarvest
              Cultivar = McCubbin
              script: same as in New Zealand.CPTPhenology.CPTCultOtane.LincolnCPTOtane.paddock.SowAndHarvest
          SoilArbitrator Soil Arbitrator
      Experiment CPTCultMacKellar
        Factors
          Factor Sow
            Specifications=[Clock].StartDate = 2009-03-20,2009-06-05,2009-08-24,2010-03-30,2010-07-06,2010-10-04,2010-11-30,2011-03-30,2011-05-11,2011-09-09,2012-04-05,2012-06-28,2012-09-25
        Simulation LincolnCPTMacKellar: Area=0; Slope=0
          Clock: StartDate=1991-06-08; EndDate=2013-07-01
          Summary summaryfile
          Weather: FileName=lincoln.met
          Zone paddock: Area=1; Slope=0
            Irrigation
            Soil: same as New Zealand.CPTPhenology.CPTCultOtane.LincolnCPTOtane.paddock.Soil
            SurfaceOrganicMatter Surface Organic Matter: same as New Zealand.Lincoln9192.LincolnBase.paddock.Surface Organic Matter
            Fertiliser
            MicroClimate: same as New Zealand.Lincoln9192.LincolnBase.paddock.MicroClimate
            Plant Wheat: CropType=Wheat
            Report HarvestReport
            Manager SowAndHarvest
              Cultivar = MacKellar
              script: same as in New Zealand.CPTPhenology.CPTCultOtane.LincolnCPTOtane.paddock.SowAndHarvest
          SoilArbitrator Soil Arbitrator
      Experiment CPTCultJanz
        Factors
          Factor Sow
            Specifications=[Clock].StartDate = 2009-03-20,2009-06-05,2009-08-24,2010-03-30,2010-07-06,2010-10-04,2010-11-30,2011-03-30,2011-05-11,2011-09-09,2012-04-05,2012-06-28,2012-09-25
        Simulation LincolnCPTJanz: Area=0; Slope=0
          Clock: StartDate=1991-06-08; EndDate=2013-07-01
          Summary summaryfile
          Weather: FileName=lincoln.met
          Zone paddock: Area=1; Slope=0
            Irrigation
            Soil: same as New Zealand.CPTPhenology.CPTCultOtane.LincolnCPTOtane.paddock.Soil
            SurfaceOrganicMatter Surface Organic Matter: same as New Zealand.Lincoln9192.LincolnBase.paddock.Surface Organic Matter
            Fertiliser
            MicroClimate: same as New Zealand.Lincoln9192.LincolnBase.paddock.MicroClimate
            Plant Wheat: CropType=Wheat
            Report HarvestReport
            Manager SowAndHarvest
              Cultivar = Janz
              script: same as in New Zealand.CPTPhenology.CPTCultOtane.LincolnCPTOtane.paddock.SowAndHarvest
          SoilArbitrator Soil Arbitrator
      Experiment CPTCultLang
        Factors
          Factor Sow
            Specifications=[Clock].StartDate = 2009-03-20,2009-06-05,2009-08-24,2010-03-30,2010-07-06,2010-10-04,2010-11-30,2011-03-30,2011-05-11,2011-09-09,2012-04-05,2012-06-28,2012-09-25
        Simulation LincolnCPTLang: Area=0; Slope=0
          Clock: StartDate=1991-06-08; EndDate=2013-07-01
          Summary summaryfile
          Weather: FileName=lincoln.met
          Zone paddock: Area=1; Slope=0
            Irrigation
            Soil: same as New Zealand.CPTPhenology.CPTCultOtane.LincolnCPTOtane.paddock.Soil
            SurfaceOrganicMatter Surface Organic Matter: same as New Zealand.Lincoln9192.LincolnBase.paddock.Surface Organic Matter
            Fertiliser
            MicroClimate: same as New Zealand.Lincoln9192.LincolnBase.paddock.MicroClimate
            Plant Wheat: CropType=Wheat
            Report HarvestReport
            Manager SowAndHarvest
              Cultivar = Lang
              script: same as in New Zealand.CPTPhenology.CPTCultOtane.LincolnCPTOtane.paddock.SowAndHarvest
          SoilArbitrator Soil Arbitrator
      Experiment CPTCultH45
        Factors
          Factor Sow
            Specifications=[Clock].StartDate = 2009-03-20,2009-06-05,2009-08-24,2010-03-30,2010-07-06,2010-10-04,2010-11-30,2011-03-30,2011-05-11,2011-09-09,2012-04-05,2012-06-28,2012-09-25
        Simulation LincolnCPTH45: Area=0; Slope=0
          Clock: StartDate=1991-06-08; EndDate=2013-07-01
          Summary summaryfile
          Weather: FileName=lincoln.met
          Zone paddock: Area=1; Slope=0
            Irrigation
            Soil: same as New Zealand.CPTPhenology.CPTCultOtane.LincolnCPTOtane.paddock.Soil
            SurfaceOrganicMatter Surface Organic Matter: same as New Zealand.Lincoln9192.LincolnBase.paddock.Surface Organic Matter
            Fertiliser
            MicroClimate: same as New Zealand.Lincoln9192.LincolnBase.paddock.MicroClimate
            Plant Wheat: CropType=Wheat
            Report HarvestReport
            Manager SowAndHarvest
              Cultivar = H45
              script: same as in New Zealand.CPTPhenology.CPTCultOtane.LincolnCPTOtane.paddock.SowAndHarvest
          SoilArbitrator Soil Arbitrator
  Folder Southern Australia
    Folder Wagga
      Memo
        The dataset of [Zeleke2016] includes plantings of two wheat varieties (Gregory, Livingston) under two water regimes (dry and irrigated) for 2013 and 2014 at the Wagga Wagga Agricultural Research Institute. Yields ranged from 1.63 t/ha to 6.01 t/ha.
      Experiment Wagga2013
        Factors
          Factor Cv: Specifications=[CropSchedule]
            Operations Gregory
              2013-06-24  [Wheat].Sow(population:120, cultivar:"EGAGregory", depth:30, rowSpacing:200);
              2013-06-24  [Fertiliser].Apply(Amount: 100, Type: Fertiliser.Types.UreaN);
            Operations Livingston
              2013-06-24  [Wheat].Sow(population:120, cultivar:"Livingston", depth:30, rowSpacing:200);
              2013-06-24  [Fertiliser].Apply(Amount: 100, Type: Fertiliser.Types.UreaN);
          Factor Water: Specifications=[IrrigationSchedule]
            Operations Wet
              2013-09-10  [Irrigation].Apply(amount:26);
              2013-09-11  [Irrigation].Apply(amount:26);
              2013-09-26  [Irrigation].Apply(amount:26);
              2013-10-01  [Irrigation].Apply(amount:26);
              2013-10-04  [Irrigation].Apply(amount:26);
              2013-10-09  [Irrigation].Apply(amount:26);
              2013-10-10  [Irrigation].Apply(amount:26);
              2013-10-14  [Irrigation].Apply(amount:26);
              2013-10-15  [Irrigation].Apply(amount:26);
              2013-10-16  [Irrigation].Apply(amount:26);
            Operations Dry
        Simulation Ketema2013: Area=0; Slope=0
          Clock: StartDate=2013-06-24; EndDate=2013-12-30
          Summary summaryfile
          Weather: FileName=Wagga1314.met
          SoilArbitrator Soil Arbitrator
          Zone paddock: Area=1; Slope=0
            Irrigation
            Fertiliser
            SurfaceOrganicMatter: same as Turkey.Konya11.Konya11.paddock.SurfaceOrganicMatter
            Plant Wheat: CropType=Wheat
            Operations CropSchedule
            Operations IrrigationSchedule
            MicroClimate: same as SE Queensland.APS26.APS26NRate160WaterWet.paddock.MicroClimate
            Manager Calculations: same as SE Queensland.APS26.APS26NRate160WaterWet.paddock.Calculations
            Soil: ASCOrder=Kandasol; ASCSubOrder=Red; SoilType=?; Site=Generic; NearestTown=Wagga Wagga; Region=Riverina; State=New South Wales; Country=Australia; ApsoilNumber=498-GENERIC; Latitude=-35.115549; Longitude=147.369477; LocationAccuracy=Regional Soil Type; DataSource=Generic soil; Comments=Generic soil developed for CSU.
              Water
                Thickness  BD    AirDry  LL15  DUL   SAT
                100        1.48  0.055   0.11  0.29  0.35
                150        1.5   0.104   0.13  0.27  0.34
                150        1.45  0.15    0.15  0.25  0.32
                150        1.37  0.15    0.15  0.28  0.36
                150        1.43  0.15    0.15  0.29  0.35
                300        1.55  0.15    0.15  0.31  0.34
                300        1.67  0.15    0.15  0.31  0.34
                300        1.62  0.15    0.15  0.32  0.35
                SoilCrop Wheatsoil: LL=[0.11, 0.13, 0.15, 0.17, 0.19, 0.22, 0.26, 0.28]; KL=[0.06, 0.06, 0.04, 0.04, 0.04, 0.04, 0.02, 0.02]; XF=[1, 1, 1, 0.9, 0.9, 0.9, 0.9, 0.8]
              SoilWater: residueinterception=0; SummerDate=1-Nov; SummerU=6; SummerCona=3.5; WinterDate=1-Apr; WinterU=2; WinterCona=2; DiffusConst=44; DiffusSlope=16; Salb=0.13; CN2Bare=84; CNRed=20; CNCov=0.8; max_pond=0; Thickness=[100, 150, 150, 150, 150, 300, 300, 300]; SWCON=[0.5, 0.4, 0.3, 0.3, 0.2, 0.1, 0.1, 0.1]
              SoilNitrogen: fom_type=[default, manure, mucuna, lablab, shemp, stable]; fract_carb=[0.2, 0.3, 0.54, 0.57, 0.45, 0]; fract_cell=[0.7, 0.3, 0.37, 0.37, 0.47, 0.1]; fract_lign=[0.1, 0.4, 0.09, 0.06, 0.08, 0.9]; wfpsN2N2O_x=[22, 88]; wfpsN2N2O_y=[0.1, 1]
              SoilOrganicMatter: RootCN=45; RootWt=1500; SoilCN=12.5; EnrACoeff=7.4; EnrBCoeff=0.2; OCUnits=Total
                Thickness  OC   FBiom  FInert
                100        1    0.03   0.4
                150        0.5  0.02   0.6
                150        0.5  0.02   0.7
                150        0.5  0.02   0.8
                150        0.5  0.01   0.9
                300        0.5  0.01   0.9
                300        0.5  0.01   1
                300        0.5  0.01   1
              Analysis: Thickness=[100, 150, 150, 150, 150, 300, 300, 300]; PH=[6, 6, 6, 6, 6, 6, 6, 6]; PHUnits=Water; BoronUnits=HotWater
              InitialWater: PercentMethod=EvenlyDistributed; FractionFull=0.9
              Sample Initial nitrogen: Thickness=[1200]; NO3=[0.542]; NH4=[0]; SW=[0]; NO3Units=ppm; NH4Units=ppm; SWUnits=Volumetric; OCUnits=Total; PHUnits=Water
            Report DailyReport
            Report HarvestReport
            Manager Harvesting: same as SE Queensland.APS26.APS26NRate160WaterWet.paddock.Harvesting
      Experiment Wagga2014
        Factors
          Factor Cv: Specifications=[CropSchedule]
            Operations Gregory
              2014-04-30  [Wheat].Sow(population:120, cultivar:"EGAGregory", depth:30, rowSpacing:200);
              2014-04-30  [Fertiliser].Apply(Amount: 100, Type: Fertiliser.Types.UreaN);
              2014-07-01  [Fertiliser].Apply(Amount: 50, Type: Fertiliser.Types.UreaN);
            Operations Livingston
              2014-04-30  [Wheat].Sow(population:120, cultivar:"Livingston", depth:30, rowSpacing:200);
              2014-04-30  [Fertiliser].Apply(Amount: 100, Type: Fertiliser.Types.UreaN);
              2014-07-01  [Fertiliser].Apply(Amount: 50, Type: Fertiliser.Types.UreaN);
          Factor Water: Specifications=[IrrigationSchedule]
            Operations Wet
              2014-05-16  [Irrigation].Apply(amount:26);
              2014-08-11  [Irrigation].Apply(amount:26);
              2014-08-12  [Irrigation].Apply(amount:26);
              2014-08-18  [Irrigation].Apply(amount:26);
              2014-08-25  [Irrigation].Apply(amount:26);
              2014-09-01  [Irrigation].Apply(amount:21);
              2014-09-05  [Irrigation].Apply(amount:26);
              2014-09-22  [Irrigation].Apply(amount:26);
              2014-10-10  [Irrigation].Apply(amount:26);
            Operations Dry
        Simulation Ketema2014: Area=0; Slope=0
          Clock: StartDate=2014-04-30; EndDate=2014-12-30
          Summary summaryfile
          Weather: FileName=Wagga1314.met
          SoilArbitrator Soil Arbitrator
          Zone paddock: Area=1; Slope=0
            Irrigation
            Fertiliser
            SurfaceOrganicMatter: same as Turkey.Konya09.Konya09.paddock.SurfaceOrganicMatter
            Plant Wheat: CropType=Wheat
            Operations CropSchedule
            Operations IrrigationSchedule
            MicroClimate: same as SE Queensland.APS26.APS26NRate160WaterWet.paddock.MicroClimate
            Manager Calculations: same as SE Queensland.APS26.APS26NRate160WaterWet.paddock.Calculations
            Soil: same as Southern Australia.Wagga.Wagga2013.Ketema2013.paddock.Soil
            Report HarvestReport
            Report DailyReport
            Manager Harvesting: same as SE Queensland.APS26.APS26NRate160WaterWet.paddock.Harvesting
    Folder YarrabahCreek
      Memo
        This trial was conducted on a Vertosol soil on the Liverpool Plains, central-eastern Australia in 2001.  Hybrid Mercury was sown on 19th of June and biomass, leaf area, phenology, soil water (Neutron Moisture Meter) and water use (Bowen Ratio method) were monitored.  More information can be found in [Young2008].
      Simulation YarrabahCreek: Area=0; Slope=0
        Clock: StartDate=2001-06-19; EndDate=2001-12-04
        Summary summaryfile
        Weather: FileName=Ycreek.met
        SoilArbitrator Soil Arbitrator
        Zone Field: Area=1; Slope=0
          Irrigation
          Fertiliser
          Operations CropManagement
            2001-06-19  [Wheat].Sow(population:70, cultivar:"Mercury", depth:30, rowSpacing:250);
            2001-06-19  [Fertiliser].Apply(Amount: 120, Type: Fertiliser.Types.UreaN);
          Soil: SoilType=APS6Soil; LocalName=APS6Site; Site=APS6Site; NearestTown=Unknown; Region=Lawes; NaturalVegetation=Unknown; Latitude=0; Longitude=0
            Water
              Thickness  BD   AirDry  LL15  DUL   SAT
              100        1    0.1     0.27  0.47  0.51
              200        1.1  0.1     0.27  0.49  0.51
              200        1.1  0.1     0.3   0.55  0.57
              200        1.1  0.1     0.32  0.55  0.55
              200        1.1  0.1     0.34  0.53  0.54
              200        1.2  0.1     0.38  0.53  0.54
              200        1.2  0.1     0.42  0.53  0.54
              200        1.2  0.1     0.42  0.5   0.51
              200        1.2  0.1     0.42  0.48  0.51
              200        1.2  0.1     0.42  0.48  0.51
              SoilCrop WheatSoil: LL=[0.27, 0.27, 0.3, 0.32, 0.34, 0.38, 0.42, 0.42, 0.42, 0.42]; KL=[0.12, 0.12, 0.08, 0.06, 0.06, 0.06, 0.06, 0.06, 0, 0]; XF=[1, 1, 1, 1, 1, 1, 1, 1, 0, 0]
            SoilWater: residueinterception=0; SummerDate=1-Nov; SummerU=9; SummerCona=5; WinterDate=1-Apr; WinterU=9; WinterCona=5; DiffusConst=40; DiffusSlope=16; Salb=0.13; CN2Bare=78; CNRed=20; CNCov=0.8; slope=0; discharge_width=0; catchment_area=0; max_pond=0
              Thickness  SWCON  KLAT
              150        0.2    0
              150        0.2    0
              300        0.2    0
              300        0.2    0
              300        0.2    0
              300        0.2    0
              300        0.2    0
            SoilNitrogen: fom_type=[default, manure, mucuna, lablab, shemp, stable]; fract_carb=[0.2, 0.3, 0.54, 0.57, 0.45, 0]; fract_cell=[0.7, 0.3, 0.37, 0.37, 0.47, 0.1]; fract_lign=[0.1, 0.4, 0.09, 0.06, 0.08, 0.9]; wfpsN2N2O_x=[22, 88]; wfpsN2N2O_y=[0.1, 1]
            SoilOrganicMatter: RootCN=60; RootWt=10; SoilCN=14.5; EnrACoeff=1; EnrBCoeff=1; OCUnits=Total
              Thickness  OC    FBiom  FInert
              100        1.83  0.03   0.45
              200        1.35  0.03   0.45
              200        1.19  0.02   0.6
              200        1.11  0.015  0.7
              200        0.97  0.01   0.85
              200        0.8   0.01   0.9
              200        0.64  0.01   0.99
              200        0.5   0.01   0.99
              200        0.38  0.01   0.99
              200        0.27  0.01   0.99
            Analysis: Thickness=[150, 150, 300, 300, 300, 300, 300]; PH=[7.5, 8, 8, 8, 8, 8, 8]; PHUnits=Water; BoronUnits=HotWater
            Sample Initial Water: Thickness=[100, 200, 200, 200, 200, 200, 200, 200, 200, 200]; NO3Units=ppm; NH4Units=ppm; SWUnits=Volumetric; OCUnits=Total; PHUnits=Water
              SW=[0.42, 0.46, 0.54, 0.55, 0.53, 0.51, 0.54, 0.5, 0.466, 0.43]
            Sample Initial Nitrogen: NO3Units=ppm; NH4Units=ppm; SWUnits=Volumetric; OCUnits=Total; PHUnits=Water
              Thickness  NO3  NH4
              100        10   0.3
              200        10   0.3
              200        10   0.3
              200        10   0.3
              200        10   0.3
              200        5    0.3
              200        5    0.3
              200        5    0.3
              200        5    0.3
              200        5    0.3
          SurfaceOrganicMatter: PoolName=wheat_stubble; type=wheat; mass=2000; standing_fraction=0; cnr=100; CriticalResidueWeight=2000; OptimumDecompTemp=20; MaxCumulativeEOS=20; CNRatioDecompCoeff=0.277; CNRatioDecompThreshold=25; TotalLeachRain=25; MinRainToLeach=10; CriticalMinimumOrganicC=0.004; DefaultCPRatio=0; DefaultStandingFraction=0; StandingExtinctCoeff=0.5; FractionFaecesAdded=0.5
            Pools:
              {PoolName=wheat_stubble, ResidueType=wheat, Mass=2000, CNRatio=100, StandingFraction=0}
            ResidueTypes: LoadFromResource=ResidueTypes
          Plant Wheat: CropType=Wheat
          MicroClimate: a_interception=0; b_interception=0; c_interception=0.3; d_interception=0; soil_albedo=0.13; air_pressure=1010; soil_emissivity=0.96; sun_angle=15; soil_heat_flux_fraction=0.4; night_interception_fraction=0.5; windspeed_default=3; refheight=2; albedo=0.15; emissivity=0.96; gsmax=0.01; r50=200
          Report SupReport
            VariableNames:
              [Clock].Today
              ([Wheat].Leaf.Transpiration + [Soil].SoilWater.Es + [MicroClimate].interception) as ET
              sum([Soil].SoilWater.SWmm[2:10]) as TotalSoilWater
            EventNames:
              [Clock].DoReport
          Report DailyReport
          Report HarvestReport
          Manager Harvesting: same as SE Queensland.APS26.APS26NRate160WaterWet.paddock.Harvesting
    Experiment Mouse
      Factors
        Factor Removal
          Specifications=[MouseActivity].Script.ProportionNibbled = 0.00, 0.05,0.10,0.25,0.50
        Factor Date
          Specifications=[MouseActivity].Script.NibblingDate = 2002-09-10, 2002-10-11, 2002-10-31, 2002-12-13
      Simulation MouseBase: Area=0; Slope=0
        Clock: StartDate=2002-07-10; EndDate=2002-12-31
        Summary summaryfile
        Weather: FileName=hall2002.met
        SoilArbitrator Soil Arbitrator
        Zone paddock: Area=1; Slope=0
          Irrigation
          Soil: SoilType=unknown; LocalName=Ginninderra; Site=Ginninderra; NearestTown=Ginninderra; Region=ACT; NaturalVegetation=Unknown; Latitude=0; Longitude=0
            InitialWater: PercentMethod=FilledFromTop; FractionFull=1
            Water: same as Western Australia.Wongan83.WonganBase.paddock.WonganSoil.Water
            SoilWater: same as Western Australia.Wongan83.WonganBase.paddock.WonganSoil.SoilWater
            SoilOrganicMatter: same as Western Australia.Wongan83.WonganBase.paddock.WonganSoil.SoilOrganicMatter
            Analysis: PHUnits=Water; BoronUnits=HotWater
              Thickness=[100, 100, 100, 100, 100, 100, 100, 100, 100, 100, 100, 100, 100, 100, 100, 100, 100, 100, 100, 100]
              PH=[5.8, 5.9, 6.6, 6.8, 7, 7.1, 7.2, 7.3, 7.4, 7.4, 7.6, 7.8, 8, 8.2, 8.3, 8.4, 8.4, 8.5, 8.5, 8.5]
            Sample: same as Western Australia.Wongan83.WonganBase.paddock.WonganSoil.Sample
            SoilNitrogen: same as Western Australia.Wongan83.Factors.Soil.Ripped.SoilNitrogen
          SurfaceOrganicMatter: PondActive=no; ReportAdditions=no; ReportRemovals=no; PoolName=canola_stubble; type=canola; mass=1000; standing_fraction=0; cpr=0; cnr=20; CriticalResidueWeight=2000; OptimumDecompTemp=20; MaxCumulativeEOS=20; CNRatioDecompCoeff=0.277; CNRatioDecompThreshold=25; TotalLeachRain=25; MinRainToLeach=10; CriticalMinimumOrganicC=0.004; DefaultCPRatio=0; DefaultStandingFraction=0; StandingExtinctCoeff=0.5; FractionFaecesAdded=0.5
            Pools:
              {PoolName=canola_stubble, ResidueType=canola, Mass=1000, CNRatio=20, CPRatio=0, StandingFraction=0}
            ResidueTypes: LoadFromResource=ResidueTypes
            TillageTypes TillageTypesList
          Fertiliser
          Plant Wheat: CropType=Wheat
          Operations IrrigationSchedule
            2002-11-08  [Irrigation].Apply(amount:35);
            2002-11-22  [Irrigation].Apply(amount:35);
          MicroClimate: same as SE Queensland.APS26.APS26NRate160WaterWet.paddock.MicroClimate
          Operations SowingSchedule
            2002-08-15  [Wheat].Sow(population:100, cultivar:"H45", depth:30, rowSpacing:250);
          Manager SowingFertiliser
            Amount = 100
            script: same as in Western Australia.Cunderdin97.Cunderdin97Base.paddock.SowingFertiliser
          Manager MouseActivity
            NibblingDate = 2002-10-31
            ProportionNibbled = 0.5
```csharp
using System;
using System.Collections.Generic;
using Models.Core;
using Models.PMF;
using Models.PMF.Interfaces;
using System.Xml.Serialization;

namespace Models
{
	[Serializable] 
	[System.Xml.Serialization.XmlInclude(typeof(Model))]
	public class Script : Model
	{
		[Link] Plant Wheat;
		[Link] Clock Clock;

		[Description("Date that mouse damage event occurs")]
		public DateTime NibblingDate { get; set; }
		[Description("Proportion of the crop removed by mice")]
		public double ProportionNibbled { get; set; }
		
		[XmlIgnore] private RemovalFractions Remove { get; set; }
		
		[EventSubscribe("Commencing")]
		private void OnSimulationCommencing(object sender, EventArgs e)
		{
			Remove = new RemovalFractions();
		}
		
		[EventSubscribe("DoManagement")]
		private void OnDoManagement(object sender, EventArgs e)
		{
			//Set up  array of remove fractions to send with Cut method.  Each member in the array corresponds to an organ in the same order they are set up in.

			if (Clock.Today.Date == NibblingDate)
			{
				//Harvest with manager specified removal fractions
				Remove.SetFractionToRemove("Grain", 0);
				Remove.SetFractionToRemove("Leaf", 0, "live");
				Remove.SetFractionToRemove("Leaf", 0, "dead");
				Remove.SetFractionToRemove("Stem", 0);
				Remove.SetFractionToRemove("Spike", 0);
				Remove.SetFractionToRemove("Root", 0);
				Remove.SetFractionToResidue("Grain", ProportionNibbled);
				Remove.SetFractionToResidue("Leaf", ProportionNibbled, "live");
				Remove.SetFractionToResidue("Leaf", ProportionNibbled, "dead");
				Remove.SetFractionToResidue("Stem", ProportionNibbled);
				Remove.SetFractionToResidue("Spike", ProportionNibbled);
				Remove.SetFractionToResidue("Root", 0);
				Remove.SetThinningProportion = ProportionNibbled;
				Wheat.RemoveBiomass("Thin", Remove);
			}
		}
	}
}
```
          Report DailyReport
          Report HarvestReport
          Manager Harvesting: same as SE Queensland.APS26.APS26NRate160WaterWet.paddock.Harvesting
    Experiment Walpeup2011
      Memo
        INSERT TEXT HERE
      Factors
        Factor Cv: Specifications=[Sowing].Script.CultivarName = Janz, Yitpi, EGAGregory, Axe
        Factor TOS: Specifications=[Sowing].Script.SowDate = 29-Apr, 31-May, 1-Jul
      Simulation Walpeup2011Base: Area=0; Slope=0
        Clock: StartDate=2011-04-01; EndDate=2011-12-30
        Summary summaryfile
        Weather: FileName=Walpeup2011.met
        SoilArbitrator Soil Arbitrator
        Zone Field: Area=1; Slope=0
          Irrigation
          Fertiliser
          Soil APS6Field: same as SE Queensland.APS6.APS6NRate0.paddock.APS6Field
          SurfaceOrganicMatter: same as SE Queensland.APS6.APS6NRate0.paddock.SurfaceOrganicMatter
          Plant Wheat: CropType=Wheat
          MicroClimate: same as SE Queensland.APS26.APS26NRate160WaterWet.paddock.MicroClimate
          Report
            VariableNames:
              [Clock].Today
              Wheat.Zadok.Stage
              Wheat.Phenology.CurrentStageName
              Wheat.AboveGround.Wt
              Wheat.AboveGround.N
              Wheat.Grain.Wt
              Wheat.Grain.Protein
              Wheat.Grain.Size
              Wheat.Grain.Number
              Wheat.Grain.Live.Wt
              Wheat.Grain.Live.N
              Wheat.Leaf.LAI
              Wheat.Leaf.Live.Wt
              Wheat.Leaf.Live.N
              Wheat.Spike.Wt
              Wheat.Spike.N
              Wheat.Stem.Live.Wt
              Wheat.Stem.Live.N
              Wheat.Root.Depth
              [Wheat].Root.WaterUptake
              [Wheat].Leaf.Fw
              [Wheat].Leaf.Fn
              [Wheat].Total.Wt
              [Wheat].Phenology.Zadok.Stage as ZadokStage
              [Wheat].Leaf.AppearedCohortNo
              [Wheat].Leaf.ExpandedCohortNo
              [Wheat].Leaf.SenescingCohortNo
              [Wheat].Leaf.DeadCohortNo
            EventNames:
              [Clock].DoReport
          Report DailyReport
          Report HarvestReport
          Manager Sowing: same as SE Queensland.Gatton94.Gatton94Base.Field.Sowing
          Manager Harvesting: same as SE Queensland.APS26.APS26NRate160WaterWet.paddock.Harvesting
          Manager AutoIrrigate: same as SE Queensland.Gatton94.Gatton94Base.Field.AutoIrrigate
          Operations ApplyFertiliser
            1994-04-29  [Fertiliser].Apply(Amount: 200, Type: Fertiliser.Types.NO3N);
            Memo
              Add sufficient N to remove limitation
    Experiment Walpeup2012
      Memo
        INSERT TEXT HERE
      Factors
        Factor Cv: Specifications=[Sowing].Script.CultivarName = Janz, Yitpi, EGAGregory, Axe
        Factor TOS: Specifications=[Sowing].Script.SowDate = 22-Jun, 18-Jul
      Simulation Walpeup2012Base: Area=0; Slope=0
        Clock: StartDate=2012-04-01; EndDate=2012-12-30
        Summary summaryfile
        Weather: FileName=Walpeup2012.met
        SoilArbitrator Soil Arbitrator
        Zone Field: same as Southern Australia.Walpeup2011.Walpeup2011Base.Field
    Experiment Minnipa2012
      Memo
        INSERT TEXT HERE
      Factors
        Factor Cv: Specifications=[Sowing].Script.CultivarName = Janz, Axe, EGAGregory
        Factor TOS: Specifications=[Sowing].Script.SowDate = 25-May, 8-Jun, 25-Jun
      Simulation Minnipa2012Base: Area=0; Slope=0
        Clock: StartDate=2012-04-01; EndDate=2012-12-30
        Summary summaryfile
        Weather: FileName=Minnipa2012.met
        SoilArbitrator Soil Arbitrator
        Zone Field: same as SE Queensland.Gatton94.Gatton94Base.Field
    Experiment Temora2012
      Memo
        INSERT TEXT HERE
      Factors
        Factor Cv: Specifications=[Sowing].Script.CultivarName = Janz, Axe, EGAGregory
        Factor TOS: Specifications=[Sowing].Script.SowDate = 5-May, 23-May, 25-Jun
      Simulation Temora2012Base: Area=0; Slope=0
        Clock: StartDate=2012-04-01; EndDate=2012-12-30
        Summary summaryfile
        Weather: FileName=Temora2012.met
        SoilArbitrator Soil Arbitrator
        Zone Field: same as SE Queensland.Gatton94.Gatton94Base.Field
  Folder Europe
    Folder Belgium
      Memo
        This trial was conducted on a Vertosol soil on the Liverpool Plains, central-eastern Australia in 2001.  Hybrid Mercury was sown on 19th of June and biomass, leaf area, phenology, soil water (Neutron Moisture Meter) and water use (Bowen Ratio method) were monitored.  More information can be found in [Young2008].
      Simulation Lonzee04: Area=0; Slope=0
        Clock: StartDate=2004-10-14; EndDate=2005-08-31
        Summary summaryfile
        Weather: FileName=BrusselsSouth.met
        SoilArbitrator Soil Arbitrator
        Zone Field: Area=1; Slope=0
          Irrigation
          Fertiliser
          Operations CropManagement
            2004-10-14  [Wheat].Sow(population:100, cultivar:"Dekan", depth:30, rowSpacing:250);
            2005-03-22  [Fertiliser].Apply(Amount: 45, Type: Fertiliser.Types.NO3N);
            2005-04-12  [Fertiliser].Apply(Amount: 35, Type: Fertiliser.Types.NO3N);
            2005-05-12  [Fertiliser].Apply(Amount: 40.5, Type: Fertiliser.Types.NO3N);
            2005-05-30  [Fertiliser].Apply(Amount: 80, Type: Fertiliser.Types.NO3N);
          SurfaceOrganicMatter: PoolName=wheat_stubble; type=wheat; mass=3000; standing_fraction=0; cnr=30; CriticalResidueWeight=2000; OptimumDecompTemp=20; MaxCumulativeEOS=20; CNRatioDecompCoeff=0.277; CNRatioDecompThreshold=25; TotalLeachRain=25; MinRainToLeach=10; CriticalMinimumOrganicC=0.004; DefaultCPRatio=0; DefaultStandingFraction=0; StandingExtinctCoeff=0.5; FractionFaecesAdded=0.5
            Pools:
              {PoolName=wheat_stubble, ResidueType=wheat, Mass=3000, CNRatio=30, StandingFraction=0}
            ResidueTypes: LoadFromResource=ResidueTypes
          Plant Wheat: CropType=Wheat
          MicroClimate: same as Southern Australia.YarrabahCreek.YarrabahCreek.Field.MicroClimate
          Soil: SoilType=APS26Soil; LocalName=APS26Site; Site=APS26Site; NearestTown=Unknown; Region=Lawes; NaturalVegetation=Unknown; Latitude=0; Longitude=0
            Water
              Thickness  BD   AirDry  LL15  DUL   SAT
              100        1.4  0.04    0.15  0.38  0.45
              100        1.4  0.04    0.15  0.38  0.45
              100        1.4  0.06    0.15  0.38  0.45
              100        1.4  0.06    0.15  0.38  0.45
              100        1.4  0.06    0.15  0.38  0.45
              100        1.4  0.06    0.15  0.38  0.45
              100        1.4  0.06    0.15  0.38  0.45
              100        1.4  0.1     0.15  0.38  0.45
              100        1.4  0.1     0.15  0.38  0.45
              100        1.4  0.1     0.15  0.38  0.45
              100        1.4  0.1     0.15  0.38  0.45
              100        1.4  0.1     0.15  0.38  0.45
              100        1.4  0.1     0.15  0.38  0.45
              100        1.4  0.1     0.15  0.38  0.45
              100        1.4  0.1     0.15  0.38  0.45
              SoilCrop WheatSoil
                LL=[0.15, 0.15, 0.15, 0.15, 0.15, 0.15, 0.15, 0.15, 0.15, 0.15, 0.15, 0.15, 0.15, 0.15, 0.15]
                KL=[0.1, 0.08, 0.06, 0.06, 0.06, 0.06, 0.06, 0.06, 0.06, 0.06, 0.06, 0.06, 0.06, 0.06, 0.06]
                XF=[1, 1, 1, 1, 1, 1, 1, 1, 1, 1, 1, 1, 1, 1, 1]
            SoilWater: residueinterception=0; SummerDate=1-Nov; SummerU=4; SummerCona=2; WinterDate=1-Apr; WinterU=2; WinterCona=2; DiffusConst=40; DiffusSlope=16; Salb=0.13; CN2Bare=72; CNRed=20; CNCov=0.8; slope=0; discharge_width=0; catchment_area=0; max_pond=0
              Thickness  SWCON  KLAT
              150        0.4    0
              150        0.4    0
              150        0.4    0
              150        0.4    0
              300        0.4    0
              300        0.4    0
              300        0.4    0
              300        0.4    0
              300        0.4    0
              300        0.4    0
            SoilNitrogen: fom_type=[default, manure, mucuna, lablab, shemp, stable]; fract_carb=[0.2, 0.3, 0.54, 0.57, 0.45, 0]; fract_cell=[0.7, 0.3, 0.37, 0.37, 0.47, 0.1]; fract_lign=[0.1, 0.4, 0.09, 0.06, 0.08, 0.9]; wfpsN2N2O_x=[22, 88]; wfpsN2N2O_y=[0.1, 1]
            SoilOrganicMatter: RootCN=40; RootWt=2000; SoilCN=14.5; EnrACoeff=1; EnrBCoeff=1; OCUnits=Total
              Thickness  OC    FBiom  FInert
              100        0.83  0.04   0.36
              100        0.35  0.03   0.35
              100        0.33  0.03   0.45
              100        0.22  0.02   0.45
              100        0.22  0.02   0.59
              100        0.22  0.02   0.6
              100        0.19  0.02   0.84
              100        0.17  0.02   0.8
              100        0.15  0.01   0.8
              100        0.12  0.01   0.99
              100        0.11  0.01   0.99
              100        0.1   0.01   0.99
              100        0.1   0.01   0.99
              100        0.1   0.01   0.99
              100        0.1   0.01   0.99
            Analysis: PHUnits=Water; BoronUnits=HotWater
              Thickness=[100, 100, 100, 100, 100, 100, 100, 100, 100, 100, 100, 100, 100, 100, 100]
              PH=[5.8, 5.9, 6.6, 6.8, 7, 7.1, 7.2, 7.3, 7.4, 7.4, 7.6, 7.8, 8, 8.2, 8.3]
            Sample Initial Water: NO3Units=ppm; NH4Units=ppm; SWUnits=Volumetric; OCUnits=Total; PHUnits=Water
              Thickness=[100, 100, 100, 100, 100, 100, 100, 100, 100, 100, 100, 100, 100, 100, 100]
              SW=[0.27, 0.28, 0.23, 0.24, 0.26, 0.3, 0.3, 0.32, 0.35, 0.32, 0.32, 0.37, 0.39, 0.39, 0.39]
            Sample Initial Nitrogen: NO3Units=ppm; NH4Units=ppm; SWUnits=Volumetric; OCUnits=Total; PHUnits=Water
              Thickness  NO3  NH4
              100        10   1
              100        15   1
              100        10   1
              100        8    1
              100        5    1
              100        2    1
              100        1    1
              100        1    1
              100        1    1
              100        1    1
              100        1    1
              100        1    1
              100        1    1
              100        1    1
              100        0    0
          Report HarvestReport
          Report DailyReport
          Manager Harvesting: same as SE Queensland.APS26.APS26NRate160WaterWet.paddock.Harvesting
      Simulation Lonzee06: Area=0; Slope=0
        Clock: StartDate=2006-10-13; EndDate=2007-08-31
        Summary summaryfile
        Weather: FileName=BrusselsSouth.met
        SoilArbitrator Soil Arbitrator
        Zone Field: Area=1; Slope=0
          Irrigation
          Fertiliser
          Operations CropManagement
            2006-10-13  [Wheat].Sow(population:100, cultivar:"Rosario", depth:30, rowSpacing:250);
            2007-03-17  [Fertiliser].Apply(Amount: 40, Type: Fertiliser.Types.NO3N);
            2007-04-12  [Fertiliser].Apply(Amount: 60, Type: Fertiliser.Types.NO3N);
            2007-05-08  [Fertiliser].Apply(Amount: 94.5, Type: Fertiliser.Types.NO3N);
          SurfaceOrganicMatter: same as Europe.Belgium.Lonzee04.Field.SurfaceOrganicMatter
          Plant Wheat: CropType=Wheat
          MicroClimate: same as Southern Australia.YarrabahCreek.YarrabahCreek.Field.MicroClimate
          Soil: same as Europe.Belgium.Lonzee04.Field.Soil
          Report HarvestReport
          Report DailyReport
          Manager Harvesting: same as SE Queensland.APS26.APS26NRate160WaterWet.paddock.Harvesting
      Simulation Lonzee08: Area=0; Slope=0
        Clock: StartDate=2008-11-13; EndDate=2009-08-31
        Summary summaryfile
        Weather: FileName=BrusselsSouth.met
        SoilArbitrator Soil Arbitrator
        Zone Field: Area=1; Slope=0
          Irrigation
          Fertiliser
          Operations CropManagement
            2008-11-13  [Wheat].Sow(population:100, cultivar:"Ararat", depth:30, rowSpacing:250);
            2009-03-18  [Fertiliser].Apply(Amount: 80, Type: Fertiliser.Types.NO3N);
            2009-04-24  [Fertiliser].Apply(Amount: 40, Type: Fertiliser.Types.NO3N);
            2009-05-28  [Fertiliser].Apply(Amount: 90, Type: Fertiliser.Types.NO3N);
          SurfaceOrganicMatter: same as Europe.Belgium.Lonzee04.Field.SurfaceOrganicMatter
          Plant Wheat: CropType=Wheat
          MicroClimate: same as Southern Australia.YarrabahCreek.YarrabahCreek.Field.MicroClimate
          Soil: same as Europe.Belgium.Lonzee04.Field.Soil
          Report DailyReport
          Report HarvestReport
          Manager Harvesting: same as SE Queensland.APS26.APS26NRate160WaterWet.paddock.Harvesting
  Folder NorthAmerica
    Folder Arizona
      Memo
        This trial was conducted on a Vertosol soil on the Liverpool Plains, central-eastern Australia in 2001.  Hybrid Mercury was sown on 19th of June and biomass, leaf area, phenology, soil water (Neutron Moisture Meter) and water use (Bowen Ratio method) were monitored.  More information can be found in [Young2008].
      Experiment ArizonaFACE92
        Memo
          This simple experiment was conducted to investigate the impact of time of sowing on canopy development and growth of wheat.  Wheat (cv. Hartog) was sown at Gatton on 30th of May and 30th of July in 1991.  Data were collected on canopy development, biomass accumulation and yield.
        Factors
          Factor CO2: Specifications=[Dummy]
            Operations Normal
            Operations High
          Factor Irr: Specifications=[IrrigationSchedule]
            Operations Wet
              1993-01-30  [Irrigation].Apply(amount:30);
              1993-01-31  [Irrigation].Apply(amount:7);
              1993-03-01  [Irrigation].Apply(amount:12);
              1993-03-09  [Irrigation].Apply(amount:60);
              1993-03-18  [Irrigation].Apply(amount:34);
              1993-03-25  [Irrigation].Apply(amount:50);
              1993-04-05  [Irrigation].Apply(amount:54);
              1993-04-06  [Irrigation].Apply(amount:4);
              1993-04-12  [Irrigation].Apply(amount:47);
              1993-04-17  [Irrigation].Apply(amount:38);
              1993-04-18  [Irrigation].Apply(amount:6);
              1993-04-21  [Irrigation].Apply(amount:36);
              1993-04-26  [Irrigation].Apply(amount:48);
              1993-04-27  [Irrigation].Apply(amount:6);
              1993-04-30  [Irrigation].Apply(amount:42);
              1993-05-05  [Irrigation].Apply(amount:41);
              1993-05-10  [Irrigation].Apply(amount:41);
              1993-05-11  [Irrigation].Apply(amount:4);
              1993-05-14  [Irrigation].Apply(amount:41);
            Operations Dry
              1993-01-30  [Irrigation].Apply(amount:30);
              1993-01-31  [Irrigation].Apply(amount:7);
              1993-03-18  [Irrigation].Apply(amount:17);
              1993-03-25  [Irrigation].Apply(amount:15);
              1993-04-05  [Irrigation].Apply(amount:27);
              1993-04-06  [Irrigation].Apply(amount:4);
              1993-04-12  [Irrigation].Apply(amount:18);
              1993-04-17  [Irrigation].Apply(amount:16);
              1993-04-18  [Irrigation].Apply(amount:6);
              1993-04-21  [Irrigation].Apply(amount:18);
              1993-04-26  [Irrigation].Apply(amount:24);
              1993-04-27  [Irrigation].Apply(amount:6);
              1993-04-30  [Irrigation].Apply(amount:21);
              1993-05-05  [Irrigation].Apply(amount:20);
              1993-05-10  [Irrigation].Apply(amount:20);
              1993-05-11  [Irrigation].Apply(amount:4);
              1993-05-14  [Irrigation].Apply(amount:20);
        Simulation FACE92: Area=0; Slope=0
          Clock: StartDate=1992-12-14; EndDate=1993-05-30
          Summary summaryfile
          Weather: FileName=Maricopa9293.met
          SoilArbitrator Soil Arbitrator
          Zone Field: Area=1; Slope=0
            Irrigation
            Fertiliser
            Soil: Latitude=0; Longitude=0
              Water
                Thickness  BD    AirDry  LL15  DUL   SAT
                50         1.31  0.03    0.2   0.32  0.42
                100        1.27  0.03    0.2   0.32  0.42
                150        1.27  0.03    0.2   0.32  0.42
                200        1.3   0.02    0.2   0.32  0.42
                100        1.47  0.01    0.2   0.32  0.39
                100        1.47  0.01    0.2   0.32  0.39
                200        1.57  0.01    0.19  0.3   0.36
                200        1.57  0       0.16  0.28  0.35
                100        1.57  0       0.16  0.28  0.35
                100        1.57  0       0.16  0.28  0.35
                200        1.57  0       0.14  0.25  0.34
                200        1.57  0       0.14  0.25  0.34
                200        1.57  0       0.13  0.24  0.33
                200        1.57  0       0.13  0.24  0.33
                SoilCrop WheatSoil
                  LL=[0.2, 0.2, 0.2, 0.2, 0.2, 0.2, 0.19, 0.16, 0.16, 0.16, 0.14, 0.14, 0.13, 0.13]
                  KL=[0.06, 0.06, 0.06, 0.06, 0.06, 0.06, 0.06, 0.06, 0.06, 0.06, 0.06, 0.06, 0.06, 0.06]
                  XF=[1, 1, 1, 0.8, 0.8, 0.8, 0.6, 0.6, 0.4, 0.2, 0.2, 0.2, 0.2, 0.2]
              SoilWater: residueinterception=0; SummerDate=1-Nov; SummerU=6; SummerCona=2; WinterDate=1-Apr; WinterU=6; WinterCona=2; DiffusConst=88; DiffusSlope=35.4; Salb=0.13; CN2Bare=60; CNRed=20; CNCov=0.8; slope=0; discharge_width=0; catchment_area=0; max_pond=0
                Thickness  SWCON  KLAT
                50         0.34   0
                100        0.34   0
                150        0.34   0
                200        0.34   0
                100        0.34   0
                100        0.34   0
                200        0.3    0
                200        0.25   0
                100        0.25   0
                100        0.25   0
                200        0.2    0
                200        0.2    0
                200        0.18   0
                200        0.18   0
              SoilNitrogen: fom_type=[default, manure, mucuna, lablab, shemp, stable]; fract_carb=[0.2, 0.3, 0.54, 0.57, 0.45, 0]; fract_cell=[0.7, 0.3, 0.37, 0.37, 0.47, 0.1]; fract_lign=[0.1, 0.4, 0.09, 0.06, 0.08, 0.9]; wfpsN2N2O_x=[22, 88]; wfpsN2N2O_y=[0.1, 1]
              SoilOrganicMatter: RootCN=20; RootWt=1500; SoilCN=15; EnrACoeff=1; EnrBCoeff=1; OCUnits=Total
                Thickness  OC    FBiom  FInert
                50         0.41  0.04   0.31
                100        0.35  0.04   0.31
                150        0.27  0.03   0.31
                200        0.24  0.02   0.31
                100        0.16  0.01   0.31
                100        0.16  0.01   0.31
                200        0.3   0.01   0.25
                200        0.1   0.01   0.2
                100        0.1   0.01   0.2
                100        0.1   0.01   0.2
                200        0.1   0.01   0.2
                200        0.1   0.01   0.2
                200        0.1   0.01   0.17
                200        0.1   0.01   0.17
              Analysis: PHUnits=Water; BoronUnits=HotWater
                Thickness=[50, 100, 150, 200, 100, 100, 200, 200, 100, 100, 200, 200, 200, 200]
                PH=[8.5, 8.5, 8.5, 8.6, 8.6, 8.6, 8.6, 8.6, 8.6, 8.6, 8.6, 8.6, 8.6, 8.6]
              Sample Initial Water: NO3Units=ppm; NH4Units=ppm; SWUnits=Volumetric; OCUnits=Total; PHUnits=Water
                Thickness=[50, 100, 150, 200, 100, 100, 200, 200, 100, 100, 200, 200, 200, 200]
                SW=[0.223, 0.223, 0.223, 0.228, 0.202, 0.202, 0.198, 0.192, 0.185, 0.185, 0.189, 0.19, 0.198, 0.196]
              Sample Initial Nitrogen: NO3Units=ppm; NH4Units=ppm; SWUnits=Volumetric; OCUnits=Total; PHUnits=Water
                Thickness  NO3   NH4
                50         24.9  0.8
                100        24.9  0.8
                150        16    0.6
                200        9.8   0.4
                100        9.8   0.4
                100        2.1   0.2
                200        2.1   0.2
                200        2.1   0.2
                100        2.1   0.2
                100        0.2   0.2
                200        0.2   0.2
                200        0.2   0.2
                200        0.2   0.2
                200        0.2   0.2
            Operations Sowing
              1992-12-18  [Wheat].Sow(population: 140, cultivar: "Yecora", depth: 30, rowSpacing: 250);
              1992-12-16  [Fertiliser].Apply(Amount: 40, Type: Fertiliser.Types.NO3N);
              1992-12-17  [Fertiliser].Apply(Amount: 20, Type: Fertiliser.Types.NO3N);
              1993-01-30  [Fertiliser].Apply(Amount: 13, Type: Fertiliser.Types.NO3N);
              1993-01-31  [Fertiliser].Apply(Amount: 10, Type: Fertiliser.Types.NO3N);
              1993-02-01  [Fertiliser].Apply(Amount: 92, Type: Fertiliser.Types.NO3N);
              1993-03-18  [Fertiliser].Apply(Amount: 66, Type: Fertiliser.Types.NO3N);
              1993-03-19  [Fertiliser].Apply(Amount: 10, Type: Fertiliser.Types.NO3N);
              1993-04-05  [Fertiliser].Apply(Amount: 81, Type: Fertiliser.Types.NO3N);
            SurfaceOrganicMatter: same as SE Queensland.APS6.APS6NRate0.paddock.SurfaceOrganicMatter
            Plant Wheat: CropType=Wheat
            MicroClimate: same as SE Queensland.APS26.APS26NRate160WaterWet.paddock.MicroClimate
            Operations IrrigationSchedule
            Operations Dummy
            Report HarvestReport
            Report DailyReport
            Manager Harvesting: same as SE Queensland.APS26.APS26NRate160WaterWet.paddock.Harvesting
      Experiment ArizonaFACE93
        Memo
          This simple experiment was conducted to investigate the impact of time of sowing on canopy development and growth of wheat.  Wheat (cv. Hartog) was sown at Gatton on 30th of May and 30th of July in 1991.  Data were collected on canopy development, biomass accumulation and yield.
        Factors
          Factor CO2: Specifications=[Dummy]
            Operations Normal
            Operations High
          Factor Irr: Specifications=[IrrigationSchedule]
            Operations Wet
              1993-12-13  [Irrigation].Apply(amount:13);
              1993-12-17  [Irrigation].Apply(amount:17);
              1994-01-21  [Irrigation].Apply(amount:30);
              1994-02-03  [Irrigation].Apply(amount:30);
              1994-02-23  [Irrigation].Apply(amount:35);
              1994-03-04  [Irrigation].Apply(amount:30);
              1994-03-16  [Irrigation].Apply(amount:36);
              1994-03-21  [Irrigation].Apply(amount:25);
              1994-03-28  [Irrigation].Apply(amount:30);
              1994-04-04  [Irrigation].Apply(amount:30);
              1994-04-08  [Irrigation].Apply(amount:50);
              1994-04-14  [Irrigation].Apply(amount:50);
              1994-04-19  [Irrigation].Apply(amount:50);
              1994-04-25  [Irrigation].Apply(amount:50);
              1994-04-30  [Irrigation].Apply(amount:7);
              1994-05-04  [Irrigation].Apply(amount:60);
              1994-05-10  [Irrigation].Apply(amount:48);
              1994-05-16  [Irrigation].Apply(amount:38);
            Operations Dry
              1993-12-13  [Irrigation].Apply(amount:13);
              1993-12-17  [Irrigation].Apply(amount:17);
              1994-02-03  [Irrigation].Apply(amount:30);
              1994-03-16  [Irrigation].Apply(amount:30);
              1994-03-28  [Irrigation].Apply(amount:30);
              1994-04-08  [Irrigation].Apply(amount:50);
              1994-04-19  [Irrigation].Apply(amount:50);
              1994-04-30  [Irrigation].Apply(amount:7);
              1994-05-04  [Irrigation].Apply(amount:60);
        Simulation FACE93: Area=0; Slope=0
          Clock: StartDate=1993-12-07; EndDate=1994-05-30
          Summary summaryfile
          Weather: FileName=Maricopa9394.met
          SoilArbitrator Soil Arbitrator
          Zone Field: Area=1; Slope=0
            Irrigation
            Fertiliser
            Soil: Latitude=0; Longitude=0
              Water: same as NorthAmerica.Arizona.ArizonaFACE92.FACE92.Field.Soil.Water
              SoilWater: same as NorthAmerica.Arizona.ArizonaFACE92.FACE92.Field.Soil.SoilWater
              SoilNitrogen: fom_type=[default, manure, mucuna, lablab, shemp, stable]; fract_carb=[0.2, 0.3, 0.54, 0.57, 0.45, 0]; fract_cell=[0.7, 0.3, 0.37, 0.37, 0.47, 0.1]; fract_lign=[0.1, 0.4, 0.09, 0.06, 0.08, 0.9]; wfpsN2N2O_x=[22, 88]; wfpsN2N2O_y=[0.1, 1]
              SoilOrganicMatter: same as NorthAmerica.Arizona.ArizonaFACE92.FACE92.Field.Soil.SoilOrganicMatter
              Analysis: PHUnits=Water; BoronUnits=HotWater
                Thickness=[50, 100, 150, 200, 100, 100, 200, 200, 100, 100, 200, 200, 200, 200]
                PH=[8.5, 8.5, 8.5, 8.6, 8.6, 8.6, 8.6, 8.6, 8.6, 8.6, 8.6, 8.6, 8.6, 8.6]
              Sample Initial Water: NO3Units=ppm; NH4Units=ppm; SWUnits=Volumetric; OCUnits=Total; PHUnits=Water
                Thickness=[50, 100, 150, 200, 100, 100, 200, 200, 100, 100, 200, 200, 200, 200]
                SW=[0.302, 0.302, 0.302, 0.286, 0.217, 0.217, 0.186, 0.2, 0.199, 0.199, 0.197, 0.204, 0.208, 0.209]
              Sample Initial Nitrogen: NO3Units=ppm; NH4Units=ppm; SWUnits=Volumetric; OCUnits=Total; PHUnits=Water
                Thickness  NO3   NH4
                50         4.2   0.7
                100        4.2   0.7
                150        12    0.6
                200        10.6  0.3
                100        10.6  0.3
                100        3.4   0.2
                200        3.4   0.2
                200        3.4   0.2
                100        3.4   0.2
                100        3.4   0.2
                200        3.4   0.2
                200        3.4   0.2
                200        3.4   0.2
                200        3.4   0.2
            Operations Sowing
              1993-12-13  [Wheat].Sow(population: 186, cultivar: "Yecora", depth: 30, rowSpacing: 250);
              1993-12-07  [Fertiliser].Apply(Amount: 54, Type: Fertiliser.Types.NO3N);
              1993-12-08  [Fertiliser].Apply(Amount: 10, Type: Fertiliser.Types.NO3N);
              1994-02-04  [Fertiliser].Apply(Amount: 92, Type: Fertiliser.Types.NO3N);
              1994-02-05  [Fertiliser].Apply(Amount: 10, Type: Fertiliser.Types.NO3N);
              1994-03-16  [Fertiliser].Apply(Amount: 69, Type: Fertiliser.Types.NO3N);
              1994-03-17  [Fertiliser].Apply(Amount: 10, Type: Fertiliser.Types.NO3N);
              1994-04-08  [Fertiliser].Apply(Amount: 46, Type: Fertiliser.Types.NO3N);
            SurfaceOrganicMatter: same as SE Queensland.APS6.APS6NRate0.paddock.SurfaceOrganicMatter
            Plant Wheat: CropType=Wheat
            MicroClimate: same as SE Queensland.APS26.APS26NRate160WaterWet.paddock.MicroClimate
            Operations IrrigationSchedule
            Operations Dummy
            Report DailyReport
            Report HarvestReport
            Manager Harvesting: same as SE Queensland.APS26.APS26NRate160WaterWet.paddock.Harvesting
  Folder China
    Folder ChinaFlux
      Simulation Yucheng02: Area=0; Slope=0
        Clock: StartDate=2002-10-01; EndDate=2003-06-15
        Summary summaryfile
        Weather: FileName=Yucheng.met
        SoilArbitrator Soil Arbitrator
        Zone Field: Area=1; Slope=0
          Irrigation
          Fertiliser
          Operations CropManagement
            2002-10-15  [Wheat].Sow(population:100, cultivar:"Keyu13", depth:30, rowSpacing:250);
            2002-10-15  [Fertiliser].Apply(Amount: 182.5, Type: Fertiliser.Types.NO3N);
          SurfaceOrganicMatter: same as Southern Australia.YarrabahCreek.YarrabahCreek.Field.SurfaceOrganicMatter
          Plant Wheat: CropType=Wheat
          MicroClimate: same as Southern Australia.YarrabahCreek.YarrabahCreek.Field.MicroClimate
          Soil: SoilType=APS26Soil; LocalName=APS26Site; Site=APS26Site; NearestTown=Unknown; Region=Lawes; NaturalVegetation=Unknown; Latitude=0; Longitude=0
            Water
              Thickness  BD    AirDry  LL15  DUL   SAT
              100        1.37  0.04    0.06  0.28  0.4
              100        1.5   0.04    0.08  0.32  0.4
              100        1.46  0.06    0.1   0.32  0.448
              100        1.42  0.06    0.15  0.3   0.45
              100        1.42  0.06    0.2   0.3   0.45
              100        1.41  0.06    0.25  0.32  0.46
              100        1.4   0.06    0.28  0.35  0.45
              100        1.41  0.1     0.28  0.35  0.45
              100        1.4   0.1     0.3   0.37  0.45
              100        1.46  0.1     0.28  0.41  0.449
              100        1.4   0.1     0.26  0.41  0.47
              100        1.49  0.1     0.32  0.4   0.43
              100        1.5   0.1     0.35  0.4   0.43
              100        1.46  0.1     0.37  0.4   0.44
              100        1.45  0.1     0.37  0.4   0.45
              SoilCrop WheatSoil
                LL=[0.06, 0.08, 0.1, 0.15, 0.2, 0.25, 0.28, 0.28, 0.3, 0.28, 0.26, 0.32, 0.35, 0.37, 0.37]
                KL=[0.06, 0.06, 0.06, 0.06, 0.06, 0.06, 0.06, 0.06, 0.06, 0.06, 0.06, 0.06, 0.06, 0.06, 0.06]
                XF=[1, 1, 1, 1, 1, 0.8, 0.6, 0.4, 0.4, 0.4, 0.4, 0.4, 0.4, 0.4, 0.4]
            SoilWater: same as Europe.Belgium.Lonzee04.Field.Soil.SoilWater
            SoilNitrogen: fom_type=[default, manure, mucuna, lablab, shemp, stable]; fract_carb=[0.2, 0.3, 0.54, 0.57, 0.45, 0]; fract_cell=[0.7, 0.3, 0.37, 0.37, 0.47, 0.1]; fract_lign=[0.1, 0.4, 0.09, 0.06, 0.08, 0.9]; wfpsN2N2O_x=[22, 88]; wfpsN2N2O_y=[0.1, 1]
            SoilOrganicMatter: same as Europe.Belgium.Lonzee04.Field.Soil.SoilOrganicMatter
            Analysis: PHUnits=Water; BoronUnits=HotWater
              Thickness=[100, 100, 100, 100, 100, 100, 100, 100, 100, 100, 100, 100, 100, 100, 100]
              PH=[5.8, 5.9, 6.6, 6.8, 7, 7.1, 7.2, 7.3, 7.4, 7.4, 7.6, 7.8, 8, 8.2, 8.3]
            Sample Initial Water: same as Europe.Belgium.Lonzee04.Field.Soil.Initial Water
            Sample Initial Nitrogen: same as Europe.Belgium.Lonzee04.Field.Soil.Initial Nitrogen
          Report DailyReport
          Report HarvestReport
          Manager Harvesting: same as SE Queensland.APS26.APS26NRate160WaterWet.paddock.Harvesting
      Simulation Yucheng03: Area=0; Slope=0
        Clock: StartDate=2003-10-20; EndDate=2004-06-15
        Summary summaryfile
        Weather: FileName=Yucheng.met
        SoilArbitrator Soil Arbitrator
        Zone Field: Area=1; Slope=0
          Irrigation
          Fertiliser
          Operations CropManagement
            2003-10-23  [Wheat].Sow(population:100, cultivar:"Keyu13", depth:30, rowSpacing:250);
            2003-10-23  [Fertiliser].Apply(Amount: 215.3, Type: Fertiliser.Types.NO3N);
          SurfaceOrganicMatter: same as Southern Australia.YarrabahCreek.YarrabahCreek.Field.SurfaceOrganicMatter
          Plant Wheat: CropType=Wheat
          MicroClimate: same as Southern Australia.YarrabahCreek.YarrabahCreek.Field.MicroClimate
          Soil: SoilType=APS26Soil; LocalName=APS26Site; Site=APS26Site; NearestTown=Unknown; Region=Lawes; NaturalVegetation=Unknown; Latitude=0; Longitude=0
            Water: same as China.ChinaFlux.Yucheng02.Field.Soil.Water
            SoilWater: same as Europe.Belgium.Lonzee04.Field.Soil.SoilWater
            SoilNitrogen: fom_type=[default, manure, mucuna, lablab, shemp, stable]; fract_carb=[0.2, 0.3, 0.54, 0.57, 0.45, 0]; fract_cell=[0.7, 0.3, 0.37, 0.37, 0.47, 0.1]; fract_lign=[0.1, 0.4, 0.09, 0.06, 0.08, 0.9]; wfpsN2N2O_x=[22, 88]; wfpsN2N2O_y=[0.1, 1]
            SoilOrganicMatter: same as Europe.Belgium.Lonzee04.Field.Soil.SoilOrganicMatter
            Analysis: PHUnits=Water; BoronUnits=HotWater
              Thickness=[100, 100, 100, 100, 100, 100, 100, 100, 100, 100, 100, 100, 100, 100, 100]
              PH=[5.8, 5.9, 6.6, 6.8, 7, 7.1, 7.2, 7.3, 7.4, 7.4, 7.6, 7.8, 8, 8.2, 8.3]
            Sample Initial Water: NO3Units=ppm; NH4Units=ppm; SWUnits=Volumetric; OCUnits=Total; PHUnits=Water
              Thickness=[100, 100, 100, 100, 100, 100, 100, 100, 100, 100, 100, 100, 100, 100, 100]
              SW=[0.2, 0.28, 0.3, 0.3, 0.31, 0.33, 0.35, 0.37, 0.4, 0.42, 0.42, 0.42, 0.41, 0.41, 0.41]
            Sample Initial Nitrogen: same as Europe.Belgium.Lonzee04.Field.Soil.Initial Nitrogen
          Report DailyReport
          Report HarvestReport
          Manager Harvesting: same as SE Queensland.APS26.APS26NRate160WaterWet.paddock.Harvesting
      Simulation Yucheng04: Area=0; Slope=0
        Clock: StartDate=2004-10-13; EndDate=2005-06-15
        Summary summaryfile
        Weather: FileName=Yucheng.met
        SoilArbitrator Soil Arbitrator
        Zone Field: Area=1; Slope=0
          Irrigation
          Fertiliser
          Operations CropManagement
            2004-10-14  [Wheat].Sow(population:100, cultivar:"Keyu13", depth:30, rowSpacing:250);
            2004-10-14  [Fertiliser].Apply(Amount: 195.5, Type: Fertiliser.Types.NO3N);
          SurfaceOrganicMatter: same as Southern Australia.YarrabahCreek.YarrabahCreek.Field.SurfaceOrganicMatter
          Plant Wheat: CropType=Wheat
          MicroClimate: same as Southern Australia.YarrabahCreek.YarrabahCreek.Field.MicroClimate
          Soil: SoilType=APS26Soil; LocalName=APS26Site; Site=APS26Site; NearestTown=Unknown; Region=Lawes; NaturalVegetation=Unknown; Latitude=0; Longitude=0
            Water: same as China.ChinaFlux.Yucheng02.Field.Soil.Water
            SoilWater: same as Europe.Belgium.Lonzee04.Field.Soil.SoilWater
            SoilNitrogen: fom_type=[default, manure, mucuna, lablab, shemp, stable]; fract_carb=[0.2, 0.3, 0.54, 0.57, 0.45, 0]; fract_cell=[0.7, 0.3, 0.37, 0.37, 0.47, 0.1]; fract_lign=[0.1, 0.4, 0.09, 0.06, 0.08, 0.9]; wfpsN2N2O_x=[22, 88]; wfpsN2N2O_y=[0.1, 1]
            SoilOrganicMatter: same as Europe.Belgium.Lonzee04.Field.Soil.SoilOrganicMatter
            Analysis: PHUnits=Water; BoronUnits=HotWater
              Thickness=[100, 100, 100, 100, 100, 100, 100, 100, 100, 100, 100, 100, 100, 100, 100]
              PH=[5.8, 5.9, 6.6, 6.8, 7, 7.1, 7.2, 7.3, 7.4, 7.4, 7.6, 7.8, 8, 8.2, 8.3]
            Sample Initial Water: NO3Units=ppm; NH4Units=ppm; SWUnits=Volumetric; OCUnits=Total; PHUnits=Water
              Thickness=[100, 100, 100, 100, 100, 100, 100, 100, 100, 100, 100, 100, 100, 100, 100]
              SW=[0.17, 0.26, 0.27, 0.27, 0.28, 0.31, 0.34, 0.35, 0.37, 0.4, 0.4, 0.39, 0.39, 0.39, 0.39]
            Sample Initial Nitrogen: same as Europe.Belgium.Lonzee04.Field.Soil.Initial Nitrogen
          Report DailyReport
          Report HarvestReport
          Manager Harvesting: same as SE Queensland.APS26.APS26NRate160WaterWet.paddock.Harvesting
  Folder Iran
    Simulation Gorgan05: Area=0; Slope=0
      Clock: StartDate=2005-12-16; EndDate=2006-06-15
      Summary summaryfile
      Weather: FileName=Gorgan.met
      SoilArbitrator Soil Arbitrator
      Zone Field: Area=1; Slope=0
        Irrigation
        Fertiliser
        Operations CropManagement
          2005-12-16  [Wheat].Sow(population:100, cultivar:"Keyu13", depth:30, rowSpacing:250);
          2005-12-16  [Fertiliser].Apply(Amount: 200, Type: Fertiliser.Types.NO3N);
        SurfaceOrganicMatter: same as Southern Australia.YarrabahCreek.YarrabahCreek.Field.SurfaceOrganicMatter
        Plant Wheat: CropType=Wheat
        MicroClimate: same as Southern Australia.YarrabahCreek.YarrabahCreek.Field.MicroClimate
        Soil: same as China.ChinaFlux.Yucheng02.Field.Soil
        Report DailyReport
        Report HarvestReport
        Manager Harvesting: same as SE Queensland.APS26.APS26NRate160WaterWet.paddock.Harvesting
  Folder Africa
    Experiment Jamma
      Memo
        ;From

        Soil Characterization and Evaluation of Slow Release Urea Fertilizer Rates on Yield Traits and Grain Yields of Wheat and Teff on Vertisols of Jamma District of South Wollo Zone, Amhara Region b0

        By

        Abebe Getu (BSc), Hawassa University, Ethiopia
      Factors
        Factor NRate: Specifications=[NRate]
          Operations 0NUSG
            2011-08-01  [Fertiliser].Apply(0, Fertiliser.Types.UreaN, 10);
            2011-09-01  [Fertiliser].Apply(0, Fertiliser.Types.UreaN, 10);
          Operations 23NUSG
            2011-08-01  [Fertiliser].Apply(11.5, Fertiliser.Types.UreaN, 10);
            2011-09-01  [Fertiliser].Apply(11.5, Fertiliser.Types.UreaN, 10);
          Operations 46NUSG
            2011-08-01  [Fertiliser].Apply(23, Fertiliser.Types.UreaN, 10);
            2011-09-01  [Fertiliser].Apply(23, Fertiliser.Types.UreaN, 10);
          Operations 69NUSG
            2011-08-01  [Fertiliser].Apply(34.5, Fertiliser.Types.UreaN, 10);
            2011-09-01  [Fertiliser].Apply(34.5, Fertiliser.Types.UreaN, 10);
          Operations 46NUC
            2011-08-01  [Fertiliser].Apply(23, Fertiliser.Types.UreaN, 10);
            2011-09-01  [Fertiliser].Apply(23, Fertiliser.Types.UreaN, 10);
      Simulation Jamma: Area=0; Slope=0
        Weather: FileName=Jamma.met
        Clock: StartDate=2011-07-25; EndDate=2011-12-15
        Summary summaryfile
        SoilArbitrator Soil Arbitrator
        Zone Field: Area=1; Slope=0
          MicroClimate: a_interception=0; b_interception=1; c_interception=0; d_interception=0; soil_albedo=0.23; air_pressure=1010; soil_emissivity=0.96; sun_angle=15; soil_heat_flux_fraction=0.4; night_interception_fraction=0.5; windspeed_default=3; refheight=2; albedo=0.15; emissivity=0.96; gsmax=0.01; r50=200
          Irrigation
          Fertiliser
          SurfaceOrganicMatter: PoolName=maize; type=maize; mass=500; standing_fraction=0; cnr=65; CriticalResidueWeight=2000; OptimumDecompTemp=20; MaxCumulativeEOS=20; CNRatioDecompCoeff=0.277; CNRatioDecompThreshold=25; TotalLeachRain=25; MinRainToLeach=10; CriticalMinimumOrganicC=0.004; DefaultCPRatio=0; DefaultStandingFraction=0; StandingExtinctCoeff=0.5; FractionFaecesAdded=0.5
            Pools:
              {PoolName=maize, ResidueType=maize, Mass=500, CNRatio=65, StandingFraction=0}
            ResidueTypes ResidueTypesList: LoadFromResource=ResidueTypes
          Operations Sowing
            2011-07-25  [Wheat].Sow(population:100., cultivar:"HAR1685", depth:50, rowSpacing:250);
          Operations NRate
            1985-11-08  [Fertiliser].Apply(50, Fertiliser.Types.NH4NO3N, 10);
            1985-11-29  [Fertiliser].Apply(30, Fertiliser.Types.NH4NO3N, 10);
          Soil: Latitude=0; Longitude=0
            Water
              Thickness  BD    AirDry  LL15  DUL   SAT
              150        1.03  0.1     0.35  0.55  0.6
              150        1.03  0.1     0.35  0.55  0.6
              300        1.03  0.26    0.35  0.55  0.6
              300        1.03  0.32    0.35  0.55  0.6
              300        1.03  0.32    0.35  0.55  0.6
              300        1.03  0.32    0.35  0.55  0.6
              SoilCrop WheatSoil: LL=[0.35, 0.35, 0.35, 0.35, 0.35, 0.35]; KL=[0.1, 0.1, 0.06, 0.06, 0.06, 0.06]; XF=[1, 1, 1, 0, 0, 0]
            SoilWater: residueinterception=0; SummerDate=1-Nov; SummerU=5; SummerCona=5; WinterDate=1-Apr; WinterU=5; WinterCona=5; DiffusConst=40; DiffusSlope=16; Salb=0.13; CN2Bare=75; CNRed=20; CNCov=0.8; max_pond=0; Thickness=[100, 100, 100, 200, 200, 200, 200, 200, 200]; SWCON=[0.5, 0.5, 0.5, 0.5, 0.5, 0.5, 0.5, 0.5, 0.5]
            SoilNitrogen: fom_type=[default, manure, mucuna, lablab, shemp, stable]; fract_carb=[0.2, 0.3, 0.54, 0.57, 0.45, 0]; fract_cell=[0.7, 0.3, 0.37, 0.37, 0.47, 0.1]; fract_lign=[0.1, 0.4, 0.09, 0.06, 0.08, 0.9]; wfpsN2N2O_x=[22, 88]; wfpsN2N2O_y=[0.1, 1]
            SoilOrganicMatter: RootCN=40; RootWt=500; SoilCN=14; EnrACoeff=7.4; EnrBCoeff=0.2; OCUnits=Total
              Thickness  OC   FBiom  FInert
              150        1.4  0.02   0.42
              150        0.9  0.01   0.5
              300        0.8  0.01   0.3
              900        0.6  0.01   0.9
            Analysis: Thickness=[150, 150, 300, 900]; PH=[6.7, 6.7, 6.7, 6.7]; PHUnits=Water; BoronUnits=HotWater
            Sample InitialN: NO3Units=ppm; NH4Units=ppm; SWUnits=Volumetric; OCUnits=Total; PHUnits=Water
              Thickness  NO3   NH4
              150        14.4  0.6
              150        10    0.1
              300        2.45  0.1
              900        1.08  0.1
            Sample InitialSW: Thickness=[150, 150, 300, 300, 600]; SW=[0.55, 0.55, 0.55, 0.45, 0.35]; NO3Units=ppm; NH4Units=ppm; SWUnits=Volumetric; OCUnits=Total; PHUnits=Water
          Plant Wheat: CropType=Wheat
          Report DailyReport
          Report HarvestReport
          Manager Harvesting: same as SE Queensland.APS26.APS26NRate160WaterWet.paddock.Harvesting
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