Simulations: Version=30
  Memo TitlePage
    # The APSIM-PMF White Clover Model

    _Rogerio Cichota, AgResearch, New Zealand_

    ##Preamble

    Plantain (*Plantago lanceolata*), also know as English plantain, ribgrass, or ribwort, is a herbaceous perennial herb with a broad distribution in the native grasslands of Eurasia ([SagarHarper_1964]; [StewartPlantain_1996]).  It is now common around the world in suitable habitats with temperate and subtropical climates.  The plant consists of a rosette of basal semi-erect leaves which may have one or more flowering stalks.  The leaves are green to grey-green in colour, have a characteristic lanceolate shape with 3 to 5 parallel veins along the length and have few or no hairs.  The stems are leafless, growing some 10-15cm above the leaves and have scattered hairs toward the base of the plant.  Each stalk terminates in an ovoid inflorescence containing many small flowers each with a pointed bract.  The inflrescence is 1-4cm long and changes shape over time (from a cone to a cilinder) as the flowers mature from the based to the top, the colour also changes from the initial grey-green to light brown when mature.  The flowering period goes from late spring to early fall and varies between plants, it can last several months for a population of plants in a given locale.  Plantain does not need vernalisation to trigger flowering.  The flowers are wind-pollinated and are replaced by a small seed capsule containing two small seeds, with weight varying between 1.5 and 2.0 mg per seed. Seeds have an oblong shape and the colour varies from dark brown to black.  The root system consists of a relatively shallow crown of coarse fibrous roots including adventitious roots ([SandersonElwinger_2000a]) and although technically a taprooted species it does not have the typical solid deep taproot.  Plantain can allocate greater proportion of roots at depth, giving a competitive advantage over shallow root grasses ([StewartPlantain_1996]; [NieEtAl_2008]; [vanDenBergeEtAl_2014]).
    Selection of plantain cultivars for use as forage have focused mostly on narrow leaf varieties, which have an erect, bushy, growth habit and ability to tiller under grazing ([StewartPlantain_1996]), more recently some emphasis has also been put on the ability to growth over cold periods.  Forage plantain can grow large leaves, up to around 40cm instead of typical 15-25cm, and these are highly palatable to grazing animals, being specifically targeted by sheep ([SagarHarper_1964]; [StewartPlantain_1996]; [RumballKeog_1997]; [QuijadaThesis_2015]). Reproductive organs are less palatable and mature stalks are avoided by grazers ([StewartPlantain_1996]; [MoorheadPigot_2009]; [AyalaEtAl_2011]).  Plantain is highly nutritious, has good digestibility, and the mineral composition usually is higher than ryegras-clover swards ([StewartPlantain_1996]; [JacobsWard_2010]; [ElgersmaEtal_2014]; [LeeEtAlYields_2015]).  Potential medicinal effects of plantain have been suggested and few bio-active compounds that may alter rumen fermentation and N partitionin in the animal are being investigated ([StewartPlantain_1996]; [QuijadaThesis_2015]; [JansmaThesis_2016]).

    **Objective:**  The model presented here has been built using the Plant Modelling Framework (PMF) of [brown_plant_2014] to simulate the growth of a forage plantin crop.  Currently, the focus is on describing biomass accumulation and regrowth after harvest on monocultural swards. As part of APSIM's PMF, using plantain in mixed swards is possible, but this has not been properly tested yet.  Likewise, describing the effect of population decrease on plant growth was not attempted; for swards free of weeds and within typical population ranges, the changes in plant size (number of tillers) and LAI should compensate for loss of population, but competition with weeds and others would alter this pattern significantly.
    Simulating variations in plant N concentration (seasonal or due to changes in soil status)  is not a major focus of the current model.  Further development of PMF's supply/demand processes are needed for capturing the variations in N content typically seen in perennial species.

    ## Generic background
  Replacements
    Plant WhiteClover: CropType=Plantain
      Memo GeneralDescription
        ## Presentation

        This model has been built using the Plant Modelling Framework (PMF) of [brown_plant_2014] to simulate the growth of white clover ( *Trifolium repens* ) as a forage crop.  The model focus primarily on describing the vegetative growth, with a simplified account of the reproductive phase, without explicit considering flowers and seeds. The white clover simulates the aboveground plant structure, including the photosynthesis process, using the SimpleLeaf procedure of PMF, which does not consider leaf age or place,ent in the canopy explicitly.  The model describes a perennial crop, with phenology rewinding to the vegetative stage at the end of the reproductive phase.

        ##Inclusion in APSIM simulations
        To include white clover in a simulation the procedure is the same as any other APSIM crop:

         * - The white clover object can be dragged or copied from the Crop folder in the toolbox into a Field in your simulation;
         * - To become active and grow, the white clover crop needs to be sown using a manager script with a sowing rule. e.g.:
        <pre><code class='language-cs'>
         WhiteClover.Sow(cultivar: Huia, population: 450, depth: 5, rowSpacing: 100);
        </code></pre>
        If a specified cultivar is not available, a fatal error will be thrown.

        ###Harvest and biomass removal
        White clover biomass can be removed by raising one of the valid methods: Harvest, Cut, Graze, or Prune; this is done using a manager script, similarly to other crops.  The proportion of the biomass of each organ that is removed from the system and/or added to the residue pools may be specified; otherwise defaults will be used.  Note that the sum of fractions removed and added to residue should be <= 1.0.  To specify the proportions for removal in a manager script, use a RemovalFractions class as shown below:
        <pre><code class='language-cs'>
        [EventSubscribe("Commencing")]
        private void OnSimulationCommencing(object sender, EventArgs e)
        {
          RemoveFraction = new RemovalFractions(WhiteClover.Organs);
        }
        [EventSubscribe("DoManagement")]
        private void OnDoManagement(object sender, EventArgs e)
        {
          if (Clock.Today.Date == HarvestDate)
          {
            RemoveFraction.SetFractionToRemove("Leaf", 0.80);
            RemoveFraction.SetFractionToRemove("Stem", 0.50);
            RemoveFraction.SetFractionToResidue("leaf",0.05);
            WhiteClover.Harvest(RemoveFraction);
          }
        }
         </code></pre>
        The RemovalFractions class can be sent with Harvest, Cut, Graze, or Prune events. All parameters are optional, defaults are used whenever any value is not specified.

        ###Crop termination
        To fully terminate a crop the EndCrop event should be raised:
        <pre><code class='language-cs'>
         WhiteClover.EndCrop();
        </code></pre>
        Once a crop has been ended the field is open to be used by another APSIM plant model, or another white clover crop.  Note that ending white clover is not necessary before sowing another crop, competition for resources will take place between crops when there is more than one in the field.

        ## Acknowledgements
        This model was developed with help from Ellen Hume gathering plant parameters and organising data. Datasets were produced by the Forages for Reduced Nitrogen Leaching (FRNL) programme.
      Phenology: FractionBiomassRemoved=0; DaysAfterSowing=0
        Memo Description
          The duration of each phenologic phase in white clover is controlled either by the accumulation of thermal time or photoperiod.
        AirTemperatureFunction ThermalTime
          Memo Description
            The thermal time is used to control many of the phenologic changes in white clover.  It is calculated from the daily average temperature using three cardinal temperatures: minimum, maximum, and optimum.  Plant development acelerates as temperature increases from minimum to optimum and slows down after that, ceasing completely at maximum temperature.  There is little information about these thresholds for white clover. The minimum, or base, temperature is quite variable among cultivars, varying from -1.0 to 5oC ([BlackEtAl2006]; [MonksEtAl2009]; [MootEtAll2000]). Even less data is found forthe other parameters, and they are quite variable too; optimum temperature is around 28oC and 38oC for maximum temperature ([BlackEtAl2006]; [MonksEtAl2009]).
          XYPairs: X=[2.5, 25, 37.5]; Y=[0, 22.5, 0]
        PhotoperiodFunction Photoperiod: Twilight=-6; DayLength=0
        GerminatingPhase Germinating: Start=Sowing; End=Germination
          Memo Description
            Germination in most clover species is very variable (e.g. [HamptonEtAl1987]; [MurrayThesis2012]), with about 70-90% of seeds germinating for white clover. Temperatures between 5 and 20oC do not affect germination rate, but so slow it down ([HamptonEtAl1987]).  The model does not consider variable germination rate, thus the population should be adjusted by the user to account for less than 100% germination when sowing. Also, following default PMF behaviour, white clover germination will occur one day after sowing, provided that the amount of soil extractable water is greater than zero.
        EmergingPhase Emerging: Start=Germination; End=Emergence; ShootLag=50; ShootRate=15
          Memo Description
            White clover has small seeds and these need to be placed near the soil surface to emergence sucessfully. Best emergence rate occur when seeds are sown at depth of 5mm ([Hyde1950]; [MurrayAndClements1993]), and few plants will emerge from seeds deeper than 40mm.  Variations in germination rate due to depth are not currently simulated by the model, however the sowing depth does affect timing of emergence, in combination with temperature.  This is controlled by the parameter ShootRate, which is the shoot elongation rate as function of thermal time (mm/oCd).
            Emergence of white clover occur a few days after germination ([Hyde1950]; [MootEtAll2000]), but this is quite variable (taking 5-20 days).  Both temperature and depth of seed are important factors.  Thermal time for the emergence of white clover (cv. Huia and Nomad) has been reported as being approximately 150oCd ([MootEtAll2000]; [MurrayThesis2012]), and there seem to be no significant variations between NZ cultivars ([HamptonEtAl1987]).
          VariableReference ThermalTime: VariableName=[Phenology].ThermalTime.Value()
        GenericPhase Vegetative: Start=Emergence; End=Induction
          Memo Description
            During this phase, white clover plants partitions biomass to leaf+petiole, stolon, and root+taproot organs. Initially, this phase starts when plants emerge, but it is also triggered as phenology resets after the end of the reproductive phase.  The vegetative phase ends when the inductive phase starts.
            White clover is typically described as either short day or short-long day species ([Thomas1961]; [ChapterThomas1980]), which means induction is caused by exposure to short daylight lengths but reproductive growth may also be triggered by a period with long daylight.  Exposure to cold temperature can also lead to induction with subsequent initiation of inflorescence development when days become warmer and longer ([Thomas1981_SLD]; [BeattyThesis1959]). The variability in response of induction to environmental condition is considerably large in white clover. In most stands at least some plants will show reproductive growth regardless of environmental conditions. The variations show some trend when contrasting large- to short-leaved cultivars or for cultivar from different origins (especially latitude), but the effect of genotypes within each group was not found to be significant (e.g. [ChapterThomas1980]; [Thomas1982_Comparison]; [Norris1984_daylength]; [BeattyThesis1959]).
            Inducing daylight length seem to be 12 hours or less, while temperatures need to be below about 10oC ([Thomas1979_Natural]; [Thomas1981_SLD]; [Thomas1982_Comparison]; [Norris1984_daylength]; [Norris1985_Temperature]). The base white clover model uses the accumulation of days under either low temperature or small daylight length to trigger the end of the vegetative phase.
          Constant Target: FixedValue=15; Units=days
          AddFunction ThermalTime
            LinearInterpolationFunction ShortDays: XProperty=[Phenology].Photoperiod.Value()
              XYPairs: X=[6, 8, 10, 12, 14, 16]; Y=[1, 1, 0.7, 0.1, 0, 0]
            LinearInterpolationFunction LowTemperatures: XProperty=[Phenology].ThermalTime.Value()
              XYPairs: X=[0, 2, 5, 8, 11, 15]; Y=[0, 0, 1, 1, 0, 0]
        GenericPhase Inductive: Start=Induction; End=Flowering
          Memo Description
            During this phase the white clover plants await for the environmental cue to start the reproductive growth. Physiologic and metabolic processes remain the same as for the vegetative phase; plants partition biomass to leaf+petiole, stolon, and root+taproot organs. The inductive phase starts when plants accumulated a given number of days under inductive conditions, i.e. low temperatures and/or short daylight lengths ([Thomas1979_Natural]; [Norris1984_daylength]; [Norris1985_Temperature]).  The phase ends when the plants start the reproduction growth, with the emergence of flower buds.
            There is a large level of variation in white clover plants and their flowering response to environmental conditions, with some plants reaching reproductive growth in almost any stand ([Thomas1979_Natural]; [BeattyThesis1959]). Nonetheless, in natural condition reproductive growth is typically triggered by long daylight lengths, with reported values around 14 hours ([ChapterThomas1980]; [Thomas1981_SLD];[Norris1984_daylength]).  The accumulation of days under long daylight length is used by the model to trigger the end of the inductive phase.
          Constant Target: FixedValue=10; Units=days
          LinearInterpolationFunction ThermalTime: XProperty=[Phenology].Photoperiod.Value()
            XYPairs: X=[10, 11.5, 14, 15]; Y=[0, 0, 1, 1]
        GenericPhase Reproductive: Start=Flowering; End=Ripening
          Memo Description
            During this phase the plant is partitioning biomass to all organs, including reproductive organs (peduncles, inflorescence, and seeds). The current model does not describe the flower and seeds development explicitly, only a generic organ refered to as *inflorescence* is defined. The main reason for this is the variability and complex phenology of reproduction of white clover; with seeds maturing while new flowers are still being initiated over summer and early autumn (e.g. [HydeEtAl1959]; [Thomas1987Chapter]; [MedeirosAndSteiner2000]). Also due to their similarities and the fact that a population is describe in the model (instead of single plants), peduncles and petioles are simulated as a single organ.
            Flower emergence typically starts in spring, peaks at the beginning of summer and continues until autumn ([ChapterThomas1980]; [MacfarlaneAndSheath1984]; [MarshalEtAl1993_Production]). The actual periods vary for different cultivars, and some have flower nearly all year (albeit with low frequency over winter).  A drop in flower numbers in mid-summer and subsequent increase in early autumn has been show in some cultivars and has been linked to water deficit or inhibition due to long days ([ChapterThomas1980]; [MacfarlaneAndSheath1984]).  Management practices, such as applying N fertiliser, irrigation and defoliations, have, in general, a positive impact on flower and seed production ([ChapterThomas1980]; [MedeirosAndSteiner2000]; [BissuelBelaygueEtAl2002_flower]), but there is large variation in the responses, depending on the cultivars as well as the extent and timing of the intervention. Currently, the model does not account for the effect of this practices explicitly, although it is expected that some effects are captured by changes in biomass allocation caused by actions such as irrigation of application of fertilisers.
          Constant Target: FixedValue=30; Units=days
          LinearInterpolationFunction ThermalTime: XProperty=[Phenology].Photoperiod.Value()
            XYPairs: X=[10, 11.5, 14, 15]; Y=[1, 1, 0, 0]
        GotoPhase: Start=Ripening; End=Ripening; FractionComplete=0; PhaseNameToGoto=Vegetative
          Memo Description
            At the end of reproductive phase, plantain phenology is reset to 'Vegetative'.
      OrganArbitrator Arbitrator
        RelativeAllocation NArbitrator
          Memo Description
            Controls the allocation of N to each of the plant's organs. Partition is based on:
        RelativeAllocation DMArbitrator
          Memo Description
            Controls the allocation of biomass to each of the plant's organs. Partition is based on:
      SimpleLeaf Leaf: CohortsInitialised=false; Albedo=0.18; Gsmax=0.015; R50=150; MicroClimatePresent=true
        zero: ApicalCohortNo, InitialisedCohortNo, TipsAtEmergence, CohortsAtInitialisation, AppearedCohortNo, PlantAppearedLeafNo, LAI, Height, FRGR, PotentialEP, KDead, LAIDead
        Memo Description
          __Note:__ this organ represents all the leaves in the plant, without distinction between ages or placement in the canopy.
        MultiplyFunction InitialWtFunction
          Memo Description
            It is assumed that approximately 1/3 of the seed biomass is allocated to shoot upon emergence.  The weight of white clover seeds varies between 0.5 and 0.8 g/1000 seeds ([Thomas1987Chapter]; [BissuelBelaygueEtAl2002_seed]; [MurrayThesis2012]).
          Constant InitialPlantWt: FixedValue=0.00025; Units=g/plant
          VariableReference Population: VariableName=[Plant].Population
        Constant StructuralFraction: FixedValue=1; Units=g/g
          Memo Description
            This is the default value for PMF.
        Constant CarbonConcentration: FixedValue=0.4
          Memo Description
            This is the default value for PMF.
        Constant MinimumNConc: FixedValue=0.02; Units=gN/gDM
          Memo Description
            This is the lowest N concentration that leaves can have and still be able to grow.  It represents the N content for structural tissues and is the concentration of dead material.  Specific values for white clover were not found, but typical values for dead clover leaves are around 1.5-3.0% ([Brougham1958_LeafDev]; [WilmanAndMehdi1984]; [WarembourgEtAl1997]).
        Constant CriticalNConc: FixedValue=0.04; Units=gN/gDM
          Memo Description
            This is the N concentration that the organ muast have to fully function, growth penalty incurr if N level fall below this threshold.  Values for this parameter have not been clearly identified for white clover, typical concentration values for non stressed plants can be used instead, these vary between 3.5 and 4.5% ([WilmanAndMehdi1984]; [CaradusEtAl1993_PEffect]; [HoghJensenEtAl2002]).
        Constant MaximumNConc: FixedValue=0.06; Units=gN/gDM
          Memo Description
            This represents the maximum limit for N concentration in leaves.  The N content above CriticalNConc is not essential for growth and can be remobilised for new growth when uptake is insuficient.  Literature data suggest that value for maximum N concentration for whit clover leaves is about 6.0-7.0% ([RysAndPhung1985]; [CaradusEtAl1993_PEffect]; [HoghJensenEtAl2002]).
        Constant NitrogenDemandSwitch: FixedValue=1
        RUEModel Photosynthesis
          Memo Description
            There has been a number of studies on the photosynthetesis rate of white clover (e.g. [McCreeTroughton1966]; [WoledgeEtAl1991_Photo]; [MalinowskiEtAl1998]; [HerautBronEtAl2000]; [HofmannEtAl2007]), including its variation due to water and N deficiency, shading and CO2 changes. The values and trends for CO2 assimilation rates are generally consistent across the various studies and these have been used to help defining the limiting factor for photoynthesis in the model. Reported values RUE for white clover are in general around 2.5-3.0 g DM/MJ ([FaurieEtAl1996]; [ManderscheidEtAl1997]; [NassiriThesis1998]).
          Constant RUE: FixedValue=2.75; Units=g/MJ
          RUECO2Function FCO2: PhotosyntheticPathway=C3
          LinearInterpolationFunction FN: XProperty=[Leaf].Fn
            XYPairs: X=[0, 0.5, 1, 1.5]; Y=[0, 0.5, 1, 1]
          WeightedTemperatureFunction FT: MaximumTemperatureWeighting=0.75
            XYPairs: X=[4, 10, 15, 21, 27, 35]; Y=[0, 0.075, 0.35, 1, 1, 0]
          LinearInterpolationFunction FW: XProperty=[Leaf].Fw
            XYPairs: X=[0, 0.8, 1, 1.5]; Y=[0, 1, 1, 1]
          LinearInterpolationFunction FVPD: XProperty=[Leaf].Photosynthesis.VPD
            XYPairs: X=[0, 10, 12.5, 40]; Y=[1, 1, 0.95, 0]
          VariableReference RadnInt: VariableName=[Leaf].RadIntTot
        DivideFunction FRGRFunction
          Memo Description
            This parameter represents the Fractional Growth Rate.  It is needed by the MicroClimate model, where it is used to compute the effect of growth rate on transpiration.
          VariableReference Photosynthesis: VariableName=[Leaf].Photosynthesis.Value()
          MultiplyFunction PotentialPhotosynthesis
            VariableReference RUE: VariableName=[Leaf].Photosynthesis.RUE.Value()
            MaximumFunction Radiation
              VariableReference RadnInt: VariableName=[Leaf].RadIntTot
              Constant MinRadn: FixedValue=1E-05
        PhaseLookup PartitionFractionDeficit
          PhaseLookupValue VegetativeInductive: Start=Emergence; End=Flowering
            DivideFunction FractionDeficit
              AllometricDemandFunction LeafDeficit: Const=0.4; Power=1; XProperty=[AboveGroundLive].Wt; YProperty=[Leaf].Live.Wt
              VariableReference AboveGroundBiomass: VariableName=[AboveGroundLive].Wt
          PhaseLookupValue Reproductive: Start=Flowering; End=Ripening
            DivideFunction FractionDeficit
              AllometricDemandFunction LeafDeficit: Const=0.2; Power=1; XProperty=[AboveGroundLive].Wt; YProperty=[Leaf].Live.Wt
              VariableReference AboveGroundBiomass: VariableName=[AboveGroundLive].Wt
        PartitionFractionDemandFunction DMDemandFunction
          Memo Description
            In the plantain model, the DM demand function attempts to keep the shoot to root ratio and then the stem to leaf ratio close to a target value (defined by the [TargetShootRootRatio].Value and [TargetStemsLeafRatio].Value), which may vary according to the phenolgical stage.  This approach ensures that the plantain plants will recovery after being cut or grazed.  In this case, biomass will be allocated to leaves preferably, even during reproductive phase.
          Constant PartitionFractionCTE: FixedValue=1
          PhaseLookup PartitionFraction
            PhaseLookupValue VegetativeInductive: Start=Emergence; End=Flowering
              AddFunction LeafFraction
                Constant BasePartitionFraction: FixedValue=0.4; Units=g/g
                MultiplyFunction DeficitPartitionFraction
                  VariableReference AbovegroundFractionDeficit: VariableName=[WhiteClover].AbovegroundFractionDeficit.Value()
                  VariableReference PartitionFractionDeficit: VariableName=[Leaf].PartitionFractionDeficit.Value()
            PhaseLookupValue Reproductive: Start=Flowering; End=Ripening
              AddFunction LeafFraction
                Constant BasePartitionFraction: FixedValue=0.2; Units=g/g
                MultiplyFunction DeficitPartitionFraction
                  VariableReference AbovegroundFractionDeficit: VariableName=[WhiteClover].AbovegroundFractionDeficit.Value()
                  VariableReference PartitionFractionDeficit: VariableName=[Leaf].PartitionFractionDeficit.Value()
        Constant DMConversionEfficiency: FixedValue=1; Units=0-1
          Memo Description
            This is the default value for PMF.
        Constant MaintenanceRespirationFunction: FixedValue=0; Units=0-1
          Memo Description
            This is the default value for PMF.
        MultiplyFunction LAIFunction
          Memo Description
            The leaf area index (LAI) for green leaves is defined based on biomass and the specific leaf area (SLA). The value for SLA for white clover is assumed to be constant in the current model, although the data indicates that age and some environmental factors (shading and nutrient status) have some effect on this value.  Variation due to age are ignored because the model simulates a population, as is intented to describe swards over long term, thus it should represent leaves of varing ages at the same time.  The nutritional effects are generally not linked to N, which currently is the only nutrient simulated in APSIM, thus can be ignored.  The effects of shading, as well as water deficiency, only occur when these conditions are mantained for some time, the model may have to be revised in the future to account for these factors, prefereably with some experimental data.  Available data suggest that SLA of white clover varies between 0.020 and 0.045 m2/g, with mean values for the cultivar Huia being around 0.030 m2/g ([Woledge1986_LeafAge]; [ChapmanAndRobson1992]; [KangAndBringk1995]; [HerautBronEtAl2000]; [CastleEtAl2002]; [NicholsEtAl2014_Drought]).
          Constant SpecificLeafArea: FixedValue=0.03; Units=m^2/g
          VariableReference LiveLeafWeight: VariableName=[Leaf].Live.Wt
        MultiplyFunction LaiDeadFunction
          Memo Description
            No specific data for LAI or SLA of dead leaves were found for chicory. The value of SLA is thus assumed to be the same as that of live leaves (this is consistent for the model as very little biomass reallocation of biomass occurs during senescence).
          VariableReference SpecificLeafArea: VariableName=[Leaf].LAIFunction.SpecificLeafArea.Value()
          VariableReference DeadLeafWeight: VariableName=[Leaf].Dead.Wt
        Constant ExtinctionCoefficientFunction: FixedValue=0.9; Units=0-1
          Memo Description
            Due to the near horizontal placement of its leaves, white clover has a high capacity for light interception. Values for the light extinction coefficient reported in the literature are quite variable, depending on what light fraction they are related to and whether plants are considered in mixed swards or as separated plants; these vary from 0.70 up to 1.0 ([LantingaEtAl1999]; [SonohatEtAl2002]; [denHollanderEtAl2007]).
        Constant ExtinctionCoefficientDead: FixedValue=0.1; Units=0-1
        LinearInterpolationFunction HeightFunction: XProperty=[WhiteClover].Leaf.Live.Wt
          Memo Description
            The average height of white clover is assumed here as a simple function of leaf biomass; generically the petiole determines the height, but this are linked to leaf growth. Inflorescence are ignored as the height is mostly used for co puting light interception and transpiration.  The petiole length varies with cultivar, tipically between 5 and 15 cm ([Brougham1958_LeafDev]; [BissuelBelaygueEtAl2002_flower]; [denHollanderEtAl2007]).  The inflorescence is typically one third higher than the leaves. Sward population and competition with other plant may have an influence on the relationship between biomass and height, but this is not currently accounted for by the model.
          XYPairs: X=[10, 50, 100, 350, 500]; Y=[20, 75, 110, 140, 150]
        MultiplyFunction SenescenceRate
          Memo Description
            White clover has a relatively high rate of leaf senescence, with leaf area estabilising when LAI reaches about 5.0 m2/m2 ([Brougham1958_LeafDev], [HartChapter1987], [NicholsEtAl2014_Drought]).  Generic relationships to enviromental factors, such as temperature and soil moisture, are assumed based on other plant models.
          Constant ReferenceRate: FixedValue=0.025; Units=/day
          LinearInterpolationFunction StageFactor: XProperty=[Phenology].Stage
            XYPairs: X=[3, 4, 5, 6]; Y=[0.5, 1, 1, 1]
          LinearInterpolationFunction CoverFactor: XProperty=[Leaf].LAI
            XYPairs: X=[0, 2, 4, 5.5, 7]; Y=[0, 0.1, 1, 1, 1.5]
          WeightedTemperatureFunction TemperatureFactor: MaximumTemperatureWeighting=0.5
            XYPairs: X=[-20, -5, 0, 5, 18, 30, 35]; Y=[1.5, 0.25, 0.1, 0.1, 1, 1, 1.5]
          LinearInterpolationFunction SoilMoistureFactor: XProperty=[Leaf].Fw
            XYPairs: X=[0, 0.5, 1]; Y=[2, 1, 1]
        MultiplyFunction DetachmentRateFunction
          Memo Description
            A generic relationship between detachment and soil moisture is assumed.  It implies that under dry conditions the detachment rate decreases due to the lower level of activity of decomposing microorganisms.
          Constant ReferenceRate: FixedValue=0.1; Units=/day
          LinearInterpolationFunction SoilMoistureFactor: XProperty=[Leaf].Fw
            XYPairs: X=[0, 0.5, 1]; Y=[0.5, 0.5, 1]
        Constant DMRetranslocationFactor: FixedValue=0; Units=/day
        Constant DMReallocationFactor: FixedValue=1
          Memo Description
            This is the default value for PMF.
        Constant NRetranslocationFactor: FixedValue=0; Units=/day
        Constant NReallocationFactor: FixedValue=1; Units=/day
          Memo Description
            This is the default value for PMF.
        Constant RemobilisationCost: FixedValue=0
          Memo Description
            This is the default value for PMF.
        BiomassRemoval BiomassRemovalDefaults
          OrganBiomassRemovalType Cut: FractionLiveToRemove=0.8; FractionDeadToRemove=0.2; FractionLiveToResidue=0; FractionDeadToResidue=0
          OrganBiomassRemovalType Graze: FractionLiveToRemove=0.7; FractionDeadToRemove=0.1; FractionLiveToResidue=0.1; FractionDeadToResidue=0.2
          OrganBiomassRemovalType Harvest: FractionLiveToRemove=0.1; FractionDeadToRemove=0.1; FractionLiveToResidue=0.1; FractionDeadToResidue=0.1
          OrganBiomassRemovalType Prune: FractionLiveToRemove=0; FractionDeadToRemove=0; FractionLiveToResidue=0.2; FractionDeadToResidue=0.2
      GenericOrgan Petiole
        Memo Description
          __Note:__ this represents all the petioles and flower peduncles in the plant, without distinction between ages or placement in the canopy.
        Constant InitialWtFunction: FixedValue=1E-06; Units=g/plant
        Constant StructuralFraction: FixedValue=1; Units=g/g
        Constant CarbonConcentration: FixedValue=0.4
        Constant MinimumNConc: FixedValue=0.01; Units=gN/gDM
        Constant CriticalNConc: FixedValue=0.025; Units=gN/gDM
        Constant MaximumNConc: FixedValue=0.035; Units=gN/gDM
        Constant NitrogenDemandSwitch: FixedValue=1
        PhaseLookup PartitionFractionDeficit
          PhaseLookupValue VegetativeInductive: Start=Emergence; End=Flowering
            DivideFunction FractionDeficit
              AllometricDemandFunction PetioleDeficit: Const=0.3; Power=1; XProperty=[AboveGroundLive].Wt; YProperty=[Petiole].Live.Wt
              VariableReference AboveGroundBiomass: VariableName=[AboveGroundLive].Wt
          PhaseLookupValue Reproductive: Start=Flowering; End=Ripening
            DivideFunction FractionDeficit
              AllometricDemandFunction PetioleDeficit: Const=0.3; Power=1; XProperty=[AboveGroundLive].Wt; YProperty=[Petiole].Live.Wt
              VariableReference AboveGroundBiomass: VariableName=[AboveGroundLive].Wt
        PartitionFractionDemandFunction DMDemandFunction
          Memo Description
            A simple approach is used in the plantain model to define the allocation of biomass to various organs.  The proportion of the above ground biomass allocated to stems is determined based on the current state and two target ratios, the [TargetStemsLeafRatio].Value and [FlowerStemRatio].Value).  Allocation of biomass to stems can only occur during the reproductive phase.
          VariableReference PartitionFractionREF: VariableName=[Leaf].DMDemandFunction.PartitionFraction.Value()
          PhaseLookup PartitionFraction
            PhaseLookupValue VegetativeInductive: Start=Emergence; End=Flowering
              AddFunction PetioleFraction
                Constant BasePartitionFraction: FixedValue=0.3; Units=g/g
                MultiplyFunction DeficitPartitionFraction
                  VariableReference AbovegroundFractionDeficit: VariableName=[WhiteClover].AbovegroundFractionDeficit.Value()
                  VariableReference PartitionFractionDeficit: VariableName=[Petiole].PartitionFractionDeficit.Value()
            PhaseLookupValue Reproductive: Start=Flowering; End=Ripening
              AddFunction PetioleFraction: same as Replacements.WhiteClover.Petiole.DMDemandFunction.PartitionFraction.VegetativeInductive.PetioleFraction
        Constant DMConversionEfficiency: FixedValue=1; Units=0-1
        Constant MaintenanceRespirationFunction: FixedValue=0; Units=0-1
        MultiplyFunction SenescenceRate
          Memo Description
            The reference senescence rate is adjusted using generic relationships to enviromental factors, such as temperature and soil moisture.  These are based on general knowledge from other plant models.
          VariableReference ReferenceRate: VariableName=[Leaf].SenescenceRate.ReferenceRate.Value()
          LinearInterpolationFunction StageFactor: XProperty=[Phenology].Stage
            XYPairs: X=[3, 4, 5.5, 5.8, 6]; Y=[0.5, 1, 1, 1.5, 1.5]
          WeightedTemperatureFunction TemperatureFactor: MaximumTemperatureWeighting=0.5
            XYPairs: X=[-20, -5, 0, 5, 18, 30, 35]; Y=[1.5, 0.25, 0.1, 0.1, 1, 1, 1.5]
          LinearInterpolationFunction SoilMoistureFactor: XProperty=[Leaf].Fw
            XYPairs: X=[0, 0.5, 1]; Y=[2, 1, 1]
        MultiplyFunction DetachmentRateFunction
          Memo Description
            A generic relationship between detachment and soil moisture is assumed.  It implies that under dry conditions the detachment rate decreases due to the lower level of activity of decomposing microorganisms.
          Constant ReferenceRate: FixedValue=0.1; Units=/day
          LinearInterpolationFunction SoilMoistureFactor: XProperty=[Leaf].Fw
            XYPairs: X=[0, 0.5, 0.75, 1]; Y=[0.1, 0.1, 0.25, 1]
        Constant DMRetranslocationFactor: FixedValue=0; Units=/day
        Constant DMReallocationFactor: FixedValue=0
        Constant NRetranslocationFactor: FixedValue=0; Units=/day
        Constant NReallocationFactor: FixedValue=1; Units=/day
        Constant RemobilisationCost: FixedValue=0
        BiomassRemoval BiomassRemovalDefaults
          OrganBiomassRemovalType Cut: FractionLiveToRemove=0.5; FractionDeadToRemove=0.5; FractionLiveToResidue=0; FractionDeadToResidue=0
          OrganBiomassRemovalType Graze: FractionLiveToRemove=0.5; FractionDeadToRemove=0.3; FractionLiveToResidue=0.1; FractionDeadToResidue=0.1
          OrganBiomassRemovalType Harvest: FractionLiveToRemove=0.1; FractionDeadToRemove=0.2; FractionLiveToResidue=0.1; FractionDeadToResidue=0.1
          OrganBiomassRemovalType Prune: FractionLiveToRemove=0; FractionDeadToRemove=0; FractionLiveToResidue=0.2; FractionDeadToResidue=0.2
      GenericOrgan Stolon
        Memo Description
          __Note:__ this represents all the stolons in the plant, without distinction between ages or placement in the canopy.
        Constant InitialWtFunction: FixedValue=1E-06; Units=g/plant
        Constant StructuralFraction: FixedValue=1; Units=g/g
        Constant CarbonConcentration: FixedValue=0.4
        Constant MinimumNConc: FixedValue=0.01; Units=gN/gDM
        Constant CriticalNConc: FixedValue=0.0225; Units=gN/gDM
        Constant MaximumNConc: FixedValue=0.035; Units=gN/gDM
        Constant NitrogenDemandSwitch: FixedValue=1
        PhaseLookup PartitionFractionDeficit
          PhaseLookupValue VegetativeInductive: Start=Emergence; End=Flowering
            DivideFunction FractionDeficit
              AllometricDemandFunction StolonDeficit: Const=0.3; Power=1; XProperty=[AboveGroundLive].Wt; YProperty=[Stolon].Live.Wt
              VariableReference AboveGroundBiomass: VariableName=[AboveGroundLive].Wt
          PhaseLookupValue Reproductive: Start=Flowering; End=Ripening
            DivideFunction FractionDeficit
              AllometricDemandFunction StolonDeficit: Const=0.1; Power=1; XProperty=[AboveGroundLive].Wt; YProperty=[Stolon].Live.Wt
              VariableReference AboveGroundBiomass: VariableName=[AboveGroundLive].Wt
        PartitionFractionDemandFunction DMDemandFunction
          Memo Description: same as Replacements.WhiteClover.Petiole.DMDemandFunction.Description
          VariableReference PartitionFractionREF: VariableName=[Leaf].DMDemandFunction.PartitionFraction.Value()
          PhaseLookup PartitionFraction
            PhaseLookupValue VegetativeInductive: Start=Emergence; End=Flowering
              AddFunction StolonFraction
                Constant BasePartitionFraction: FixedValue=0.3; Units=g/g
                MultiplyFunction DeficitPartitionFraction
                  VariableReference AbovegroundFractionDeficit: VariableName=[WhiteClover].AbovegroundFractionDeficit.Value()
                  VariableReference PartitionFractionDeficit: VariableName=[Stolon].PartitionFractionDeficit.Value()
            PhaseLookupValue Reproductive: Start=Flowering; End=Ripening
              AddFunction StolonFraction
                Constant BasePartitionFraction: FixedValue=0.1; Units=g/g
                MultiplyFunction DeficitPartitionFraction
                  VariableReference AbovegroundFractionDeficit: VariableName=[WhiteClover].AbovegroundFractionDeficit.Value()
                  VariableReference PartitionFractionDeficit: VariableName=[Stolon].PartitionFractionDeficit.Value()
        Constant DMConversionEfficiency: FixedValue=1; Units=0-1
        Constant MaintenanceRespirationFunction: FixedValue=0; Units=0-1
        MultiplyFunction SenescenceRate
          Memo Description
            The reference senescence rate is adjusted using generic relationships to enviromental factors, such as temperature and soil moisture.  These are based on general knowledge from other plant models.
          Constant ReferenceRate: FixedValue=0.0025; Units=/day
          LinearInterpolationFunction StageFactor: XProperty=[Phenology].Stage
            XYPairs: X=[3, 4, 6]; Y=[0.5, 1, 1]
          WeightedTemperatureFunction TemperatureFactor: MaximumTemperatureWeighting=0.5
            XYPairs: X=[-20, -5, 0, 5, 18, 30, 37]; Y=[1.5, 0.25, 0.1, 0.1, 1, 1, 1.25]
          LinearInterpolationFunction SoilMoistureFactor: XProperty=[Leaf].Fw
            XYPairs: X=[0, 0.5, 1]; Y=[2, 1, 1]
        MultiplyFunction DetachmentRateFunction: same as Replacements.WhiteClover.Petiole.DetachmentRateFunction
        Constant DMRetranslocationFactor: FixedValue=0.1; Units=/day
        Constant DMReallocationFactor: FixedValue=1
        Constant NRetranslocationFactor: FixedValue=0.1; Units=/day
        Constant NReallocationFactor: FixedValue=1; Units=/day
        Constant RemobilisationCost: FixedValue=0
        BiomassRemoval BiomassRemovalDefaults
          OrganBiomassRemovalType Cut: FractionLiveToRemove=0; FractionDeadToRemove=0; FractionLiveToResidue=0; FractionDeadToResidue=0
          OrganBiomassRemovalType Graze: FractionLiveToRemove=0.2; FractionDeadToRemove=0; FractionLiveToResidue=0.1; FractionDeadToResidue=0.2
          OrganBiomassRemovalType Harvest: FractionLiveToRemove=0; FractionDeadToRemove=0; FractionLiveToResidue=0; FractionDeadToResidue=0
          OrganBiomassRemovalType Prune: FractionLiveToRemove=0; FractionDeadToRemove=0; FractionLiveToResidue=0.2; FractionDeadToResidue=0.2
      GenericOrgan Inflorescence
        Memo Description
          __Note:__ this represents all the reproductive parts of the plant, flowers, pods, seed, etc. No distinction is made between ages or placement in the canopy.
        Constant InitialWtFunction: FixedValue=0; Units=g/m^2
        Constant StructuralFraction: FixedValue=1; Units=g/g
        Constant CarbonConcentration: FixedValue=0.4
        LinearInterpolationFunction MinimumNConc: XProperty=[Phenology].Stage
          Memo Description
            The N concentration in the inflorescence of is relatively low compared to other organs (typical values about 2.0%), but the seed N content is considerably higher (about 4.5%).  The model currently does not separate inflrescence from seeds, thus it uses variable thresholds to account for the fact that the proportion of seed increases with time during the reproductive phase.
          XYPairs: X=[5, 5.1, 5.3, 5.7, 5.9, 6]; Y=[0.01, 0.01, 0.015, 0.02, 0.03, 0.03]
        LinearInterpolationFunction CriticalNConc: XProperty=[Phenology].Stage
          XYPairs: X=[5, 5.1, 5.3, 5.7, 5.9, 6]; Y=[0.02, 0.02, 0.025, 0.035, 0.045, 0.045]
        LinearInterpolationFunction MaximumNConc: XProperty=[Phenology].Stage
          XYPairs: X=[5, 5.1, 5.3, 5.7, 5.9, 6]; Y=[0.025, 0.026, 0.032, 0.042, 0.048, 0.048]
        Constant NitrogenDemandSwitch: FixedValue=1
        PhaseLookup PartitionFractionDeficit
          PhaseLookupValue VegetativeInductive: Start=Emergence; End=Flowering
            Constant FractionDeficit: FixedValue=0
          PhaseLookupValue Reproductive: Start=Flowering; End=Ripening
            DivideFunction FractionDeficit
              AllometricDemandFunction InflorescenceDeficit: Const=0.4; Power=1; XProperty=[AboveGroundLive].Wt; YProperty=[Inflorescence].Live.Wt
              VariableReference AboveGroundBiomass: VariableName=[AboveGroundLive].Wt
        PartitionFractionDemandFunction DMDemandFunction
          Memo Description
            The plantain model uses a  simple approach to define the allocation of biomass to various organs.  The fraction of the above ground biomass allocated to inflorescence is determined based on the current proprotion and two target ratios, the [TargetStemsLeafRatio].Value and [FlowerStemRatio].Value).  Allocation to inflorescence can only occur during the reproductive phase.
          PhaseLookup PartitionFraction
            PhaseLookupValue VegetativeInductive: Start=Emergence; End=Flowering
              Constant InflorescenceFraction: FixedValue=0
            PhaseLookupValue Reproductive: Start=Flowering; End=Ripening
              VariableReference InflorescenceFractionREF: VariableName=[Leaf].DMDemandFunction.PartitionFraction.Value()
              AddFunction InflorescenceFraction
                Constant BasePartitionFraction: FixedValue=0.4; Units=g/g
                MultiplyFunction DeficitPartitionFraction
                  VariableReference AbovegroundFractionDeficit: VariableName=[WhiteClover].AbovegroundFractionDeficit.Value()
                  VariableReference PartitionFractionDeficit: VariableName=[Inflorescence].PartitionFractionDeficit.Value()
        Constant DMConversionEfficiency: FixedValue=1; Units=0-1
        Constant MaintenanceRespirationFunction: FixedValue=0; Units=0-1
        MultiplyFunction SenescenceRate
          Memo Description
            The sparse availabe data suggests that plantain has a relativelly slow senescence rate compared to other medow herbs ([CalviereDuru_1995]; [SchippersOlff_2000]).  Generic relationships to enviromental factors, such as temperature and soil moisture, are assumed based on other plant models.
          Constant ReferenceRate: FixedValue=0.1; Units=/day
          LinearInterpolationFunction StageFactor: XProperty=[Phenology].Stage
            XYPairs: X=[3, 4.99, 5, 5.5, 6]; Y=[1, 1, 0.5, 0.65, 1]
          WeightedTemperatureFunction TemperatureFactor: MaximumTemperatureWeighting=0.5
            XYPairs: X=[-20, -5, 0, 5, 18, 30, 35]; Y=[1.5, 0.5, 0.25, 0.1, 0.75, 1, 1.5]
          LinearInterpolationFunction SoilMoistureFactor: XProperty=[Leaf].Fw
            XYPairs: X=[0, 0.5, 1]; Y=[2, 1, 1]
        MultiplyFunction DetachmentRateFunction
          Memo Description
            A generic relationship between detachment and soil moisture is assumed.  It implies that under dry conditions the detachment rate decreases due to the lower level of activity of decomposing microorganisms.
          Constant ReferenceRate: FixedValue=0.25; Units=/day
          LinearInterpolationFunction SoilMoistureFactor: XProperty=[Leaf].Fw
            XYPairs: X=[0, 0.5, 1]; Y=[0, 0.5, 1]
        Constant DMRetranslocationFactor: FixedValue=0; Units=/day
        Constant DMReallocationFactor: FixedValue=1
        Constant NRetranslocationFactor: FixedValue=0; Units=/day
        Constant NReallocationFactor: FixedValue=1; Units=/day
        Constant RemobilisationCost: FixedValue=0
        BiomassRemoval BiomassRemovalDefaults
          OrganBiomassRemovalType Cut: FractionLiveToRemove=0.8; FractionDeadToRemove=0.6; FractionLiveToResidue=0; FractionDeadToResidue=0
          OrganBiomassRemovalType Graze: FractionLiveToRemove=0.6; FractionDeadToRemove=0.2; FractionLiveToResidue=0.2; FractionDeadToResidue=0.3
          OrganBiomassRemovalType Harvest: FractionLiveToRemove=0.8; FractionDeadToRemove=0.8; FractionLiveToResidue=0.1; FractionDeadToResidue=0.1
          OrganBiomassRemovalType Prune: FractionLiveToRemove=0; FractionDeadToRemove=0; FractionLiveToResidue=0.2; FractionDeadToResidue=0.2
      Nodule
        Constant InitialWtFunction: FixedValue=0; Units=g/m^2
        Constant StructuralFraction: FixedValue=1; Units=g/g
        Constant CarbonConcentration: FixedValue=0.4
        Constant MinimumNConc: FixedValue=0.03
        Constant CriticalNConc: FixedValue=0.05
        Constant MaximumNConc: FixedValue=0.06
        Constant NitrogenDemandSwitch: FixedValue=1
        PartitionFractionDemandFunction DMDemandFunction
          VariableReference PartitionFractionREF: VariableName=[Leaf].DMDemandFunction.PartitionFraction.Value()
          PhaseLookup PartitionFraction
            Memo Description
              The allocation of biomass below ground follows a simple approach in the plantain model.  The amount allocated to roots is computed based on current proportion and two target ratios (the [TargetShootRootRatio].Value and [TaprootRootRatio].Value).  There is little information in the literature about these parameters and they should vary with cultivar. Currently the model will attempt to keep a given proportion in ach organ, ho these porportions vary should be update when more data becomes available.
            PhaseLookupValue AllPhases: Start=Emergence; End=Ripening
              MultiplyFunction NoduleFraction
                Constant MaxNoduleFraction: FixedValue=0.15; Units=Fraction of total plant biomass
                LinearInterpolationFunction NFactor: XProperty=[Leaf].Fn
                  XYPairs: X=[0, 0.3, 0.5, 0.8, 1]; Y=[1, 1, 0.8, 0.2, 0]
                MinimumFunction EnvironmentalFactor
                  WeightedTemperatureFunction TemperatureFactor: MaximumTemperatureWeighting=0.5
                    XYPairs: X=[0, 2, 15, 28, 37]; Y=[0, 0, 1, 1, 0]
                  LinearInterpolationFunction SoilMoistureFactor: XProperty=[Leaf].Fw
                    XYPairs: X=[0, 0.3, 0.5, 0.7, 0.9, 1]; Y=[0.1, 0.2, 0.8, 1, 1, 0.75]
                  Constant SoilAerationFactor: FixedValue=1
        Constant DMConversionEfficiency: FixedValue=1; Units=0-1
        MultiplyFunction FixationRate
          Constant MaxFixationRate: FixedValue=0.01; Units=gN/gDM nodule/day
          VariableReference NoduleBiomass: VariableName=[Nodule].Live.Wt
          LinearInterpolationFunction NDemandFactor: XProperty=[Leaf].Fn
            XYPairs: X=[0, 0.3, 0.5, 0.8, 1]; Y=[1, 1, 0.9, 0.5, 0]
          MinimumFunction EnvironmentalFactor
            WeightedTemperatureFunction TemperatureFactor: MaximumTemperatureWeighting=0.5
              XYPairs: X=[0, 2, 15, 28, 35]; Y=[0, 0, 1, 1, 0]
            LinearInterpolationFunction SoilMoistureFactor: XProperty=[Leaf].Fw
              XYPairs: X=[0, 0.2, 0.6, 1]; Y=[0.1, 0.2, 1, 1]
            Constant SoilAerationFactor: FixedValue=1
        MultiplyFunction FixationMetabolicCost
          Constant SpecificFixationCost: FixedValue=5; Units=gC/gNFixed
          VariableReference FixedN: VariableName=[Nodule].NFixed
        Constant MaintenanceRespirationFunction: FixedValue=0; Units=0-1
        MultiplyFunction SenescenceRate
          Memo Description
            The reference senescence rate is adjusted according to enviromental factors, temperature and soil moisture.
          Constant ReferenceRate: FixedValue=0.005; Units=/day
          WeightedTemperatureFunction TemperatureFactor: MaximumTemperatureWeighting=0.5
            XYPairs: X=[-5, 0, 5, 18, 28, 40]; Y=[0.5, 0.1, 0.1, 1, 1, 1.5]
          LinearInterpolationFunction SoilMoistureFactor: XProperty=[Arbitrator].FW
            XYPairs: X=[0, 0.5, 1]; Y=[2, 1, 1]
          Constant SoilAerationFactor: FixedValue=1
        Constant DetachmentRateFunction: FixedValue=1; Units=/d
        Constant DMRetranslocationFactor: FixedValue=0
        Constant DMReallocationFactor: FixedValue=1
        Constant NRetranslocationFactor: FixedValue=0
        Constant NReallocationFactor: FixedValue=1
        Constant RemobilisationCost: FixedValue=0
        BiomassRemoval BiomassRemovalDefaults
          OrganBiomassRemovalType Harvest: FractionLiveToRemove=0; FractionDeadToRemove=0; FractionLiveToResidue=0.025; FractionDeadToResidue=0
          OrganBiomassRemovalType Cut: FractionLiveToRemove=0; FractionDeadToRemove=0; FractionLiveToResidue=0.025; FractionDeadToResidue=0
          OrganBiomassRemovalType Prune: FractionLiveToRemove=0; FractionDeadToRemove=0; FractionLiveToResidue=0.025; FractionDeadToResidue=0
          OrganBiomassRemovalType Graze: FractionLiveToRemove=0; FractionDeadToRemove=0; FractionLiveToResidue=0.025; FractionDeadToResidue=0
      GenericOrgan Taproot
        Memo Description
          __Note:__ this represents all the taproots of the plant.
          Taproots in white clover are generally efemerous.  They develop from seeds and are ubiquitous in young plants, but these die out about a year after germination and adult plant are generally described as having no taproots ([HartChapter1987]; [BrockEtAl2000]). However, some secondary roots can be taproot-like, especially in especific cultivars, e.g. ladino ([ThomasChapter1987]; [CaradusAndWoodfield1998]). Given that the model simulates the a whole population, it is assumed that taproots are always present, but constitute a minor fraction of the root systems in most cultivars.
        Constant InitialWtFunction: FixedValue=0; Units=g/m^2
        Constant StructuralFraction: FixedValue=1; Units=g/g
        Constant CarbonConcentration: FixedValue=0.4
        Constant MinimumNConc: FixedValue=0.01; Units=gN/gDM
        Constant CriticalNConc: FixedValue=0.0225; Units=gN/gDM
        Constant MaximumNConc: FixedValue=0.035; Units=gN/gDM
        Constant NitrogenDemandSwitch: FixedValue=1
        PhaseLookup PartitionFractionDeficit
          PhaseLookupValue AllPhases: Start=Emergence; End=Ripening
            DivideFunction FractionDeficit
              AllometricDemandFunction TaprootDeficit: Const=0.1; Power=1; XProperty=[BelowGroundLive].Wt; YProperty=[Taproot].Live.Wt
              VariableReference BelowGroundBiomass: VariableName=[BelowGroundLive].Wt
        PartitionFractionDemandFunction DMDemandFunction
          Memo Description
            The plantain model computes the allocation of biomass to taproots assuming that there is a target ratio the biomass of root and taproot (defined by [TaprootRootRatio].Value).  The existing literature does not provide values for this parameter, and based on other herbs, such as chicory, a simple value which is further modified by plant specific biomass is assumed in the model. This should be update when more data becomes available.
          VariableReference PartitionFractionREF: VariableName=[Leaf].DMDemandFunction.PartitionFraction.Value()
          PhaseLookup PartitionFraction
            PhaseLookupValue AllPhases: Start=Emergence; End=Ripening
              AddFunction TaprootFraction
                Constant BasePartitionFraction: FixedValue=0.1; Units=g/g
                MultiplyFunction DeficitPartitionFraction
                  SubtractFunction BelowgroundFractionDeficit
                    Constant One: FixedValue=1
                    VariableReference AbovegroundFractionDeficit: VariableName=[WhiteClover].AbovegroundFractionDeficit.Value()
                  VariableReference PartitionFractionDeficit: VariableName=[Taproot].PartitionFractionDeficit.Value()
        Constant DMConversionEfficiency: FixedValue=1; Units=0-1
        Constant MaintenanceRespirationFunction: FixedValue=0; Units=0-1
        MultiplyFunction SenescenceRate
          Memo Description
            The reference senescence rate is adjusted according to enviromental factors, temperature and soil moisture.  Currently only sensitivity to temperature is considered, based on general knowledge from other plant models. The sensitivity of plantain roots to low moisture or water logging is not clear , so this will have to be upgrade in the future when more data is available.  According to [SagarHarper_1964], *P. major*, a similar species, is more tolerant to water logging than *P. lanceolata*, which rarely occurs in water logged sites ([vanTiederen_1992]).
          Constant ReferenceRate: FixedValue=0.005; Units=/day
          WeightedTemperatureFunction TemperatureFactor: MaximumTemperatureWeighting=0.5
            XYPairs: X=[0, 5, 22.5, 30]; Y=[0, 0, 1, 1]
          LinearInterpolationFunction SoilMoistureFactor: XProperty=[Arbitrator].FW
            XYPairs: X=[0, 0.5, 1]; Y=[1, 1, 1]
          Constant SoilAerationFactor: FixedValue=1; Units=0-1
        Constant DetachmentRateFunction: FixedValue=1; Units=/day
        Constant DMRetranslocationFactor: FixedValue=0.2; Units=/day
        Constant DMReallocationFactor: FixedValue=0
        Constant NRetranslocationFactor: FixedValue=0.2; Units=/day
        Constant NReallocationFactor: FixedValue=1; Units=/day
        Constant RemobilisationCost: FixedValue=0
        BiomassRemoval BiomassRemovalDefaults
          OrganBiomassRemovalType Cut: FractionLiveToRemove=0; FractionDeadToRemove=0; FractionLiveToResidue=0.1; FractionDeadToResidue=0
          OrganBiomassRemovalType Graze: FractionLiveToRemove=0; FractionDeadToRemove=0; FractionLiveToResidue=0.1; FractionDeadToResidue=0
          OrganBiomassRemovalType Harvest: FractionLiveToRemove=0; FractionDeadToRemove=0; FractionLiveToResidue=0.1; FractionDeadToResidue=0
          OrganBiomassRemovalType Prune: FractionLiveToRemove=0; FractionDeadToRemove=0; FractionLiveToResidue=0.1; FractionDeadToResidue=0
      Root: GrowthRespiration=0; MaintenanceRespiration=0
        Memo Description
          __Note:__ this represents all the fine roots of the plant.  The root organ demands and is partitioned N and DM and its depth increases through time to provide a water uptake supply
          Memo Description
            This represents all the fine roots of the plant.  The root organ demands and is partitioned N and DM and its depth increases through time to provide a water uptake supply
        Constant InitialDM: FixedValue=0.0004; Units=g/plant
        Constant StructuralFraction: FixedValue=1; Units=g/g
        Constant CarbonConcentration: FixedValue=0.4
        Constant MinimumNConc: FixedValue=0.01; Units=gN/gDM
        Constant CriticalNConc: FixedValue=0.0225; Units=gN/gDM
        Constant MaximumNConc: FixedValue=0.035; Units=gN/gDM
        PhaseBasedSwitch NitrogenDemandSwitch: Start=Germination; End=Ripening
        PhaseLookup PartitionFractionDeficit
          PhaseLookupValue AllPhases: Start=Emergence; End=Ripening
            DivideFunction FractionDeficit
              AllometricDemandFunction RootDeficit: Const=0.8; Power=1; XProperty=[BelowGroundLive].Wt; YProperty=[Root].Live.Wt
              VariableReference BelowGroundBiomass: VariableName=[BelowGroundLive].Wt
        PartitionFractionDemandFunction DMDemandFunction
          VariableReference PartitionFractionREF: VariableName=[Leaf].DMDemandFunction.PartitionFraction.Value()
          PhaseLookup PartitionFraction
            Memo Description: same as Replacements.WhiteClover.Nodule.DMDemandFunction.PartitionFraction.Description
            PhaseLookupValue AllPhases: Start=Emergence; End=Ripening
              AddFunction RootFraction
                Constant BasePartitionFraction: FixedValue=0.8; Units=g/g
                MultiplyFunction DeficitPartitionFraction: same as Replacements.WhiteClover.Taproot.DMDemandFunction.PartitionFraction.AllPhases.TaprootFraction.DeficitPartitionFraction
        Constant DMConversionEfficiency: FixedValue=1
        Constant MaintenanceRespirationFunction: FixedValue=1
        PhaseLookup RootFrontVelocity
          PhaseLookupValue PreEmergence: Start=Germination; End=Emergence
            Constant ReferenceVelocity: FixedValue=4.5; Units=mm/day
          PhaseLookupValue VegetativeInductive: Start=Emergence; End=Flowering
            MultiplyFunction GrowthVelocity
              Constant ReferenceVelocity: FixedValue=9; Units=mm/day
              MinimumFunction EnvironmentalFactor
                WeightedTemperatureFunction TemperatureFactor: MaximumTemperatureWeighting=0.5
                  XYPairs: X=[0, 2, 15, 28, 35]; Y=[0, 0, 1, 1, 0]
                Constant SoilMoistureFactor: FixedValue=1
                Constant SoilAerationFactor: FixedValue=1
          PhaseLookupValue Reproductive: Start=Flowering; End=Ripening
            MultiplyFunction GrowthVelocity
              Constant ReferenceVelocity: FixedValue=5; Units=mm/day
              MinimumFunction EnvironmentalFactor: same as Replacements.WhiteClover.Root.RootFrontVelocity.VegetativeInductive.GrowthVelocity.EnvironmentalFactor
        Constant MaximumRootDepth: FixedValue=750; Units=mm
        Constant SpecificRootLength: FixedValue=100; Units=m/g
        MultiplyFunction SenescenceRate
          Memo Description
            The reference senescence rate is adjusted according to enviromental factors, temperature and soil moisture.
          Constant ReferenceRate: FixedValue=0.005; Units=/day
          WeightedTemperatureFunction TemperatureFactor: MaximumTemperatureWeighting=0.5
            XYPairs: X=[0, 5, 22.5, 30]; Y=[0, 0, 1, 1]
          LinearInterpolationFunction SoilMoistureFactor: XProperty=[Arbitrator].FW
            XYPairs: X=[0, 0.5, 1]; Y=[1, 1, 1]
          Constant SoilAerationFactor: FixedValue=1
        Constant DMRetranslocationFactor: FixedValue=0.1; Units=/day
        Constant DMReallocationFactor: FixedValue=1; Units=/day
        Constant NRetranslocationFactor: FixedValue=0.1; Units=/day
        Constant NReallocationFactor: FixedValue=1; Units=/day
        Constant RemobilisationCost: FixedValue=0
        LinearInterpolationFunction KLModifier: XProperty=[Root].LengthDensity
          Memo
            No adjustment of KL are considered for white clover in the current model.  More analyses, preferebly with support from data specific to this issue, are needed to improve the description of this relationship.
            Memo Description
              This represents all the fine roots of the plant.  The root organ demands and is partitioned N and DM and its depth increases through time to provide a water uptake supply
          XYPairs: X=[0, 1]; Y=[1, 1]
        LinearInterpolationFunction KNH4: XProperty=[Root].LengthDensity
          XYPairs: X=[0, 0.003]; Y=[0.01, 0.02]
        LinearInterpolationFunction KNO3: XProperty=[Root].LengthDensity
          XYPairs: X=[0, 0.003]; Y=[0.02, 0.03]
        LinearInterpolationFunction NUptakeSWFactor: XProperty=[Root].RWC
          XYPairs: X=[0, 0.5, 1]; Y=[0, 1, 1]
        Constant MaxDailyNUptake: FixedValue=10; Units=kgN/ha
        BiomassRemoval BiomassRemovalDefaults
          OrganBiomassRemovalType Cut: FractionLiveToRemove=0; FractionDeadToRemove=0; FractionLiveToResidue=0.05; FractionDeadToResidue=0
          OrganBiomassRemovalType Graze: FractionLiveToRemove=0; FractionDeadToRemove=0; FractionLiveToResidue=0.05; FractionDeadToResidue=0
          OrganBiomassRemovalType Harvest: FractionLiveToRemove=0; FractionDeadToRemove=0; FractionLiveToResidue=0.05; FractionDeadToResidue=0
          OrganBiomassRemovalType Prune: FractionLiveToRemove=0; FractionDeadToRemove=0; FractionLiveToResidue=0.05; FractionDeadToResidue=0
      CompositeBiomass AboveGround: DMDOfStructural=0.6
        Propertys=[[Leaf].Live, [Leaf].Dead, [Stolon].Live, [Stolon].Dead, [Petiole].Live, [Petiole].Dead, [Inflorescence].Live, [Inflorescence].Dead]
      CompositeBiomass AboveGroundLive: DMDOfStructural=0.6
        Propertys=[[Leaf].Live, [Stolon].Live, [Petiole].Live, [Inflorescence].Live]
      CompositeBiomass AboveGroundDead: DMDOfStructural=0.6
        Propertys=[[Leaf].Dead, [Stolon].Dead, [Petiole].Dead, [Inflorescence].Dead]
      CompositeBiomass BelowGround: DMDOfStructural=0.6
        Propertys=[[Root].Live, [Root].Dead, [Taproot].Live, [Taproot].Dead, [Nodule].Live, [Nodule].Dead]
      CompositeBiomass BelowGroundLive: DMDOfStructural=0.6; Propertys=[[Root].Live, [Taproot].Live, [Nodule].Live]
      CompositeBiomass BelowGroundDead: DMDOfStructural=0.6; Propertys=[[Root].Dead, [Taproot].Dead, [Nodule].Dead]
      CompositeBiomass Total: DMDOfStructural=0.6
        Propertys=[[Leaf].Live, [Leaf].Dead, [Stolon].Live, [Stolon].Dead, [Petiole].Live, [Petiole].Dead, [Inflorescence].Live, [Inflorescence].Dead, [Root].Live, [Root].Dead, [Taproot].Live, [Taproot].Dead, [Nodule].Live, [Nodule].Dead]
      CompositeBiomass TotalLive: DMDOfStructural=0.6
        Propertys=[[Leaf].Live, [Stolon].Live, [Petiole].Live, [Inflorescence].Live, [Root].Live, [Taproot].Live, [Nodule].Live]
      CompositeBiomass TotalDead: DMDOfStructural=0.6
        Propertys=[[Leaf].Dead, [Stolon].Dead, [Petiole].Dead, [Inflorescence].Dead, [Root].Dead, [Taproot].Dead, [Nodule].Dead]
      DivideFunction PerPlantBelowGroundWt
        Memo Description
          This represents the live biomass dry weight below ground for a specific plant (in g/plant)
        VariableReference BelowGroundWt: VariableName=[BelowGroundLive].Wt
        VariableReference Population: VariableName=[Plantain].Population
      PhaseLookup ShootRootRatio
        PhaseLookupValue AllPhases: Start=Emergence; End=Ripening
          DivideFunction CurrentSR
            VariableReference AbogeGroundDM: VariableName=[AboveGroundLive].Wt
            VariableReference BelowGroundDM: VariableName=[BelowGroundLive].Wt
      PhaseLookup TargetShootRootRatio
        Memo Description
          To ensure prompt regrowth of forage plantain after a defoliation, the model will adjust the allocation of new growth following any defoliation event. This is a simplified approach to biomass allocation plasticity (e.g. [Wilson_1988]; [LevangBrilz_2002]), it assumes that the plant switches allocation of towards leaves whenever the current shoot:root ratio differs from the target value.
          Published data for the shoot:root ratio in plantain is highly variable, with values as low as 1.0 for wild varieties and as high as 6.0 for seedlings of commercial cultivars with no water of nutrient limitations ([SchippersOlff_2000]; [LabreveuxThesis_2002]; [CranstonEtAl_2015]; [PankokeEtAl_2015]).  The data suggests mean values to be around 1.75-2.0 for adult plants.  This value is likely to be affected by environmental conditions, with water or nutrient deficit favouring root growth, while low light conditions leading to higher allocation above ground. However, these relationships can vary considerably in different plants and there is little data for plantain, so the model current ignores the influence of environmental factors on the shoot:root partition, this should be upgraded when data becomes available.
        PhaseLookupValue Vegetative: Start=Emergence; End=Flowering
          Constant TargetSR: FixedValue=1.75; Units=g/g
        PhaseLookupValue Reproductive: Start=Flowering; End=Ripening
          AddFunction TargetSR
            VariableReference MinTargetSR: VariableName=[TargetShootRootRatio].Vegetative.TargetSR.Value()
            MultiplyFunction PlusTarget
              SubtractFunction DeltaTarget
                Constant MaxTargetSR: FixedValue=2; Units=g/g
                VariableReference MinTargetSR: VariableName=[TargetShootRootRatio].Vegetative.TargetSR.Value()
              LinearInterpolationFunction PhotoperiodEffect: XProperty=[Phenology].Photoperiod.Value()
                XYPairs: X=[11, 12, 13, 13.75, 14, 15]; Y=[0, 0, 0.25, 0.85, 1, 1]
      PhaseLookup StemsLeafRatio
        PhaseLookupValue Reproductive: Start=Flowering; End=Ripening
          DivideFunction CurrentSL
            AddFunction StemFlowerDM
              VariableReference StemDM: VariableName=[Stem].Live.Wt
              VariableReference InflorescenceDM: VariableName=[Inflorescence].Live.Wt
            VariableReference LeafDM: VariableName=[Leaf].Live.Wt
      PhaseLookup TargetStemsLeafRatio
        Memo Description
          The  plantain model defines allocation of biomass above ground following a simple approach, it attempts to keep a given proportion among the various organs.  The allocation of biomass to leaves is defined primarily by the target shoo:root ratio, but during the reproductive phase, the partition is further modified based on the ratio of stems+inflorescence to leaves. This ratio may be affected by defoliation ([AyalaEtAl_2011]; [QuijadaThesis_2015]) and is probably affected by enviromental factors too. There is not enough data to describe these interactions.
          Published results suggest that reproductive parts represent a relatively small proportion of the biomass, about 10-25% in grazed swards, and about 40% if not grazed ([SchippersOlff_2000]; [LabreveuxThesis_2002]; [MoorheadPigot_2009]; [AyalaEtAl_2011]).
        PhaseLookupValue Reproductive: Start=Flowering; End=Ripening
          MultiplyFunction TargetSL
            Constant MaximumSL: FixedValue=0.25; Units=g/g
            LinearInterpolationFunction PhotoperiodEffect: XProperty=[Phenology].Photoperiod.Value()
              XYPairs: X=[11, 12.5, 13.25, 13.75, 14, 15]; Y=[0, 0, 0.2, 0.8, 1, 1]
      PhaseLookup FlowerStemRatio
        PhaseLookupValue Reproductive: Start=Flowering; End=Ripening
          DivideFunction CurrentFS
            VariableReference InflorescenceDM: VariableName=[Inflorescence].Live.Wt
            VariableReference StemDM: VariableName=[Stem].Live.Wt
      PhaseLookup TargetFlowerStemRatio
        Memo Description
          The allocation of biomass follows a simple approach in the plantain model.  Allocation during the reproductive phase will attempt to keep a ratio between stem and inflorescence biomass.  This ratio is probably affected by enviromental factors, but there is not data to determine how these would interact.  Because of the short period between stem elongation, flowering and seed maturity, and a relatively long reproductive phase, plantain plants will have ripe seeds as well as young stalks at the same time.  This makes quite difficult to define variation in biomass allocation to inflorescence.  Inference from published values suggest that the ratio of flower biomass to stems varies from around 0.1 to nearly 0.4 ([SchippersOlff_2000]).
        PhaseLookupValue Reproductive: Start=Flowering; End=Ripening
          MultiplyFunction TargetFS
            Constant MaximumFS: FixedValue=0.25; Units=g/g
            LinearInterpolationFunction PhotoperiodEffect: XProperty=[Phenology].Photoperiod.Value()
              XYPairs: X=[11, 12.75, 13.25, 13.75, 14, 15]; Y=[0, 0, 0.1, 0.75, 1, 1]
      PhaseLookup TaprootRootRatio
        PhaseLookupValue AllPhases: Start=Emergence; End=Ripening
          DivideFunction CurrentTR
            VariableReference TaprootDM: VariableName=[Taproot].Live.Wt
            VariableReference RootsDM: VariableName=[Root].Live.Wt
      PhaseLookup TargetTaprootRootRatio
        Memo Description
          The plantain model assumes that biomass is allocated so to mantain a given proportion of among the various organs (varying with phenological phase and other factors).  The ratio between taproot and root biomass is assumed to vary, increasing with the biomass below ground per plant, approaching a maximum target.  This is a simple approach and can describe the general behaviour of plantain plants, it may be upgraded if deemed necessary when more data becomes available.
        PhaseLookupValue AllPhases: Start=Emergence; End=Ripening
          MultiplyFunction TargetTR
            Constant MaximumTR: FixedValue=1; Units=g/g
            LinearInterpolationFunction BiomassFactor: XProperty=[PerPlantBelowGroundWt].Value()
              XYPairs: X=[0, 0.025, 0.1, 0.25, 0.5, 1, 1.5]; Y=[1E-05, 1E-05, 0.4, 0.75, 0.95, 1, 1]
      PhaseLookup AbovegroundFractionDeficit
        Memo Description: same as Replacements.WhiteClover.TargetShootRootRatio.Description
        PhaseLookupValue Vegetative: Start=Emergence; End=Flowering
          DivideFunction FractionDeficit
            AllometricDemandFunction ShootDeficit: Const=0.75; Power=1; XProperty=[TotalLive].Wt; YProperty=[AboveGroundLive].Wt
            VariableReference TotalBiomass: VariableName=[TotalLive].Wt
        PhaseLookupValue Reproductive: Start=Flowering; End=Ripening
          DivideFunction FractionDeficit
            AllometricDemandFunction ShootDeficit: Const=0.75; Power=1; XProperty=[TotalLive].Wt; YProperty=[AboveGroundLive].Wt
            VariableReference TotalBiomass: VariableName=[TotalLive].Wt
      CultivarFolder Cultivars
        Cultivar Huia
          Memo Description
            *Huia* is the basic white clover cultivar in the model.  It is the oldest selected strain from New Zealand, develop from wild plants growing in Hawkes Bay and Canterbury (Caradus).  *Huia* is a medium-leaved cultivar, with generic perfomance - producing good yields and being reasonably persistent. It has been mostly superseeded by cultivars with more specific usage (e.g. for dairying or for hill country conditions).
        Cultivar Kopu
          Memo Description
            The *Kopu* cultivar was selected from crosses with north-american ladino cultivars for resitance to nematodes and high yield. It is intended for lowland pastures.
        Cultivar Kotuku
          Memo Description
            This is a large-leaved cultivar with medium stolon density. *Kotuku* can produce high yields, with superior summer growth, and is quite persistent for a large-leaf cultivar.  It is aimed at dairying of finishing systems.
        Cultivar Weka
          Memo Description
            *Weka* is a medium-leaved cultivar and with high stolon density.  It is considered high yielding and can be used in all grazing systems.  *Weka* also shows good persitence, being tollerant to dry condition and hard grazing, as well as having strong spreading habit.
    Manager Defoliate
      Crop =
      cutPasture_StartDate = 2050-05-20
      cutPasture_EndDate = 2100-12-31
      defoliateType = Graze
      interval2Cut = 21
      durationOfCut = 1
      removeAmountType = DMToRemove
      herbageAmount = 500
      fracDM2Remove = 1
      fracN2Remove = 1
      urineDepth = 10
      fracN2Dung = 0.4
      fracPopDecline = 0.05
```csharp
// Defoliates on a regular cycle or one-off via a schedule
// currently defoliates by the amount specified spread evenly over the specified period

using System;
using Models.Core;
using System.Collections.Generic;
using System.Text;
using Models;
using Models.Soils;
using Models.PMF;
using System.Xml.Serialization;
using APSIM.Shared.Utilities;

namespace Models
{
    [Serializable]
    public class Script : Model
    {
        [Link] Zone zone;
        [Link] Clock Clock;
        [Link] Plant WhiteClover;
        [Link] Fertiliser fertiliser;
        [Link] ISummary summary = null;

        [Description("Choose the crop to harvest:")]
        public IPlant Crop { get; set; }

        [Description("Enter the date to start the rotation (dd/mm/yyyy):")]
        public DateTime cutPasture_StartDate { get; set; }

        [Description("Enter the date to end the rotation (dd/mm/yyyy):")]
        public DateTime cutPasture_EndDate { get; set; }

        [Description("Select type of defoliation:")]
        public defoliationTypes defoliateType { get; set; }

        [Description("Enter the interval between defoliations (days):")]
        public int interval2Cut { get; set; }

        [Description("Enter the number of days to defoliate over (days):")]
        public int durationOfCut { get; set; }

        [Description("Choose what amount is being defined:")]
        public removeAmountTypes removeAmountType { get; set; }

        [Description("Enter the amount to use (kgDM/ha):")]
        public double herbageAmount { get; set; }

        [Description("Enter the fraction of DM that is removed from the field (0-1):")]
        public double fracDM2Remove { get; set; }

        [Description("Enter the fraction of N that is removed from the field (0-1):")]
        public double fracN2Remove { get; set; }

        [Description("Enter the depth down to which urine will applied (mm):")]
        public double urineDepth { get; set; }

        [Description("Enter the proportion of N returned in dung (0-1):")]
        public double fracN2Dung { get; set; }

        [Description("Enter the fraction of population decline due to defoliation (0-1):")]
        public double fracPopDecline { get; set; }

        //fraction of each plant part returned as residue (0-1), wastage
        private double leafResidueFrac = 0.01;
        private double stolonResidueFrac = 0.01;
        private double petioleResidueFrac = 0.01;
        private double flowerResidueFrac = 0.01;
        private double minLeafAmount = 5.0;

        //Outputs
        //Pasture DM defoliated today (kg/ha)
        [XmlIgnore] public double DefoliatedDM{ get; set; }
        //N defoliate today
        [XmlIgnore] public double DefoliatedN{ get; set; }
        //Pasture DM harvested today (kg/ha)
        [XmlIgnore] public double HarvestedDM{ get; set; }
        //N harvested today
        [XmlIgnore] public double HarvestedN{ get; set; }
        //DM removed from the paddock
        [XmlIgnore] public double RemovedDM{ get; set; }
        //N removed from the paddock
        [XmlIgnore] public double RemovedN{ get; set; }
        //DM returned to the paddock
        [XmlIgnore] public double ReturnedDM{ get; set; }
        //N returned to the paddock
        [XmlIgnore] public double ReturnedN{ get; set; }
        //N returned as dung (SurfaceOM)
        [XmlIgnore] public double NReturnedInDung{ get; set; }
        //N returned as urine (urea)
        [XmlIgnore] public double NReturnedInUrine{ get; set; }
        //Number of days after last harvest
        [XmlIgnore] public int DaysAfterCut{ get; set; }
        //Total standing DM (Leaf + Stem/Sheath) before cut
        [XmlIgnore] public double PreHarvestDM{ get; set; }
        //Total standing DM (Leaf + Stem/Sheath) after cut
        [XmlIgnore] public double PostHarvestDM{ get; set; }

        //Pasture DM harvested this rotation (kg/ha)
        [XmlIgnore] public double RotationHarvestedDM{ get; set; }
        //Pasture DM to be harvested this rotation (kg/ha)
        [XmlIgnore] public double RotationHarvestingDM{ get; set; }

        //Internal variables
        private RemovalFractions removalFractions;
        //The fraction of urine to be applied in each layer
        private double[] FracLayer;
        // total herbage to remove in g/m2 per day
        private double herbageToRemove;
        // counter
        private int daysCutting = 0;
        // type of defoliation (Cut or Graze)
        private string defoliationType;
        // type of DM amount (ResidualDM or DMToRemove)
        private string amountType;
        // auxiliary
        private bool aCutHasHappened = false;
        private bool isStillCutting = false;
        private double cumAmountHarvested;

        // event to add residue / dung to surface OM
        public event BiomassRemovedDelegate BiomassRemoved;

        [EventSubscribe("Commencing")]
        private void OnSimulationCommencing(object sender, EventArgs e)
        {
            removalFractions = new RemovalFractions();
            DaysAfterCut = 0;
            resetVariables();
            if (defoliateType == defoliationTypes.Cut)
                defoliationType = "Cut";
            else
                defoliationType = "Graze";

            if (removeAmountType == removeAmountTypes.ResidualDM)
                amountType = "ResidualDM";
            else
                amountType = "DMToRemove";

            // make sure that rotation start when startDate<simulationStartDay
            if ((Clock.Today > cutPasture_StartDate) && (Clock.Today < cutPasture_EndDate))
                cutPasture_StartDate = Clock.Today;
        }

        [EventSubscribe("DoManagement")]
        private void OnDoManagement(object sender, EventArgs e)
        {
            if (Clock.Today == cutPasture_StartDate)
                DaysAfterCut = interval2Cut;

            if ((Clock.Today >= cutPasture_StartDate) && (Clock.Today <= cutPasture_EndDate))
            {
                // Check whether we should start cutting
                if ((WhiteClover.IsEmerged) && (DaysAfterCut > 0) && (DaysAfterCut == interval2Cut))
                {
                    Defoliate(defoliationType, herbageAmount * 0.1, amountType, durationOfCut);
                }
            }

            // Check whether we need to continue cutting
            //if ((daysCutting > 0) && (daysCutting <= durationOfCut))
            if (isStillCutting)
            {
                // reset outputs
                resetVariables();

                removeDM(herbageToRemove, defoliationType);
                returnExcreta();
                cumAmountHarvested += HarvestedDM;
                daysCutting += 1;
            }

            // reset outputs
            if (daysCutting < 0)
            {
                resetVariables();
                daysCutting = 0;
            }
        }

        [EventSubscribe("DoManagementCalculations")]
        private void OnDoManagementCalculations(object sender, EventArgs e)
        {
            if ((daysCutting > 0) && (daysCutting < durationOfCut))
                isStillCutting = true;

            if (daysCutting == durationOfCut)
            {
                PostHarvestDM = (double)zone.Get("WhiteClover.AboveGround.Wt");
                RotationHarvestedDM = cumAmountHarvested;
                aCutHasHappened = true;
                isStillCutting = false;
                daysCutting = -1;
                WhiteClover.Population = WhiteClover.Population * (1.0 - fracPopDecline);
            }

            if (aCutHasHappened && (daysCutting == 0))
                DaysAfterCut += 1;
        }

        public enum removeAmountTypes
        {
            /// <summary>Setting DM amount to remove</summary>
            DMToRemove,
            /// <summary>Setting residual DM amount</summary>
            ResidualDM
        }

        public enum defoliationTypes
        {
            /// <summary>Cut</summary>
            Cut,
            /// <summary>Graze</summary>
            Graze
        }

        // resets the values of all outputs
        private void resetVariables()
        {
            DefoliatedDM = 0.0;
            DefoliatedN = 0.0;
            HarvestedDM = 0.0;
            HarvestedN = 0.0;
            RemovedDM = 0.0;
            RemovedN = 0.0;
            ReturnedDM = 0.0;
            ReturnedN = 0.0;
            NReturnedInDung = 0.0;
            NReturnedInUrine = 0.0;
            RotationHarvestedDM = 0.0;
            RotationHarvestingDM = 0.0;
        }

        // Perform the basic calculations for defoliation
        public void Defoliate(string defoliationType, double amountDM, string amountType, int duration)
        {
            // get the existing plant amount
            PreHarvestDM = (double)zone.Get("WhiteClover.AboveGround.Wt");

            // check duration
            if (duration <= 0)
                throw new Exception("Duration of graze/cut rotation is zero or negative");
            
            // check amount to remove
            if ((amountType == "DMToRemove") && (PreHarvestDM > 0.0))
            {
                summary.WriteMessage(this, "   Defoliating " + (10.0 * amountDM).ToString("#0.0") + "kg/ha over " + duration + " days");
                herbageToRemove = amountDM / duration;
            }
            else if ((amountType == "ResidualDM") && (PreHarvestDM > amountDM))
            {
                summary.WriteMessage(this, "   Defoliating down to approximately " + (10.0 * amountDM).ToString("#0.0") + "kg/ha over " + duration + " days");
                herbageToRemove = (PreHarvestDM - amountDM) / duration;
            }
            else
            {
                herbageToRemove = 0.0;
                summary.WriteMessage(this, "   Defoliation will not happend because there is not enough plant material");
                return;
            }

            RotationHarvestingDM = herbageToRemove * duration;
            durationOfCut = duration;
            // first defoliation
            removeDM(herbageToRemove, defoliationType);
            returnExcreta();
            cumAmountHarvested = HarvestedDM;
            daysCutting = 1;
            DaysAfterCut = 0;
        }

        private void removeDM(double removeAmount, string removeType)
        {
            // get the existing biomass
            double leafLiveWt = (double)zone.Get("WhiteClover.Leaf.Live.Wt");
            double stolonLiveWt = (double)zone.Get("WhiteClover.Stolon.Live.Wt");
            double petioleLiveWt = (double)zone.Get("WhiteClover.Petiole.Live.Wt");
            double flowerLiveWt = (double)zone.Get("WhiteClover.Inflorescence.Live.Wt");
            double leafDeadWt = (double)zone.Get("WhiteClover.Leaf.Dead.Wt");
            double stolonDeadWt = (double)zone.Get("WhiteClover.Stolon.Dead.Wt");
            double petioleDeadWt = (double)zone.Get("WhiteClover.Petiole.Dead.Wt");
            double flowerDeadWt = (double)zone.Get("WhiteClover.Inflorescence.Dead.Wt");
            double leafLiveN = (double)zone.Get("WhiteClover.Leaf.Live.N");
            double stolonLiveN = (double)zone.Get("WhiteClover.Stolon.Live.N");
            double petioleLiveN = (double)zone.Get("WhiteClover.Petiole.Live.N");
            double flowerLiveN = (double)zone.Get("WhiteClover.Inflorescence.Live.N");
            double leafDeadN = (double)zone.Get("WhiteClover.Leaf.Dead.N");
            double stolonDeadN = (double)zone.Get("WhiteClover.Stolon.Dead.N");
            double petioleDeadN = (double)zone.Get("WhiteClover.Petiole.Dead.N");
            double flowerDeadN = (double)zone.Get("WhiteClover.Inflorescence.Dead.N");

            double existingWt = leafLiveWt + leafDeadWt + stolonLiveWt + stolonDeadWt + petioleLiveWt + petioleDeadWt + flowerLiveWt + flowerDeadWt;
            double existingN = leafLiveN + leafDeadN + stolonLiveN + stolonDeadN + petioleLiveN + petioleDeadN + flowerLiveN + flowerDeadN;

            // Can we harvest anything?
            double removingWt = Math.Min(existingWt, removeAmount);
            if (removingWt > 0.0)
            {
                // get the fractions to remove for each organ (will override the default values)
                // the default is [WhiteClover].Leaf.BiomassRemovalDefaults.Cut.FractionRemoved, or equivalent
                // >> double leafFracToRemove = removeAmount * (leafLiveWt + leafDeadWt) / existingWt / existingWt;
                double fracToRemove = removingWt / existingWt;
                double leafFracToRemove = 0.0;
                if ((leafLiveWt + leafDeadWt) > 0.0)
                {
                    if (leafLiveWt < minLeafAmount)
                    {
                        // leafWt cannot go below a minimum
                        leafFracToRemove = (removingWt + leafLiveWt - minLeafAmount) / existingWt;
                    }
                    else
                        leafFracToRemove = fracToRemove;
                }

                double stolonFracToRemove = ((stolonLiveWt + stolonDeadWt) > 0.0) ? fracToRemove : 0.0;
                double petioleFracToRemove = ((petioleLiveWt + petioleDeadWt) > 0.0) ? fracToRemove : 0.0;
                double flowerFracToRemove = ((flowerLiveWt + flowerDeadWt) > 0.0) ? fracToRemove : 0.0;

                // get the fractions to residue (i.e. wastage - will override the default values)
                // the default is [WhiteClover].Leaf.BiomassRemovalDefaults.Cut.FractionToResidue, or equivalent
                double leafFracToResidue = leafResidueFrac * leafFracToRemove;
                double stolonFracToResidue = stolonResidueFrac * stolonFracToRemove;
                double petioleFracToResidue = petioleResidueFrac * petioleFracToRemove;
                double flowerFracToResidue = flowerResidueFrac * flowerFracToRemove;

                // correct the values to defoliate (so our removing = remove + residue)
                leafFracToRemove -= leafFracToResidue;
                stolonFracToRemove -= stolonFracToResidue;
                petioleFracToRemove -= petioleFracToResidue;
                flowerFracToRemove -= flowerFracToResidue;

                // set removal fractions (these overrides the default removals in the plant)
                removalFractions.SetFractionToRemove("Leaf", leafFracToRemove, "Live");
                removalFractions.SetFractionToResidue("Leaf", leafFracToResidue, "Live");
                removalFractions.SetFractionToRemove("Leaf", leafFracToRemove, "Dead");
                removalFractions.SetFractionToResidue("Leaf", leafFracToResidue, "Dead");
                removalFractions.SetFractionToRemove("Stolon", stolonFracToRemove, "Live");
                removalFractions.SetFractionToResidue("Stolon", stolonFracToResidue, "Live");
                removalFractions.SetFractionToRemove("Stolon", stolonFracToRemove, "Dead");
                removalFractions.SetFractionToResidue("Stolon", stolonFracToResidue, "Dead");
                removalFractions.SetFractionToRemove("Petiole", petioleFracToRemove, "Live");
                removalFractions.SetFractionToResidue("Petiole", petioleFracToResidue, "Live");
                removalFractions.SetFractionToRemove("Petiole", petioleFracToRemove, "Dead");
                removalFractions.SetFractionToResidue("Petiole", petioleFracToResidue, "Dead");
                removalFractions.SetFractionToRemove("Inflorescence", flowerFracToRemove, "Live");
                removalFractions.SetFractionToResidue("Inflorescence", flowerFracToResidue, "Live");
                removalFractions.SetFractionToRemove("Inflorescence", flowerFracToRemove, "Dead");
                removalFractions.SetFractionToResidue("Inflorescence", flowerFracToResidue, "Dead");

                removalFractions.SetFractionToRemove("Root", 0.0);
                removalFractions.SetFractionToResidue("Root", 0.0);
                removalFractions.SetFractionToRemove("Taproot", 0.0);
                removalFractions.SetFractionToResidue("Taproot", 0.0);
                removalFractions.SetFractionToRemove("Nodule", 0.0);
                removalFractions.SetFractionToResidue("Nodule", 0.0);

                // Actually do the biomass removal
                WhiteClover.RemoveBiomass(removeType, removalFractions);

                // get the new existing plant amount
                double postHarvestWt = (double)zone.Get("WhiteClover.AboveGround.Wt");
                double postHarvestN = (double)zone.Get("WhiteClover.AboveGround.N");

                // get total defoliation (total plant stuff lost)
                DefoliatedDM = existingWt - postHarvestWt;
                DefoliatedN = existingN - postHarvestN;

                // get total harvested (plant stuff removed from plants)
                HarvestedDM = (double)zone.Get("WhiteClover.Leaf.Removed.Wt")
                + (double)zone.Get("WhiteClover.Stolon.Removed.Wt")
                + (double)zone.Get("WhiteClover.Petiole.Removed.Wt")
                + (double)zone.Get("WhiteClover.Inflorescence.Removed.Wt");
                HarvestedN = (double)zone.Get("WhiteClover.Leaf.Removed.N")
                + (double)zone.Get("WhiteClover.Stolon.Removed.N")
                + (double)zone.Get("WhiteClover.Petiole.Removed.N")
                + (double)zone.Get("WhiteClover.Inflorescence.Removed.N");

                // get amounts actually removed from field and that to be returned (residue or dung/urine)
                RemovedDM = HarvestedDM * fracDM2Remove;
                RemovedN = HarvestedN * fracN2Remove;
                ReturnedDM = HarvestedDM - RemovedDM;
                ReturnedN = HarvestedN - RemovedN;
                NReturnedInDung = ReturnedN * fracN2Dung;
                NReturnedInUrine = ReturnedN - NReturnedInDung;
            }
            else
            {
            }
        }

        // Return dung and urine
        private void returnExcreta()
        {
            if ((ReturnedDM > 0.0) || (NReturnedInDung > 0.0))
            {
                PMF.BiomassRemovedType BiomassDung = new PMF.BiomassRemovedType();
                string[] type = new string[] { "RuminantDung_PastureFed" };
                float[] dltdm = new float[] { (Single)ReturnedDM };
                float[] dltn = new float[] { (Single)NReturnedInDung };
                float[] dltp = new float[] { 0 };
                float[] fraction = new float[] { 1 };     // fraction is always 1.0 here

                BiomassDung.crop_type = "RuminantDung_PastureFed";
                BiomassDung.dm_type = type;
                BiomassDung.dlt_crop_dm = dltdm;
                BiomassDung.dlt_dm_n = dltn;
                BiomassDung.dlt_dm_p = dltp;
                BiomassDung.fraction_to_residue = fraction;
                BiomassRemoved.Invoke(BiomassDung);
            }

            if (NReturnedInUrine > 0.0)
            {
                fertiliser.Apply(NReturnedInUrine * 10, Fertiliser.Types.UreaN, urineDepth);
            }
        }
    }
}
```
    Manager ExtraVariables
```csharp
using System;
using Models.Core;
using System.Collections.Generic;
using System.Text;
using Models.Soils;
using Models.PMF;
using Models;
using System.Xml.Serialization;
using APSIM.Shared.Utilities;

namespace Models
{
    [Serializable] 
    public class Script : Model
    {
        [Link] Clock Clock;
        [Link] Soils.Soil Soil;
        [Link] Models.SurfaceOM.SurfaceOrganicMatter SOM;
        [Link] Weather Met;
        [Link] Fertiliser Fert;
        [Link] Irrigation Irrig;
        [Link] Plant WhiteClover;
        [Link] Zone zone;
        [Link] ISummary summary;
                    
        [XmlIgnore] public bool InitialDay { get; set; }
        
        [XmlIgnore] public double AccumPlantN { get; set; }
        [XmlIgnore] public double AccumMineralisation { get; set; }
        [XmlIgnore] public double AccumDenit { get; set; }
        [XmlIgnore] public double AccumFert { get; set; }
        [XmlIgnore] public double AccumLeach { get; set; }
        [XmlIgnore] public double AccumDetach { get; set; }
        [XmlIgnore] public double DeltaSoilOMN { get; set; }
        [XmlIgnore] public double DeltaSurfaceOMN { get; set; }
        [XmlIgnore] public double DeltaSoilMineralN { get; set; }
        [XmlIgnore] public double SoilNitrogenContent { get; set; }
        
        [XmlIgnore] public double AccumEO { get; set; }
        [XmlIgnore] public double AccumEP { get; set; }
        [XmlIgnore] public double AccumES { get; set; }
        [XmlIgnore] public double AccumDrainage { get; set; }
        [XmlIgnore] public double AccumRunoff { get; set; }
        [XmlIgnore] public double AccumOutflowLat { get; set; }
        [XmlIgnore] public double AccumIrrigation { get; set; }
        [XmlIgnore] public double AccumRainfall { get; set; }
        [XmlIgnore] public double SoilWaterDeficit { get; set; }
    
        [XmlIgnore] public double  InitialSoilOMN { get; set; }
        [XmlIgnore] public double  InitialSurfaceOMN { get; set; }
        [XmlIgnore] public double  InitialMineralN { get; set; }
        
        [XmlIgnore] public double SWC { get; set; }
        [XmlIgnore] public double DUL { get; set; }
        [XmlIgnore] public double OutFlowLat { get; set; }

        [XmlIgnore] public double FomN { get; set; }
        [XmlIgnore] public double BiomN { get; set; }
        [XmlIgnore] public double HumN { get; set; }
        [XmlIgnore] public double OrganicN { get; set; }
        [XmlIgnore] public double NO3N { get; set; }
        [XmlIgnore] public double NH4N { get; set; }
        [XmlIgnore] public double UreaN { get; set; }
        [XmlIgnore] public double MineralN { get; set; }
        [XmlIgnore] public double DltNMinRes { get; set; }
        [XmlIgnore] public double DltNMinTot { get; set; }
        
        [XmlIgnore] public double LeafFraction { get; set; }
        [XmlIgnore] public double StolonFraction { get; set; }
        [XmlIgnore] public double PetioleFraction { get; set; }
        [XmlIgnore] public double InflorescenceFraction { get; set; }
        
        [XmlIgnore] public double ShootRootRatio { get; set; }

        [XmlIgnore] public double Leaf_DMSupply { get; set; }
        [XmlIgnore] public double Stolon_DMSupply { get; set; }
        [XmlIgnore] public double Petiole_DMSupply { get; set; }
        [XmlIgnore] public double Inflorescence_DMSupply { get; set; }
        [XmlIgnore] public double Root_DMSupply { get; set; }
        [XmlIgnore] public double Taproot_DMSupply { get; set; }
        [XmlIgnore] public double Nodule_DMSupply { get; set; }
        [XmlIgnore] public double Leaf_DMDemand { get; set; }
        [XmlIgnore] public double Stolon_DMDemand { get; set; }
        [XmlIgnore] public double Petiole_DMDemand { get; set; }
        [XmlIgnore] public double Inflorescence_DMDemand { get; set; }
        [XmlIgnore] public double Root_DMDemand { get; set; }
        [XmlIgnore] public double Taproot_DMDemand { get; set; }
        [XmlIgnore] public double Nodule_DMDemand { get; set; }

        [XmlIgnore] public double Leaf_NSupply { get; set; }
        [XmlIgnore] public double Stolon_NSupply { get; set; }
        [XmlIgnore] public double Petiole_NSupply { get; set; }
        [XmlIgnore] public double Inflorescence_NSupply { get; set; }
        [XmlIgnore] public double Taproot_NSupply { get; set; }
        [XmlIgnore] public double Nodule_NSupply { get; set; }
        [XmlIgnore] public double Root_NSupply { get; set; }
        [XmlIgnore] public double Leaf_NDemand { get; set; }
        [XmlIgnore] public double Stolon_NDemand { get; set; }
        [XmlIgnore] public double Petiole_NDemand { get; set; }
        [XmlIgnore] public double Inflorescence_NDemand { get; set; }
        [XmlIgnore] public double Taproot_NDemand { get; set; }
        [XmlIgnore] public double Nodule_NDemand { get; set; }
        [XmlIgnore] public double Root_NDemand { get; set; }
        
        [XmlIgnore] public double Leaf_NSupplyReallocation { get; set; }
        [XmlIgnore] public double Stolon_NSupplyReallocation { get; set; }
        [XmlIgnore] public double Petiole_NSupplyReallocation { get; set; }
        [XmlIgnore] public double Root_NSupplyReallocation { get; set; }
        
        [XmlIgnore] public double AccumHarvestedWt { get; set; }

        private DateTime YearStartDate;
    
        [EventSubscribe("Commencing")]
        private void OnSimulationCommencing(object sender, EventArgs e)
        {
            InitialDay = true;
        }
        
        [EventSubscribe("DoManagement")]
        private void OnDoManagement(object sender, EventArgs e)
        {
            //!!!!!! Nitrogen balance components !!!!!!
            //!!!!!!^^^^^^^^^^^^^^^^^^^^^^^^^^^^^!!!!!!
            FomN = MathUtilities.Sum(Soil.SoilNitrogen.FOMN);
            HumN = MathUtilities.Sum(Soil.SoilNitrogen.HumicN);
            BiomN = MathUtilities.Sum(Soil.SoilNitrogen.MicrobialN);
            OrganicN = FomN + HumN + BiomN;
            NO3N = MathUtilities.Sum(Soil.NO3N);
            NH4N = MathUtilities.Sum(Soil.NH4N);
            UreaN = MathUtilities.Sum(Soil.SoilNitrogen.urea);
            MineralN = NO3N + NH4N + UreaN; 
            DltNMinRes = MathUtilities.Sum(Soil.SoilNitrogen.dlt_n_min_res);
            DltNMinTot = MathUtilities.Sum(Soil.SoilNitrogen.MineralisedN);
            int layers = Soil.Thickness.Length;
            if (InitialDay == true)
            {
                InitialSurfaceOMN = SOM.N;
                InitialSoilOMN = OrganicN;
                InitialMineralN = MineralN;
                InitialDay = false;

                // check whether we're in the north or south hemisphere
                if (Met.Latitude >= 0.0)
                    YearStartDate = DateTime.Parse("01/01/2000");
                else
                    YearStartDate = DateTime.Parse("01/07/2000");
            }
            DeltaSurfaceOMN = SOM.N - InitialSurfaceOMN;
            AccumLeach = AccumLeach - Soil.SoilWater.LeachNH4 - Soil.SoilWater.LeachNO3 - Soil.SoilWater.LeachUrea; //Fails
            AccumMineralisation += MathUtilities.Sum(Soil.SoilNitrogen.MineralisedN);
            AccumDenit -= MathUtilities.Sum(Soil.SoilNitrogen.Denitrification);
            AccumPlantN -= (double)zone.Get("WhiteClover.Root.NUptake");
            DeltaSoilOMN = OrganicN - InitialSoilOMN;
            DeltaSoilMineralN = MineralN - InitialMineralN;
            SoilNitrogenContent = MineralN;
            
            //!!!!!! Water balance components !!!!!!
            //!!!!!!^^^^^^^^^^^^^^^^^^^^^^^^^^!!!!!!

            AccumRainfall += Met.Rain;
            //AccumEP -= (double)zone.Get("[WhiteClover].Leaf.Transpiration");
            AccumEP -= (double)zone.Get("WhiteClover.Root.WaterUptake");
            SoilWaterDeficit = (SWC - DUL);
            double OutFlowLat = MathUtilities.Sum(Soil.SoilWater.outflow_lat);
            AccumOutflowLat -= OutFlowLat;
            
            //!!!!!! Stem and leaf fraction !!!!!!
            if ((double)zone.Get("WhiteClover.AboveGround.Wt") > 0.0)
            {
                LeafFraction = (double)zone.Get("WhiteClover.Leaf.Wt") / (double)zone.Get("WhiteClover.AboveGround.Wt");
                StolonFraction = (double)zone.Get("WhiteClover.Stolon.Wt") / (double)zone.Get("WhiteClover.AboveGround.Wt");
                PetioleFraction = (double)zone.Get("WhiteClover.Petiole.Wt") / (double)zone.Get("WhiteClover.AboveGround.Wt");
                InflorescenceFraction = (double)zone.Get("WhiteClover.Inflorescence.Wt") / (double)zone.Get("WhiteClover.AboveGround.Wt");
            }
            else
            {
                LeafFraction = 0.0;
                StolonFraction = 0.0;
                PetioleFraction = 0.0;
            }
            
            //!!!!!! Plant DM components !!!!!!
            //!!!!!!^^^^^^^^^^^^^^^^^^^^^^^^^^!!!!!!
            ShootRootRatio = MathUtilities.Divide((double)zone.Get("WhiteClover.AboveGroundLive.Wt"), (double)zone.Get("WhiteClover.BelowGroundLive.Wt"), 0.0);
            PMF.Interfaces.BiomassSupplyType Leaf_DMSupplies = (PMF.Interfaces.BiomassSupplyType)zone.Get("WhiteClover.Leaf.DMSupply");
            PMF.Interfaces.BiomassSupplyType Stolon_DMSupplies = (PMF.Interfaces.BiomassSupplyType)zone.Get("WhiteClover.Stolon.DMSupply");
            PMF.Interfaces.BiomassSupplyType Petiole_DMSupplies = (PMF.Interfaces.BiomassSupplyType)zone.Get("WhiteClover.Petiole.DMSupply");
            PMF.Interfaces.BiomassSupplyType Inflorescence_DMSupplies = (PMF.Interfaces.BiomassSupplyType)zone.Get("WhiteClover.Inflorescence.DMSupply");
            PMF.Interfaces.BiomassSupplyType Root_DMSupplies = (PMF.Interfaces.BiomassSupplyType)zone.Get("WhiteClover.Root.DMSupply");
            PMF.Interfaces.BiomassSupplyType Taproot_DMSupplies = (PMF.Interfaces.BiomassSupplyType)zone.Get("WhiteClover.Taproot.DMSupply");
            PMF.Interfaces.BiomassSupplyType Nodule_DMSupplies = (PMF.Interfaces.BiomassSupplyType)zone.Get("WhiteClover.Nodule.DMSupply");
            PMF.Interfaces.BiomassPoolType Leaf_DMDemands = (PMF.Interfaces.BiomassPoolType)zone.Get("WhiteClover.Leaf.DMDemand");
            PMF.Interfaces.BiomassPoolType Stolon_DMDemands = (PMF.Interfaces.BiomassPoolType)zone.Get("WhiteClover.Stolon.DMDemand");
            PMF.Interfaces.BiomassPoolType Petiole_DMDemands = (PMF.Interfaces.BiomassPoolType)zone.Get("WhiteClover.Petiole.DMDemand");
            PMF.Interfaces.BiomassPoolType Inflorescence_DMDemands = (PMF.Interfaces.BiomassPoolType)zone.Get("WhiteClover.Inflorescence.DMDemand");
            PMF.Interfaces.BiomassPoolType Root_DMDemands = (PMF.Interfaces.BiomassPoolType)zone.Get("WhiteClover.Root.DMDemand");
            PMF.Interfaces.BiomassPoolType Taproot_DMDemands = (PMF.Interfaces.BiomassPoolType)zone.Get("WhiteClover.Taproot.DMDemand");
            PMF.Interfaces.BiomassPoolType Nodule_DMDemands = (PMF.Interfaces.BiomassPoolType)zone.Get("WhiteClover.Nodule.DMDemand");

            PMF.Interfaces.BiomassSupplyType Leaf_NSupplies = (PMF.Interfaces.BiomassSupplyType)zone.Get("WhiteClover.Leaf.NSupply");
            PMF.Interfaces.BiomassSupplyType Stolon_NSupplies = (PMF.Interfaces.BiomassSupplyType)zone.Get("WhiteClover.Stolon.NSupply");
            PMF.Interfaces.BiomassSupplyType Petiole_NSupplies = (PMF.Interfaces.BiomassSupplyType)zone.Get("WhiteClover.Petiole.NSupply");
            PMF.Interfaces.BiomassSupplyType Inflorescence_NSupplies = (PMF.Interfaces.BiomassSupplyType)zone.Get("WhiteClover.Inflorescence.NSupply");
            PMF.Interfaces.BiomassSupplyType Taproot_NSupplies = (PMF.Interfaces.BiomassSupplyType)zone.Get("WhiteClover.Taproot.NSupply");
            PMF.Interfaces.BiomassSupplyType Nodule_NSupplies = (PMF.Interfaces.BiomassSupplyType)zone.Get("WhiteClover.Nodule.NSupply");
            PMF.Interfaces.BiomassSupplyType Root_NSupplies = (PMF.Interfaces.BiomassSupplyType)zone.Get("WhiteClover.Root.NSupply");
            
            PMF.Interfaces.BiomassPoolType Leaf_NDemands = (PMF.Interfaces.BiomassPoolType)zone.Get("WhiteClover.Leaf.NDemand");
            PMF.Interfaces.BiomassPoolType Stolon_NDemands = (PMF.Interfaces.BiomassPoolType)zone.Get("WhiteClover.Stolon.NDemand");
            PMF.Interfaces.BiomassPoolType Petiole_NDemands = (PMF.Interfaces.BiomassPoolType)zone.Get("WhiteClover.Petiole.NDemand");
            PMF.Interfaces.BiomassPoolType Inflorescence_NDemands = (PMF.Interfaces.BiomassPoolType)zone.Get("WhiteClover.Inflorescence.NDemand");
            PMF.Interfaces.BiomassPoolType Taproot_NDemands = (PMF.Interfaces.BiomassPoolType)zone.Get("WhiteClover.Taproot.NDemand");
            PMF.Interfaces.BiomassPoolType Nodule_NDemands = (PMF.Interfaces.BiomassPoolType)zone.Get("WhiteClover.Nodule.NDemand");
            PMF.Interfaces.BiomassPoolType Root_NDemands = (PMF.Interfaces.BiomassPoolType)zone.Get("WhiteClover.Root.NDemand");
            
            Leaf_DMSupply = Leaf_DMSupplies.Fixation + Leaf_DMSupplies.Uptake + Leaf_DMSupplies.Reallocation + Leaf_DMSupplies.Retranslocation;
            Stolon_DMSupply = Stolon_DMSupplies.Fixation + Stolon_DMSupplies.Uptake + Stolon_DMSupplies.Reallocation + Stolon_DMSupplies.Retranslocation;
            Petiole_DMSupply = Petiole_DMSupplies.Fixation + Petiole_DMSupplies.Uptake + Petiole_DMSupplies.Reallocation + Petiole_DMSupplies.Retranslocation;
            Inflorescence_DMSupply = Inflorescence_DMSupplies.Fixation + Inflorescence_DMSupplies.Uptake + Inflorescence_DMSupplies.Reallocation + Inflorescence_DMSupplies.Retranslocation;
            Root_DMSupply = Root_DMSupplies.Fixation + Root_DMSupplies.Uptake + Root_DMSupplies.Reallocation + Root_DMSupplies.Retranslocation;
            Taproot_DMSupply = Taproot_DMSupplies.Fixation + Taproot_DMSupplies.Uptake + Taproot_DMSupplies.Reallocation + Taproot_DMSupplies.Retranslocation;
            Nodule_DMSupply = Nodule_DMSupplies.Fixation + Nodule_DMSupplies.Uptake + Nodule_DMSupplies.Reallocation + Nodule_DMSupplies.Retranslocation;
            Leaf_DMDemand = Leaf_DMDemands.Structural + Leaf_DMDemands.Storage + Leaf_DMDemands.Metabolic;
            Stolon_DMDemand = Stolon_DMDemands.Structural + Stolon_DMDemands.Storage + Stolon_DMDemands.Metabolic;
            Petiole_DMDemand = Petiole_DMDemands.Structural + Petiole_DMDemands.Storage + Petiole_DMDemands.Metabolic;
            Inflorescence_DMDemand = Inflorescence_DMDemands.Structural + Inflorescence_DMDemands.Storage + Inflorescence_DMDemands.Metabolic;
            Root_DMDemand = Root_DMDemands.Structural + Root_DMDemands.Storage + Root_DMDemands.Metabolic;
            Taproot_DMDemand = Taproot_DMDemands.Structural + Taproot_DMDemands.Storage + Taproot_DMDemands.Metabolic;
            Nodule_DMDemand = Nodule_DMDemands.Structural + Nodule_DMDemands.Storage + Nodule_DMDemands.Metabolic;

            Leaf_NSupply = Leaf_NSupplies.Fixation + Leaf_NSupplies.Uptake + Leaf_NSupplies.Reallocation + Leaf_NSupplies.Retranslocation;
            Stolon_NSupply = Stolon_NSupplies.Fixation + Stolon_NSupplies.Uptake + Stolon_NSupplies.Reallocation + Stolon_NSupplies.Retranslocation;
            Petiole_NSupply = Petiole_NSupplies.Fixation + Petiole_NSupplies.Uptake + Petiole_NSupplies.Reallocation + Petiole_NSupplies.Retranslocation;
            Inflorescence_NSupply = Inflorescence_NSupplies.Fixation + Inflorescence_NSupplies.Uptake + Inflorescence_NSupplies.Reallocation + Inflorescence_NSupplies.Retranslocation;
            Taproot_NSupply = Taproot_NSupplies.Fixation + Taproot_NSupplies.Uptake + Taproot_NSupplies.Reallocation + Taproot_NSupplies.Retranslocation;
            Nodule_NSupply = Nodule_NSupplies.Fixation + Nodule_NSupplies.Uptake + Nodule_NSupplies.Reallocation + Nodule_NSupplies.Retranslocation;
            Root_NSupply = Root_NSupplies.Fixation + Root_NSupplies.Uptake + Root_NSupplies.Reallocation + Root_NSupplies.Retranslocation;

            Leaf_NDemand = Leaf_NDemands.Structural + Leaf_NDemands.Storage + Leaf_NDemands.Metabolic;
            Stolon_NDemand = Stolon_NDemands.Structural + Stolon_NDemands.Storage + Stolon_NDemands.Metabolic;
            Petiole_NDemand = Petiole_NDemands.Structural + Petiole_NDemands.Storage + Petiole_NDemands.Metabolic;
            Inflorescence_NDemand = Inflorescence_NDemands.Structural + Inflorescence_NDemands.Storage + Inflorescence_NDemands.Metabolic;
            Taproot_NDemand = Taproot_NDemands.Structural + Taproot_NDemands.Storage + Taproot_NDemands.Metabolic;
            Nodule_NDemand = Nodule_NDemands.Structural + Nodule_NDemands.Storage + Nodule_NDemands.Metabolic;
            Root_NDemand = Root_NDemands.Structural + Root_NDemands.Storage + Root_NDemands.Metabolic;

            Leaf_NSupplyReallocation = Leaf_NSupplies.Reallocation;
            Stolon_NSupplyReallocation = Stolon_NSupplies.Reallocation;
            Petiole_NSupplyReallocation = Petiole_NSupplies.Reallocation;
            Root_NSupplyReallocation = Root_NSupplies.Reallocation;
            
            //!!!!!! Plant Harvest !!!!!!
            if (Clock.Today.DayOfYear == YearStartDate.DayOfYear)
                AccumHarvestedWt = (double)zone.Get("[Defoliate].Script.DefoliatedDM");
            else
                AccumHarvestedWt += (double)zone.Get("[Defoliate].Script.DefoliatedDM");            
        }
        
        [EventSubscribe("DoManagementCalculations")]
        private void OnDoManagementCalculations(object sender, EventArgs e)
        {
            FomN = MathUtilities.Sum(Soil.SoilNitrogen.FOMN);
            HumN = MathUtilities.Sum(Soil.SoilNitrogen.HumicN);
            BiomN = MathUtilities.Sum(Soil.SoilNitrogen.MicrobialN);
            AccumFert += Fert.NitrogenApplied;
            AccumIrrigation += Irrig.IrrigationApplied;
            
            
            AccumEO -= Soil.SoilWater.Eo;
            AccumES -= Soil.SoilWater.Es; 
            AccumDrainage -= Soil.SoilWater.Drainage;
            AccumRunoff -= Soil.SoilWater.Runoff;
            SWC = MathUtilities.Sum(Soil.SoilWater.SWmm);
            DUL = MathUtilities.Sum(Soil.DULmm);
        }
    }
}
```
    Report: EventNames=[Clock].DoReport
      VariableNames:
        [Clock].Today as Date
        [MicroClimate].net_radn
        [Weather].Radn as SolarRadiation
        [WhiteClover].Leaf.RadIntTot as InterceptedRadiation
        [Weather].Rain as Rainfall
        [Irrigation].IrrigationApplied as IrrigationApplied
        [WhiteClover].AbovegroundFractionDeficit.Value()
        [WhiteClover].Leaf.PartitionFractionDeficit.Value()
        [WhiteClover].Petiole.PartitionFractionDeficit.Value()
        [WhiteClover].Stolon.PartitionFractionDeficit.Value()
        [WhiteClover].Inflorescence.PartitionFractionDeficit.Value()
        [WhiteClover].Root.PartitionFractionDeficit.Value()
        [WhiteClover].Taproot.PartitionFractionDeficit.Value()
        [WhiteClover].Nodule.DMDemandFunction.PartitionFractionOLD.Value()
        [Soil].SoilWater.Eo as Eo
        [Soil].SoilWater.Es as Evaporation
        [WhiteClover].Leaf.Transpiration as Transpiration
        [Soil].SoilWater.pond as PondedWater
        [Soil].SoilWater.Drainage as Drainage
        [Soil].SoilWater.Runoff as Runoff
        sum([Soil].SoilWater.outflow_lat) as LateralFlow
        sum([Soil].SoilWater.SWmm) as TotalSWC
        sum([Soil].DULmm) as TotalDUL
        [Fertiliser].NitrogenApplied as FertiliserN
        sum([Soil].SoilNitrogen.Denitrification) as DenitrifiedN
        ([Soil].SoilWater.LeachNH4 + [Soil].SoilWater.LeachNO3) as LeachedN
        (-1*[WhiteClover].Root.NUptake) as UptakeN
        sum([Soil].SoilNitrogen.MineralisedN) as MineralisedSoilN
        sum([Soil].SoilNitrogen.dlt_n_min_res) as MineralisedSurfOMN
        ([WhiteClover].Leaf.Detached.N+[WhiteClover].Stolon.Detached.N+[WhiteClover].Petiole.Detached.N+[WhiteClover].Inflorescence.Detached.N) as DetachedAGN
        ([WhiteClover].Nodule.Detached.N+[WhiteClover].Taproot.Detached.N+[WhiteClover].Root.Detached.N) as DetachedBGN
        (10*[WhiteClover].Nodule.NFixed) as WhiteClover.Nodule.NFixed
        (sum([Soil].SoilNitrogen.urea) + sum([Soil].SoilNitrogen.NH4) + sum([Soil].SoilNitrogen.NO3)) as SoilNContent
        sum([Soil].SoilNitrogen.urea) as SoilUrea
        sum([Soil].SoilNitrogen.NH4) as SoilNH4
        sum([Soil].SoilNitrogen.NO3) as SoilNO3
        (sum([Soil].SoilNitrogen.NH4[1:3])+sum([Soil].SoilNitrogen.NO3[1:3])) as TopSoilN
        [SurfaceOrganicMatter].N as TotalSurfOMN
        sum([Soil].SoilNitrogen.FOMN) as TotalFOMN
        sum([Soil].SoilNitrogen.HumicN) as TotalHumicN
        sum([Soil].SoilNitrogen.MicrobialN as TotalMicrobialN
        ([WhiteClover].Total.N) as TotalPlantN
        [Defoliate].Script.RotationHarvestingDM
        [Defoliate].Script.RotationHarvestedDM as RotationHarvestedWt
        [Defoliate].Script.PreHarvestDM
        [Defoliate].Script.PostHarvestDM
        [Defoliate].Script.DefoliatedDM
        [Defoliate].Script.HarvestedDM
        [Defoliate].Script.RemovedDM
        [Defoliate].Script.DefoliatedN
        [Defoliate].Script.HarvestedN
        [Defoliate].Script.RemovedN
        [Defoliate].Script.NReturnedInDung
        [Defoliate].Script.NReturnedInUrine
        [Defoliate].Script.DefoliatedDM as HarvestedWt
        [Defoliate].Script.DaysAfterCut
        [ExtraVariables].Script.AccumHarvestedWt as CumulativeHarvestedWt
        [WhiteClover].Phenology.ThermalTime.Value()
        [WhiteClover].Phenology.Photoperiod.Value()
        [WhiteClover].Phenology.Vernalisation.TodaysVernalisation
        [WhiteClover].Phenology.Vernalisation.DaysVernalised
        [WhiteClover].Population
        [WhiteClover].Phenology.CurrentPhaseName
        [WhiteClover].Phenology.Stage
        [WhiteClover].Root.LengthDensity
        [WhiteClover].Leaf.ExtinctionCoefficientFunction.Value()
        [WhiteClover].AboveGroundLive.Wt
        ([WhiteClover].Leaf.Live.Wt / ([WhiteClover].AboveGroundLive.Wt + 0.000001)) as LeafFraction
        ([WhiteClover].Stolon.Live.Wt / ([WhiteClover].AboveGroundLive.Wt + 0.000001)) as StolonFraction
        ([WhiteClover].Petiole.Live.Wt / ([WhiteClover].AboveGroundLive.Wt + 0.000001)) as PetioleFraction
        ([WhiteClover].Inflorescence.Live.Wt / ([WhiteClover].AboveGroundLive.Wt + 0.000001)) as FlowerFraction
        ([WhiteClover].Nodule.Live.Wt / ([WhiteClover].BelowGround.Wt + 0.000001)) as NoduleFraction
        ([WhiteClover].Taproot.Live.Wt / ([WhiteClover].BelowGround.Wt + 0.000001)) as TaprootFraction
        ([WhiteClover].Root.Live.Wt / ([WhiteClover].BelowGround.Wt + 0.000001)) as RootFraction
        [WhiteClover].Arbitrator.DM.TotalFixationSupply
        [WhiteClover].Arbitrator.DM.TotalPlantDemand
        [WhiteClover].Arbitrator.DM.Allocated
        [WhiteClover].Arbitrator.DM.SinkLimitation
        [WhiteClover].Arbitrator.DM.NutrientLimitation
        [WhiteClover].Arbitrator.FDM
        [ExtraVariables].Script.Leaf_DMSupply
        [ExtraVariables].Script.Petiole_DMSupply
        [ExtraVariables].Script.Stolon_DMSupply
        [ExtraVariables].Script.Inflorescence_DMSupply
        [ExtraVariables].Script.Root_DMSupply
        [ExtraVariables].Script.Taproot_DMSupply
        [ExtraVariables].Script.Nodule_DMSupply
        [ExtraVariables].Script.Leaf_DMDemand
        [ExtraVariables].Script.Petiole_DMDemand
        [ExtraVariables].Script.Stolon_DMDemand
        [ExtraVariables].Script.Inflorescence_DMDemand
        [ExtraVariables].Script.Root_DMDemand
        [ExtraVariables].Script.Taproot_DMDemand
        [ExtraVariables].Script.Nodule_DMDemand
        [WhiteClover].Arbitrator.N.TotalPlantSupply
        [WhiteClover].Arbitrator.N.TotalPlantDemand
        [WhiteClover].Arbitrator.N.Allocated
        [WhiteClover].Arbitrator.FN
        [WhiteClover].Arbitrator.WSupply
        [WhiteClover].Arbitrator.WDemand
        [WhiteClover].Arbitrator.WAllocated
        [WhiteClover].Arbitrator.FW
        [WhiteClover].Root.NSupplyUptake
        [WhiteClover].Root.NTakenUp
        [WhiteClover].Root.NSupply.Uptake
        [WhiteClover].Root.NUptake
        [ExtraVariables].Script.Leaf_NSupply
        [ExtraVariables].Script.Petiole_NSupply
        [ExtraVariables].Script.Stolon_NSupply
        [ExtraVariables].Script.Inflorescence_NSupply
        [ExtraVariables].Script.Root_NSupply
        [ExtraVariables].Script.Taproot_NSupply
        [ExtraVariables].Script.Nodule_NSupply
        [ExtraVariables].Script.Leaf_NDemand
        [ExtraVariables].Script.Petiole_NDemand
        [ExtraVariables].Script.Stolon_NDemand
        [ExtraVariables].Script.Inflorescence_NDemand
        [ExtraVariables].Script.Root_NDemand
        [ExtraVariables].Script.Taproot_NDemand
        [ExtraVariables].Script.Nodule_NDemand
        [WhiteClover].ShootRootRatio.Value()
        [WhiteClover].TargetShootRootRatio.Value()
        [WhiteClover].AdjustedShootRootRatio.Value()
        [WhiteClover].Leaf.DMDemandFunction.PartitionFraction.Value()
        [WhiteClover].Stem.DMDemandFunction.PartitionFraction.Value()
        [WhiteClover].Inflorescence.DMDemandFunction.PartitionFraction.Value()
        [WhiteClover].Taproot.DMDemandFunction.PartitionFraction.Value()
        [WhiteClover].Root.DMDemandFunction.PartitionFraction.Value()
        [WhiteClover].Nodule.DMDemandFunction.PartitionFraction.Value()
        [WhiteClover].StemsLeafRatio.Value()
        [WhiteClover].FlowerStemRatio.Value()
        [WhiteClover].TaprootRootRatio.Value()
        [WhiteClover].TargetStemsLeafRatio.Value()
        [WhiteClover].TargetFlowerStemRatio.Value()
        [WhiteClover].TargetTaprootRootRatio.Value()
        [WhiteClover].Total.Wt
        [WhiteClover].Total.N
        [WhiteClover].Total.NConc
        [WhiteClover].AboveGround.Wt
        [WhiteClover].BelowGround.Wt
        [WhiteClover].AboveGround.N
        [WhiteClover].BelowGround.N
        [WhiteClover].AboveGroundLive.NConc
        [WhiteClover].BelowGroundLive.NConc
        [WhiteClover].Leaf.Wt
        [WhiteClover].Leaf.Live.Wt
        [WhiteClover].Leaf.Live.N
        [WhiteClover].Leaf.Live.NConc
        [WhiteClover].Leaf.Dead.Wt
        [WhiteClover].Leaf.Dead.NConc
        [WhiteClover].Leaf.CoverTotal
        [WhiteClover].Leaf.CoverGreen
        [WhiteClover].Leaf.CoverDead
        [WhiteClover].Leaf.LAITotal
        [WhiteClover].Leaf.LAI
        [WhiteClover].Leaf.LAIDead
        [WhiteClover].Leaf.Height
        [WhiteClover].Leaf.PotentialBiomass.Value()
        [WhiteClover].Leaf.Transpiration
        [WhiteClover].Leaf.Fw
        [WhiteClover].Leaf.Fn
        [WhiteClover].Leaf.Photosynthesis.FCO2
        [WhiteClover].Leaf.Photosynthesis.FN
        [WhiteClover].Leaf.Photosynthesis.FT
        [WhiteClover].Leaf.Photosynthesis.FW
        [WhiteClover].Leaf.Photosynthesis.FVPD
        [WhiteClover].Leaf.FRGR
        [WhiteClover].Stolon.Live.Wt
        [WhiteClover].Stolon.Live.N
        [WhiteClover].Stolon.Live.NConc
        [WhiteClover].Stolon.Dead.Wt
        [WhiteClover].Stolon.Dead.NConc
        [WhiteClover].Petiole.Live.Wt
        [WhiteClover].Petiole.Live.N
        [WhiteClover].Petiole.Live.NConc
        [WhiteClover].Petiole.Dead.Wt
        [WhiteClover].Petiole.Dead.NConc
        [WhiteClover].Inflorescence.Live.Wt
        [WhiteClover].Inflorescence.Live.N
        [WhiteClover].Inflorescence.Live.NConc
        [WhiteClover].Inflorescence.Dead.Wt
        [WhiteClover].Inflorescence.Dead.NConc
        [WhiteClover].Nodule.Live.Wt
        [WhiteClover].Nodule.Live.N
        [WhiteClover].Nodule.Live.NConc
        [WhiteClover].Nodule.Dead.Wt
        [WhiteClover].Nodule.Dead.NConc
        [WhiteClover].Taproot.Live.Wt
        [WhiteClover].Taproot.Live.N
        [WhiteClover].Taproot.Live.NConc
        [WhiteClover].Taproot.Dead.Wt
        [WhiteClover].Taproot.Dead.NConc
        [WhiteClover].Root.Live.Wt
        [WhiteClover].Root.Live.N
        [WhiteClover].Root.Live.NConc
        [WhiteClover].Root.Dead.Wt
        [WhiteClover].Root.Dead.NConc
        [WhiteClover].Root.Depth
        [WhiteClover].Root.WaterDemand
        [WhiteClover].Root.WaterUptake
        [WhiteClover].Leaf.Live.StructuralWt
        [WhiteClover].Leaf.Live.StorageWt
        [WhiteClover].Leaf.Live.MetabolicWt
        [WhiteClover].Leaf.Live.StructuralN
        [WhiteClover].Leaf.Live.StorageN
        [WhiteClover].Leaf.Live.MetabolicN
        [WhiteClover].Leaf.Dead.StructuralWt
        [WhiteClover].Leaf.Dead.StorageWt
        [WhiteClover].Leaf.Dead.MetabolicWt
        [WhiteClover].Leaf.Dead.StructuralN
        [WhiteClover].Leaf.Dead.StorageN
        [WhiteClover].Leaf.Dead.MetabolicN
        [WhiteClover].Stolon.Live.StructuralWt
        [WhiteClover].Stolon.Live.StorageWt
        [WhiteClover].Stolon.Live.MetabolicWt
        [WhiteClover].Stolon.Live.StructuralN
        [WhiteClover].Stolon.Live.StorageN
        [WhiteClover].Petiole.Live.StructuralWt
        [WhiteClover].Petiole.Live.StorageWt
        [WhiteClover].Petiole.Live.MetabolicWt
        [WhiteClover].Petiole.Live.StructuralN
        [WhiteClover].Petiole.Live.StorageN
        [WhiteClover].Inflorescence.Live.StructuralWt
        [WhiteClover].Inflorescence.Live.StorageWt
        [WhiteClover].Inflorescence.Live.StructuralN
        [WhiteClover].Inflorescence.Live.StorageN
        [WhiteClover].Root.Live.StructuralWt
        [WhiteClover].Root.Live.StorageWt
        [WhiteClover].Root.Live.StructuralN
        [WhiteClover].Root.Live.StorageN
        [WhiteClover].Taproot.Live.StructuralWt
        [WhiteClover].Taproot.Live.StorageWt
        [WhiteClover].Taproot.Live.StructuralN
        [WhiteClover].Taproot.Live.StorageN
        [WhiteClover].Nodule.Live.StructuralWt
        [WhiteClover].Nodule.Live.StorageWt
        [WhiteClover].Nodule.Live.StructuralN
        [WhiteClover].Nodule.Live.StorageN
        [WhiteClover].Leaf.Live.StructuralNConc
        [WhiteClover].Leaf.Live.StorageNConc
        [WhiteClover].Root.Live.StructuralNConc
        [WhiteClover].Root.Live.StorageNConc
        [WhiteClover].Leaf.DMDemandFunction.PartitionFraction.Value()
        [WhiteClover].Stolon.DMDemandFunction.PartitionFraction.Value()
        [WhiteClover].Petiole.DMDemandFunction.PartitionFraction.Value()
        [WhiteClover].Inflorescence.DMDemandFunction.PartitionFraction.Value()
        [WhiteClover].Root.PartitionFraction.Value()
        [WhiteClover].Taproot.DMDemandFunction.PartitionFraction.Value()
        [WhiteClover].Nodule.DMDemandFunction.PartitionFraction.Value()
        [WhiteClover].Leaf.Allocated.Wt
        [WhiteClover].Stolon.Allocated.Wt
        [WhiteClover].Petiole.Allocated.Wt
        [WhiteClover].Inflorescence.Allocated.Wt
        [WhiteClover].Nodule.Allocated.Wt
        [WhiteClover].Taproot.Allocated.Wt
        [WhiteClover].Root.Allocated.Wt
        [WhiteClover].Leaf.Senesced.Wt
        [WhiteClover].Stolon.Senesced.Wt
        [WhiteClover].Petiole.Senesced.Wt
        [WhiteClover].Inflorescence.Senesced.Wt
        [WhiteClover].Nodule.Senesced.Wt
        [WhiteClover].Taproot.Senesced.Wt
        [WhiteClover].Root.Senesced.Wt
        [WhiteClover].Leaf.Detached.Wt
        [WhiteClover].Stolon.Detached.Wt
        [WhiteClover].Petiole.Detached.Wt
        [WhiteClover].Inflorescence.Detached.Wt
        [WhiteClover].Nodule.Detached.Wt
        [WhiteClover].Taproot.Detached.Wt
        [WhiteClover].Root.Detached.Wt
        [WhiteClover].Leaf.Removed.Wt
        [WhiteClover].Stolon.Removed.Wt
        [WhiteClover].Petiole.Removed.Wt
        [WhiteClover].Inflorescence.Removed.Wt
        [WhiteClover].Nodule.Removed.Wt
        [WhiteClover].Taproot.Removed.Wt
        [WhiteClover].Root.Removed.Wt
  DataStore
    ExcelInput Observed: FileName=Observed.xlsx; SheetNames=[Observed]
    ExcelInput ObservedMeans: FileName=Observed.xlsx; SheetNames=[ObservedMeans]
    PredictedObserved: PredictedTableName=Report; ObservedTableName=Observed; FieldNameUsedForMatch=Date
      Tests: POName=PredictedObserved
        AcceptedStats:
          Name                            n     Slope     Intercept   SEslope    SEintercept  R2        RMSE       NSE       ME           MAE         RSR
          CumulativeHarvestedWt           670   0.973098  -29.9485    0.0146567  9.42163      0.8684    140.635    0.839787  -44.4301     102.151     0.399968
          HarvestedWt                     660   0.586704  49.1557     0.0240392  3.43319      0.475137  59.1859    0.448934  0.184493     41.8175     0.741776
          NRate                           1446  1         0           0          0            1         0          1         0            0           0
          Plantain.AboveGround.Wt         786   0.606792  55.9706     0.0241742  3.71332      0.445564  46.7556    0.387194  0.324138     32.3298     0.782321
          Plantain.AboveGroundLive.NConc  831   0.782055  0.00218145  0.0471896  0.00144903   0.248857  0.0104496  -1.28814  -0.00433935  0.00870789  1.51175
          Plantain.Population             4     0.384178  161.233     0.20613    51.0067      0.634611  47.8001    0.48864   14.5138      35.25       0.61929
        AcceptedStatsName=Name n Slope Intercept SEslope SEintercept R2 RMSE NSE ME MAE RSR
        Memo Note
          Where:
           - n: The number of PO (predicted-observed) pairs for the given variable;
           - Slope: The slope of the straight line linear regression. A perfect fit would have a value of 1;
           - Intercept: The intercept of the straight line linear regression. A perfect fit would have a value of 0;
           - SEslope: Standard error in the slope;
           - SEintercept: Standard error in the intercept.;
           - R2: The value for the coefficient of determination. It varies between 0 and 1, where 1 is a perfect fit;
           - RMSE: Root Mean Squared Error. 0 is a perfect fit. Values less than half the standard deviation of the observed data are acceptable;
           - NSE: Nash-Sutcliffe Efficiency. Indicates how well the PO data fits the 1:1 line. Ranges from -∞ to 1 with 1 being the optimal value while values  between 0 and 1 are generally viewed as acceptable. Values < 0 indicate unacceptable model performance;
           - ME: Mean Error between predicted and observed values. 0 is a perfect fit;
           - MAE: Mean Absolute Error. 0 is a perfect fit. Values less than half the standard deviation of the observed data are acceptable;
           - RSR: Ratio between the RMSE and the standard deviation of observations. 0 is a perfect fit;
    PredictedObserved PredictedObservedMeans: PredictedTableName=Report; ObservedTableName=ObservedMeans; FieldNameUsedForMatch=Date
      Tests: same as DataStore.PredictedObserved.Tests
  Folder Validation
    Memo Note
      The performance of the white clover model is evaluated in simulations based on experiments conducted in New Zealand.
    Folder New Zealand
      Experiment FRNLLincoln
        Memo
          ###FRNL Lincoln###

          Simulation setup based on field trial performed at Lincoln University Research Dairy Farm, New Zealand, between 2014 and 2016.  The experiment was part of the FRNL (Forages for Reduced Nitrogen Leaching) program (for more details see [MartinEtAl2017]).  Here only plots with pure white clover are used.
          The experiment consisted of six fertiliser treatments (N rates of 0, 50, 100, 200, 350 and 500 kg/ha/yr) in four replicates, and measurements comprised yield and quality indicators (here N content is used).
          Data supplied by Grant Edwards, Lincoln University.

          The soil at the experimental site was a Templeton fine sandy loam (an Immature Pallic soil, USDA: Udic Haplustept), the required parameters were inferred based on data from the New Zealand National Soils Database (Landcare Research).
          Weather data was obtained from nearby Broadfields weather station (NIWA).
        Factors
          Factor NRate: Specifications=[NRate]
            Operations 0
            Operations 50
              2014-10-23  [Fertiliser].Apply(Amount: 5, Type: Fertiliser.Types.UreaN, Depth: 10)
              2014-11-26  [Fertiliser].Apply(Amount: 5, Type: Fertiliser.Types.UreaN, Depth: 10)
              2014-12-30  [Fertiliser].Apply(Amount: 5, Type: Fertiliser.Types.UreaN, Depth: 10)
              2015-02-05  [Fertiliser].Apply(Amount: 5, Type: Fertiliser.Types.UreaN, Depth: 10)
              2015-03-10  [Fertiliser].Apply(Amount: 5, Type: Fertiliser.Types.UreaN, Depth: 10)
              2016-04-17  [Fertiliser].Apply(Amount: 5, Type: Fertiliser.Types.UreaN, Depth: 10)
              2015-06-09  [Fertiliser].Apply(Amount: 5, Type: Fertiliser.Types.UreaN, Depth: 10)
              2015-10-06  [Fertiliser].Apply(Amount: 5, Type: Fertiliser.Types.UreaN, Depth: 10)
              2015-11-06  [Fertiliser].Apply(Amount: 5, Type: Fertiliser.Types.UreaN, Depth: 10)
              2015-12-16  [Fertiliser].Apply(Amount: 5, Type: Fertiliser.Types.UreaN, Depth: 10)
              2016-01-21  [Fertiliser].Apply(Amount: 5, Type: Fertiliser.Types.UreaN, Depth: 10)
              2016-03-01  [Fertiliser].Apply(Amount: 5, Type: Fertiliser.Types.UreaN, Depth: 10)
              2016-04-08  [Fertiliser].Apply(Amount: 5, Type: Fertiliser.Types.UreaN, Depth: 10)
              2016-10-05  [Fertiliser].Apply(Amount: 5, Type: Fertiliser.Types.UreaN, Depth: 10)
            Operations 100
              2014-10-23  [Fertiliser].Apply(Amount: 10, Type: Fertiliser.Types.UreaN, Depth: 10)
              2014-11-26  [Fertiliser].Apply(Amount: 10, Type: Fertiliser.Types.UreaN, Depth: 10)
              2014-12-30  [Fertiliser].Apply(Amount: 10, Type: Fertiliser.Types.UreaN, Depth: 10)
              2015-02-05  [Fertiliser].Apply(Amount: 10, Type: Fertiliser.Types.UreaN, Depth: 10)
              2015-03-10  [Fertiliser].Apply(Amount: 10, Type: Fertiliser.Types.UreaN, Depth: 10)
              2016-04-17  [Fertiliser].Apply(Amount: 10, Type: Fertiliser.Types.UreaN, Depth: 10)
              2015-06-09  [Fertiliser].Apply(Amount: 10, Type: Fertiliser.Types.UreaN, Depth: 10)
              2015-10-06  [Fertiliser].Apply(Amount: 10, Type: Fertiliser.Types.UreaN, Depth: 10)
              2015-11-06  [Fertiliser].Apply(Amount: 10, Type: Fertiliser.Types.UreaN, Depth: 10)
              2015-12-16  [Fertiliser].Apply(Amount: 10, Type: Fertiliser.Types.UreaN, Depth: 10)
              2016-01-21  [Fertiliser].Apply(Amount: 10, Type: Fertiliser.Types.UreaN, Depth: 10)
              2016-03-01  [Fertiliser].Apply(Amount: 10, Type: Fertiliser.Types.UreaN, Depth: 10)
              2016-04-08  [Fertiliser].Apply(Amount: 10, Type: Fertiliser.Types.UreaN, Depth: 10)
              2016-10-05  [Fertiliser].Apply(Amount: 10, Type: Fertiliser.Types.UreaN, Depth: 10)
            Operations 200
              2014-10-23  [Fertiliser].Apply(Amount: 20, Type: Fertiliser.Types.UreaN, Depth: 10)
              2014-11-26  [Fertiliser].Apply(Amount: 20, Type: Fertiliser.Types.UreaN, Depth: 10)
              2014-12-30  [Fertiliser].Apply(Amount: 20, Type: Fertiliser.Types.UreaN, Depth: 10)
              2015-02-05  [Fertiliser].Apply(Amount: 20, Type: Fertiliser.Types.UreaN, Depth: 10)
              2015-03-10  [Fertiliser].Apply(Amount: 20, Type: Fertiliser.Types.UreaN, Depth: 10)
              2016-04-17  [Fertiliser].Apply(Amount: 20, Type: Fertiliser.Types.UreaN, Depth: 10)
              2015-06-09  [Fertiliser].Apply(Amount: 20, Type: Fertiliser.Types.UreaN, Depth: 10)
              2015-10-06  [Fertiliser].Apply(Amount: 20, Type: Fertiliser.Types.UreaN, Depth: 10)
              2015-11-06  [Fertiliser].Apply(Amount: 20, Type: Fertiliser.Types.UreaN, Depth: 10)
              2015-12-16  [Fertiliser].Apply(Amount: 20, Type: Fertiliser.Types.UreaN, Depth: 10)
              2016-01-21  [Fertiliser].Apply(Amount: 20, Type: Fertiliser.Types.UreaN, Depth: 10)
              2016-03-01  [Fertiliser].Apply(Amount: 20, Type: Fertiliser.Types.UreaN, Depth: 10)
              2016-04-08  [Fertiliser].Apply(Amount: 20, Type: Fertiliser.Types.UreaN, Depth: 10)
              2016-10-05  [Fertiliser].Apply(Amount: 20, Type: Fertiliser.Types.UreaN, Depth: 10)
            Operations 350
              2014-10-23  [Fertiliser].Apply(Amount: 35, Type: Fertiliser.Types.UreaN, Depth: 10)
              2014-11-26  [Fertiliser].Apply(Amount: 35, Type: Fertiliser.Types.UreaN, Depth: 10)
              2014-12-30  [Fertiliser].Apply(Amount: 35, Type: Fertiliser.Types.UreaN, Depth: 10)
              2015-02-05  [Fertiliser].Apply(Amount: 35, Type: Fertiliser.Types.UreaN, Depth: 10)
              2015-03-10  [Fertiliser].Apply(Amount: 35, Type: Fertiliser.Types.UreaN, Depth: 10)
              2016-04-17  [Fertiliser].Apply(Amount: 35, Type: Fertiliser.Types.UreaN, Depth: 10)
              2015-06-09  [Fertiliser].Apply(Amount: 35, Type: Fertiliser.Types.UreaN, Depth: 10)
              2015-10-06  [Fertiliser].Apply(Amount: 35, Type: Fertiliser.Types.UreaN, Depth: 10)
              2015-11-06  [Fertiliser].Apply(Amount: 35, Type: Fertiliser.Types.UreaN, Depth: 10)
              2015-12-16  [Fertiliser].Apply(Amount: 35, Type: Fertiliser.Types.UreaN, Depth: 10)
              2016-01-21  [Fertiliser].Apply(Amount: 35, Type: Fertiliser.Types.UreaN, Depth: 10)
              2016-03-01  [Fertiliser].Apply(Amount: 35, Type: Fertiliser.Types.UreaN, Depth: 10)
              2016-04-08  [Fertiliser].Apply(Amount: 35, Type: Fertiliser.Types.UreaN, Depth: 10)
              2016-10-05  [Fertiliser].Apply(Amount: 35, Type: Fertiliser.Types.UreaN, Depth: 10)
            Operations 500
              2014-10-23  [Fertiliser].Apply(Amount: 50, Type: Fertiliser.Types.UreaN, Depth: 10)
              2014-11-26  [Fertiliser].Apply(Amount: 50, Type: Fertiliser.Types.UreaN, Depth: 10)
              2014-12-30  [Fertiliser].Apply(Amount: 50, Type: Fertiliser.Types.UreaN, Depth: 10)
              2015-02-05  [Fertiliser].Apply(Amount: 50, Type: Fertiliser.Types.UreaN, Depth: 10)
              2015-03-10  [Fertiliser].Apply(Amount: 50, Type: Fertiliser.Types.UreaN, Depth: 10)
              2016-04-17  [Fertiliser].Apply(Amount: 50, Type: Fertiliser.Types.UreaN, Depth: 10)
              2015-06-09  [Fertiliser].Apply(Amount: 50, Type: Fertiliser.Types.UreaN, Depth: 10)
              2015-10-06  [Fertiliser].Apply(Amount: 50, Type: Fertiliser.Types.UreaN, Depth: 10)
              2015-11-06  [Fertiliser].Apply(Amount: 50, Type: Fertiliser.Types.UreaN, Depth: 10)
              2015-12-16  [Fertiliser].Apply(Amount: 50, Type: Fertiliser.Types.UreaN, Depth: 10)
              2016-01-21  [Fertiliser].Apply(Amount: 50, Type: Fertiliser.Types.UreaN, Depth: 10)
              2016-03-01  [Fertiliser].Apply(Amount: 50, Type: Fertiliser.Types.UreaN, Depth: 10)
              2016-04-08  [Fertiliser].Apply(Amount: 50, Type: Fertiliser.Types.UreaN, Depth: 10)
              2016-10-05  [Fertiliser].Apply(Amount: 50, Type: Fertiliser.Types.UreaN, Depth: 10)
        Simulation FRNLLincoln
          Clock: StartDate=2014-03-01; EndDate=2016-05-31
          Weather: FileName=Lincoln-Broadfields.met
          Summary summaryfile
          SoilArbitrator Soil Arbitrator
          Zone Field: Area=1; Slope=0
            Folder Management
              Operations Sowing
                2014-03-20  [WhiteClover].Sow(population: 500, cultivar: "Kopu", depth: 5, rowSpacing: 150)
              Operations IrrigationSchedule
                2014-10-31  [Irrigation].Apply(amount: 7)
                2014-11-03  [Irrigation].Apply(amount: 7)
                2014-11-05  [Irrigation].Apply(amount: 8)
                2014-11-07  [Irrigation].Apply(amount: 8)
                2014-11-10  [Irrigation].Apply(amount: 7)
                2014-11-11  [Irrigation].Apply(amount: 7)
                2014-11-12  [Irrigation].Apply(amount: 8)
                2014-11-17  [Irrigation].Apply(amount: 9)
                2014-11-18  [Irrigation].Apply(amount: 7)
                2014-11-19  [Irrigation].Apply(amount: 7)
                2014-11-24  [Irrigation].Apply(amount: 8)
                2014-11-25  [Irrigation].Apply(amount: 9)
                2014-11-27  [Irrigation].Apply(amount: 10)
                2014-12-01  [Irrigation].Apply(amount: 8)
                2014-12-02  [Irrigation].Apply(amount: 8)
                2014-12-04  [Irrigation].Apply(amount: 7)
                2014-12-08  [Irrigation].Apply(amount: 7)
                2014-12-09  [Irrigation].Apply(amount: 7)
                2014-12-12  [Irrigation].Apply(amount: 8)
                2014-12-15  [Irrigation].Apply(amount: 10)
                2014-12-17  [Irrigation].Apply(amount: 10)
                2014-12-19  [Irrigation].Apply(amount: 7)
                2014-12-20  [Irrigation].Apply(amount: 7)
                2014-12-21  [Irrigation].Apply(amount: 8)
                2014-12-22  [Irrigation].Apply(amount: 10)
                2014-12-25  [Irrigation].Apply(amount: 8)
                2014-12-26  [Irrigation].Apply(amount: 8)
                2014-12-27  [Irrigation].Apply(amount: 7)
                2014-12-28  [Irrigation].Apply(amount: 10)
                2014-12-29  [Irrigation].Apply(amount: 8)
                2014-12-30  [Irrigation].Apply(amount: 8)
                2015-01-02  [Irrigation].Apply(amount: 7)
                2015-01-05  [Irrigation].Apply(amount: 10)
                2015-01-08  [Irrigation].Apply(amount: 8)
                2015-01-09  [Irrigation].Apply(amount: 9)
                2015-01-12  [Irrigation].Apply(amount: 7)
                2015-01-13  [Irrigation].Apply(amount: 7)
                2015-01-16  [Irrigation].Apply(amount: 8)
                2015-01-19  [Irrigation].Apply(amount: 7)
                2015-01-20  [Irrigation].Apply(amount: 7)
                2015-01-21  [Irrigation].Apply(amount: 8)
                2015-01-26  [Irrigation].Apply(amount: 10)
                2015-01-27  [Irrigation].Apply(amount: 10)
                2015-01-29  [Irrigation].Apply(amount: 8)
                2015-02-02  [Irrigation].Apply(amount: 10)
                2015-02-04  [Irrigation].Apply(amount: 8)
                2015-02-05  [Irrigation].Apply(amount: 7)
                2015-02-09  [Irrigation].Apply(amount: 8)
                2015-02-11  [Irrigation].Apply(amount: 7)
                2015-02-12  [Irrigation].Apply(amount: 10)
                2015-02-16  [Irrigation].Apply(amount: 10)
                2015-02-17  [Irrigation].Apply(amount: 10)
                2015-02-18  [Irrigation].Apply(amount: 8)
                2015-02-24  [Irrigation].Apply(amount: 10)
                2015-02-26  [Irrigation].Apply(amount: 7)
                2015-02-27  [Irrigation].Apply(amount: 8)
                2015-03-02  [Irrigation].Apply(amount: 7)
                2015-03-03  [Irrigation].Apply(amount: 7)
                2015-03-05  [Irrigation].Apply(amount: 8)
                2015-03-10  [Irrigation].Apply(amount: 8)
                2015-03-12  [Irrigation].Apply(amount: 9)
                2015-03-13  [Irrigation].Apply(amount: 7)
                2015-03-16  [Irrigation].Apply(amount: 10)
                2015-03-19  [Irrigation].Apply(amount: 9)
                2015-03-20  [Irrigation].Apply(amount: 8)
                2015-03-23  [Irrigation].Apply(amount: 9)
                2015-03-24  [Irrigation].Apply(amount: 7)
                2015-03-26  [Irrigation].Apply(amount: 10)
                2015-03-30  [Irrigation].Apply(amount: 7)
                2015-04-02  [Irrigation].Apply(amount: 10)
                2015-04-03  [Irrigation].Apply(amount: 8)
                2015-04-06  [Irrigation].Apply(amount: 7)
                2015-04-08  [Irrigation].Apply(amount: 10)
                2015-04-17  [Irrigation].Apply(amount: 10)
                2015-05-20  [Irrigation].Apply(amount: 10)
                2015-06-09  [Irrigation].Apply(amount: 10)
                2015-09-09  [Irrigation].Apply(amount: 10)
                2015-09-30  [Irrigation].Apply(amount: 10)
                2015-10-02  [Irrigation].Apply(amount: 8)
                2015-10-06  [Irrigation].Apply(amount: 10)
                2015-10-09  [Irrigation].Apply(amount: 10)
                2015-10-12  [Irrigation].Apply(amount: 8)
                2015-10-13  [Irrigation].Apply(amount: 7)
                2015-10-16  [Irrigation].Apply(amount: 10)
                2015-10-20  [Irrigation].Apply(amount: 10)
                2015-10-21  [Irrigation].Apply(amount: 8)
                2015-10-23  [Irrigation].Apply(amount: 7)
                2015-10-26  [Irrigation].Apply(amount: 7)
                2015-10-27  [Irrigation].Apply(amount: 9)
                2015-11-02  [Irrigation].Apply(amount: 10)
                2015-11-03  [Irrigation].Apply(amount: 8)
                2015-11-04  [Irrigation].Apply(amount: 9)
                2015-11-06  [Irrigation].Apply(amount: 9)
                2015-11-09  [Irrigation].Apply(amount: 10)
                2015-11-11  [Irrigation].Apply(amount: 7)
                2015-11-16  [Irrigation].Apply(amount: 10)
                2015-11-18  [Irrigation].Apply(amount: 9)
                2015-11-20  [Irrigation].Apply(amount: 7)
                2015-11-23  [Irrigation].Apply(amount: 10)
                2015-11-24  [Irrigation].Apply(amount: 8)
                2015-11-25  [Irrigation].Apply(amount: 7)
                2015-11-27  [Irrigation].Apply(amount: 9)
                2015-11-30  [Irrigation].Apply(amount: 7)
                2015-12-01  [Irrigation].Apply(amount: 7)
                2015-12-04  [Irrigation].Apply(amount: 9)
                2015-12-07  [Irrigation].Apply(amount: 10)
                2015-12-09  [Irrigation].Apply(amount: 9)
                2015-12-10  [Irrigation].Apply(amount: 9)
                2015-12-22  [Irrigation].Apply(amount: 8)
                2015-12-24  [Irrigation].Apply(amount: 9)
                2015-12-26  [Irrigation].Apply(amount: 8)
                2015-12-29  [Irrigation].Apply(amount: 7)
                2015-12-31  [Irrigation].Apply(amount: 7)
                2016-01-01  [Irrigation].Apply(amount: 10)
                2016-01-07  [Irrigation].Apply(amount: 10)
                2016-01-09  [Irrigation].Apply(amount: 7)
                2016-01-11  [Irrigation].Apply(amount: 7)
                2016-01-12  [Irrigation].Apply(amount: 7)
                2016-01-13  [Irrigation].Apply(amount: 9)
                2016-01-15  [Irrigation].Apply(amount: 10)
                2016-01-21  [Irrigation].Apply(amount: 7)
                2016-01-25  [Irrigation].Apply(amount: 8)
                2016-01-30  [Irrigation].Apply(amount: 7)
                2016-02-02  [Irrigation].Apply(amount: 10)
                2016-02-03  [Irrigation].Apply(amount: 10)
                2016-02-05  [Irrigation].Apply(amount: 9)
                2016-02-08  [Irrigation].Apply(amount: 10)
                2016-02-11  [Irrigation].Apply(amount: 10)
                2016-02-12  [Irrigation].Apply(amount: 7)
                2016-02-15  [Irrigation].Apply(amount: 8)
                2016-02-16  [Irrigation].Apply(amount: 8)
                2016-02-22  [Irrigation].Apply(amount: 7)
                2016-02-23  [Irrigation].Apply(amount: 7)
                2016-02-25  [Irrigation].Apply(amount: 7)
                2016-02-26  [Irrigation].Apply(amount: 7)
                2016-03-01  [Irrigation].Apply(amount: 7)
                2016-03-02  [Irrigation].Apply(amount: 8)
                2016-03-04  [Irrigation].Apply(amount: 10)
                2016-03-07  [Irrigation].Apply(amount: 9)
                2016-03-08  [Irrigation].Apply(amount: 4)
                2016-03-10  [Irrigation].Apply(amount: 8)
                2016-03-14  [Irrigation].Apply(amount: 8)
                2016-03-15  [Irrigation].Apply(amount: 10)
                2016-03-18  [Irrigation].Apply(amount: 9)
                2016-03-21  [Irrigation].Apply(amount: 10)
                2016-03-22  [Irrigation].Apply(amount: 9)
                2016-03-23  [Irrigation].Apply(amount: 9)
                2016-03-28  [Irrigation].Apply(amount: 8)
                2016-04-02  [Irrigation].Apply(amount: 10)
                2016-04-08  [Irrigation].Apply(amount: 10)
                2016-05-04  [Irrigation].Apply(amount: 10)
                2016-08-31  [Irrigation].Apply(amount: 10)
                2016-10-05  [Irrigation].Apply(amount: 10)
                2016-10-18  [Irrigation].Apply(amount: 10)
                2016-10-26  [Irrigation].Apply(amount: 10)
              Operations NRate
              Manager Defoliate
                Message =
```csharp
using System;
using Models.Core;
using System.Collections.Generic;
using System.Text;
using Models;
using Models.Soils;
using Models.PMF;
using System.Xml.Serialization;
using APSIM.Shared.Utilities;

namespace Models
{
    [Serializable]
    public class Script : Model
    {
        [Description("This script is set in 'Replacements':")]
        public string Message { get; set; }
    }
}
```
              Operations DefoliationSchedule
                2014-10-23  [Defoliate].Script.Defoliate(defoliationType: "Cut", amountDM: 40, amountType: "ResidualDM", duration: 1)
                2014-11-25  [Defoliate].Script.Defoliate(defoliationType: "Cut", amountDM: 40, amountType: "ResidualDM", duration: 1)
                2014-12-30  [Defoliate].Script.Defoliate(defoliationType: "Cut", amountDM: 40, amountType: "ResidualDM", duration: 1)
                2015-02-04  [Defoliate].Script.Defoliate(defoliationType: "Cut", amountDM: 40, amountType: "ResidualDM", duration: 1)
                2015-03-10  [Defoliate].Script.Defoliate(defoliationType: "Cut", amountDM: 40, amountType: "ResidualDM", duration: 1)
                2015-04-16  [Defoliate].Script.Defoliate(defoliationType: "Cut", amountDM: 40, amountType: "ResidualDM", duration: 1)
                2015-06-09  [Defoliate].Script.Defoliate(defoliationType: "Cut", amountDM: 40, amountType: "ResidualDM", duration: 1)
                2015-10-06  [Defoliate].Script.Defoliate(defoliationType: "Cut", amountDM: 40, amountType: "ResidualDM", duration: 1)
                2015-11-16  [Defoliate].Script.Defoliate(defoliationType: "Cut", amountDM: 40, amountType: "ResidualDM", duration: 1)
                2015-12-16  [Defoliate].Script.Defoliate(defoliationType: "Cut", amountDM: 40, amountType: "ResidualDM", duration: 1)
                2016-01-25  [Defoliate].Script.Defoliate(defoliationType: "Cut", amountDM: 40, amountType: "ResidualDM", duration: 1)
                2016-02-24  [Defoliate].Script.Defoliate(defoliationType: "Cut", amountDM: 40, amountType: "ResidualDM", duration: 1)
                2016-04-09  [Defoliate].Script.Defoliate(defoliationType: "Cut", amountDM: 40, amountType: "ResidualDM", duration: 1)
                2016-05-24  [Defoliate].Script.Defoliate(defoliationType: "Cut", amountDM: 40, amountType: "ResidualDM", duration: 1)
                2016-10-03  [Defoliate].Script.Defoliate(defoliationType: "Cut", amountDM: 40, amountType: "ResidualDM", duration: 1)
                2016-11-07  [Defoliate].Script.Defoliate(defoliationType: "Cut", amountDM: 40, amountType: "ResidualDM", duration: 1)
              Manager ExtraVariables
```csharp
// This will be replaced by the "ExtraVariables" section in "Replacements"

using System;
using Models.Core;

namespace Models
{
    [Serializable] 
    public class Script : Model
    {
    }
}
```
            MicroClimate: a_interception=0; b_interception=1; c_interception=0; d_interception=0; soil_albedo=0.23; sun_angle=15; soil_heat_flux_fraction=0.4; night_interception_fraction=0.5; refheight=2; albedo=0.15; emissivity=0.96; RadIntTotal=0
            Irrigation
            Fertiliser
            SurfaceOrganicMatter: PoolName=grass; type=grass; mass=500; standing_fraction=0; cnr=40; CriticalResidueWeight=2000; OptimumDecompTemp=20; MaxCumulativeEOS=20; CNRatioDecompCoeff=0.277; CNRatioDecompThreshold=25; TotalLeachRain=25; MinRainToLeach=10; CriticalMinimumOrganicC=0.004; DefaultCPRatio=0; DefaultStandingFraction=0; StandingExtinctCoeff=0.5; FractionFaecesAdded=0.5
              Pools:
                {PoolName=grass, ResidueType=grass, Mass=500, CNRatio=40, StandingFraction=0}
              ResidueTypes ResidueTypesList: LoadFromResource=ResidueTypes
            Soil TempletonPaparua: SoilType=Udic Haplustept (US),  Immature Pallic Soil (NZ); LocalName=Templeton Fine Sandy Loam; Site=LURDF; NearestTown=Lincoln; Region=Canterbury; Country=New Zealand; Latitude=0; Longitude=0; DataSource=Adapted based on data from the NZ Natioanl Soils Database
              Comments=Different references name the soil at the site as either Templeton or Paparua (very similar soils)
              Analysis: PHUnits=Water; BoronUnits=HotWater
                Thickness  Rocks  PH  CEC   ParticleSizeSand  ParticleSizeSilt  ParticleSizeClay
                150        0      6   13.9  17.4              60.9              21.8
                150        0      6   9.9   24.8              56.9              18.3
                200        0      6   10.1  21                59.5              19.5
                250        0      6   7.4   37                52.6              10.3
                250        0      6   7.1   43.6              46.9              9.5
                500        0      6   7.6   24.2              59.3              16.6
              Water
                Thickness  BD    AirDry  LL15   DUL    SAT    KS
                150        1.35  0.057   0.17   0.34   0.439  2913.761
                150        1.43  0.159   0.177  0.325  0.409  1052.63
                200        1.54  0.186   0.186  0.327  0.362  182.149
                250        1.54  0.132   0.132  0.251  0.358  1272.997
                250        1.48  0.116   0.116  0.24   0.365  1767.199
                500        1.41  0.138   0.138  0.273  0.39   586.553
                SoilCrop WhiteCloverSoil: LL=[0.17, 0.18, 0.19, 0.13, 0.12, 0.14]; KL=[0.12, 0.11, 0.06, 0.03, 0.01, 0.01]; XF=[1, 1, 1, 1, 1, 1]
              SoilWater: SummerDate=1-Nov; SummerU=6; SummerCona=3.5; WinterDate=1-apr; WinterU=2; WinterCona=2; DiffusConst=88; DiffusSlope=35; Salb=0.13; CN2Bare=73; CNRed=20; CNCov=0.8; max_pond=0; Thickness=[150, 150, 200, 250, 250, 500]; SWCON=[0.5, 0.41, 0.27, 0.39, 0.49, 0.42]; residueinterception=0
              SoilNitrogen: fom_type=[default, manure, mucuna, lablab, shemp, stable]; fract_carb=[0.2, 0.3, 0.54, 0.57, 0.45, 0]; fract_cell=[0.7, 0.3, 0.37, 0.37, 0.47, 0.1]; fract_lign=[0.1, 0.4, 0.09, 0.06, 0.08, 0.9]
              SoilOrganicMatter: RootCN=40; RootWt=1000; SoilCN=11.3; EnrACoeff=7.4; EnrBCoeff=0.2; OCUnits=Total
                Thickness  OC    FBiom  FInert
                150        2.6   0.045  0.475
                150        1.01  0.025  0.695
                200        0.4   0.022  0.845
                250        0.19  0.02   0.89
                250        0.22  0.01   0.96
                500        0.18  0.01   0.99
              InitialWater Initial water: PercentMethod=FilledFromTop; FractionFull=0.99
              Sample Initial nitrogen: NO3Units=kgha; NH4Units=kgha; SWUnits=Volumetric; OCUnits=Total; PHUnits=Water
                Thickness  NO3     NH4
                150        10.125  1
                150        8.58    0.75
                450        10.395  1.386
                250        5.55    0.5
                500        5.5     0.5
              CERESSoilTemperature
            Plant WhiteClover: ResourceName=Plantain; CropType=Plantain
            Report: EventNames=[Clock].DoReport
            SoluteManager
      Experiment FRNLRuakura
        Memo
          ###FRNL Ruakura###

          This simulation setup was based on field trials performed at DairyNZ's Scott Farm, in Ruakura, New Zealand, between 2014 and 2016.  The experiment was part of the FRNL (Forages for Reduced Nitrogen Leaching) program and the data is basically unpublished (references will be added when this come about).  Here only plots with pure white clover are used.
          The experiment consisted of six fertiliser treatments (N rates of 0, 50, 100, 200, 350 and 500 kg/ha/yr) in three replicates, and measurements comprised yield and quality indicators (here N content is used).
          Observed data supplied by Grant Edwards, Lincoln University.

          The soil at the experimental site was a Horotiu silt loam (an Orthic Allophanic soil; USDA: Typic Udivitrand), the parameters required were inferred using data from the New Zealand National Soils Database (Landcare Research).
          Weather data was obtained from nearby Ruakura weather station (NIWA).
        Factors
          Factor NRate: Specifications=[NRate]
            Operations 0
            Operations 50
              2014-12-22  [Fertiliser].Apply(Amount: 5, Type: Fertiliser.Types.UreaN, Depth: 10)
              2015-01-19  [Fertiliser].Apply(Amount: 5, Type: Fertiliser.Types.UreaN, Depth: 10)
              2015-03-03  [Fertiliser].Apply(Amount: 5, Type: Fertiliser.Types.UreaN, Depth: 10)
              2015-04-21  [Fertiliser].Apply(Amount: 5, Type: Fertiliser.Types.UreaN, Depth: 10)
              2015-06-10  [Fertiliser].Apply(Amount: 5, Type: Fertiliser.Types.UreaN, Depth: 10)
              2015-09-09  [Fertiliser].Apply(Amount: 5, Type: Fertiliser.Types.UreaN, Depth: 10)
              2015-10-19  [Fertiliser].Apply(Amount: 5, Type: Fertiliser.Types.UreaN, Depth: 10)
              2015-11-19  [Fertiliser].Apply(Amount: 5, Type: Fertiliser.Types.UreaN, Depth: 10)
              2015-12-22  [Fertiliser].Apply(Amount: 5, Type: Fertiliser.Types.UreaN, Depth: 10)
              2016-02-03  [Fertiliser].Apply(Amount: 5, Type: Fertiliser.Types.UreaN, Depth: 10)
              2016-05-06  [Fertiliser].Apply(Amount: 5, Type: Fertiliser.Types.UreaN, Depth: 10)
              2016-07-12  [Fertiliser].Apply(Amount: 5, Type: Fertiliser.Types.UreaN, Depth: 10)
              2016-09-14  [Fertiliser].Apply(Amount: 5, Type: Fertiliser.Types.UreaN, Depth: 10)
            Operations 100
              2014-12-22  [Fertiliser].Apply(Amount: 10, Type: Fertiliser.Types.UreaN, Depth: 10)
              2015-01-19  [Fertiliser].Apply(Amount: 10, Type: Fertiliser.Types.UreaN, Depth: 10)
              2015-03-03  [Fertiliser].Apply(Amount: 10, Type: Fertiliser.Types.UreaN, Depth: 10)
              2015-04-21  [Fertiliser].Apply(Amount: 10, Type: Fertiliser.Types.UreaN, Depth: 10)
              2015-06-10  [Fertiliser].Apply(Amount: 10, Type: Fertiliser.Types.UreaN, Depth: 10)
              2015-09-09  [Fertiliser].Apply(Amount: 10, Type: Fertiliser.Types.UreaN, Depth: 10)
              2015-10-19  [Fertiliser].Apply(Amount: 10, Type: Fertiliser.Types.UreaN, Depth: 10)
              2015-11-19  [Fertiliser].Apply(Amount: 10, Type: Fertiliser.Types.UreaN, Depth: 10)
              2015-12-22  [Fertiliser].Apply(Amount: 10, Type: Fertiliser.Types.UreaN, Depth: 10)
              2016-02-03  [Fertiliser].Apply(Amount: 10, Type: Fertiliser.Types.UreaN, Depth: 10)
              2016-05-06  [Fertiliser].Apply(Amount: 10, Type: Fertiliser.Types.UreaN, Depth: 10)
              2016-07-12  [Fertiliser].Apply(Amount: 10, Type: Fertiliser.Types.UreaN, Depth: 10)
              2016-09-14  [Fertiliser].Apply(Amount: 10, Type: Fertiliser.Types.UreaN, Depth: 10)
            Operations 200
              2014-12-22  [Fertiliser].Apply(Amount: 20, Type: Fertiliser.Types.UreaN, Depth: 10)
              2015-01-19  [Fertiliser].Apply(Amount: 20, Type: Fertiliser.Types.UreaN, Depth: 10)
              2015-03-03  [Fertiliser].Apply(Amount: 20, Type: Fertiliser.Types.UreaN, Depth: 10)
              2015-04-21  [Fertiliser].Apply(Amount: 20, Type: Fertiliser.Types.UreaN, Depth: 10)
              2015-06-10  [Fertiliser].Apply(Amount: 20, Type: Fertiliser.Types.UreaN, Depth: 10)
              2015-09-09  [Fertiliser].Apply(Amount: 20, Type: Fertiliser.Types.UreaN, Depth: 10)
              2015-10-19  [Fertiliser].Apply(Amount: 20, Type: Fertiliser.Types.UreaN, Depth: 10)
              2015-11-19  [Fertiliser].Apply(Amount: 20, Type: Fertiliser.Types.UreaN, Depth: 10)
              2015-12-22  [Fertiliser].Apply(Amount: 20, Type: Fertiliser.Types.UreaN, Depth: 10)
              2016-02-03  [Fertiliser].Apply(Amount: 20, Type: Fertiliser.Types.UreaN, Depth: 10)
              2016-05-06  [Fertiliser].Apply(Amount: 20, Type: Fertiliser.Types.UreaN, Depth: 10)
              2016-07-12  [Fertiliser].Apply(Amount: 20, Type: Fertiliser.Types.UreaN, Depth: 10)
              2016-09-14  [Fertiliser].Apply(Amount: 20, Type: Fertiliser.Types.UreaN, Depth: 10)
            Operations 350
              2014-12-22  [Fertiliser].Apply(Amount: 35, Type: Fertiliser.Types.UreaN, Depth: 10)
              2015-01-19  [Fertiliser].Apply(Amount: 35, Type: Fertiliser.Types.UreaN, Depth: 10)
              2015-03-03  [Fertiliser].Apply(Amount: 35, Type: Fertiliser.Types.UreaN, Depth: 10)
              2015-04-21  [Fertiliser].Apply(Amount: 35, Type: Fertiliser.Types.UreaN, Depth: 10)
              2015-06-10  [Fertiliser].Apply(Amount: 35, Type: Fertiliser.Types.UreaN, Depth: 10)
              2015-09-09  [Fertiliser].Apply(Amount: 35, Type: Fertiliser.Types.UreaN, Depth: 10)
              2015-10-19  [Fertiliser].Apply(Amount: 35, Type: Fertiliser.Types.UreaN, Depth: 10)
              2015-11-19  [Fertiliser].Apply(Amount: 35, Type: Fertiliser.Types.UreaN, Depth: 10)
              2015-12-22  [Fertiliser].Apply(Amount: 35, Type: Fertiliser.Types.UreaN, Depth: 10)
              2016-02-03  [Fertiliser].Apply(Amount: 35, Type: Fertiliser.Types.UreaN, Depth: 10)
              2016-05-06  [Fertiliser].Apply(Amount: 35, Type: Fertiliser.Types.UreaN, Depth: 10)
              2016-07-12  [Fertiliser].Apply(Amount: 35, Type: Fertiliser.Types.UreaN, Depth: 10)
              2016-09-14  [Fertiliser].Apply(Amount: 35, Type: Fertiliser.Types.UreaN, Depth: 10)
            Operations 500
              2014-12-22  [Fertiliser].Apply(Amount: 50, Type: Fertiliser.Types.UreaN, Depth: 10)
              2015-01-19  [Fertiliser].Apply(Amount: 50, Type: Fertiliser.Types.UreaN, Depth: 10)
              2015-03-03  [Fertiliser].Apply(Amount: 50, Type: Fertiliser.Types.UreaN, Depth: 10)
              2015-04-21  [Fertiliser].Apply(Amount: 50, Type: Fertiliser.Types.UreaN, Depth: 10)
              2015-06-10  [Fertiliser].Apply(Amount: 50, Type: Fertiliser.Types.UreaN, Depth: 10)
              2015-09-09  [Fertiliser].Apply(Amount: 50, Type: Fertiliser.Types.UreaN, Depth: 10)
              2015-10-19  [Fertiliser].Apply(Amount: 50, Type: Fertiliser.Types.UreaN, Depth: 10)
              2015-11-19  [Fertiliser].Apply(Amount: 50, Type: Fertiliser.Types.UreaN, Depth: 10)
              2015-12-22  [Fertiliser].Apply(Amount: 50, Type: Fertiliser.Types.UreaN, Depth: 10)
              2016-02-03  [Fertiliser].Apply(Amount: 50, Type: Fertiliser.Types.UreaN, Depth: 10)
              2016-05-06  [Fertiliser].Apply(Amount: 50, Type: Fertiliser.Types.UreaN, Depth: 10)
              2016-07-12  [Fertiliser].Apply(Amount: 50, Type: Fertiliser.Types.UreaN, Depth: 10)
              2016-09-14  [Fertiliser].Apply(Amount: 50, Type: Fertiliser.Types.UreaN, Depth: 10)
        Simulation FRNLRuakura
          Clock: StartDate=2014-06-01; EndDate=2016-06-30
          Weather: FileName=Ruakura.met
          Summary summaryfile
          SoilArbitrator Soil Arbitrator
          Zone Field: Area=1; Slope=0
            Folder Management
              Operations Sowing
                2014-10-24  [WhiteClover].Sow(population: 500, cultivar: "Kopu", depth: 5, rowSpacing: 150)
              Operations NRate
              Operations BaseFertiliser
                2014-10-13  [Fertiliser].Apply(Amount: 26.4, Type: Fertiliser.Types.UreaN, Depth: 10)
                2014-12-23  [Fertiliser].Apply(Amount: 3.9, Type: Fertiliser.Types.UreaN, Depth: 10)
              Manager Defoliate: same as Validation.New Zealand.FRNLLincoln.FRNLLincoln.Field.Management.Defoliate
              Operations DefoliationSchedule
                2015-01-14  [Defoliate].Script.Defoliate(defoliationType: "Cut", amountDM: 60, amountType: "ResidualDM", duration: 1)
                2015-03-02  [Defoliate].Script.Defoliate(defoliationType: "Cut", amountDM: 60, amountType: "ResidualDM", duration: 1)
                2015-04-20  [Defoliate].Script.Defoliate(defoliationType: "Cut", amountDM: 60, amountType: "ResidualDM", duration: 1)
                2015-06-08  [Defoliate].Script.Defoliate(defoliationType: "Cut", amountDM: 60, amountType: "ResidualDM", duration: 1)
                2015-09-03  [Defoliate].Script.Defoliate(defoliationType: "Cut", amountDM: 60, amountType: "ResidualDM", duration: 1)
                2015-10-14  [Defoliate].Script.Defoliate(defoliationType: "Cut", amountDM: 60, amountType: "ResidualDM", duration: 1)
                2015-11-17  [Defoliate].Script.Defoliate(defoliationType: "Cut", amountDM: 60, amountType: "ResidualDM", duration: 1)
                2015-12-21  [Defoliate].Script.Defoliate(defoliationType: "Cut", amountDM: 60, amountType: "ResidualDM", duration: 1)
                2016-02-02  [Defoliate].Script.Defoliate(defoliationType: "Cut", amountDM: 60, amountType: "ResidualDM", duration: 1)
                2016-05-02  [Defoliate].Script.Defoliate(defoliationType: "Cut", amountDM: 60, amountType: "ResidualDM", duration: 1)
                2016-07-11  [Defoliate].Script.Defoliate(defoliationType: "Cut", amountDM: 60, amountType: "ResidualDM", duration: 1)
                2016-09-12  [Defoliate].Script.Defoliate(defoliationType: "Cut", amountDM: 60, amountType: "ResidualDM", duration: 1)
              Manager ExtraVariables
                script: same as in Validation.New Zealand.FRNLLincoln.FRNLLincoln.Field.Management.ExtraVariables
            MicroClimate: a_interception=0; b_interception=1; c_interception=0; d_interception=0; soil_albedo=0.23; sun_angle=15; soil_heat_flux_fraction=0.4; night_interception_fraction=0.5; refheight=2; albedo=0.15; emissivity=0.96; RadIntTotal=0
            Irrigation
            Fertiliser
            SurfaceOrganicMatter: same as Validation.New Zealand.FRNLLincoln.FRNLLincoln.Field.SurfaceOrganicMatter
            Soil HorotiuSoil: SoilType=Typic Udivitrand (US), Typic Orthic Allophanic Soil (NZ); LocalName=Horotiu silt loam; Site=Ruakura; NearestTown=Hamilton; Region=Waikato; Country=New Zealand; Latitude=0; Longitude=0; DataSource=Based primarily on data from Close et al, 2003
              Analysis: PHUnits=Water; BoronUnits=HotWater
                Thickness  Rocks  PH  CEC   ParticleSizeSand  ParticleSizeSilt  ParticleSizeClay
                200        0      6   23.1  47                33                20
                200        0      6   17.2  65                17                19
                130        2      6   12.4  76                13                11
                140        5      6   10    84                10                7
                380        5      6   7.2   88                8                 5
                230        19     6   3.1   91                6                 3
                220        33     6   1.6   94                5                 1
              Water
                Thickness  BD    AirDry  LL15   DUL    SAT    KS
                200        0.88  0.114   0.228  0.373  0.581  553
                200        0.85  0.209   0.22   0.34   0.609  5083
                130        1.03  0.182   0.182  0.323  0.54   8353
                140        1.11  0.15    0.15   0.282  0.5    13589
                380        1.11  0.142   0.142  0.2    0.5    38963
                230        1.03  0.103   0.103  0.16   0.446  45280
                220        1.03  0.08    0.08   0.13   0.37   53606
                SoilCrop WhiteCloverSoil: LL=[0.23, 0.22, 0.18, 0.15, 0.14, 0.1, 0.08]; KL=[0.1, 0.08, 0.05, 0.02, 0.01, 0.01, 0]; XF=[1, 1, 1, 1, 1, 1, 0.5]
              SoilWater: SummerDate=21-Sep; SummerU=6; SummerCona=3.5; WinterDate=23-Mar; WinterU=6; WinterCona=2.5; DiffusConst=88; DiffusSlope=35; Salb=0.2; CN2Bare=0.7; CNRed=20; CNCov=0.8; max_pond=0; Thickness=[200, 200, 130, 140, 380, 230, 220]; SWCON=[0.55, 0.6, 0.7, 0.7, 0.75, 0.8, 0.8]; residueinterception=0
              SoilNitrogen: fom_type=[default, manure, mucuna, lablab, shemp, stable]; fract_carb=[0.2, 0.3, 0.54, 0.57, 0.45, 0]; fract_cell=[0.7, 0.3, 0.37, 0.37, 0.47, 0.1]; fract_lign=[0.1, 0.4, 0.09, 0.06, 0.08, 0.9]
              SoilOrganicMatter: RootCN=40; RootWt=1000; SoilCN=12.5; EnrACoeff=7.4; EnrBCoeff=0.2; OCUnits=Total
                Thickness  OC    FBiom  FInert
                200        8     0.06   0.6
                200        1.88  0.03   0.645
                130        0.93  0.021  0.675
                140        0.43  0.01   0.7
                380        0.13  0.01   0.78
                230        0.1   0.01   0.87
                220        0.07  0.01   0.95
              InitialWater Initial water: PercentMethod=EvenlyDistributed; FractionFull=0.9
              Sample Initial nitrogen: NO3Units=kgha; NH4Units=kgha; SWUnits=Volumetric; OCUnits=Total; PHUnits=Water
                Thickness  NO3    NH4
                200        26.4   0.88
                200        17     0.34
                600        32.78  0.609708
                500        5.19   0.48267
              CERESSoilTemperature
            Plant WhiteClover: ResourceName=Plantain; CropType=Plantain
            Report: EventNames=[Clock].DoReport
            SoluteManager
      Memo SubTitle
        ### All data from New Zealand
  Folder SensyTests
    Simulation SensyTestLincoln
      Clock: StartDate=2014-03-01; EndDate=2016-05-31
      Weather: FileName=Lincoln-Broadfields.met
      Summary summaryfile
      SoilArbitrator Soil Arbitrator
      Zone Field: Area=1; Slope=0
        Folder Management
          Operations Sowing
            2014-03-20  [WhiteClover].Sow(population: 500, cultivar: "Kopu", depth: 5, rowSpacing: 150)
          Operations IrrigationSchedule: same as Validation.New Zealand.FRNLLincoln.FRNLLincoln.Field.Management.IrrigationSchedule
          Operations BaseFertiliser
            2014-03-20  [Fertiliser].Apply(Amount: 25.0, Type: Fertiliser.Types.UreaN, Depth: 10)
          Manager Defoliate: same as Validation.New Zealand.FRNLLincoln.FRNLLincoln.Field.Management.Defoliate
          Operations DefoliationSchedule
            2014-10-23  [Defoliate].Script.Defoliate(defoliationType: "Cut", amountDM: 5000, amountType: "ResidualDM", duration: 1)
            2014-11-25  [Defoliate].Script.Defoliate(defoliationType: "Cut", amountDM: 5000, amountType: "ResidualDM", duration: 1)
            2014-12-30  [Defoliate].Script.Defoliate(defoliationType: "Cut", amountDM: 5000, amountType: "ResidualDM", duration: 1)
            2015-02-04  [Defoliate].Script.Defoliate(defoliationType: "Cut", amountDM: 5000, amountType: "ResidualDM", duration: 1)
            2015-03-10  [Defoliate].Script.Defoliate(defoliationType: "Cut", amountDM: 5000, amountType: "ResidualDM", duration: 1)
            2015-04-16  [Defoliate].Script.Defoliate(defoliationType: "Cut", amountDM: 5000, amountType: "ResidualDM", duration: 1)
            2015-06-09  [Defoliate].Script.Defoliate(defoliationType: "Cut", amountDM: 5000, amountType: "ResidualDM", duration: 1)
            2015-10-06  [Defoliate].Script.Defoliate(defoliationType: "Cut", amountDM: 5000, amountType: "ResidualDM", duration: 1)
            2015-11-16  [Defoliate].Script.Defoliate(defoliationType: "Cut", amountDM: 5000, amountType: "ResidualDM", duration: 1)
            2015-12-16  [Defoliate].Script.Defoliate(defoliationType: "Cut", amountDM: 5000, amountType: "ResidualDM", duration: 1)
            2016-01-25  [Defoliate].Script.Defoliate(defoliationType: "Cut", amountDM: 5000, amountType: "ResidualDM", duration: 1)
            2016-02-24  [Defoliate].Script.Defoliate(defoliationType: "Cut", amountDM: 5000, amountType: "ResidualDM", duration: 1)
            2016-04-09  [Defoliate].Script.Defoliate(defoliationType: "Cut", amountDM: 5000, amountType: "ResidualDM", duration: 1)
            2016-05-24  [Defoliate].Script.Defoliate(defoliationType: "Cut", amountDM: 5000, amountType: "ResidualDM", duration: 1)
            2016-10-03  [Defoliate].Script.Defoliate(defoliationType: "Cut", amountDM: 5000, amountType: "ResidualDM", duration: 1)
            2016-11-07  [Defoliate].Script.Defoliate(defoliationType: "Cut", amountDM: 5000, amountType: "ResidualDM", duration: 1)
          Manager ExtraVariables
            script: same as in Validation.New Zealand.FRNLLincoln.FRNLLincoln.Field.Management.ExtraVariables
        MicroClimate: a_interception=0; b_interception=1; c_interception=0; d_interception=0; soil_albedo=0.23; sun_angle=15; soil_heat_flux_fraction=0.4; night_interception_fraction=0.5; refheight=2; albedo=0.15; emissivity=0.96; RadIntTotal=0
        Irrigation
        Fertiliser
        SurfaceOrganicMatter: same as Validation.New Zealand.FRNLLincoln.FRNLLincoln.Field.SurfaceOrganicMatter
        Soil TempletonPaparua: same as Validation.New Zealand.FRNLLincoln.FRNLLincoln.Field.TempletonPaparua
        Plant WhiteClover: ResourceName=Plantain; CropType=Plantain
        Report: EventNames=[Clock].DoReport
        SoluteManager
    Simulation SensyTestRuakura
      Clock: StartDate=2014-06-01; EndDate=2016-06-30
      Weather: FileName=Ruakura.met
      Summary summaryfile
      SoilArbitrator Soil Arbitrator
      Zone Field: Area=1; Slope=0
        Folder Management
          Operations Sowing
            2014-10-24  [WhiteClover].Sow(population: 500, cultivar: "Kopu", depth: 5, rowSpacing: 150)
          Operations BaseFertiliser
            2014-10-24  [Fertiliser].Apply(Amount: 25.0, Type: Fertiliser.Types.UreaN, Depth: 10)
          Manager Defoliate: same as Validation.New Zealand.FRNLLincoln.FRNLLincoln.Field.Management.Defoliate
          Operations DefoliationSchedule
            2015-01-14  [Defoliate].Script.Defoliate(defoliationType: "Cut", amountDM: 5000, amountType: "ResidualDM", duration: 1)
            2015-03-02  [Defoliate].Script.Defoliate(defoliationType: "Cut", amountDM: 5000, amountType: "ResidualDM", duration: 1)
            2015-04-20  [Defoliate].Script.Defoliate(defoliationType: "Cut", amountDM: 5000, amountType: "ResidualDM", duration: 1)
            2015-06-08  [Defoliate].Script.Defoliate(defoliationType: "Cut", amountDM: 5000, amountType: "ResidualDM", duration: 1)
            2015-09-03  [Defoliate].Script.Defoliate(defoliationType: "Cut", amountDM: 5000, amountType: "ResidualDM", duration: 1)
            2015-10-14  [Defoliate].Script.Defoliate(defoliationType: "Cut", amountDM: 5000, amountType: "ResidualDM", duration: 1)
            2015-11-17  [Defoliate].Script.Defoliate(defoliationType: "Cut", amountDM: 5000, amountType: "ResidualDM", duration: 1)
            2015-12-21  [Defoliate].Script.Defoliate(defoliationType: "Cut", amountDM: 5000, amountType: "ResidualDM", duration: 1)
            2016-02-02  [Defoliate].Script.Defoliate(defoliationType: "Cut", amountDM: 5000, amountType: "ResidualDM", duration: 1)
            2016-05-02  [Defoliate].Script.Defoliate(defoliationType: "Cut", amountDM: 5000, amountType: "ResidualDM", duration: 1)
            2016-07-11  [Defoliate].Script.Defoliate(defoliationType: "Cut", amountDM: 5000, amountType: "ResidualDM", duration: 1)
            2016-09-12  [Defoliate].Script.Defoliate(defoliationType: "Cut", amountDM: 5000, amountType: "ResidualDM", duration: 1)
          Manager ExtraVariables
            script: same as in Validation.New Zealand.FRNLLincoln.FRNLLincoln.Field.Management.ExtraVariables
        MicroClimate: a_interception=0; b_interception=1; c_interception=0; d_interception=0; soil_albedo=0.23; sun_angle=15; soil_heat_flux_fraction=0.4; night_interception_fraction=0.5; refheight=2; albedo=0.15; emissivity=0.96; RadIntTotal=0
        Irrigation
        Fertiliser
        SurfaceOrganicMatter: same as Validation.New Zealand.FRNLLincoln.FRNLLincoln.Field.SurfaceOrganicMatter
        Soil HorotiuSoil: same as Validation.New Zealand.FRNLRuakura.FRNLRuakura.Field.HorotiuSoil
        Plant WhiteClover: ResourceName=Plantain; CropType=Plantain
        Report: EventNames=[Clock].DoReport
        SoluteManager
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