Simulations
  DataStore
  Tests TestsBinary
    Test={SimulationName=TwoZone_GodLevelManagement, TableName=Report1, Type=Tolerance, ColumnNames=Irrigation.IrrigationApplied, Parameters=1,1}
  Simulation TwoZone_GodLevelManagement: Area=0; Slope=0
    Clock: StartDate=1998-01-01; EndDate=1999-06-01
    Summary SummaryFile
    Weather: FileName=%root%\Examples\WeatherFiles\Dalby.met
    SoilArbitrator Soil Arbitrator
    Manager MultiZoneIrrigator
      On_off = True
      Crop_in = True
      No_fields = 4
      Start_irrig = 1998-11-01
      Finish_irrig = 1999-04-01
      Application = 0
      Irrig_eff = 0
      Resp_irrig = True
      Rain_pause = 0
      Days_pause = 0
      Soil_depth = 0
      Irrig_paw = 0
      Irrig_method = Mean
```csharp
using System;
using Models.Core;
using Models.PMF.OldPlant; //don't need OldPlant when use MCSP
using System.Collections.Generic;
using Models.Soils;
using APSIM.Shared.Utilities;

namespace Models
{
	[Serializable]
	public class Script : Model
	{
		[Link] Summary Summary;
		[Link] Clock Clock; 
		[Link] Weather Weather;
		//private float Rain;
		
		[Description("Irrigation on? (True/False)")]
	public bool On_off {get; set;}
	[Description("Only irrigate when crop is present? (True/False)")]
	public bool Crop_in {get; set;}
	[Description("Number of fields to irrigate")]
	public double No_fields {get; set;}
	[Description("Date irrigator switched on")]
	public DateTime Start_irrig {get; set;}
	[Description("Date irrigator switched off")]
	public DateTime Finish_irrig {get; set;}
    [Description("Amount of irrigation applied per day (mm)")]
	public float Application {get; set;}
    [Description("Irrigation efficiency (%)")]
	public float Irrig_eff {get; set;}
    [Description("Responsive irrigation management? (True/False)")]
	public bool Resp_irrig {get; set;}
	[Description("Amount of rainfall in last 3 days causes irrigator to pause (mm)")]
	public float Rain_pause {get; set;}
    [Description("Number of days irrigator will pause after rainfall")]
	public float Days_pause {get; set;}
	[Description("Depth to which water deficit is considered (mm)")]
	public float Soil_depth {get; set;}
	[Description("PAW lost as threshold for irrigation (%)")]
	public float Irrig_paw {get; set;}
	[Description("Method by which PAW is calculated on a field basis (Mean, Driest, Wettest)")]
	public string Irrig_method {get; set;}
        
        private Zone[] Zones {get; set; }
        
        private int Irrigator_position;
		private int Counter;
		private int PatchCounter;
		
		private double Rain3;
		private double[] Rain_3;
		private double Days2Pause;
		public double Current_TodayDeficit;
		public double Current_IrrigDeficit;
		
		
		[EventSubscribe("Commencing")]
        private void OnSimulationCommencing(object sender, EventArgs e)
		{
			Irrigator_position = 0;
			Counter = 1;
			Rain3 = 0;
			Rain_3 = new double[4];
			Rain_3[0] = 0;
			Rain_3[1] = 0;
			Rain_3[2] = 0;
			
			//THESE ARE HERE BECAUSE INTERFACE BROKEN - TO BE REMOVED
			Application = 20;
			Irrig_eff = 80;
			Rain_pause = 30;
			Days_pause = 3;
			Soil_depth = 550;
			Irrig_paw = 30;
		}
        
        [EventSubscribe("StartOfSimulation")]
        private void DoStartOfSimulation(object sender, EventArgs e)
        {
               // Set up our list on zones in the simulation
               List<Zone> zones = new List<Zone>();
               foreach (Zone zone in Apsim.FindAll(this.Parent, typeof(Zone)))
               {
                     if (zone is Simulation)
                     {
                        // top level simulation - we don't want this.
                     }
                     else
                     {
                     zones.Add(zone as Zone);
                  }
               }
               Zones = zones.ToArray();
         }
		
		
		[EventSubscribe("DoManagement")]
		private void DoManagement(object sender, EventArgs e)
		//Only irrigates between set dates and switched on
		{
		if (DateUtilities.WithinDates(Start_irrig, Clock.Today.Date, Finish_irrig) && (On_off)) {

			//calculates rain in last 3 days and whether irrigator is paused 
			Rain_3[2] = Rain_3[1];
			Rain_3[1] = Rain_3[0];
			Rain_3[0] = Weather.Rain;
			Rain3 = Rain_3[0] + Rain_3[1] + Rain_3[2];
			if (Rain3 >= Rain_pause) {
				Days2Pause = Days_pause;
			} else {
				Days2Pause = Days2Pause - 1;
			}

			//Moves the irrigator around the fields every day unless paused
			if (Counter < No_fields && Days2Pause < 0.5) {
				Irrigator_position = Counter;
				Counter = Counter + 1;
			} else if (Counter >= No_fields && Days2Pause < 0.5) {
				Irrigator_position = Counter;
				Counter = 1;
			}

			if (Resp_irrig) {

				//Calculate PAW and deficit for each patch...

				double[] SoilPAW = null;
				double[] TodayDeficit = null;
				double[] IrrigDeficit = null;

				SoilPAW = new double[Zones.Length + 1];
				TodayDeficit = new double[Zones.Length + 1];
				IrrigDeficit = new double[Zones.Length + 1];

				PatchCounter = 1;

				for (int i = 0; i < Zones.Length; i++) {
					Soil soil = Apsim.Find(Zones[i], typeof(Soil)) as Soil;
					double[] sw_dul = soil.SoilWater.DULmm;
					double[] sw_sw = soil.SoilWater.SWmm;
					double[] sw_15 = soil.SoilWater.LL15mm;
					double MySoilDepth = 0;
					for (int z = 0; z <= soil.SoilWater.dlayer.Length - 1; z++) {
						MySoilDepth = MySoilDepth + soil.SoilWater.dlayer[z];
						if (MySoilDepth <= Soil_depth) {
							SoilPAW[PatchCounter] = SoilPAW [PatchCounter] + sw_dul[z] - sw_15[z];
							TodayDeficit[PatchCounter] = TodayDeficit[PatchCounter] + sw_dul[z] - Math.Min(sw_dul[z], sw_sw[z]);
						}
					}
					IrrigDeficit[PatchCounter] = (Irrig_paw / 100 * SoilPAW[PatchCounter]);
					//Console.WriteLine(PatchCounter.ToString + " " + SoilPAW(PatchCounter).ToString +" " + TodayDeficit(PatchCounter).ToString)
					PatchCounter = PatchCounter + 1;

				}

				//Determines the current fields deficit and threshold depending on how it's calculated 
				PatchCounter = 1;
				double Sum_Area = 0;

				if (Irrig_method == "Wettest") {
					Current_TodayDeficit = 0;
					Current_IrrigDeficit = 0.0001;
				} else if (Irrig_method == "Driest") {
					Current_TodayDeficit = 1000;
					Current_IrrigDeficit = 1;
				} else if (Irrig_method == "Mean") {
					Current_TodayDeficit = 0;
					Current_IrrigDeficit = 0;
				}

                
				for (int i = 0; i < Zones.Length; i++) {
					
					double Current_Paddock = (double) Apsim.Get(Zones[i], "Manager_P.Script.This_field_no");
					double Current_Area = (double) Apsim.Get(Zones[i], "Manager_P.Script.Patch_area");
				
					//cycles through each patch that that is within the paddock where the irrigator is
					if (Current_Paddock == Irrigator_position) {
						if (Irrig_method == "Wettest" & (TodayDeficit[PatchCounter] / IrrigDeficit[PatchCounter]) > (Current_TodayDeficit / Current_IrrigDeficit)) {
							Current_TodayDeficit = TodayDeficit[PatchCounter];
							//Driest todays deficit
							Current_IrrigDeficit = IrrigDeficit[PatchCounter];
							//Selected irrig deficit threshold
						} else if (Irrig_method == "Driest" & (TodayDeficit[PatchCounter] / IrrigDeficit[PatchCounter]) < (Current_TodayDeficit / Current_IrrigDeficit)) {
							Current_TodayDeficit = TodayDeficit[PatchCounter];
							Current_IrrigDeficit = IrrigDeficit[PatchCounter];
							//Selected irrig deficit threshold
						} else if (Irrig_method == "Mean") {
							Current_TodayDeficit = Current_TodayDeficit + (TodayDeficit[PatchCounter] * Current_Area);
							Current_IrrigDeficit = Current_IrrigDeficit + (IrrigDeficit[PatchCounter] * Current_Area);
							Sum_Area = Sum_Area + Current_Area;
						}
					}

					if (Current_Paddock == Irrigator_position & Irrig_method == "Mean") {
						Current_TodayDeficit = Current_TodayDeficit / Sum_Area;
						Current_IrrigDeficit = Current_IrrigDeficit / Sum_Area;
					}

					PatchCounter = PatchCounter + 1;
				}

				//Is irrigation responsive?   
			} else if (!Resp_irrig) {
				Current_TodayDeficit = 1;
				Current_IrrigDeficit = 0;
			}


			//Moves through all of the paddocks
			for (int i = 0; i < Zones.Length; i++) {
				double Current_Paddock = (double) Apsim.Get(Zones[i], "Manager_P.Script.This_field_no");
				string Status = "Dead";
				//double Current_Paddock = 1;
					
				//If option selected then irrigates only alive crops 
				if (Crop_in){// && ((bool)Zones[i].Get("wheat.IsAlive"))){
					Status = "alive";
					} else {
					Status = "Dead";
				}
				//Summary.WriteMessage(this, "Here it is " + Current_TodayDeficit.ToString() + "    " + Current_IrrigDeficit.ToString() );
				//Irrigates in relevant paddocks if the irrigator is in that paddock, the crops are in, the irrigator isn't paused by rain and if the paddock 'needs' water
				if (Current_Paddock == Irrigator_position && Status == "alive" && Days2Pause < 0.5 && Current_TodayDeficit >= Current_IrrigDeficit) {
				
					Irrigation irrigation = Apsim.Find(Zones[i], typeof(Irrigation)) as Irrigation;
					//irrig.will_runoff = 1 ' This should make irrigation run off but it doesn't seem to work
					irrigation.Apply(Application * (Irrig_eff / 100));
					//Console.WriteLine(Today + " - " + Application.ToString + " mm irrigation applied to " + SubPaddock.FullName);
				}

			}

		}

	}
		
		/*{
			DaysSinceIrrig += 1;
			//Calculate soil water deficit in each zone
			if (DaysSinceIrrig > 10)
			{
			  for (int i = 0; i < Zones.Length; i++)
              {
              Soil soil = Apsim.Find(Zones[i], typeof(Soil)) as Soil;
              SoilWaterDeficit[i] = Utility.Math.Sum(soil.SoilWater.DULmm) - Utility.Math.Sum(soil.SoilWater.SWmm);
              Irrigation irrigation = Apsim.Find(Zones[i], typeof(Irrigation)) as Irrigation;
              irrigation.Apply(SoilWaterDeficit[i]);
              Summary.WriteMessage(Zones[i], string.Format("Irrigated Today :-)"));
              }
              DaysSinceIrrig = 0;
            }
            
            
		}*/
		
	}
}
```
    Manager Manager_Field_01
      Field_no = 1
      Field_crop = Hartog
      Sow_date = 1998-09-01
      Sow_density = 15
      Sow_depth = 20
      Sow_row = 650
      Fert1_date = 1998-09-01
      Fert2_date = 1998-11-01
      Fert_rate = 0
      Fert_depth = 0
      Harvest_date = 1999-02-01
```csharp
using System;
using Models.Core;
using Models.PMF.OldPlant; //don't need OldPlant when use MCSP
using System.Collections.Generic;
using Models.Soils;

namespace Models
{
	[Serializable]
	
	public class Script : Model
{
	//Inherits Instance

	//Parameter variables   
	[Description("Field number")]
	public double Field_no {get; set;}
	[Description("Crop")]
	public string Field_crop {get; set;}
	[Description("Sowing date (dd/mm)")]
	public DateTime Sow_date {get; set;}
	[Description("Sowing density (plants/m2)")]
	public double Sow_density {get; set;}
	[Description("Sowing depth (mm)")]
	public double Sow_depth {get; set;}
    [Description("Row spacing (mm)")]
	public double Sow_row {get; set;}
    [Description("1st fertiliser application date (dd/mm)")]
	public DateTime Fert1_date {get; set;}
    [Description("2nd fertiliser application date (dd/mm)")]
	public DateTime Fert2_date {get; set;}
	[Description("Fertiliser application rate")]
	public float Fert_rate {get; set;}
    [Description("Fertiliser application depth")]
	public float Fert_depth {get; set;}
	[Description("Harvest date (dd/mm)")]
	public DateTime Harvest_date {get; set;}

	//Inputs
	[Link] Clock Clock; 
	//private DateTime Today;

	[Link] Summary Summary;
		
	private Zone[] Zones {get; set; }

	// The following event handler will be called once at the beginning of the simulation

		[EventSubscribe("StartOfSimulation")]
		private void DoStartOfSimulation(object sender, EventArgs e)
        {
               // Set up our list on zones in the simulation
               List<Zone> zones = new List<Zone>();
               foreach (Zone zone in Apsim.FindAll(this.Parent, typeof(Zone)))
               {
                     if (zone is Simulation)
                     {
                        // top level simulation - we don't want this.
                     }
                     else
                     {
                     zones.Add(zone as Zone);
                  }
               }
               Zones = zones.ToArray();
               Fert_depth = 10;//WHEN FIXED REMOVE
               Fert_rate = 50;//WHEN FIXED REMOVE
        }
		

	// The following event handler will be called each day at the beginning of the day
    [EventSubscribe("DoManagement")]
        private void OnDoManagement(object sender, EventArgs e) 
		{
					
		for (int i = 0; i < Zones.Length; i++)
			{
				double Current_Paddock = (double) Apsim.Get(Zones[i], "Manager_P.Script.This_field_no");
		
				if (Clock.Today.Date == Sow_date && Current_Paddock == Field_no)
					{
						Plant15 wheat = Apsim.Find(Zones[i], typeof(Plant15)) as Plant15;//instead of Plant15 will just be Plant when move to MCSP
						wheat.Sow(population:Sow_density, cultivar:Field_crop, depth:Sow_depth, rowSpacing:Sow_row);
						//Console.WriteLine(Today + " - " + Cr.Cultivar.ToString + " sown into " + SubPaddock.FullName)
					}
					
				if (Clock.Today.Date == Harvest_date && Current_Paddock == Field_no)
					{
						Plant15 wheat = Apsim.Find(Zones[i], typeof(Plant15)) as Plant15;//instead of Plant15 will just be Plant when move to MCSP
						//wheat.harvest();// NO IDEA WHY THIS WON'T HARVEST
						//Console.WriteLine(Today + " - " + SubPaddock.FullName + " harvested")
					}
					
				if ((Clock.Today.Date == Fert1_date || Clock.Today.Date == Fert2_date) && Current_Paddock == Field_no)	
					{
						Fertiliser fertiliser = Apsim.Find(Zones[i], typeof(Fertiliser)) as Fertiliser;
						fertiliser.Apply(Amount: Fert_rate, Depth: Fert_depth, Type: Fertiliser.Types.NO3N); //FERT NOT APPLIED, NOT DUE TO OR OPERATOR ABOVE
						//Console.WriteLine(Today + " - " + fert.Amount.ToString + " of " + fert.Type.ToString + " applied to " + SubPaddock.FullName)
					}
				
			}
		}

}
}
```
    Manager Manager_Field_02
      Field_no = 2
      Field_crop = Spear
      Sow_date = 1998-09-16
      Sow_density = 15
      Sow_depth = 20
      Sow_row = 650
      Fert1_date = 1998-09-16
      Fert2_date = 1998-11-16
      Fert_rate = 0
      Fert_depth = 0
      Harvest_date = 1999-02-01
      script: same as in TwoZone_GodLevelManagement.Manager_Field_01
    Manager Manager_Field_03
      Field_no = 3
      Field_crop = Gutha
      Sow_date = 1998-10-01
      Sow_density = 15
      Sow_depth = 20
      Sow_row = 650
      Fert1_date = 1998-10-01
      Fert2_date = 1998-12-01
      Fert_rate = 0
      Fert_depth = 0
      Harvest_date = 1999-02-01
      script: same as in TwoZone_GodLevelManagement.Manager_Field_01
    Manager Manager_Field_04
      Field_no = 4
      Field_crop = Wilgoyne
      Sow_date = 1998-10-15
      Sow_density = 15
      Sow_depth = 20
      Sow_row = 650
      Fert1_date = 1998-10-15
      Fert2_date = 1998-12-15
      Fert_rate = 0
      Fert_depth = 0
      Harvest_date = 1999-02-01
      script: same as in TwoZone_GodLevelManagement.Manager_Field_01
    Manager Runoff
      Runoff = 0
```csharp
using System;
using Models.Core;
using Models.PMF;
using System.Collections.Generic;
using Models.Soils;

namespace Models
{
	[Serializable]
	public class Script : Model
	{
		[Link] Summary Summary;
		
		private Zone[] Zones {get; set; }
		public double[] Runoff { get; set;}
		
		[EventSubscribe("StartOfSimulation")]
		private void DoStartOfSimulation(object sender, EventArgs e)
		{
		       // Set up our list on zones in the simulation
		       List<Zone> zones = new List<Zone>();
               foreach (Zone zone in Apsim.FindAll(this.Parent, typeof(Zone)))
               {
               	  if (zone is Simulation)
               	  {
               	     // top level simulation - we don't want this.
               	  }
               	  else
               	  {
                     zones.Add(zone as Zone);
                  }
               }
               Zones = zones.ToArray();
               
		}
		
		[EventSubscribe("DoManagement")]
		private void DoManagement(object sender, EventArgs e)
		{

			Runoff = new double[Zones.Length + 1];
			
			//Calculate soil water deficit in each zone
		    for (int i = 0; i < Zones.Length; i++)
            {
               Soil soil = Apsim.Find(Zones[i], typeof(Soil)) as Soil;
			   Runoff[i] = soil.SoilWater.Runoff;
            }
            
		}
		
	}
}
```
    Manager Field_Reporting
      Yield_Array =
      Area_Array =
      YieldArea_Array =
```csharp
using System;
using Models.Core;
using Models.PMF;
using System.Collections.Generic;
using Models.Soils;

namespace Models
{
	[Serializable]
	public class Script : Model
	{
		[Link] Summary Summary;
		
		private Zone[] Zones {get; set; }
		public double[] Yield_Array { get; set; }
		public double[] Area_Array { get; set; }
		public double[] YieldArea_Array { get; set; }
		
		[EventSubscribe("StartOfSimulation")]
		private void DoStartOfSimulation(object sender, EventArgs e)
		{
		       // Set up our list on zones in the simulation
		       List<Zone> zones = new List<Zone>();
               foreach (Zone zone in Apsim.FindAll(this.Parent, typeof(Zone)))
               {
               	  if (zone is Simulation)
               	  {
               	     // top level simulation - we don't want this.
               	  }
               	  else
               	  {
                     zones.Add(zone as Zone);
                  }
               }
               Zones = zones.ToArray();
               
		}
		
		[EventSubscribe("DoManagement")]
		private void DoManagement(object sender, EventArgs e)
		{

			//****FIX THIS****//double No_Fields = (double) Apsim.Get(this, "MultiZoneIrrigator.Script.No_fields");
			double No_Fields = 4;
			Yield_Array = new double[(int)No_Fields];
			Area_Array = new double[(int)No_Fields];
			YieldArea_Array = new double[(int)No_Fields];

			
			//Calculate soil water deficit in each zone
		    for (int i = 0; i < Zones.Length; i++)
            {
               double Current_Paddock = (double) Apsim.Get(Zones[i], "Manager_P.Script.This_field_no");
               double Current_Area = (double) Apsim.Get(Zones[i], "Manager_P.Script.Patch_area"); 
               double Current_Yield = (double) Apsim.Get(Zones[i], "Wheat.AboveGround.Wt");
               Yield_Array[(int)Current_Paddock-1] += Current_Yield * Current_Area;
               Area_Array[(int)Current_Paddock-1] += Current_Area;
            }
            
            for (int i = 0; i < YieldArea_Array.Length; i++)
            {
            YieldArea_Array[i] = Yield_Array[i] / Area_Array[i];
            }
		}
		
	}
}
```
    Zone Patch_001: Area=1; Slope=0
      Manager Manager_P
        This_field_no = 1
        Field_crop = wheat
        Soil_type = Soil_01
        Patch_area = 2
        Landscape_position = Gain
        Irrigator_position = 4
```csharp
using Microsoft.VisualBasic;
using System;
using System.Collections;
using System.Collections.Generic;
//using System.Data;
using System.Diagnostics;
//using ModelFramework;
//using CSGeneral;
using Models.Core;
using Models.PMF;
using Models.Soils;
namespace Models
{
	[Serializable]
	//[System.Xml.Serialization.XmlInclude(typeof(Model))]
	public class Script : Model
{
	//Inherits Instance

	//Parameter variables
	[Description("Number of this field")]
	public double This_field_no {get; set;}
	[Description("Crop in this field")]
	public string Field_crop {get; set;}
	[Description("Soil type of this patch (Soil_X)")]
	public string Soil_type {get; set;}
	[Description("Area of this patch (ha?)")]
	public double Patch_area {get; set;}
	[Description("Landscape position zone (Neutral, Gain, Loss)")]
	public string Landscape_position {get; set;}
	[Description("Irrigator position (1-4)")]
	public double Irrigator_position {get; set;}

		//Inputs

	

}
}
```
      Report Report1: EventNames=[Clock].EndOfDay
        VariableNames:
          [Clock].Today
          Wheat.Zadok.Stage
          Wheat.Phenology.CurrentStageName
          Wheat.AboveGround.Wt
          Wheat.AboveGround.N
          Wheat.Grain.Yield
          Wheat.Grain.Protein
          Wheat.Grain.Size
          Wheat.Grain.GrainNo
          Wheat.Grain.Wt
          Wheat.Grain.N
          Wheat.Total.Wt
          Wheat.EP
          [wheat].SWStress.Photo
          sum([Soil].SoilWater.SWmm) as SWTotal
          sum([Soil].SoilNitrogen.NO3) as NO3Total
          [Irrigation].IrrigationApplied
          [Fertiliser].NitrogenApplied
          [Manager_P].Script.This_field_no
          [Manager_P].Script.Patch_area
      Fertiliser
      Soil: ASCOrder=Vertosol; ASCSubOrder=Black; SoilType=Clay; Site=Norwin; NearestTown=Norwin; Region=Darling Downs and Granite Belt; State=Queensland; Country=Australia; NaturalVegetation=Qld. Bluegrass, possible Qld. Blue gum; ApsoilNumber=900; Latitude=-27.581836; Longitude=151.320206; LocationAccuracy=+/- 20m
        DataSource=CSIRO Sustainable Ecosystems, Toowoomba; Characteriesd as part of the GRDC funded project"Doing it better, doing it smarter, managing soil water in Australian agriculture' 2011
        Comments=OC, CLL for all crops estimated-based on Bongeen Mywybilla Soil No1
        Water
          Thickness  BD       AirDry    LL15      DUL       SAT       KS
          150        1.01056  0.13025   0.2605    0.521     0.588655  20
          150        1.07146  0.198689  0.248362  0.496723  0.565677  20
          300        1.09394  0.28      0.28      0.488438  0.557193  20
          300        1.15861  0.28      0.28      0.480297  0.532787  20
          300        1.17301  0.28      0.28      0.471584  0.527354  20
          300        1.16287  0.28      0.28      0.457071  0.53118   20
          300        1.1875   0.28      0.28      0.452332  0.521888  20
          SoilCrop WheatSoil: LL=[0.261, 0.248, 0.28, 0.306, 0.36, 0.392, 0.446]; KL=[0.06, 0.06, 0.06, 0.04, 0.04, 0.02, 0.01]; XF=[1, 1, 1, 1, 1, 1, 1]
          Water
            Thickness  BD       AirDry    LL15      DUL       SAT       KS
            150        1.01056  0.13025   0.2605    0.521     0.588655  20
            150        1.07146  0.198689  0.248362  0.496723  0.565677  20
            300        1.09394  0.28      0.28      0.488438  0.557193  20
            300        1.15861  0.28      0.28      0.480297  0.532787  20
            300        1.17301  0.28      0.28      0.471584  0.527354  20
            300        1.16287  0.28      0.28      0.457071  0.53118   20
            300        1.1875   0.28      0.28      0.452332  0.521888  20
            SoilCrop WheatSoil: LL=[0.261, 0.248, 0.28, 0.306, 0.36, 0.392, 0.446]; KL=[0.06, 0.06, 0.06, 0.04, 0.04, 0.02, 0.01]; XF=[1, 1, 1, 1, 1, 1, 1]
        SoilWater: residueinterception=0; SummerDate=1-Nov; SummerU=5; SummerCona=5; WinterDate=1-Apr; WinterU=5; WinterCona=5; DiffusConst=40; DiffusSlope=16; Salb=0.12; CN2Bare=73; CNRed=20; CNCov=0.8; max_pond=0; Thickness=[150, 150, 300, 300, 300, 300, 300]; SWCON=[0.3, 0.3, 0.3, 0.3, 0.3, 0.3, 0.3]
        SoilNitrogen: fom_type=[default, manure, mucuna, lablab, shemp, stable]; fract_carb=[0.2, 0.3, 0.54, 0.57, 0.45, 0]; fract_cell=[0.7, 0.3, 0.37, 0.37, 0.47, 0.1]; fract_lign=[0.1, 0.4, 0.09, 0.06, 0.08, 0.9]; wfpsN2N2O_x=[22, 88]; wfpsN2N2O_y=[0.1, 1]
        SoilOrganicMatter: RootCN=40; RootWt=1000; SoilCN=12; EnrACoeff=7.4; EnrBCoeff=0.2; OCUnits=Total
          Thickness  OC    FBiom  FInert
          150        1.2   0.04   0.4
          150        0.96  0.02   0.6
          300        0.6   0.02   0.8
          300        0.3   0.02   1
          300        0.18  0.01   1
          300        0.12  0.01   1
          300        0.12  0.01   1
        Analysis: Thickness=[150, 150, 300, 300, 300, 300, 300]; PH=[8, 8, 8, 8, 8, 8, 8]; PHUnits=Water; BoronUnits=HotWater
        InitialWater: PercentMethod=EvenlyDistributed; FractionFull=1
        Sample InitialN: NO3Units=ppm; NH4Units=ppm; SWUnits=Volumetric; OCUnits=Total; PHUnits=Water
          Thickness  NO3  NH4
          150        1    0.1
          150        1    0.1
          300        1    0.1
          300        1    0.1
          300        1    0.1
          300        1    0.1
          300        1    0.1
      SurfaceOrganicMatter: PoolName=wheat_stubble; type=wheat; mass=500; standing_fraction=0; cnr=100; CriticalResidueWeight=2000; OptimumDecompTemp=20; MaxCumulativeEOS=20; CNRatioDecompCoeff=0.277; CNRatioDecompThreshold=25; TotalLeachRain=25; MinRainToLeach=10; CriticalMinimumOrganicC=0.004; DefaultCPRatio=0; DefaultStandingFraction=0; StandingExtinctCoeff=0.5; FractionFaecesAdded=0.5
        Pools:
          {PoolName=wheat_stubble, ResidueType=wheat, Mass=500, CNRatio=100, StandingFraction=0}
        ResidueTypes: LoadFromResource=ResidueTypes
      Plant15 Wheat: AutoHarvest=true; CropType=Wheat
      MicroClimate: air_pressure=1010; soil_emissivity=0.96; sun_angle=15; soil_heat_flux_fraction=0.4; night_interception_fraction=0.5; windspeed_default=3; refheight=2; albedo=0.15; emissivity=0.96; gsmax=0.01; r50=200; a_interception=0; b_interception=1; c_interception=0; d_interception=0; soil_albedo=0.3
      Irrigation
    Zone Patch_002: Area=1; Slope=0
      Manager Manager_P
        This_field_no = 1
        Field_crop = wheat
        Soil_type = Soil_02
        Patch_area = 3
        Landscape_position = Gain
        Irrigator_position = 4
        script: same as in TwoZone_GodLevelManagement.Patch_001.Manager_P
      Report Report2: same as TwoZone_GodLevelManagement.Patch_001.Report1
      Fertiliser
      Soil: ASCOrder=Vertosol; ASCSubOrder=Black; SoilType=Clay; Site=Norwin; NearestTown=Norwin; Region=Darling Downs and Granite Belt; State=Queensland; Country=Australia; NaturalVegetation=Qld. Bluegrass, possible Qld. Blue gum; ApsoilNumber=900; Latitude=-27.581836; Longitude=151.320206; LocationAccuracy=+/- 20m
        DataSource=CSIRO Sustainable Ecosystems, Toowoomba; Characteriesd as part of the GRDC funded project"Doing it better, doing it smarter, managing soil water in Australian agriculture' 2011
        Comments=OC, CLL for all crops estimated-based on Bongeen Mywybilla Soil No1
        Water
          Thickness  BD       AirDry    LL15      DUL   SAT       KS
          150        1.01056  0.13025   0.2605    0.42  0.588655  20
          150        1.07146  0.198689  0.248362  0.4   0.565677  20
          300        1.09394  0.28      0.28      0.39  0.557193  20
          300        1.15861  0.28      0.28      0.38  0.532787  20
          300        1.17301  0.28      0.28      0.37  0.527354  20
          300        1.16287  0.28      0.28      0.36  0.53118   20
          300        1.1875   0.28      0.28      0.35  0.521888  20
          SoilCrop WheatSoil: LL=[0.261, 0.248, 0.28, 0.306, 0.36, 0.392, 0.446]; KL=[0.06, 0.06, 0.06, 0.04, 0.04, 0.02, 0.01]; XF=[1, 1, 1, 1, 1, 1, 1]
          SoilCrop MCSPSoil: LL=[0.261, 0.248, 0.28, 0.306, 0.36, 0.392, 0.446]; KL=[0.06, 0.06, 0.06, 0.04, 0.04, 0.02, 0.01]; XF=[1, 1, 1, 1, 1, 1, 1]
        SoilWater: same as TwoZone_GodLevelManagement.Patch_001.Soil.SoilWater
        SoilNitrogen: fom_type=[default, manure, mucuna, lablab, shemp, stable]; fract_carb=[0.2, 0.3, 0.54, 0.57, 0.45, 0]; fract_cell=[0.7, 0.3, 0.37, 0.37, 0.47, 0.1]; fract_lign=[0.1, 0.4, 0.09, 0.06, 0.08, 0.9]; wfpsN2N2O_x=[22, 88]; wfpsN2N2O_y=[0.1, 1]
        SoilOrganicMatter: same as TwoZone_GodLevelManagement.Patch_001.Soil.SoilOrganicMatter
        Analysis: Thickness=[150, 150, 300, 300, 300, 300, 300]; PH=[8, 8, 8, 8, 8, 8, 8]; PHUnits=Water; BoronUnits=HotWater
        InitialWater: PercentMethod=EvenlyDistributed; FractionFull=1
        Sample InitialN: same as TwoZone_GodLevelManagement.Patch_001.Soil.InitialN
      SurfaceOrganicMatter: same as TwoZone_GodLevelManagement.Patch_001.SurfaceOrganicMatter
      MicroClimate: same as TwoZone_GodLevelManagement.Patch_001.MicroClimate
      Irrigation
      Plant15 Wheat: AutoHarvest=true; CropType=Wheat
    Zone Patch_003: Area=1; Slope=0
      Manager Manager_P
        This_field_no = 1
        Field_crop = wheat
        Soil_type = Soil_01
        Patch_area = 3
        Landscape_position = Gain
        Irrigator_position = 3
        script: same as in TwoZone_GodLevelManagement.Patch_001.Manager_P
      Report Report3: same as TwoZone_GodLevelManagement.Patch_001.Report1
      Fertiliser
      Soil: same as TwoZone_GodLevelManagement.Patch_001.Soil
      SurfaceOrganicMatter: same as TwoZone_GodLevelManagement.Patch_001.SurfaceOrganicMatter
      Plant15 Wheat: AutoHarvest=true; CropType=Wheat
      MicroClimate: same as TwoZone_GodLevelManagement.Patch_001.MicroClimate
      Irrigation
    Zone Patch_004: Area=1; Slope=0
      Manager Manager_P
        This_field_no = 1
        Field_crop = wheat
        Soil_type = Soil_02
        Patch_area = 6
        Landscape_position = Gain
        Irrigator_position = 3
        script: same as in TwoZone_GodLevelManagement.Patch_001.Manager_P
      Report Report4: same as TwoZone_GodLevelManagement.Patch_001.Report1
      Fertiliser
      Soil: same as TwoZone_GodLevelManagement.Patch_002.Soil
      SurfaceOrganicMatter: same as TwoZone_GodLevelManagement.Patch_001.SurfaceOrganicMatter
      MicroClimate: same as TwoZone_GodLevelManagement.Patch_001.MicroClimate
      Irrigation
      Plant15 Wheat: AutoHarvest=true; CropType=Wheat
    Zone Patch_005: Area=1; Slope=0
      Manager Manager_P
        This_field_no = 1
        Field_crop = wheat
        Soil_type = Soil_01
        Patch_area = 1
        Landscape_position = Neutral
        Irrigator_position = 3
        script: same as in TwoZone_GodLevelManagement.Patch_001.Manager_P
      Report Report5: same as TwoZone_GodLevelManagement.Patch_001.Report1
      Fertiliser
      Soil: same as TwoZone_GodLevelManagement.Patch_001.Soil
      SurfaceOrganicMatter: same as TwoZone_GodLevelManagement.Patch_001.SurfaceOrganicMatter
      Plant15 Wheat: AutoHarvest=true; CropType=Wheat
      MicroClimate: same as TwoZone_GodLevelManagement.Patch_001.MicroClimate
      Irrigation
    Zone Patch_006: Area=1; Slope=0
      Manager Manager_P
        This_field_no = 1
        Field_crop = wheat
        Soil_type = Soil_02
        Patch_area = 3
        Landscape_position = Gain
        Irrigator_position = 2
        script: same as in TwoZone_GodLevelManagement.Patch_001.Manager_P
      Report Report6: same as TwoZone_GodLevelManagement.Patch_001.Report1
      Fertiliser
      Soil: same as TwoZone_GodLevelManagement.Patch_002.Soil
      SurfaceOrganicMatter: same as TwoZone_GodLevelManagement.Patch_001.SurfaceOrganicMatter
      MicroClimate: same as TwoZone_GodLevelManagement.Patch_001.MicroClimate
      Irrigation
      Plant15 Wheat: AutoHarvest=true; CropType=Wheat
    Zone Patch_007: Area=1; Slope=0
      Manager Manager_P
        This_field_no = 1
        Field_crop = wheat
        Soil_type = Soil_01
        Patch_area = 1
        Landscape_position = Neutral
        Irrigator_position = 2
        script: same as in TwoZone_GodLevelManagement.Patch_001.Manager_P
      Report Report7: same as TwoZone_GodLevelManagement.Patch_001.Report1
      Fertiliser
      Soil: same as TwoZone_GodLevelManagement.Patch_001.Soil
      SurfaceOrganicMatter: same as TwoZone_GodLevelManagement.Patch_001.SurfaceOrganicMatter
      Plant15 Wheat: AutoHarvest=true; CropType=Wheat
      MicroClimate: same as TwoZone_GodLevelManagement.Patch_001.MicroClimate
      Irrigation
    Zone Patch_008: Area=1; Slope=0
      Manager Manager_P
        This_field_no = 1
        Field_crop = wheat
        Soil_type = Soil_02
        Patch_area = 3
        Landscape_position = Neutral
        Irrigator_position = 2
        script: same as in TwoZone_GodLevelManagement.Patch_001.Manager_P
      Report Report8: same as TwoZone_GodLevelManagement.Patch_001.Report1
      Fertiliser
      Soil: same as TwoZone_GodLevelManagement.Patch_002.Soil
      SurfaceOrganicMatter: same as TwoZone_GodLevelManagement.Patch_001.SurfaceOrganicMatter
      MicroClimate: same as TwoZone_GodLevelManagement.Patch_001.MicroClimate
      Irrigation
      Plant15 Wheat: AutoHarvest=true; CropType=Wheat
    Zone Patch_009: Area=1; Slope=0
      Manager Manager_P
        This_field_no = 1
        Field_crop = wheat
        Soil_type = Soil_02
        Patch_area = 3
        Landscape_position = Neutral
        Irrigator_position = 1
        script: same as in TwoZone_GodLevelManagement.Patch_001.Manager_P
      Report Report9: same as TwoZone_GodLevelManagement.Patch_001.Report1
      Fertiliser
      Soil: same as TwoZone_GodLevelManagement.Patch_002.Soil
      SurfaceOrganicMatter: same as TwoZone_GodLevelManagement.Patch_001.SurfaceOrganicMatter
      MicroClimate: same as TwoZone_GodLevelManagement.Patch_001.MicroClimate
      Irrigation
      Plant15 Wheat: AutoHarvest=true; CropType=Wheat
    Zone Patch_010: Area=1; Slope=0
      Manager Manager_P
        This_field_no = 2
        Field_crop = wheat
        Soil_type = Soil_03
        Patch_area = 2
        Landscape_position = Gain
        Irrigator_position = 4
        script: same as in TwoZone_GodLevelManagement.Patch_001.Manager_P
      Report Report10: same as TwoZone_GodLevelManagement.Patch_001.Report1
      Fertiliser
      Soil: ASCOrder=Vertosol; ASCSubOrder=Black; SoilType=Clay; Site=Norwin; NearestTown=Norwin; Region=Darling Downs and Granite Belt; State=Queensland; Country=Australia; NaturalVegetation=Qld. Bluegrass, possible Qld. Blue gum; ApsoilNumber=900; Latitude=-27.581836; Longitude=151.320206; LocationAccuracy=+/- 20m
        DataSource=CSIRO Sustainable Ecosystems, Toowoomba; Characteriesd as part of the GRDC funded project"Doing it better, doing it smarter, managing soil water in Australian agriculture' 2011
        Comments=OC, CLL for all crops estimated-based on Bongeen Mywybilla Soil No1
        Water
          Thickness  BD       AirDry    LL15      DUL   SAT       KS
          150        1.01056  0.13025   0.2605    0.37  0.588655  20
          150        1.07146  0.198689  0.248362  0.35  0.565677  20
          300        1.09394  0.28      0.28      0.34  0.557193  20
          300        1.15861  0.28      0.28      0.33  0.532787  20
          300        1.17301  0.28      0.28      0.32  0.527354  20
          300        1.16287  0.28      0.28      0.31  0.53118   20
          300        1.1875   0.28      0.28      0.3   0.521888  20
          SoilCrop WheatSoil: LL=[0.261, 0.248, 0.28, 0.306, 0.36, 0.392, 0.446]; KL=[0.06, 0.06, 0.06, 0.04, 0.04, 0.02, 0.01]; XF=[1, 1, 1, 1, 1, 1, 1]
          SoilCrop MCSPSoil: LL=[0.261, 0.248, 0.28, 0.306, 0.36, 0.392, 0.446]; KL=[0.06, 0.06, 0.06, 0.04, 0.04, 0.02, 0.01]; XF=[1, 1, 1, 1, 1, 1, 1]
        SoilWater: same as TwoZone_GodLevelManagement.Patch_001.Soil.SoilWater
        SoilNitrogen: fom_type=[default, manure, mucuna, lablab, shemp, stable]; fract_carb=[0.2, 0.3, 0.54, 0.57, 0.45, 0]; fract_cell=[0.7, 0.3, 0.37, 0.37, 0.47, 0.1]; fract_lign=[0.1, 0.4, 0.09, 0.06, 0.08, 0.9]; wfpsN2N2O_x=[22, 88]; wfpsN2N2O_y=[0.1, 1]
        SoilOrganicMatter: same as TwoZone_GodLevelManagement.Patch_001.Soil.SoilOrganicMatter
        Analysis: Thickness=[150, 150, 300, 300, 300, 300, 300]; PH=[8, 8, 8, 8, 8, 8, 8]; PHUnits=Water; BoronUnits=HotWater
        InitialWater: PercentMethod=EvenlyDistributed; FractionFull=1
        Sample InitialN: same as TwoZone_GodLevelManagement.Patch_001.Soil.InitialN
      SurfaceOrganicMatter: same as TwoZone_GodLevelManagement.Patch_001.SurfaceOrganicMatter
      MicroClimate: same as TwoZone_GodLevelManagement.Patch_001.MicroClimate
      Irrigation
      Plant15 Wheat: AutoHarvest=true; CropType=Wheat
    Zone Patch_011: Area=1; Slope=0
      Manager Manager_P
        This_field_no = 2
        Field_crop = wheat
        Soil_type = Soil_03
        Patch_area = 3
        Landscape_position = Neutral
        Irrigator_position = 4
        script: same as in TwoZone_GodLevelManagement.Patch_001.Manager_P
      Report Report11: same as TwoZone_GodLevelManagement.Patch_001.Report1
      Fertiliser
      Soil: same as TwoZone_GodLevelManagement.Patch_010.Soil
      SurfaceOrganicMatter: same as TwoZone_GodLevelManagement.Patch_001.SurfaceOrganicMatter
      MicroClimate: same as TwoZone_GodLevelManagement.Patch_001.MicroClimate
      Irrigation
      Plant15 Wheat: AutoHarvest=true; CropType=Wheat
    Zone Patch_012: Area=1; Slope=0
      Manager Manager_P
        This_field_no = 2
        Field_crop = wheat
        Soil_type = Soil_03
        Patch_area = 3
        Landscape_position = Gain
        Irrigator_position = 3
        script: same as in TwoZone_GodLevelManagement.Patch_001.Manager_P
      Report Report12: same as TwoZone_GodLevelManagement.Patch_001.Report1
      Fertiliser
      Soil: same as TwoZone_GodLevelManagement.Patch_010.Soil
      SurfaceOrganicMatter: same as TwoZone_GodLevelManagement.Patch_001.SurfaceOrganicMatter
      MicroClimate: same as TwoZone_GodLevelManagement.Patch_001.MicroClimate
      Irrigation
      Plant15 Wheat: AutoHarvest=true; CropType=Wheat
    Zone Patch_013: Area=1; Slope=0
      Manager Manager_P
        This_field_no = 2
        Field_crop = wheat
        Soil_type = Soil_03
        Patch_area = 6
        Landscape_position = Neutral
        Irrigator_position = 3
        script: same as in TwoZone_GodLevelManagement.Patch_001.Manager_P
      Report Report13: same as TwoZone_GodLevelManagement.Patch_001.Report1
      Fertiliser
      Soil: same as TwoZone_GodLevelManagement.Patch_010.Soil
      SurfaceOrganicMatter: same as TwoZone_GodLevelManagement.Patch_001.SurfaceOrganicMatter
      MicroClimate: same as TwoZone_GodLevelManagement.Patch_001.MicroClimate
      Irrigation
      Plant15 Wheat: AutoHarvest=true; CropType=Wheat
    Zone Patch_014: Area=1; Slope=0
      Manager Manager_P
        This_field_no = 2
        Field_crop = wheat
        Soil_type = Soil_02
        Patch_area = 1
        Landscape_position = Gain
        Irrigator_position = 3
        script: same as in TwoZone_GodLevelManagement.Patch_001.Manager_P
      Report Report14: same as TwoZone_GodLevelManagement.Patch_001.Report1
      Fertiliser
      Soil: same as TwoZone_GodLevelManagement.Patch_002.Soil
      SurfaceOrganicMatter: same as TwoZone_GodLevelManagement.Patch_001.SurfaceOrganicMatter
      MicroClimate: same as TwoZone_GodLevelManagement.Patch_001.MicroClimate
      Irrigation
      Plant15 Wheat: AutoHarvest=true; CropType=Wheat
    Zone Patch_015: Area=1; Slope=0
      Manager Manager_P
        This_field_no = 2
        Field_crop = wheat
        Soil_type = Soil_03
        Patch_area = 3
        Landscape_position = Neutral
        Irrigator_position = 2
        script: same as in TwoZone_GodLevelManagement.Patch_001.Manager_P
      Report Report15: same as TwoZone_GodLevelManagement.Patch_001.Report1
      Fertiliser
      Soil: same as TwoZone_GodLevelManagement.Patch_010.Soil
      SurfaceOrganicMatter: same as TwoZone_GodLevelManagement.Patch_001.SurfaceOrganicMatter
      MicroClimate: same as TwoZone_GodLevelManagement.Patch_001.MicroClimate
      Irrigation
      Plant15 Wheat: AutoHarvest=true; CropType=Wheat
    Zone Patch_016: Area=1; Slope=0
      Manager Manager_P
        This_field_no = 2
        Field_crop = wheat
        Soil_type = Soil_02
        Patch_area = 1
        Landscape_position = Gain
        Irrigator_position = 2
        script: same as in TwoZone_GodLevelManagement.Patch_001.Manager_P
      Report Report16: same as TwoZone_GodLevelManagement.Patch_001.Report1
      Fertiliser
      Soil: same as TwoZone_GodLevelManagement.Patch_002.Soil
      SurfaceOrganicMatter: same as TwoZone_GodLevelManagement.Patch_001.SurfaceOrganicMatter
      MicroClimate: same as TwoZone_GodLevelManagement.Patch_001.MicroClimate
      Irrigation
      Plant15 Wheat: AutoHarvest=true; CropType=Wheat
    Zone Patch_017: Area=1; Slope=0
      Manager Manager_P
        This_field_no = 2
        Field_crop = wheat
        Soil_type = Soil_02
        Patch_area = 3
        Landscape_position = Neutral
        Irrigator_position = 2
        script: same as in TwoZone_GodLevelManagement.Patch_001.Manager_P
      Report Report17: same as TwoZone_GodLevelManagement.Patch_001.Report1
      Fertiliser
      Soil: same as TwoZone_GodLevelManagement.Patch_002.Soil
      SurfaceOrganicMatter: same as TwoZone_GodLevelManagement.Patch_001.SurfaceOrganicMatter
      MicroClimate: same as TwoZone_GodLevelManagement.Patch_001.MicroClimate
      Irrigation
      Plant15 Wheat: AutoHarvest=true; CropType=Wheat
    Zone Patch_018: Area=1; Slope=0
      Manager Manager_P
        This_field_no = 2
        Field_crop = wheat
        Soil_type = Soil_02
        Patch_area = 3
        Landscape_position = Neutral
        Irrigator_position = 1
        script: same as in TwoZone_GodLevelManagement.Patch_001.Manager_P
      Report Report18: same as TwoZone_GodLevelManagement.Patch_001.Report1
      Fertiliser
      Soil: same as TwoZone_GodLevelManagement.Patch_002.Soil
      SurfaceOrganicMatter: same as TwoZone_GodLevelManagement.Patch_001.SurfaceOrganicMatter
      MicroClimate: same as TwoZone_GodLevelManagement.Patch_001.MicroClimate
      Irrigation
      Plant15 Wheat: AutoHarvest=true; CropType=Wheat
    Zone Patch_019: Area=1; Slope=0
      Manager Manager_P
        This_field_no = 3
        Field_crop = wheat
        Soil_type = Soil_01
        Patch_area = 3
        Landscape_position = Neutral
        Irrigator_position = 4
        script: same as in TwoZone_GodLevelManagement.Patch_001.Manager_P
      Report Report19: same as TwoZone_GodLevelManagement.Patch_001.Report1
      Fertiliser
      Soil: same as TwoZone_GodLevelManagement.Patch_001.Soil
      SurfaceOrganicMatter: same as TwoZone_GodLevelManagement.Patch_001.SurfaceOrganicMatter
      Plant15 Wheat: AutoHarvest=true; CropType=Wheat
      MicroClimate: same as TwoZone_GodLevelManagement.Patch_001.MicroClimate
      Irrigation
    Zone Patch_020: Area=1; Slope=0
      Manager Manager_P
        This_field_no = 3
        Field_crop = wheat
        Soil_type = Soil_01
        Patch_area = 2
        Landscape_position = Loss
        Irrigator_position = 4
        script: same as in TwoZone_GodLevelManagement.Patch_001.Manager_P
      Report Report20: same as TwoZone_GodLevelManagement.Patch_001.Report1
      Fertiliser
      Soil: same as TwoZone_GodLevelManagement.Patch_001.Soil
      SurfaceOrganicMatter: same as TwoZone_GodLevelManagement.Patch_001.SurfaceOrganicMatter
      Plant15 Wheat: AutoHarvest=true; CropType=Wheat
      MicroClimate: same as TwoZone_GodLevelManagement.Patch_001.MicroClimate
      Irrigation
    Zone Patch_021: Area=1; Slope=0
      Manager Manager_P
        This_field_no = 3
        Field_crop = wheat
        Soil_type = Soil_01
        Patch_area = 6
        Landscape_position = Neutral
        Irrigator_position = 3
        script: same as in TwoZone_GodLevelManagement.Patch_001.Manager_P
      Report Report21: same as TwoZone_GodLevelManagement.Patch_001.Report1
      Fertiliser
      Soil: same as TwoZone_GodLevelManagement.Patch_001.Soil
      SurfaceOrganicMatter: same as TwoZone_GodLevelManagement.Patch_001.SurfaceOrganicMatter
      Plant15 Wheat: AutoHarvest=true; CropType=Wheat
      MicroClimate: same as TwoZone_GodLevelManagement.Patch_001.MicroClimate
      Irrigation
    Zone Patch_022: Area=1; Slope=0
      Manager Manager_P
        This_field_no = 3
        Field_crop = wheat
        Soil_type = Soil_01
        Patch_area = 3
        Landscape_position = Loss
        Irrigator_position = 3
        script: same as in TwoZone_GodLevelManagement.Patch_001.Manager_P
      Report Report22: same as TwoZone_GodLevelManagement.Patch_001.Report1
      Fertiliser
      Soil: same as TwoZone_GodLevelManagement.Patch_001.Soil
      SurfaceOrganicMatter: same as TwoZone_GodLevelManagement.Patch_001.SurfaceOrganicMatter
      Plant15 Wheat: AutoHarvest=true; CropType=Wheat
      MicroClimate: same as TwoZone_GodLevelManagement.Patch_001.MicroClimate
      Irrigation
    Zone Patch_023: Area=1; Slope=0
      Manager Manager_P
        This_field_no = 3
        Field_crop = wheat
        Soil_type = Soil_02
        Patch_area = 1
        Landscape_position = Loss
        Irrigator_position = 3
        script: same as in TwoZone_GodLevelManagement.Patch_001.Manager_P
      Report Report23: same as TwoZone_GodLevelManagement.Patch_001.Report1
      Fertiliser
      Soil: same as TwoZone_GodLevelManagement.Patch_002.Soil
      SurfaceOrganicMatter: same as TwoZone_GodLevelManagement.Patch_001.SurfaceOrganicMatter
      MicroClimate: same as TwoZone_GodLevelManagement.Patch_001.MicroClimate
      Irrigation
      Plant15 Wheat: AutoHarvest=true; CropType=Wheat
    Zone Patch_024: Area=1; Slope=0
      Manager Manager_P
        This_field_no = 3
        Field_crop = wheat
        Soil_type = Soil_01
        Patch_area = 3
        Landscape_position = Neutral
        Irrigator_position = 2
        script: same as in TwoZone_GodLevelManagement.Patch_001.Manager_P
      Report Report24: same as TwoZone_GodLevelManagement.Patch_001.Report1
      Fertiliser
      Soil: same as TwoZone_GodLevelManagement.Patch_001.Soil
      SurfaceOrganicMatter: same as TwoZone_GodLevelManagement.Patch_001.SurfaceOrganicMatter
      Plant15 Wheat: AutoHarvest=true; CropType=Wheat
      MicroClimate: same as TwoZone_GodLevelManagement.Patch_001.MicroClimate
      Irrigation
    Zone Patch_025: Area=1; Slope=0
      Manager Manager_P
        This_field_no = 3
        Field_crop = wheat
        Soil_type = Soil_02
        Patch_area = 1
        Landscape_position = Loss
        Irrigator_position = 2
        script: same as in TwoZone_GodLevelManagement.Patch_001.Manager_P
      Report Report25: same as TwoZone_GodLevelManagement.Patch_001.Report1
      Fertiliser
      Soil: same as TwoZone_GodLevelManagement.Patch_002.Soil
      SurfaceOrganicMatter: same as TwoZone_GodLevelManagement.Patch_001.SurfaceOrganicMatter
      MicroClimate: same as TwoZone_GodLevelManagement.Patch_001.MicroClimate
      Irrigation
      Plant15 Wheat: AutoHarvest=true; CropType=Wheat
    Zone Patch_026: Area=1; Slope=0
      Manager Manager_P
        This_field_no = 3
        Field_crop = wheat
        Soil_type = Soil_02
        Patch_area = 3
        Landscape_position = Neutral
        Irrigator_position = 2
        script: same as in TwoZone_GodLevelManagement.Patch_001.Manager_P
      Report Report26: same as TwoZone_GodLevelManagement.Patch_001.Report1
      Fertiliser
      Soil: same as TwoZone_GodLevelManagement.Patch_002.Soil
      SurfaceOrganicMatter: same as TwoZone_GodLevelManagement.Patch_001.SurfaceOrganicMatter
      MicroClimate: same as TwoZone_GodLevelManagement.Patch_001.MicroClimate
      Irrigation
      Plant15 Wheat: AutoHarvest=true; CropType=Wheat
    Zone Patch_027: Area=1; Slope=0
      Manager Manager_P
        This_field_no = 3
        Field_crop = wheat
        Soil_type = Soil_02
        Patch_area = 3
        Landscape_position = Neutral
        Irrigator_position = 1
        script: same as in TwoZone_GodLevelManagement.Patch_001.Manager_P
      Report Report27: same as TwoZone_GodLevelManagement.Patch_001.Report1
      Fertiliser
      Soil: same as TwoZone_GodLevelManagement.Patch_002.Soil
      SurfaceOrganicMatter: same as TwoZone_GodLevelManagement.Patch_001.SurfaceOrganicMatter
      MicroClimate: same as TwoZone_GodLevelManagement.Patch_001.MicroClimate
      Irrigation
      Plant15 Wheat: AutoHarvest=true; CropType=Wheat
    Zone Patch_028: Area=1; Slope=0
      Manager Manager_P
        This_field_no = 4
        Field_crop = wheat
        Soil_type = Soil_02
        Patch_area = 3
        Landscape_position = Loss
        Irrigator_position = 4
        script: same as in TwoZone_GodLevelManagement.Patch_001.Manager_P
      Report Report28: same as TwoZone_GodLevelManagement.Patch_001.Report1
      Fertiliser
      Soil: same as TwoZone_GodLevelManagement.Patch_002.Soil
      SurfaceOrganicMatter: same as TwoZone_GodLevelManagement.Patch_001.SurfaceOrganicMatter
      MicroClimate: same as TwoZone_GodLevelManagement.Patch_001.MicroClimate
      Irrigation
      Plant15 Wheat: AutoHarvest=true; CropType=Wheat
    Zone Patch_029: Area=1; Slope=0
      Manager Manager_P
        This_field_no = 4
        Field_crop = wheat
        Soil_type = Soil_03
        Patch_area = 2
        Landscape_position = Loss
        Irrigator_position = 4
        script: same as in TwoZone_GodLevelManagement.Patch_001.Manager_P
      Report Report29: same as TwoZone_GodLevelManagement.Patch_001.Report1
      Fertiliser
      Soil: same as TwoZone_GodLevelManagement.Patch_010.Soil
      SurfaceOrganicMatter: same as TwoZone_GodLevelManagement.Patch_001.SurfaceOrganicMatter
      MicroClimate: same as TwoZone_GodLevelManagement.Patch_001.MicroClimate
      Irrigation
      Plant15 Wheat: AutoHarvest=true; CropType=Wheat
    Zone Patch_030: Area=1; Slope=0
      Manager Manager_P
        This_field_no = 4
        Field_crop = wheat
        Soil_type = Soil_02
        Patch_area = 6
        Landscape_position = Loss
        Irrigator_position = 3
        script: same as in TwoZone_GodLevelManagement.Patch_001.Manager_P
      Report Report30: same as TwoZone_GodLevelManagement.Patch_001.Report1
      Fertiliser
      Soil: same as TwoZone_GodLevelManagement.Patch_002.Soil
      SurfaceOrganicMatter: same as TwoZone_GodLevelManagement.Patch_001.SurfaceOrganicMatter
      MicroClimate: same as TwoZone_GodLevelManagement.Patch_001.MicroClimate
      Irrigation
      Plant15 Wheat: AutoHarvest=true; CropType=Wheat
    Zone Patch_031: Area=1; Slope=0
      Manager Manager_P
        This_field_no = 4
        Field_crop = wheat
        Soil_type = Soil_03
        Patch_area = 3
        Landscape_position = Loss
        Irrigator_position = 3
        script: same as in TwoZone_GodLevelManagement.Patch_001.Manager_P
      Report Report31: same as TwoZone_GodLevelManagement.Patch_001.Report1
      Fertiliser
      Soil: same as TwoZone_GodLevelManagement.Patch_010.Soil
      SurfaceOrganicMatter: same as TwoZone_GodLevelManagement.Patch_001.SurfaceOrganicMatter
      MicroClimate: same as TwoZone_GodLevelManagement.Patch_001.MicroClimate
      Irrigation
      Plant15 Wheat: AutoHarvest=true; CropType=Wheat
    Zone Patch_032: Area=1; Slope=0
      Manager Manager_P
        This_field_no = 4
        Field_crop = wheat
        Soil_type = Soil_03
        Patch_area = 1
        Landscape_position = Neutral
        Irrigator_position = 3
        script: same as in TwoZone_GodLevelManagement.Patch_001.Manager_P
      Report Report32: same as TwoZone_GodLevelManagement.Patch_001.Report1
      Fertiliser
      Soil: same as TwoZone_GodLevelManagement.Patch_010.Soil
      SurfaceOrganicMatter: same as TwoZone_GodLevelManagement.Patch_001.SurfaceOrganicMatter
      MicroClimate: same as TwoZone_GodLevelManagement.Patch_001.MicroClimate
      Irrigation
      Plant15 Wheat: AutoHarvest=true; CropType=Wheat
    Zone Patch_033: Area=1; Slope=0
      Manager Manager_P
        This_field_no = 4
        Field_crop = wheat
        Soil_type = Soil_02
        Patch_area = 3
        Landscape_position = Loss
        Irrigator_position = 2
        script: same as in TwoZone_GodLevelManagement.Patch_001.Manager_P
      Report Report33: same as TwoZone_GodLevelManagement.Patch_001.Report1
      Fertiliser
      Soil: same as TwoZone_GodLevelManagement.Patch_002.Soil
      SurfaceOrganicMatter: same as TwoZone_GodLevelManagement.Patch_001.SurfaceOrganicMatter
      MicroClimate: same as TwoZone_GodLevelManagement.Patch_001.MicroClimate
      Irrigation
      Plant15 Wheat: AutoHarvest=true; CropType=Wheat
    Zone Patch_034: Area=1; Slope=0
      Manager Manager_P
        This_field_no = 4
        Field_crop = wheat
        Soil_type = Soil_03
        Patch_area = 1
        Landscape_position = Neutral
        Irrigator_position = 2
        script: same as in TwoZone_GodLevelManagement.Patch_001.Manager_P
      Report Report34: same as TwoZone_GodLevelManagement.Patch_001.Report1
      Fertiliser
      Soil: same as TwoZone_GodLevelManagement.Patch_010.Soil
      SurfaceOrganicMatter: same as TwoZone_GodLevelManagement.Patch_001.SurfaceOrganicMatter
      MicroClimate: same as TwoZone_GodLevelManagement.Patch_001.MicroClimate
      Irrigation
      Plant15 Wheat: AutoHarvest=true; CropType=Wheat
    Zone Patch_035: Area=1; Slope=0
      Manager Manager_P
        This_field_no = 4
        Field_crop = wheat
        Soil_type = Soil_02
        Patch_area = 3
        Landscape_position = Neutral
        Irrigator_position = 2
        script: same as in TwoZone_GodLevelManagement.Patch_001.Manager_P
      Report Report35: same as TwoZone_GodLevelManagement.Patch_001.Report1
      Fertiliser
      Soil: same as TwoZone_GodLevelManagement.Patch_002.Soil
      SurfaceOrganicMatter: same as TwoZone_GodLevelManagement.Patch_001.SurfaceOrganicMatter
      MicroClimate: same as TwoZone_GodLevelManagement.Patch_001.MicroClimate
      Irrigation
      Plant15 Wheat: AutoHarvest=true; CropType=Wheat
    Zone Patch_036: Area=1; Slope=0
      Manager Manager_P
        This_field_no = 4
        Field_crop = wheat
        Soil_type = Soil_02
        Patch_area = 3
        Landscape_position = Neutral
        Irrigator_position = 1
        script: same as in TwoZone_GodLevelManagement.Patch_001.Manager_P
      Report Report36: same as TwoZone_GodLevelManagement.Patch_001.Report1
      Fertiliser
      Soil: same as TwoZone_GodLevelManagement.Patch_002.Soil
      SurfaceOrganicMatter: same as TwoZone_GodLevelManagement.Patch_001.SurfaceOrganicMatter
      MicroClimate: same as TwoZone_GodLevelManagement.Patch_001.MicroClimate
      Irrigation
      Plant15 Wheat: AutoHarvest=true; CropType=Wheat
    Report ReportMaster: EventNames=[Clock].EndOfDay
      VariableNames:
        [Clock].Today
        [Field_Reporting].Script.YieldArea_Array
        [Field_Reporting].Script.Runoff
        [Runoff].Script.Runoff
        [Weather].Rain
  Simulations
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