Simulations
  Memo
    {\rtf1\fbidis\ansi\ansicpg1252\deff0\deflang3081{\fonttbl{\f0\fswiss\fprq2\fcharset0 Calibri;}{\f1\froman\fprq2\fcharset2 Symbol;}{\f2\fswiss\fprq2\fcharset0 Microsoft Sans Serif;}{\f3\fnil\fcharset0 Microsoft Sans Serif;}}
    \viewkind4\uc1\trowd\trgaph108\trleft-108\trbrdrt\brdrs\brdrw10 \trbrdrl\brdrs\brdrw10 \trbrdrb\brdrs\brdrw10 \trbrdrr\brdrs\brdrw10 \clbrdrt\brdrw15\brdrs\clbrdrl\brdrw15\brdrs\clbrdrb\brdrw15\brdrs\clbrdrr\brdrw15\brdrs \cellx2202\clbrdrt\brdrw15\brdrs\clbrdrl\brdrw15\brdrs\clbrdrb\brdrw15\brdrs\clbrdrr\brdrw15\brdrs \cellx4512\clbrdrt\brdrw15\brdrs\clbrdrl\brdrw15\brdrs\clbrdrb\brdrw15\brdrs\clbrdrr\brdrw15\brdrs \cellx6823\clbrdrt\brdrw15\brdrs\clbrdrl\brdrw15\brdrs\clbrdrb\brdrw15\brdrs\clbrdrr\brdrw15\brdrs \cellx9134\pard\intbl\ltrpar\sl252\slmult1\lang9\f0\fs22 TH1 new stuff\cell TH2\cell TH3\cell TH4\cell\row
    \trowd\trgaph108\trleft-108\trbrdrt\brdrs\brdrw10 \trbrdrl\brdrs\brdrw10 \trbrdrb\brdrs\brdrw10 \trbrdrr\brdrs\brdrw10 \clbrdrt\brdrw15\brdrs\clbrdrl\brdrw15\brdrs\clbrdrb\brdrw15\brdrs\clbrdrr\brdrw15\brdrs \cellx2202\clbrdrt\brdrw15\brdrs\clbrdrl\brdrw15\brdrs\clbrdrb\brdrw15\brdrs\clbrdrr\brdrw15\brdrs \cellx4512\clbrdrt\brdrw15\brdrs\clbrdrl\brdrw15\brdrs\clbrdrb\brdrw15\brdrs\clbrdrr\brdrw15\brdrs \cellx6823\clbrdrt\brdrw15\brdrs\clbrdrl\brdrw15\brdrs\clbrdrb\brdrw15\brdrs\clbrdrr\brdrw15\brdrs \cellx9134\intbl R2C1\cell R2C2\cell R2C3\cell R2C4\cell\row
    \trowd\trgaph108\trleft-108\trbrdrt\brdrs\brdrw10 \trbrdrl\brdrs\brdrw10 \trbrdrb\brdrs\brdrw10 \trbrdrr\brdrs\brdrw10 \clbrdrt\brdrw15\brdrs\clbrdrl\brdrw15\brdrs\clbrdrb\brdrw15\brdrs\clbrdrr\brdrw15\brdrs \cellx2202\clbrdrt\brdrw15\brdrs\clbrdrl\brdrw15\brdrs\clbrdrb\brdrw15\brdrs\clbrdrr\brdrw15\brdrs \cellx4512\clbrdrt\brdrw15\brdrs\clbrdrl\brdrw15\brdrs\clbrdrb\brdrw15\brdrs\clbrdrr\brdrw15\brdrs \cellx6823\clbrdrt\brdrw15\brdrs\clbrdrl\brdrw15\brdrs\clbrdrb\brdrw15\brdrs\clbrdrr\brdrw15\brdrs \cellx9134\intbl R3C1\cell R3C2\cell R3C3\cell R3C4\cell\row
    \pard\ltrpar\sa200\sl276\slmult1\par
    \pard\ltrpar\fi-360\li720\sa200\sl276\slmult1 1.\tab ordered list 1\par
    2.\tab ordered list 2\par
    3.\tab ordered list 3\par
    \pard\ltrpar\sa200\sl276\slmult1 Plain Text\par
    \b Bold Text\b0  plain\par
    \i Italic Text\i0  plain\par
    \ul Underlined Text\ulnone  plain\ul\b\par
    \ulnone\b0\strike Strike Text\strike0  plain\par
    \super superscript\nosupersub  plain\par
    \sub subscript\nosupersub  plain\sub\par
    \pard\ltrpar\fi-360\li720\sa200\sl276\slmult1\nosupersub\f1\'b7\tab\f0 unordered list 1\par
    \f1\'b7\tab\f0 unordered list 2\par
    \f1\'b7\tab\f0 unordered list 3\lang3081\par
    \pard\ltrpar\f2\fs17\par
    \pard\ltrpar\sa160\sl252\slmult1\f0\fs22\par
    \pard\ltrpar\f3\fs17\par
    }
  Experiment Sangara
    Factors
      Factor N: Specifications=[operations]
        Operations 0
          1996-04-01  [Fertiliser].Apply(1.9, Fertiliser.Types.NH4NO3N, 10);
          1996-06-01  [Fertiliser].Apply(3.8, Fertiliser.Types.NH4NO3N, 10);
          1996-09-01  [Fertiliser].Apply(3.8, Fertiliser.Types.NH4NO3N, 10);
          1996-12-01  [Fertiliser].Apply(3.8, Fertiliser.Types.NH4NO3N, 10);
          1997-03-01  [Fertiliser].Apply(5.7, Fertiliser.Types.NH4NO3N, 10);
          1997-07-01  [Fertiliser].Apply(11.8, Fertiliser.Types.NH4NO3N, 10);
          1997-11-01  [Fertiliser].Apply(11.8, Fertiliser.Types.NH4NO3N, 10);
          1998-03-01  [Fertiliser].Apply(16.5, Fertiliser.Types.NH4NO3N, 10);
          1998-07-01  [Fertiliser].Apply(23.6, Fertiliser.Types.NH4NO3N, 10);
          1998-11-01  [Fertiliser].Apply(23.6, Fertiliser.Types.NH4NO3N, 10);
          1999-03-01  [Fertiliser].Apply(33.1, Fertiliser.Types.NH4NO3N, 10);
          1999-07-01  [Fertiliser].Apply(37.8, Fertiliser.Types.NH4NO3N, 10);
          1999-11-01  [Fertiliser].Apply(37.8, Fertiliser.Types.NH4NO3N, 10);
          2000-03-01  [Fertiliser].Apply(42.5, Fertiliser.Types.NH4NO3N, 10);
          2000-07-01  [Fertiliser].Apply(47.3, Fertiliser.Types.NH4NO3N, 10);
          2000-11-01  [Fertiliser].Apply(47.3, Fertiliser.Types.NH4NO3N, 10);
        Operations 1
          1996-04-01  [Fertiliser].Apply(1.9, Fertiliser.Types.NH4NO3N, 10);
          1996-06-01  [Fertiliser].Apply(3.8, Fertiliser.Types.NH4NO3N, 10);
          1996-09-01  [Fertiliser].Apply(3.8, Fertiliser.Types.NH4NO3N, 10);
          1996-12-01  [Fertiliser].Apply(3.8, Fertiliser.Types.NH4NO3N, 10);
          1997-03-01  [Fertiliser].Apply(5.7, Fertiliser.Types.NH4NO3N, 10);
          1997-07-01  [Fertiliser].Apply(11.8, Fertiliser.Types.NH4NO3N, 10);
          1997-11-01  [Fertiliser].Apply(11.8, Fertiliser.Types.NH4NO3N, 10);
          1998-03-01  [Fertiliser].Apply(16.5, Fertiliser.Types.NH4NO3N, 10);
          1998-07-01  [Fertiliser].Apply(23.6, Fertiliser.Types.NH4NO3N, 10);
          1998-11-01  [Fertiliser].Apply(23.6, Fertiliser.Types.NH4NO3N, 10);
          1999-03-01  [Fertiliser].Apply(33.1, Fertiliser.Types.NH4NO3N, 10);
          1999-07-01  [Fertiliser].Apply(37.8, Fertiliser.Types.NH4NO3N, 10);
          1999-11-01  [Fertiliser].Apply(37.8, Fertiliser.Types.NH4NO3N, 10);
          2000-03-01  [Fertiliser].Apply(42.5, Fertiliser.Types.NH4NO3N, 10);
          2000-07-01  [Fertiliser].Apply(47.3, Fertiliser.Types.NH4NO3N, 10);
          2000-11-01  [Fertiliser].Apply(47.3, Fertiliser.Types.NH4NO3N, 10);
          2001-03-01  [Fertiliser].Apply(57, Fertiliser.Types.UreaN, 10);
          2002-03-01  [Fertiliser].Apply(57, Fertiliser.Types.UreaN, 10);
          2003-03-01  [Fertiliser].Apply(57, Fertiliser.Types.UreaN, 10);
          2004-03-01  [Fertiliser].Apply(57, Fertiliser.Types.UreaN, 10);
          2005-03-01  [Fertiliser].Apply(57, Fertiliser.Types.UreaN, 10);
          2006-03-01  [Fertiliser].Apply(57, Fertiliser.Types.UreaN, 10);
          2007-03-01  [Fertiliser].Apply(57, Fertiliser.Types.UreaN, 10);
          2008-03-01  [Fertiliser].Apply(57, Fertiliser.Types.UreaN, 10);
          2009-03-01  [Fertiliser].Apply(57, Fertiliser.Types.UreaN, 10);
          2010-03-01  [Fertiliser].Apply(57, Fertiliser.Types.UreaN, 10);
        Operations 2
          1996-04-01  [Fertiliser].Apply(1.9, Fertiliser.Types.NH4NO3N, 10);
          1996-06-01  [Fertiliser].Apply(3.8, Fertiliser.Types.NH4NO3N, 10);
          1996-09-01  [Fertiliser].Apply(3.8, Fertiliser.Types.NH4NO3N, 10);
          1996-12-01  [Fertiliser].Apply(3.8, Fertiliser.Types.NH4NO3N, 10);
          1997-03-01  [Fertiliser].Apply(5.7, Fertiliser.Types.NH4NO3N, 10);
          1997-07-01  [Fertiliser].Apply(11.8, Fertiliser.Types.NH4NO3N, 10);
          1997-11-01  [Fertiliser].Apply(11.8, Fertiliser.Types.NH4NO3N, 10);
          1998-03-01  [Fertiliser].Apply(16.5, Fertiliser.Types.NH4NO3N, 10);
          1998-07-01  [Fertiliser].Apply(23.6, Fertiliser.Types.NH4NO3N, 10);
          1998-11-01  [Fertiliser].Apply(23.6, Fertiliser.Types.NH4NO3N, 10);
          1999-03-01  [Fertiliser].Apply(33.1, Fertiliser.Types.NH4NO3N, 10);
          1999-07-01  [Fertiliser].Apply(37.8, Fertiliser.Types.NH4NO3N, 10);
          1999-11-01  [Fertiliser].Apply(37.8, Fertiliser.Types.NH4NO3N, 10);
          2000-03-01  [Fertiliser].Apply(42.5, Fertiliser.Types.NH4NO3N, 10);
          2000-07-01  [Fertiliser].Apply(47.3, Fertiliser.Types.NH4NO3N, 10);
          2000-11-01  [Fertiliser].Apply(47.3, Fertiliser.Types.NH4NO3N, 10);
          2001-03-01  [Fertiliser].Apply(227, Fertiliser.Types.UreaN, 10);
          2002-03-01  [Fertiliser].Apply(227, Fertiliser.Types.UreaN, 10);
          2003-03-01  [Fertiliser].Apply(227, Fertiliser.Types.UreaN, 10);
          2004-03-01  [Fertiliser].Apply(227, Fertiliser.Types.UreaN, 10);
          2005-03-01  [Fertiliser].Apply(227, Fertiliser.Types.UreaN, 10);
          2006-03-01  [Fertiliser].Apply(227, Fertiliser.Types.UreaN, 10);
          2007-03-01  [Fertiliser].Apply(227, Fertiliser.Types.UreaN, 10);
          2008-03-01  [Fertiliser].Apply(227, Fertiliser.Types.UreaN, 10);
          2009-03-01  [Fertiliser].Apply(227, Fertiliser.Types.UreaN, 10);
          2010-03-01  [Fertiliser].Apply(227, Fertiliser.Types.UreaN, 10);
    Simulation Base324: Area=0; Slope=0
      Weather: FileName=..\WeatherFiles\Popondetta.met
      Clock: StartDate=1996-03-01; EndDate=2010-09-29
      Summary
      Zone Field: Area=1; Slope=0
        Fertiliser
        SurfaceOrganicMatter SurfaceOM: PoolName=oilpalm oilpalmstem; type=oilpalm oilpalmstem; mass=24000 63000; standing_fraction=0 0; cnr=39 145; CriticalResidueWeight=2000; OptimumDecompTemp=20; MaxCumulativeEOS=20; CNRatioDecompCoeff=0.277; CNRatioDecompThreshold=25; TotalLeachRain=25; MinRainToLeach=10; CriticalMinimumOrganicC=0.004; DefaultCPRatio=0; DefaultStandingFraction=0; StandingExtinctCoeff=0.5; FractionFaecesAdded=0.5
          Pools:
            PoolName     ResidueType  Mass   CNRatio  StandingFraction
            oilpalm      oilpalm      24000  39       0
            oilpalmstem  oilpalmstem  63000  145      0
          ResidueTypes: LoadFromResource=ResidueTypes
        Soil: SoilType=Higaturu Series; Site=Sangara Estate; NearestTown=Popondetta; Region=Oro Province; Latitude=0; Longitude=0
          Water
            Thickness  BD    AirDry  LL15   DUL    SAT
            100        1.22  0.127   0.38   0.48   0.53
            200        1.22  0.127   0.38   0.48   0.53
            300        1.43  0.1     0.3    0.4    0.45
            300        1.14  0.137   0.41   0.51   0.56
            300        1.15  0.135   0.406  0.506  0.556
            300        1.15  0.135   0.406  0.506  0.556
            500        1.43  0.1     0.3    0.4    0.45
            500        1.43  0.1     0.3    0.4    0.45
            500        1.43  0.1     0.3    0.4    0.45
            500        1.43  0.1     0.3    0.4    0.45
            500        1.43  0.1     0.3    0.4    0.45
            1000       1.43  0.1     0.3    0.4    0.45
            SoilCropOilPalm OilPalmSoil: XF=[1, 1, 1, 1, 1, 1, 1, 1, 1, 0, 0, 0]
              KL=[0.06, 0.04, 0.03, 0.02, 0.02, 0.02, 0.01, 0.01, 0.01, 0, 0, 0]
          SoilWater: residueinterception=0; SummerDate=1-Nov; SummerU=5; SummerCona=5; WinterDate=1-Apr; WinterU=5; WinterCona=5; DiffusConst=88; DiffusSlope=35.4; Salb=0.18; CN2Bare=68; CNRed=20; CNCov=0.8; slope=0; discharge_width=0; catchment_area=0; max_pond=0
            Thickness  SWCON  KLAT
            100        0.7    0
            200        0.7    0
            300        0.7    0
            300        0.7    0
            300        0.7    0
            300        0.7    0
            500        0.5    0
            500        0.5    0
            500        0.5    0
            500        0.5    0
            500        0.5    0
            1000       0.5    0
          SoilNitrogen: fom_type=[default, manure, mucuna, lablab, shemp, stable]; fract_carb=[0.2, 0.3, 0.54, 0.57, 0.45, 0]; fract_cell=[0.7, 0.3, 0.37, 0.37, 0.47, 0.1]; fract_lign=[0.1, 0.4, 0.09, 0.06, 0.08, 0.9]; wfpsN2N2O_x=[22, 88]; wfpsN2N2O_y=[0.1, 1]
          SoilOrganicMatter: RootCN=30; RootWt=3000; SoilCN=12; EnrACoeff=7.4; EnrBCoeff=0.2; OCUnits=Total
            Thickness  OC    FBiom  FInert
            100        2.1   0.04   0.24
            100        1.06  0.03   0.47
            100        0.65  0.015  0.77
            300        0.5   0.01   0.95
            300        0.4   0.01   0.99
            600        0.4   0.01   0.99
            500        0.4   0.01   0.99
            500        0.4   0.01   0.99
            500        0.4   0.01   0.99
            500        0.4   0.01   0.99
            500        0.4   0.01   0.99
            1000       0.4   0.01   0.99
          Analysis: PHUnits=Water; BoronUnits=HotWater
            Thickness=[100, 200, 300, 300, 300, 300, 500, 500, 500, 500, 500, 1000]
            PH=[6.3, 6.4, 6.7, 6.8, 6.8, 6.8, 6.8, 6.8, 6.8, 6.8, 6.8, 6.8]
          InitialWater Initial water: PercentMethod=EvenlyDistributed; FractionFull=1
          Sample Initial nitrogen: NO3Units=ppm; NH4Units=ppm; SWUnits=Volumetric; OCUnits=Total; PHUnits=Water
            Thickness  NO3  NH4
            100        5    0
            200        5    0
            300        1    0
            300        1    0
            300        1    0
            300        0    0
            500        0    0
            500        0    0
            500        0    0
            500        0    0
            500        0    0
            1000       0    0
        Report AnnualOutput: EventNames=[Clock].EndOfYear
          VariableNames:
            [Clock].Today
            [OilPalm].Age
            [OilPalm].LAI
            [Calculations].Script.AnnualRain
            [Calculations].Script.AnnualFronds
            [Calculations].Script.AnnualBunches
            [Calculations].Script.AnnualYield
            [Calculations].Script.AnnualBunchSize
            [Calculations].Script.AnnualUnderstoryNPP
            [Calculations].Script.AnnualUnderstoryNFixation
            [Calculations].Script.AnnualUnderstoryNUptake
            [Calculations].Script.AnnualPalmNUptake
            [Calculations].Script.AnnualRootNPP
            [Calculations].Script.AnnualStemNPP
            [Calculations].Script.AnnualFrondNPP
            [Calculations].Script.AnnualBunchNPP
            [Calculations].Script.AnnualTotalVegetativeNPP
            [Calculations].Script.AnnualTotalNInput
            [Calculations].Script.AnnualFertiliserNAdded
            [Calculations].Script.AnnualNRemoved
            [Calculations].Script.AnnualDenitrification
            [Calculations].Script.AnnualN2O
            [Calculations].Script.AnnualLeaching
        Report MonthlyOutput
          VariableNames:
            [Clock].Today.Year
            [Clock].Today
            [Clock].Today.Month
            OilPalm.Age
            [SurfaceOM].N
            [SurfaceOM].Wt
            OilPalm.CumulativeFrondNumber
            [Calculations].Script.MonthlyPalmBunches
            [Calculations].Script.MonthlyPalmYield
            [Calculations].Script.MonthlyPalmBunchSize
            OilPalm.LAI
            OilPalm.StemMass
            OilPalm.UnderstoryCoverGreen
            OilPalm.UnderstoryNFixation
            [Calculations].Script.surfaceom_wt_oilpalmstem
            [Calculations].Script.surfaceom_wt_oilpalmunderstory
            [Calculations].Script.MonthlyDenit
            [Calculations].Script.MonthlyN2O
            [Calculations].Script.MonthlyLeach
            [Calculations].Script.MonthlyFixation
            [Calculations].Script.SurfaceNO3
            [Calculations].Script.RootZoneNO3
            [Calculations].Script.MonthlyN2
            [Calculations].Script.SoilCtpha
            [Calculations].Script.NitTot
          EventNames:
            [Clock].StartOfMonth
        MicroClimate: air_pressure=1010; soil_emissivity=0.96; sun_angle=15; soil_heat_flux_fraction=0.4; night_interception_fraction=0.5; windspeed_default=3; refheight=2; albedo=0.15; emissivity=0.96; gsmax=0.01; r50=200; a_interception=0; b_interception=1; c_interception=0; d_interception=0; soil_albedo=0.23
        OilPalm: interception=0; UnderstoryCoverMax=0.4; UnderstoryLegumeFraction=1; InterceptionFraction=0; MaximumRootDepth=5000; RootDepth=0; DltDM=0; ReproductiveGrowthFraction=0; UnderstoryCoverGreen=0
        Operations: same as Sangara.Factors.N.0
        Irrigation
        Manager Palm Management
          sowing_date = 1996-03-01
          population = 135
          cultivar = Dami
          sowing_depth = 200
          Plant_population = 0
```csharp
using System;
using Models.Core;
using Models.PMF;
using Models.PMF.OilPalm;
namespace Models
{
	[Serializable]
	[System.Xml.Serialization.XmlInclude(typeof(Model))]
	public class Script : Model
	{
		[Link] Clock Clock; 
		[Link] OilPalm oilPalm;
		[Link] Summary Summary;
		
		[Description("Sowing date")]
		public DateTime sowing_date {get; set;}
		
		[Description("Plant population /ha")]
		public double population {get; set;}


		[Description("Cultivar")]
		[Display(DisplayType = DisplayAttribute.DisplayTypeEnum.CultivarName)]
        public string cultivar {get; set;}

		[Description("Sowing depth (mm)")]
		public double sowing_depth {get; set;}
		
		public double Plant_population {get;set;}
		
		private byte HarvestCounter = 1;

        [EventSubscribe("Commencing")]
        private void OnSimulationCommencing(object sender, EventArgs e)
		{
		    Plant_population = 0;
		}
		
		[EventSubscribe("DoManagement")]
		private void OnDoManagement(object sender, EventArgs e)
		{	
			if (Clock.Today.Date == sowing_date)
			{
			    oilPalm.Sow(population: population / 10000, cultivar:cultivar, depth:sowing_depth, rowSpacing:150);
			}
			
			if (HarvestCounter == 14)
			{
				oilPalm.Harvest();
				HarvestCounter = 1;
			}
			
			HarvestCounter++;
		}
	}
}
```
        Manager Calculations
          AnnualRain = 0
          Offset = 6
          AnnualFronds = 0
          AnnualBunches = 0
          AnnualYield = 0
          AnnualBunchSize = 0
          SoilCtpha = -
          surfaceom_wt_oilpalmstem = -
          surfaceom_wt_oilpalmunderstory = 0
          OilPalmYield = 0
          TotalNO3 = -
          NitTot = -
          AnnualUnderstoryNFixation = -
          AnnualUnderstoryNPP = -
          AnnualUnderstoryNUptake = -
          AnnualPalmNUptake = 0
          AnnualTotalVegetativeNPP = 0
          AnnualPalmVegetativeNPP = 0
          AnnualFrondNPP = 0
          AnnualStemNPP = 0
          AnnualRootNPP = 0
          AnnualBunchNPP = 0
          AnnualTotalNInput = 0
          AnnualFertiliserNAdded = 0
          AnnualNRemoved = 0
          AnnualDenitrification = 0
          AnnualN2O = 0
          AnnualLeaching = 0
```csharp
using System;
using Models.Core;
using Models.PMF;
using Models.PMF.OilPalm;
using Models.Soils;
using Models.SurfaceOM;

namespace Models
{ 
	[Serializable]
	[System.Xml.Serialization.XmlInclude(typeof(Model))]
	public class Script : Model
	{
		[Link] Clock Clock;
		[Link] OilPalm OilPalm;
		[Link] Soil Soil;
		[Link] SurfaceOrganicMatter SurfaceOM;
		[Link] Summary Summary;
		[Link] Fertiliser Fertiliser;
		[Link] Weather Weather;
		
		public double AnnualRain {get; set;}
		public double Offset {get; set;}
		public double AnnualFronds {get; set;}
		public double AnnualBunches {get; set;}
		public double AnnualYield {get; set;}
		public double AnnualBunchSize {get; set;}
		public double SoilCtpha {get; set;}
		public double surfaceom_wt_oilpalmstem {get; set;}
		public double surfaceom_wt_oilpalmunderstory {get; set;}
	    public double OilPalmYield {get; set;}
	    public double TotalNO3 {get; set;}
	    public double NitTot {get;set;}
	    public double AnnualUnderstoryNFixation {get; set;}	
	    public double AnnualUnderstoryNPP {get; set;}	
	    public double AnnualUnderstoryNUptake {get; set;}	
	    public double AnnualPalmNUptake {get; set;}
	    
	    public double AnnualTotalVegetativeNPP {get; set;}
        public double AnnualPalmVegetativeNPP {get; set;}
        public double AnnualFrondNPP {get; set;}
        public double AnnualStemNPP {get; set;}
        public double AnnualRootNPP {get; set;}
        public double AnnualBunchNPP {get; set;}
        public double AnnualTotalNInput {get; set;}
        public double AnnualFertiliserNAdded {get; set;}
        public double AnnualNRemoved {get; set;}
        public double AnnualDenitrification {get; set;}
        public double AnnualN2O {get;set;}
        public double AnnualLeaching {get; set;}
        
        [EventSubscribe("Commencing")]
        private void OnSimulationCommencing(object sender, EventArgs e)
		{
		    AnnualRain = 0;
			Offset = 0;
			OilPalmYield = 0;
			AnnualFronds = 0;
			AnnualBunches = 0;
			AnnualBunchSize = 0;
			AnnualYield = 0;
			SoilCtpha = 0;
			surfaceom_wt_oilpalmstem = 0;
			surfaceom_wt_oilpalmunderstory = 0;	
			NitTot=0;
			TotalNO3 = 0;
			AnnualUnderstoryNFixation = 0;
			AnnualUnderstoryNPP = 0;
			AnnualUnderstoryNUptake = 0;
			AnnualPalmNUptake = 0;

            AnnualTotalVegetativeNPP = 0;
            AnnualPalmVegetativeNPP = 0;
            AnnualFrondNPP = 0;
            AnnualStemNPP = 0;
            AnnualRootNPP = 0;
            AnnualBunchNPP = 0;
            AnnualTotalNInput = 0;
			AnnualFertiliserNAdded = 0;
			AnnualNRemoved = 0;
			AnnualDenitrification = 0;
			AnnualN2O = 0;
		    AnnualLeaching = 0;	
		}
		

       [EventSubscribe("StartOfYear")]
       private void OnStartOfYear(object sender, EventArgs e)
       {
            AnnualRain = 0;
	   		Offset = OilPalm.CumulativeFrondNumber;
			AnnualYield = 0;
			AnnualBunches = 0;
			AnnualBunchSize = 0;
			AnnualUnderstoryNFixation = 0;
			AnnualUnderstoryNPP = 0;
			AnnualUnderstoryNUptake = 0;
			AnnualPalmNUptake = 0;
            AnnualTotalVegetativeNPP = 0;
            AnnualPalmVegetativeNPP = 0;
            AnnualUnderstoryNPP = 0;
            AnnualFrondNPP = 0;
            AnnualStemNPP = 0;
            AnnualRootNPP = 0;
            AnnualBunchNPP = 0;
            AnnualTotalNInput = 0;
            AnnualFertiliserNAdded = 0;
            AnnualNRemoved = 0;
            AnnualDenitrification = 0;
            AnnualN2O = 0;
            AnnualLeaching = 0;
		}
		
       [EventSubscribe("DoManagementCalculations")]
       private void OnDoManagement(object sender, EventArgs e)
		{
            AnnualRain += Weather.Rain;
			SoilCtpha = Utility.Math.Sum(Soil.SoilNitrogen.TotalC) / 1000;
			surfaceom_wt_oilpalmstem = SurfaceOM.GetWeightFromPool("oilpalmstem");
			TotalNO3 = Utility.Math.Sum(Soil.NO3N);
			NitTot = Utility.Math.Sum(Soil.SoilNitrogen.TotalN);

			AnnualUnderstoryNFixation += OilPalm.UnderstoryNFixation;
			AnnualUnderstoryNPP += (OilPalm.UnderstoryDltDM * 10);
			AnnualUnderstoryNUptake += Utility.Math.Sum(OilPalm.UnderstoryNUptake);
			AnnualPalmNUptake += Utility.Math.Sum(OilPalm.NUptake);
			AnnualFronds = OilPalm.CumulativeFrondNumber - Offset;							


            AnnualTotalVegetativeNPP += (OilPalm.RootGrowth + OilPalm.StemGrowth + OilPalm.FrondGrowth + OilPalm.UnderstoryDltDM) * 10;
            AnnualPalmVegetativeNPP += (OilPalm.RootGrowth + OilPalm.StemGrowth + OilPalm.FrondGrowth) * 10;
            AnnualFrondNPP += OilPalm.FrondGrowth * 10;
            AnnualRootNPP += OilPalm.RootGrowth * 10;
            AnnualStemNPP += OilPalm.StemGrowth * 10;
            AnnualBunchNPP += OilPalm.BunchGrowth * 10;

            AnnualTotalNInput += OilPalm.UnderstoryNFixation + Fertiliser.NitrogenApplied;
            AnnualFertiliserNAdded +=Fertiliser.NitrogenApplied;
            AnnualDenitrification += Utility.Math.Sum(Soil.SoilNitrogen.Denitrification);
            AnnualN2O += Utility.Math.Sum(Soil.SoilNitrogen.n2o_atm);
            AnnualLeaching += Soil.SoilWater.LeachNO3;
            
		}
		
		[EventSubscribe("Harvesting")]
		private void OnHarvesting(object sender, EventArgs e)
		{
			AnnualYield += OilPalm.HarvestFFB;
			AnnualBunches += OilPalm.HarvestBunches;
			if (AnnualBunches > 0)
				AnnualBunchSize = AnnualYield * 1000 / AnnualBunches / (OilPalm.Population * 10000);
			AnnualNRemoved += OilPalm.HarvestNRemoved;
		}
	}
}
```
        Report daily: EventNames=[Clock].DoReport
          VariableNames:
            [Clock].Today.Year
            [Clock].Today
            [Clock].Today.Month
            [OilPalm].Age
            [OilPalm].UnderstoryNFixation
            [OilPalm].FW
            [Soil].SoilWater.Es
            [OilPalm].cover_green
  Experiment Hargy
    Factors
      Factor N: Specifications=[operations]
        Operations 0
          1998-04-01  [Fertiliser].Apply(36.7, Fertiliser.Types.UreaN, 10);
          1998-06-01  [Fertiliser].Apply(36.7, Fertiliser.Types.UreaN, 10);
          1998-08-01  [Fertiliser].Apply(36.7, Fertiliser.Types.UreaN, 10);
          1999-04-01  [Fertiliser].Apply(36.7, Fertiliser.Types.UreaN, 10);
          1999-06-01  [Fertiliser].Apply(36.7, Fertiliser.Types.UreaN, 10);
          1999-08-01  [Fertiliser].Apply(36.7, Fertiliser.Types.UreaN, 10);
          2000-04-01  [Fertiliser].Apply(36.7, Fertiliser.Types.UreaN, 10);
          2000-06-01  [Fertiliser].Apply(36.7, Fertiliser.Types.UreaN, 10);
          2000-08-01  [Fertiliser].Apply(36.7, Fertiliser.Types.UreaN, 10);
          2001-04-01  [Fertiliser].Apply(36.7, Fertiliser.Types.UreaN, 10);
          2001-06-01  [Fertiliser].Apply(36.7, Fertiliser.Types.UreaN, 10);
          2001-08-01  [Fertiliser].Apply(36.7, Fertiliser.Types.UreaN, 10);
        Operations 1
          1998-04-01  [Fertiliser].Apply(36.7, Fertiliser.Types.UreaN, 10);
          1998-06-01  [Fertiliser].Apply(36.7, Fertiliser.Types.UreaN, 10);
          1998-08-01  [Fertiliser].Apply(36.7, Fertiliser.Types.UreaN, 10);
          1999-04-01  [Fertiliser].Apply(36.7, Fertiliser.Types.UreaN, 10);
          1999-06-01  [Fertiliser].Apply(36.7, Fertiliser.Types.UreaN, 10);
          1999-08-01  [Fertiliser].Apply(36.7, Fertiliser.Types.UreaN, 10);
          2000-04-01  [Fertiliser].Apply(36.7, Fertiliser.Types.UreaN, 10);
          2000-06-01  [Fertiliser].Apply(36.7, Fertiliser.Types.UreaN, 10);
          2000-08-01  [Fertiliser].Apply(36.7, Fertiliser.Types.UreaN, 10);
          2001-04-01  [Fertiliser].Apply(36.7, Fertiliser.Types.UreaN, 10);
          2001-06-01  [Fertiliser].Apply(36.7, Fertiliser.Types.UreaN, 10);
          2001-08-01  [Fertiliser].Apply(36.7, Fertiliser.Types.UreaN, 10);
          2000-06-01  [Fertiliser].Apply(70, Fertiliser.Types.NH4NO3N, 10);
          2000-12-01  [Fertiliser].Apply(70, Fertiliser.Types.NH4NO3N, 10);
          2001-06-01  [Fertiliser].Apply(70, Fertiliser.Types.NH4NO3N, 10);
          2001-12-01  [Fertiliser].Apply(70, Fertiliser.Types.NH4NO3N, 10);
          2002-06-01  [Fertiliser].Apply(70, Fertiliser.Types.NH4NO3N, 10);
          2002-12-01  [Fertiliser].Apply(70, Fertiliser.Types.NH4NO3N, 10);
          2003-06-01  [Fertiliser].Apply(70, Fertiliser.Types.NH4NO3N, 10);
          2003-12-01  [Fertiliser].Apply(70, Fertiliser.Types.NH4NO3N, 10);
          2004-06-01  [Fertiliser].Apply(70, Fertiliser.Types.NH4NO3N, 10);
          2004-12-01  [Fertiliser].Apply(70, Fertiliser.Types.NH4NO3N, 10);
          2005-06-01  [Fertiliser].Apply(70, Fertiliser.Types.NH4NO3N, 10);
          2005-12-01  [Fertiliser].Apply(70, Fertiliser.Types.NH4NO3N, 10);
          2006-06-01  [Fertiliser].Apply(70, Fertiliser.Types.NH4NO3N, 10);
          2006-12-01  [Fertiliser].Apply(70, Fertiliser.Types.NH4NO3N, 10);
          2007-06-01  [Fertiliser].Apply(70, Fertiliser.Types.NH4NO3N, 10);
          2007-12-01  [Fertiliser].Apply(70, Fertiliser.Types.NH4NO3N, 10);
          2008-06-01  [Fertiliser].Apply(70, Fertiliser.Types.NH4NO3N, 10);
          2008-12-01  [Fertiliser].Apply(70, Fertiliser.Types.NH4NO3N, 10);
          2009-06-01  [Fertiliser].Apply(70, Fertiliser.Types.NH4NO3N, 10);
          2009-12-01  [Fertiliser].Apply(70, Fertiliser.Types.NH4NO3N, 10);
        Operations 2
          1998-04-01  [Fertiliser].Apply(36.7, Fertiliser.Types.UreaN, 10);
          1998-06-01  [Fertiliser].Apply(36.7, Fertiliser.Types.UreaN, 10);
          1998-08-01  [Fertiliser].Apply(36.7, Fertiliser.Types.UreaN, 10);
          1999-04-01  [Fertiliser].Apply(36.7, Fertiliser.Types.UreaN, 10);
          1999-06-01  [Fertiliser].Apply(36.7, Fertiliser.Types.UreaN, 10);
          1999-08-01  [Fertiliser].Apply(36.7, Fertiliser.Types.UreaN, 10);
          2000-04-01  [Fertiliser].Apply(36.7, Fertiliser.Types.UreaN, 10);
          2000-06-01  [Fertiliser].Apply(36.7, Fertiliser.Types.UreaN, 10);
          2000-08-01  [Fertiliser].Apply(36.7, Fertiliser.Types.UreaN, 10);
          2001-04-01  [Fertiliser].Apply(36.7, Fertiliser.Types.UreaN, 10);
          2001-06-01  [Fertiliser].Apply(36.7, Fertiliser.Types.UreaN, 10);
          2001-08-01  [Fertiliser].Apply(36.7, Fertiliser.Types.UreaN, 10);
          2000-06-01  [Fertiliser].Apply(140, Fertiliser.Types.NH4NO3N, 10);
          2000-12-01  [Fertiliser].Apply(140, Fertiliser.Types.NH4NO3N, 10);
          2001-06-01  [Fertiliser].Apply(140, Fertiliser.Types.NH4NO3N, 10);
          2001-12-01  [Fertiliser].Apply(140, Fertiliser.Types.NH4NO3N, 10);
          2002-06-01  [Fertiliser].Apply(140, Fertiliser.Types.NH4NO3N, 10);
          2002-12-01  [Fertiliser].Apply(140, Fertiliser.Types.NH4NO3N, 10);
          2003-06-01  [Fertiliser].Apply(140, Fertiliser.Types.NH4NO3N, 10);
          2003-12-01  [Fertiliser].Apply(140, Fertiliser.Types.NH4NO3N, 10);
          2004-06-01  [Fertiliser].Apply(140, Fertiliser.Types.NH4NO3N, 10);
          2004-12-01  [Fertiliser].Apply(140, Fertiliser.Types.NH4NO3N, 10);
          2005-06-01  [Fertiliser].Apply(140, Fertiliser.Types.NH4NO3N, 10);
          2005-12-01  [Fertiliser].Apply(140, Fertiliser.Types.NH4NO3N, 10);
          2006-06-01  [Fertiliser].Apply(140, Fertiliser.Types.NH4NO3N, 10);
          2006-12-01  [Fertiliser].Apply(140, Fertiliser.Types.NH4NO3N, 10);
          2007-06-01  [Fertiliser].Apply(140, Fertiliser.Types.NH4NO3N, 10);
          2007-12-01  [Fertiliser].Apply(140, Fertiliser.Types.NH4NO3N, 10);
          2008-06-01  [Fertiliser].Apply(140, Fertiliser.Types.NH4NO3N, 10);
          2008-12-01  [Fertiliser].Apply(140, Fertiliser.Types.NH4NO3N, 10);
          2009-06-01  [Fertiliser].Apply(140, Fertiliser.Types.NH4NO3N, 10);
          2009-12-01  [Fertiliser].Apply(140, Fertiliser.Types.NH4NO3N, 10);
    Simulation Base212: Area=0; Slope=0
      Weather: FileName=..\WeatherFiles\Hargy.met
      Clock: StartDate=1996-02-01; EndDate=2009-12-31
      Summary
      Zone Field: Area=1; Slope=0
        Fertiliser
        SurfaceOrganicMatter SurfaceOM: same as Sangara.Base324.Field.SurfaceOM
        Soil: SoilType=Volcanic Ash; Site=Hargy Estate; NearestTown=Bialla; Region=West New Britain Province; Latitude=0; Longitude=0
          Water
            Thickness  BD    AirDry  LL15  DUL   SAT
            100        0.7   0.05    0.3   0.54  0.68
            200        0.75  0.05    0.4   0.61  0.68
            300        1.2   0.05    0.23  0.43  0.51
            300        1.2   0.05    0.23  0.43  0.51
            300        1.2   0.05    0.23  0.43  0.51
            800        1.2   0.05    0.23  0.43  0.51
            500        1.2   0.05    0.23  0.43  0.51
            500        1.2   0.05    0.23  0.43  0.51
            500        1.2   0.05    0.23  0.43  0.51
            500        1.2   0.05    0.23  0.43  0.51
            SoilCropOilPalm OilPalmSoil: XF=[1, 1, 1, 1, 1, 1, 1, 1, 1, 1]
              KL=[0.04, 0.04, 0.02, 0.02, 0.01, 0.01, 0.01, 0.01, 0.01, 0.01]
          SoilWater: residueinterception=0; SummerDate=1-Nov; SummerU=5; SummerCona=5; WinterDate=1-Apr; WinterU=5; WinterCona=5; DiffusConst=88; DiffusSlope=35.4; Salb=0.18; CN2Bare=68; CNRed=20; CNCov=0.8; slope=0; discharge_width=0; catchment_area=0; max_pond=0; Thickness=[100, 200, 300, 300, 300, 300]; SWCON=[0.8, 0.8, 0.8, 0.8, 0.8, 0.8]; KLAT=[0, 0, 0, 0, 0, 0, 0, 0, 0, 0]
          SoilNitrogen: fom_type=[default, manure, mucuna, lablab, shemp, stable]; fract_carb=[0.2, 0.3, 0.54, 0.57, 0.45, 0]; fract_cell=[0.7, 0.3, 0.37, 0.37, 0.47, 0.1]; fract_lign=[0.1, 0.4, 0.09, 0.06, 0.08, 0.9]; wfpsN2N2O_x=[22, 88]; wfpsN2N2O_y=[0.1, 1]
            oc=[5.38873, 3.49361, 2.49012, 2.30747, 2.19642, 2.19686, 2.20044, 2.20051, 2.20033, 2.20007]
          SoilOrganicMatter: RootCN=30; RootWt=3000; SoilCN=10; EnrACoeff=7.4; EnrBCoeff=0.2; OCUnits=Total
            Thickness  OC   FBiom  FInert
            200        5.3  0.08   0.4
            200        3    0.03   0.75
            400        2.4  0.015  0.95
            3200       2.2  0.01   0.99
          Analysis: Thickness=[100, 100, 100, 300, 300, 600]; PH=[6.3, 6.4, 6.7, 6.8, 6.8, 6.8]; PHUnits=Water; BoronUnits=HotWater
          InitialWater Initial water: PercentMethod=EvenlyDistributed; FractionFull=1
          Sample Initial nitrogen: NO3Units=kgha; NH4Units=ppm; SWUnits=Volumetric; OCUnits=Total; PHUnits=Water
            Thickness  NO3  NH4
            100        217  0
            200        30   0
            300        5    0
            300        5    0
            300        0    0
            300        0    0
        Report AnnualOutput: same as Sangara.Base324.Field.AnnualOutput
        Report MonthlyOutput: same as Sangara.Base324.Field.MonthlyOutput
        MicroClimate: same as Sangara.Base324.Field.MicroClimate
        Irrigation
        Operations: same as Hargy.Factors.N.0
        OilPalm: interception=0; UnderstoryCoverMax=0.4; UnderstoryLegumeFraction=1; InterceptionFraction=0; MaximumRootDepth=5000; RootDepth=0; DltDM=0; ReproductiveGrowthFraction=0; UnderstoryCoverGreen=0
        Manager Palm Management
          sowing_date = 1996-03-01
          population = 135
          cultivar = Dami
          sowing_depth = 200
          Plant_population = 0
```csharp
using System;
using Models.Core;
using Models.PMF;
using Models.PMF.OilPalm;
namespace Models
{
	[Serializable]
	[System.Xml.Serialization.XmlInclude(typeof(Model))]
	public class Script : Model
	{
		[Link] Clock Clock;
		[Link] OilPalm oilPalm;
		[Link] Summary Summary;
		
		[Description("Sowing date")]
		public DateTime sowing_date {get; set;}
		
		[Description("Plant population /ha")]
		public double population {get; set;}


		[Description("Cultivar")]
		[Display(DisplayType = DisplayAttribute.DisplayTypeEnum.CultivarName)]
        public string cultivar {get; set;}

		[Description("Sowing depth (mm)")]
		public double sowing_depth {get; set;}
		
		public double Plant_population {get;set;}
		
		private byte HarvestCounter = 1;

        [EventSubscribe("Commencing")]
        private void OnSimulationCommencing(object sender, EventArgs e)
		{
		    Plant_population = 0;
		}
		
		[EventSubscribe("DoManagement")]
		private void OnDoManagement(object sender, EventArgs e)
		{
			// Add Trunk from previous plantation
			//surface organic matter' add_surfaceom type=OilPalm, name=trunk, mass=63000, cnr=133, cpr=200
			
			if (Clock.Today.Date == sowing_date)
			{
			    oilPalm.Sow(population: population / 10000, cultivar:cultivar, depth:sowing_depth, rowSpacing:150);
			}
			
			if (HarvestCounter == 14)
			{
				oilPalm.Harvest();
				HarvestCounter = 1;
			}
			
			HarvestCounter++;
		}
	}
}
```
        Manager Calculations: same as Sangara.Base324.Field.Calculations
  Experiment Sagarai
    Factors
      Factor N: Specifications=[operations]
        Operations 0
          1991-03-01  [Fertiliser].Apply(42, Fertiliser.Types.UreaN, 10);
          1991-09-01  [Fertiliser].Apply(42, Fertiliser.Types.UreaN, 10);
          1992-03-01  [Fertiliser].Apply(42, Fertiliser.Types.UreaN, 10);
          1992-09-01  [Fertiliser].Apply(42, Fertiliser.Types.UreaN, 10);
          1993-03-01  [Fertiliser].Apply(42, Fertiliser.Types.UreaN, 10);
          1993-09-01  [Fertiliser].Apply(42, Fertiliser.Types.UreaN, 10);
        Operations 1
          1991-02-01  [Fertiliser].Apply(17.8, Fertiliser.Types.NH4N, 10);
          1991-06-01  [Fertiliser].Apply(17.8, Fertiliser.Types.NH4N, 10);
          1991-10-01  [Fertiliser].Apply(17.8, Fertiliser.Types.NH4N, 10);
          1992-02-01  [Fertiliser].Apply(17.8, Fertiliser.Types.NH4N, 10);
          1992-06-01  [Fertiliser].Apply(17.8, Fertiliser.Types.NH4N, 10);
          1992-10-01  [Fertiliser].Apply(17.8, Fertiliser.Types.NH4N, 10);
          1993-02-01  [Fertiliser].Apply(17.8, Fertiliser.Types.NH4N, 10);
          1993-06-01  [Fertiliser].Apply(17.8, Fertiliser.Types.NH4N, 10);
          1993-10-01  [Fertiliser].Apply(17.8, Fertiliser.Types.NH4N, 10);
          1994-02-01  [Fertiliser].Apply(17.8, Fertiliser.Types.NH4N, 10);
          1994-06-01  [Fertiliser].Apply(17.8, Fertiliser.Types.NH4N, 10);
          1994-10-01  [Fertiliser].Apply(17.8, Fertiliser.Types.NH4N, 10);
          1995-02-01  [Fertiliser].Apply(17.8, Fertiliser.Types.NH4N, 10);
          1995-06-01  [Fertiliser].Apply(17.8, Fertiliser.Types.NH4N, 10);
          1995-10-01  [Fertiliser].Apply(17.8, Fertiliser.Types.NH4N, 10);
          1996-02-01  [Fertiliser].Apply(17.8, Fertiliser.Types.NH4N, 10);
          1996-06-01  [Fertiliser].Apply(17.8, Fertiliser.Types.NH4N, 10);
          1996-10-01  [Fertiliser].Apply(17.8, Fertiliser.Types.NH4N, 10);
          1997-02-01  [Fertiliser].Apply(17.8, Fertiliser.Types.NH4N, 10);
          1997-06-01  [Fertiliser].Apply(17.8, Fertiliser.Types.NH4N, 10);
          1997-10-01  [Fertiliser].Apply(17.8, Fertiliser.Types.NH4N, 10);
          1998-02-01  [Fertiliser].Apply(17.8, Fertiliser.Types.NH4N, 10);
          1998-06-01  [Fertiliser].Apply(17.8, Fertiliser.Types.NH4N, 10);
          1998-10-01  [Fertiliser].Apply(17.8, Fertiliser.Types.NH4N, 10);
          1999-02-01  [Fertiliser].Apply(17.8, Fertiliser.Types.NH4N, 10);
          1999-06-01  [Fertiliser].Apply(17.8, Fertiliser.Types.NH4N, 10);
          1999-10-01  [Fertiliser].Apply(17.8, Fertiliser.Types.NH4N, 10);
          2000-02-01  [Fertiliser].Apply(17.8, Fertiliser.Types.NH4N, 10);
          2000-06-01  [Fertiliser].Apply(17.8, Fertiliser.Types.NH4N, 10);
          2000-10-01  [Fertiliser].Apply(17.8, Fertiliser.Types.NH4N, 10);
          2001-02-01  [Fertiliser].Apply(17.8, Fertiliser.Types.NH4N, 10);
          2001-06-01  [Fertiliser].Apply(17.8, Fertiliser.Types.NH4N, 10);
          2001-10-01  [Fertiliser].Apply(17.8, Fertiliser.Types.NH4N, 10);
          2002-02-01  [Fertiliser].Apply(17.8, Fertiliser.Types.NH4N, 10);
          2002-06-01  [Fertiliser].Apply(17.8, Fertiliser.Types.NH4N, 10);
          2002-10-01  [Fertiliser].Apply(17.8, Fertiliser.Types.NH4N, 10);
          2003-02-01  [Fertiliser].Apply(17.8, Fertiliser.Types.NH4N, 10);
          2003-06-01  [Fertiliser].Apply(17.8, Fertiliser.Types.NH4N, 10);
          2003-10-01  [Fertiliser].Apply(17.8, Fertiliser.Types.NH4N, 10);
          2004-02-01  [Fertiliser].Apply(17.8, Fertiliser.Types.NH4N, 10);
          2004-06-01  [Fertiliser].Apply(17.8, Fertiliser.Types.NH4N, 10);
          2004-10-01  [Fertiliser].Apply(17.8, Fertiliser.Types.NH4N, 10);
          2005-02-01  [Fertiliser].Apply(17.8, Fertiliser.Types.NH4N, 10);
          2005-06-01  [Fertiliser].Apply(17.8, Fertiliser.Types.NH4N, 10);
          2005-10-01  [Fertiliser].Apply(17.8, Fertiliser.Types.NH4N, 10);
          2006-02-01  [Fertiliser].Apply(17.8, Fertiliser.Types.NH4N, 10);
          2006-06-01  [Fertiliser].Apply(17.8, Fertiliser.Types.NH4N, 10);
          2006-10-01  [Fertiliser].Apply(17.8, Fertiliser.Types.NH4N, 10);
          2007-02-01  [Fertiliser].Apply(17.8, Fertiliser.Types.NH4N, 10);
          2007-06-01  [Fertiliser].Apply(17.8, Fertiliser.Types.NH4N, 10);
          2007-10-01  [Fertiliser].Apply(17.8, Fertiliser.Types.NH4N, 10);
          2008-02-01  [Fertiliser].Apply(17.8, Fertiliser.Types.NH4N, 10);
          2008-06-01  [Fertiliser].Apply(17.8, Fertiliser.Types.NH4N, 10);
          2008-10-01  [Fertiliser].Apply(17.8, Fertiliser.Types.NH4N, 10);
        Operations 2
          1991-02-01  [Fertiliser].Apply(53.3, Fertiliser.Types.NH4N, 10);
          1991-06-01  [Fertiliser].Apply(53.3, Fertiliser.Types.NH4N, 10);
          1991-10-01  [Fertiliser].Apply(53.3, Fertiliser.Types.NH4N, 10);
          1992-02-01  [Fertiliser].Apply(53.3, Fertiliser.Types.NH4N, 10);
          1992-06-01  [Fertiliser].Apply(53.3, Fertiliser.Types.NH4N, 10);
          1992-10-01  [Fertiliser].Apply(53.3, Fertiliser.Types.NH4N, 10);
          1993-02-01  [Fertiliser].Apply(53.3, Fertiliser.Types.NH4N, 10);
          1993-06-01  [Fertiliser].Apply(53.3, Fertiliser.Types.NH4N, 10);
          1993-10-01  [Fertiliser].Apply(53.3, Fertiliser.Types.NH4N, 10);
          1994-02-01  [Fertiliser].Apply(53.3, Fertiliser.Types.NH4N, 10);
          1994-06-01  [Fertiliser].Apply(53.3, Fertiliser.Types.NH4N, 10);
          1994-10-01  [Fertiliser].Apply(53.3, Fertiliser.Types.NH4N, 10);
          1995-02-01  [Fertiliser].Apply(53.3, Fertiliser.Types.NH4N, 10);
          1995-06-01  [Fertiliser].Apply(53.3, Fertiliser.Types.NH4N, 10);
          1995-10-01  [Fertiliser].Apply(53.3, Fertiliser.Types.NH4N, 10);
          1996-02-01  [Fertiliser].Apply(53.3, Fertiliser.Types.NH4N, 10);
          1996-06-01  [Fertiliser].Apply(53.3, Fertiliser.Types.NH4N, 10);
          1996-10-01  [Fertiliser].Apply(53.3, Fertiliser.Types.NH4N, 10);
          1997-02-01  [Fertiliser].Apply(53.3, Fertiliser.Types.NH4N, 10);
          1997-06-01  [Fertiliser].Apply(53.3, Fertiliser.Types.NH4N, 10);
          1997-10-01  [Fertiliser].Apply(53.3, Fertiliser.Types.NH4N, 10);
          1998-02-01  [Fertiliser].Apply(53.3, Fertiliser.Types.NH4N, 10);
          1998-06-01  [Fertiliser].Apply(53.3, Fertiliser.Types.NH4N, 10);
          1998-10-01  [Fertiliser].Apply(53.3, Fertiliser.Types.NH4N, 10);
          1999-02-01  [Fertiliser].Apply(53.3, Fertiliser.Types.NH4N, 10);
          1999-06-01  [Fertiliser].Apply(53.3, Fertiliser.Types.NH4N, 10);
          1999-10-01  [Fertiliser].Apply(53.3, Fertiliser.Types.NH4N, 10);
          2000-02-01  [Fertiliser].Apply(53.3, Fertiliser.Types.NH4N, 10);
          2000-06-01  [Fertiliser].Apply(53.3, Fertiliser.Types.NH4N, 10);
          2000-10-01  [Fertiliser].Apply(53.3, Fertiliser.Types.NH4N, 10);
          2001-02-01  [Fertiliser].Apply(53.3, Fertiliser.Types.NH4N, 10);
          2001-06-01  [Fertiliser].Apply(53.3, Fertiliser.Types.NH4N, 10);
          2001-10-01  [Fertiliser].Apply(53.3, Fertiliser.Types.NH4N, 10);
          2002-02-01  [Fertiliser].Apply(53.3, Fertiliser.Types.NH4N, 10);
          2002-06-01  [Fertiliser].Apply(53.3, Fertiliser.Types.NH4N, 10);
          2002-10-01  [Fertiliser].Apply(53.3, Fertiliser.Types.NH4N, 10);
          2003-02-01  [Fertiliser].Apply(53.3, Fertiliser.Types.NH4N, 10);
          2003-06-01  [Fertiliser].Apply(53.3, Fertiliser.Types.NH4N, 10);
          2003-10-01  [Fertiliser].Apply(53.3, Fertiliser.Types.NH4N, 10);
          2004-02-01  [Fertiliser].Apply(53.3, Fertiliser.Types.NH4N, 10);
          2004-06-01  [Fertiliser].Apply(53.3, Fertiliser.Types.NH4N, 10);
          2004-10-01  [Fertiliser].Apply(53.3, Fertiliser.Types.NH4N, 10);
          2005-02-01  [Fertiliser].Apply(53.3, Fertiliser.Types.NH4N, 10);
          2005-06-01  [Fertiliser].Apply(53.3, Fertiliser.Types.NH4N, 10);
          2005-10-01  [Fertiliser].Apply(53.3, Fertiliser.Types.NH4N, 10);
          2006-02-01  [Fertiliser].Apply(53.3, Fertiliser.Types.NH4N, 10);
          2006-06-01  [Fertiliser].Apply(53.3, Fertiliser.Types.NH4N, 10);
          2006-10-01  [Fertiliser].Apply(53.3, Fertiliser.Types.NH4N, 10);
          2007-02-01  [Fertiliser].Apply(53.3, Fertiliser.Types.NH4N, 10);
          2007-06-01  [Fertiliser].Apply(53.3, Fertiliser.Types.NH4N, 10);
          2007-10-01  [Fertiliser].Apply(53.3, Fertiliser.Types.NH4N, 10);
          2008-02-01  [Fertiliser].Apply(53.3, Fertiliser.Types.NH4N, 10);
          2008-06-01  [Fertiliser].Apply(53.3, Fertiliser.Types.NH4N, 10);
          2008-10-01  [Fertiliser].Apply(53.3, Fertiliser.Types.NH4N, 10);
    Simulation Base504: Area=0; Slope=0
      Weather: FileName=..\WeatherFiles\Sagarai.met
      Clock: StartDate=1991-03-01; EndDate=2008-12-31
      Summary
      Zone Field: Area=1; Slope=0
        Fertiliser
        SurfaceOrganicMatter SurfaceOM: same as Sangara.Base324.Field.SurfaceOM
        Soil: SoilType=Alluvial Clay; Site=Sagarai Estate; NearestTown=Alotau; Region=Milne Bay Province; Latitude=0; Longitude=0
          Water
            Thickness  BD    AirDry  LL15  DUL   SAT
            100        0.89  0.13    0.43  0.63  0.66
            200        0.99  0.13    0.43  0.58  0.62
            300        0.99  0.13    0.42  0.58  0.62
            300        1.13  0.13    0.44  0.54  0.57
            300        1.13  0.13    0.44  0.54  0.57
            300        1.13  0.13    0.44  0.54  0.57
            500        1.13  0.13    0.44  0.54  0.57
            500        1.13  0.13    0.44  0.54  0.57
            500        1.13  0.13    0.44  0.54  0.57
            SoilCropOilPalm OilPalmSoil: KL=[0.03, 0.02, 0.015, 0.01, 0.01, 0.01, 0.01, 0.01, 0.01]; XF=[1, 1, 1, 1, 1, 1, 1, 1, 0]
          SoilWater: residueinterception=0; SummerDate=1-Nov; SummerU=5; SummerCona=5; WinterDate=1-Apr; WinterU=5; WinterCona=5; DiffusConst=40; DiffusSlope=16; Salb=0.18; CN2Bare=75; CNRed=20; CNCov=0.8; slope=0; discharge_width=0; catchment_area=0; max_pond=0; Thickness=[100, 200, 300, 300, 300, 3800]; SWCON=[0.55, 0.55, 0.55, 0.55, 0.55, 0.55]; KLAT=[0, 0, 0, 0, 0, 0, 0, 0, 0]
          SoilNitrogen: fom_type=[default, manure, mucuna, lablab, shemp, stable]; fract_carb=[0.2, 0.3, 0.54, 0.57, 0.45, 0]; fract_cell=[0.7, 0.3, 0.37, 0.37, 0.47, 0.1]; fract_lign=[0.1, 0.4, 0.09, 0.06, 0.08, 0.9]; wfpsN2N2O_x=[22, 88]; wfpsN2N2O_y=[0.1, 1]
            oc=[4.47413, 2.53868, 1.7333, 0.949261, 0.883456, 0.736231, 0.57415, 0.490354, 0.483233]
          SoilOrganicMatter: RootCN=30; RootWt=3000; SoilCN=12; EnrACoeff=7.4; EnrBCoeff=0.2; OCUnits=Total
            Thickness  OC         FBiom  FInert
            200        4.12501    0.08   0.32
            200        2.94865    0.06   0.44
            200        1.43929    0.04   0.9
            200        0.999028   0.02   0.99
            200        0.835933   0.02   0.99
            200        0.900267   0.02   0.99
            200        0.738828   0.02   0.99
            200        0.7157782  0.02   0.99
            200        0.5792     0.02   0.99
            200        0.484944   0.02   0.99
            1000       0.485      0.02   0.99
          Analysis: Thickness=[200, 200, 200, 200, 200, 200, 200, 200, 200, 200, 1000]; PHUnits=Water; BoronUnits=HotWater
            PH=[6.61912, 6.905, 6.05353, 6.75754, 6.37397, 6.90088, 6.90139, 6.87045, 7.00166, 7.08576, 7.08576]
          InitialWater Initial water: PercentMethod=EvenlyDistributed; FractionFull=1
          Sample Initial nitrogen: NO3Units=kgha; NH4Units=ppm; SWUnits=Volumetric; OCUnits=Total; PHUnits=Water
            Thickness  NO3  NH4
            100        217  0
            200        30   0
            300        5    0
            300        5    0
            300        0    0
            300        0    0
        Report AnnualOutput: same as Sangara.Base324.Field.AnnualOutput
        Report MonthlyOutput: same as Sangara.Base324.Field.MonthlyOutput
        MicroClimate: same as Sangara.Base324.Field.MicroClimate
        Operations: same as Sagarai.Factors.N.0
        OilPalm: interception=0; UnderstoryCoverMax=0.4; UnderstoryLegumeFraction=1; InterceptionFraction=0; MaximumRootDepth=5000; RootDepth=0; DltDM=0; ReproductiveGrowthFraction=0; UnderstoryCoverGreen=0
        Irrigation
        Manager Palm Management
          sowing_date = 1991-03-01
          population = 127
          cultivar = Dami
          sowing_depth = 200
          Plant_population = 0
          script: same as in Hargy.Base212.Field.Palm Management
        Manager Calculations: same as Sangara.Base324.Field.Calculations
  DataStore
    Input: FileName=observed.prn
    PredictedObserved POMonthly: PredictedTableName=MonthlyOutput; ObservedTableName=Input; FieldNameUsedForMatch=Clock.Today
    PredictedObserved POAnnual: PredictedTableName=AnnualOutput; ObservedTableName=Input; FieldNameUsedForMatch=Clock.Today
    TimeSeriesStats: TableName=POAnnual
  Tests
    Test:
      SimulationName  TableName        Type       ColumnNames  Parameters
      All             TimeSeriesStats  Tolerance  n            1,1
      All             TimeSeriesStats  Tolerance  residual     1,1
      All             TimeSeriesStats  Tolerance  R^2          1,1
      All             TimeSeriesStats  Tolerance  RMSD         1,1
      All             TimeSeriesStats  Tolerance  SB           1,1
      All             TimeSeriesStats  Mean       SDSD         1,value
      All             TimeSeriesStats  Tolerance  LCS          1,1
      All             TimeSeriesStats  Tolerance  %            1,1
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