Simulations: Area=0
  Simulation Test: Area=0
    WeatherFile: FileName=lincoln.met
    Clock: StartDate=2003-10-20; EndDate=2004-05-23
    Summary
    Zone Field: Area=0
      Soil Templeton: SoilType=Sedementary; LocalName=Lincoln; Latitude=0; Longitude=0
        Water
          Thickness  BD   AirDry  LL15  DUL   SAT
          100        1.2  0.08    0.16  0.33  0.5
          200        1.2  0.16    0.16  0.33  0.5
          300        1.2  0.15    0.15  0.31  0.44
          300        1.2  0.13    0.13  0.27  0.46
          300        1.2  0.15    0.15  0.3   0.44
          300        1.2  0.15    0.15  0.3   0.44
          SoilCrop PotatoSoilCrop: LL=[0.13, 0.13, 0.1, 0.15, 0.3, 0.3]; KL=[0.1, 0.06, 0.04, 0.01, 0, 0]; XF=[1, 1, 1, 1, 0, 0]
        SoilWater: min_crit_temp=5; max_crit_temp=35; max_albedo=0.23; A_to_evap_fact=0.44; canopy_eos_coef=1.7; sw_top_crit=0.9; sumes1_max=100; sumes2_max=25; solute_flow_eff=[1]; solute_flux_eff=[1]; gravity_gradient=2E-05; specific_bd=2.65; hydrol_effective_depth=450; immobile_solutes=[nh4]; canopy_fact=[1, 1, 0, 0]; canopy_fact_height=[0, 600, 1800, 30000]; canopy_fact_default=0.5; act_evap_method=ritchie; irrigation_will_runoff=false; irrigation_layer=1; SummerCona=3; SummerU=6; SummerDate=1-Nov; WinterCona=3; WinterU=6; WinterDate=1-Apr; DiffusConst=88; DiffusSlope=35.4; Salb=0.18; slope=0; discharge_width=0; catchment_area=0; max_pond=0; CN2Bare=0; CNRed=-9E-05; CNCov=0
          Thickness  SWCON  KLAT
          100        0.55   0
          200        0.55   0
          300        0.55   0
          300        0.55   0
          300        0.55   0
          300        0.55   0
          mobile_solutes=[no3, urea, cl, br, org_n, org_c_pool1, org_c_pool2, org_c_pool3]
        SoilNitrogen: NPartitionApproach=BasedOnLayerConcentration; wnmm_n_alpha=0.002; wnmm_dn_alpha=0.5; nemis_dn_km=22; nemis_dn_pot=7.194; cent_n_soilt_ave=15; cent_n_maxt_ave=25; cent_n_wfps_ave=0.7; cent_n_max_rate=0.1; ini_FOMtype=default; fom_type=[default, manure, mucuna, lablab, shemp, stable]; fract_carb=[0.2, 0.3, 0.54, 0.57, 0.45, 0]; fract_cell=[0.7, 0.3, 0.37, 0.37, 0.47, 0.1]; fract_lign=[0.1, 0.4, 0.09, 0.06, 0.08, 0.9]; ef_res=0.4; fr_res_biom=0.9; min_depth=100; rd_carb=[0.2, 0.1]; rd_cell=[0.05, 0.25]; rd_lign=[0.0095, 0.003]; ef_fom=0.4; fr_fom_biom=0.9; cnrf_coeff=0.693; cnrf_optcn=25; rd_biom=[0.0081, 0.004]; ef_biom=0.4; fr_biom_biom=0.6; rd_hum=[0.00015, 7E-05]; ef_hum=0.4; opt_temp=[32, 32]; wfmin_index=[0, 0.5, 1, 2]; wfmin_values=[0, 1, 1, 0.5]; nitrification_pot=40; nh4_at_half_pot=90; dnit_rate_coeff=25.1; pHf_nit_pH=[4.5, 6.0, 8.0, 9.0]; pHf_nit_values=[0.0, 1.0, 1.0, 0.0]; wfnit_index=[0.0, .25, 1.0, 2.0]; wfnit_values=[0.0, 1.0, 1.0, 0.0]; dnit_wf_power=1; soiltype=standard; allow_simpleSoilTemp=no; profile_reduction=no; use_organic_solutes=no; c_in_fom=0.4; minPatchArea=1; mcn=8; root_depth=3000; root_cn_pool=[40, 40, 40]
          zero: n2o_approach, ureappm_min, nh4ppm_min, no3ppm_min, fom_min, oc2om_factor, ini_pH, WarningThreshold, FatalThreshold, potHydrol_min, potHydrol_parmA, potHydrol_parmB, potHydrol_parmC, potHydrol_parmD, dnit_nitrf_loss, dnit_k1, actC_parmB, actC_parmA, N2N2O_parmA, N2N2O_parmB
        SoilOrganicMatter: RootCN=30; RootWt=3000; SoilCN=11.5; EnrACoeff=7.4; EnrBCoeff=0.2; OCUnits=Total
          Thickness  OC    FBiom  FInert
          100        3.5   0.025  0.3
          200        2.5   0.025  0.4
          300        1.2   0.015  0.75
          300        1.03  0.01   0.9
          300        0.47  0.01   0.96
          300        0.47  0.01   0.96
        Analysis: Thickness=[100, 200, 300, 300, 300, 300]; PH=[6.6, 6.2, 5.7, 5.5, 5.5, 5.5]; PHUnits=Water; BoronUnits=HotWater
        InitialWater Initial water: FractionFull=1; PercentMethod=FilledFromTop
        Sample: NO3Units=kgha; NH4Units=kgha; SWUnits=Volumetric; OCUnits=Total; PHUnits=Water
          Thickness  NO3   NH4
          100        40    0.1
          200        30    0.1
          300        14    0.1
          300        14    0.1
          300        1.38  0.1
          300        1.38  0.1
      Irrigation
      Fertiliser
        Definitions:
          Name   FractionNO3  FractionNH4  FractionUrea
          UreaN  0            0            1
          NO3N   1            0            0
      SurfaceOrganicMatter: crit_residue_wt=2000; opt_temp=20; cum_eos_max=20; cnrf_coeff=0.277; cnrf_optcn=25; c_fract=0.4; leach_rain_tot=25; min_rain_to_leach=10; crit_min_surfom_orgC=0.004; default_cpr=0; default_standing_fraction=0; standing_extinct_coeff=0.5; fractionFaecesAdded=0.5; PoolName=Wheat; type=Wheat; mass=2000; standing_fraction=0; cnr=80
        ResidueTypes:
          {Name=Wheat, fraction_C=0.08, po4ppm=10, nh4ppm=10, no3ppm=10, specific_area=0.0001, cf_contrib=1, pot_decomp_rate=0.1, fr_c=[0.3, 0.3, 0.4], fr_n=[0.3, 0.3, 0.4], fr_p=[0.3, 0.3, 0.4]}
        TillageTypes
      MicroClimate: air_pressure=1010; soil_emissivity=0.96; sun_angle=15; soil_heat_flux_fraction=0.4; night_interception_fraction=0.5; windspeed_default=3; refheight=2; albedo=0.293662; emissivity=0.96; gsmax=0.01; r50=200; soil_heat=-0.33; dryleaffraction=1; a_interception=0; b_interception=1; c_interception=0; d_interception=0; soil_albedo=0.3
        ComponentData Potato: Type=Potato; Albedo=0.26; Emissivity=0.96; Gsmax=0.011; R50=200
      Plant Potato: CropType=Potato
        Organs={GenericAboveGroundOrgan=[{Name=Tuber, Live={Name=Biomass}, Dead={Name=Biomass}, NitrogenDemandSwitch={{http://www.w3.org/2001/XMLSchema-instance}type=LinearInterpolationFunction, Name=LinearInterpolationFunction, XProperty=[Leaf].LAI, XYPairs={Name=XYPairs, X=[0, 0.02, 0.0201, 10], Y=[0, 0, 1, 1]}}, StructuralFraction={{http://www.w3.org/2001/XMLSchema-instance}type=Constant, Name=Constant, Value=1}, DMDemandFunction={{http://www.w3.org/2001/XMLSchema-instance}type=PotentialSizeDemandFunction, Name=PotentialSizeDemandFunction, StartStageName=TuberInitiation, EndStageName=Maturity, PotentialGrowthIncrement={{http://www.w3.org/2001/XMLSchema-instance}type=LinearInterpolationFunction, Name=LinearInterpolationFunction, XProperty=[Phenology].StageCode.Value, XYPairs={Name=XYPairs, X=[4, 4.04, 4.32, 4.52, 4.95, 6.54], Y=[0.017, 0.017, 0.06, 0.06, 0.018, 0]}}, OrganNumber={{http://www.w3.org/2001/XMLSchema-instance}type=MultiplyFunction, Name=MultiplyFunction}, ThermalTime={{http://www.w3.org/2001/XMLSchema-instance}type=AirTemperatureFunction, Name=AirTemperatureFunction, XYPairs={Name=XYPairs, X=[2, 20, 35], Y=[0, 18, 0]}}, AccumThermalTime={{http://www.w3.org/2001/XMLSchema-instance}type=AccumulateFunction, Name=AccumulateFunction, StartStageName=TuberInitiation, EndStageName=Maturity}}, WaterContent={{http://www.w3.org/2001/XMLSchema-instance}type=LinearInterpolationFunction, Name=LinearInterpolationFunction, XProperty=[Phenology].StageCode.Value, XYPairs={Name=XYPairs, X=[3, 4, 4.1, 4.7, 5.4, 6], Y=[0, 0, 0.1, 0.16, 0.2, 0.22]}}, MaximumNConc={{http://www.w3.org/2001/XMLSchema-instance}type=LinearInterpolationFunction, Name=LinearInterpolationFunction, XProperty=[Phenology].StageCode.Value, XYPairs={Name=XYPairs, X=[3, 4, 5, 6], Y=[0.023, 0.023, 0.018, 0.015]}}, MinimumNConc={{http://www.w3.org/2001/XMLSchema-instance}type=LinearInterpolationFunction, Name=LinearInterpolationFunction, XProperty=[Phenology].StageCode.Value, XYPairs={Name=XYPairs, X=[4, 4.1, 7], Y=[0.02, 0.006, 0.006]}}}, {Name=Stem, Live={Name=Biomass}, Dead={Name=Biomass}, NReallocationFactor={{http://www.w3.org/2001/XMLSchema-instance}type=Constant, Name=Constant, Value=0}, NRetranslocationFactor={{http://www.w3.org/2001/XMLSchema-instance}type=Constant, Name=Constant, Value=0.05}, NitrogenDemandSwitch={{http://www.w3.org/2001/XMLSchema-instance}type=PhaseBasedSwitch, Name=PhaseBasedSwitch, Start=Planting, End=FinalLeaf}, DMRetranslocationFactor={{http://www.w3.org/2001/XMLSchema-instance}type=Constant, Name=Constant, Value=0}, StructuralFraction={{http://www.w3.org/2001/XMLSchema-instance}type=Constant, Name=Constant, Value=1}, DMDemandFunction={{http://www.w3.org/2001/XMLSchema-instance}type=InternodeDemandFunction, Name=InternodeDemandFunction, InterNodeWt={{http://www.w3.org/2001/XMLSchema-instance}type=Constant, Name=Constant, Value=0.2}}, MaximumNConc={{http://www.w3.org/2001/XMLSchema-instance}type=LinearInterpolationFunction, Name=LinearInterpolationFunction, XProperty=[Phenology].StageCode.Value, XYPairs={Name=XYPairs, X=[3, 4, 5.3], Y=[0.06, 0.06, 0.025]}}, MinimumNConc={{http://www.w3.org/2001/XMLSchema-instance}type=Constant, Name=Constant, Value=0.006}}], Root={Name=Root, Live={{http://www.w3.org/2001/XMLSchema-instance}type=CompositeBiomass, Name=CompositeBiomass, Propertys=[[Root].LayerLive]}, Dead={{http://www.w3.org/2001/XMLSchema-instance}type=CompositeBiomass, Name=CompositeBiomass, Propertys=[[Root].LayerDead]}, InitialDM=5, SpecificRootLength=40000, KNO3=0.02, KNH4=0, NitrogenDemandSwitch={{http://www.w3.org/2001/XMLSchema-instance}type=PhaseBasedSwitch, Name=PhaseBasedSwitch, Start=Planting, End=FinalLeaf}, TemperatureEffect={{http://www.w3.org/2001/XMLSchema-instance}type=AirTemperatureFunction, Name=AirTemperatureFunction, XYPairs={Name=XYPairs, X=[0, 26, 35], Y=[1, 1, 1]}}, RootFrontVelocity={{http://www.w3.org/2001/XMLSchema-instance}type=PhaseLookup, Name=PhaseLookup}, PartitionFraction={{http://www.w3.org/2001/XMLSchema-instance}type=PhaseLookup, Name=PhaseLookup}, MaximumNConc={{http://www.w3.org/2001/XMLSchema-instance}type=Constant, Name=Constant, Value=0.01}, MaxDailyNUptake={{http://www.w3.org/2001/XMLSchema-instance}type=LinearInterpolationFunction, Name=LinearInterpolationFunction, XProperty=[Root].Length, XYPairs={Name=XYPairs, X=[0, 0.02], Y=[0, 6]}}, MinimumNConc={{http://www.w3.org/2001/XMLSchema-instance}type=Constant, Name=Constant, Value=0.01}, KLModifier={{http://www.w3.org/2001/XMLSchema-instance}type=LinearInterpolationFunction, Name=LinearInterpolationFunction, XProperty=[Leaf].LAI, XYPairs={Name=XYPairs, X=[0, 3], Y=[1, 1]}}}, Leaf={Name=Leaf, Live={{http://www.w3.org/2001/XMLSchema-instance}type=CompositeBiomass, Name=CompositeBiomass, Propertys=[[Leaf].CohortLive]}, Dead={{http://www.w3.org/2001/XMLSchema-instance}type=CompositeBiomass, Name=CompositeBiomass, Propertys=[[Leaf].CohortDead]}, CurrentExpandingLeaf=34, StartFractionExpanded=0.83819, FractionNextleafExpanded=0.926641, _ExpandedNodeNo=34.9266, MaxCover=1, InitialLeaf=[{Name=LeafCohort, Rank=1, Area=900}, {Name=LeafCohort, Rank=2, Area=600}, {Name=LeafCohort, Rank=3, Area=300}], LeafCohortParameters={Name=InitialLeafValues, MaxArea={{http://www.w3.org/2001/XMLSchema-instance}type=LinearInterpolationFunction, Name=LinearInterpolationFunction, XProperty=[Structure].RelativeNodeApperance, XYPairs={Name=XYPairs, X=[0, 0.15, 0.3, 0.44, 0.59, 0.73], Y=[2000, 18000, 27000, 15000, 6000, 1500]}}, GrowthDuration={{http://www.w3.org/2001/XMLSchema-instance}type=LinearInterpolationFunction, Name=LinearInterpolationFunction, XProperty=[Structure].RelativeNodeApperance, XYPairs={Name=XYPairs, X=[0, 0.3, 0.4, 1], Y=[200, 400, 400, 400]}}, LagDuration={{http://www.w3.org/2001/XMLSchema-instance}type=LinearInterpolationFunction, Name=LinearInterpolationFunction, XProperty=[Structure].RelativeNodeApperance, XYPairs={Name=XYPairs, X=[0, 0.15, 0.3, 0.4, 0.73, 1], Y=[350, 350, 350, 350, 350, 20]}}, SenescenceDuration={{http://www.w3.org/2001/XMLSchema-instance}type=LinearInterpolationFunction, Name=LinearInterpolationFunction, XProperty=[Structure].RelativeNodeApperance, XYPairs={Name=XYPairs, X=[0, 0.15, 0.3, 0.4, 0.73, 2], Y=[350, 350, 350, 350, 350, 100]}}, DetachmentLagDuration={{http://www.w3.org/2001/XMLSchema-instance}type=Constant, Name=Constant, Value=1000000}, DetachmentDuration={{http://www.w3.org/2001/XMLSchema-instance}type=Constant, Name=Constant, Value=1000000}, SpecificLeafAreaMax={{http://www.w3.org/2001/XMLSchema-instance}type=LinearInterpolationFunction, Name=LinearInterpolationFunction, XProperty=[Structure].RelativeNodeApperance, XYPairs={Name=XYPairs, X=[0, 1], Y=[40000, 25000]}}, SpecificLeafAreaMin={{http://www.w3.org/2001/XMLSchema-instance}type=Constant, Name=Constant, Value=25000}, StructuralFraction={{http://www.w3.org/2001/XMLSchema-instance}type=Constant, Name=Constant, Value=0.5}, MaximumNConc={{http://www.w3.org/2001/XMLSchema-instance}type=Constant, Name=Constant, Value=0.07}, MinimumNConc={{http://www.w3.org/2001/XMLSchema-instance}type=Constant, Name=Constant, Value=0.03}, InitialNConc={{http://www.w3.org/2001/XMLSchema-instance}type=Constant, Name=Constant, Value=0}, NReallocationFactor={{http://www.w3.org/2001/XMLSchema-instance}type=Constant, Name=Constant, Value=1}, NRetranslocationFactor={{http://www.w3.org/2001/XMLSchema-instance}type=Constant, Name=Constant, Value=0.01}, ExpansionStress={{http://www.w3.org/2001/XMLSchema-instance}type=LinearInterpolationFunction, Name=LinearInterpolationFunction, XProperty=[Plant].WaterSupplyDemandRatio, XYPairs={Name=XYPairs, X=[0.5, 1], Y=[0, 1]}}, CriticalNConc={{http://www.w3.org/2001/XMLSchema-instance}type=Constant, Name=Constant, Value=0.05}, DMRetranslocationFactor={{http://www.w3.org/2001/XMLSchema-instance}type=Constant, Name=Constant, Value=0.5}, ShadeInducedSenescenceRate={{http://www.w3.org/2001/XMLSchema-instance}type=LinearInterpolationFunction, Name=LinearInterpolationFunction, XProperty=[Leaf].CohortCurrentRankCoverAbove, XYPairs={Name=XYPairs, X=[0, 0.5, 0.8, 1], Y=[0, 0, 0, 0.03]}}, NonStructuralFraction={{http://www.w3.org/2001/XMLSchema-instance}type=Constant, Name=Constant, Value=0.2}}, Photosynthesis={Name=RUEModel, RUE={{http://www.w3.org/2001/XMLSchema-instance}type=Constant, Name=Constant, Value=1.2}, FCO2={{http://www.w3.org/2001/XMLSchema-instance}type=RUECO2Function, Name=RUECO2Function, PhotosyntheticPathway=C3}, FN={{http://www.w3.org/2001/XMLSchema-instance}type=LinearInterpolationFunction, Name=LinearInterpolationFunction, XProperty=[Leaf].Fn, XYPairs={Name=XYPairs, X=[0, 1, 1.5], Y=[1, 1, 1]}}, FT={{http://www.w3.org/2001/XMLSchema-instance}type=WeightedTemperatureFunction, Name=WeightedTemperatureFunction, MaximumTemperatureWeighting=0.75, XYPairs={Name=XYPairs, X=[2, 12, 24, 34], Y=[0, 1, 1, 0]}}, FW={{http://www.w3.org/2001/XMLSchema-instance}type=LinearInterpolationFunction, Name=LinearInterpolationFunction, XProperty=[Leaf].Fw, XYPairs={Name=XYPairs, X=[0, 0.4, 1.5], Y=[0, 1, 1]}}, FVPD={{http://www.w3.org/2001/XMLSchema-instance}type=LinearInterpolationFunction, Name=LinearInterpolationFunction, XProperty=[Leaf].Photosynthesis.VPD, XYPairs={Name=XYPairs, X=[0, 10, 50], Y=[1, 1, 1]}}}, ThermalTime={{http://www.w3.org/2001/XMLSchema-instance}type=AirTemperatureFunction, Name=AirTemperatureFunction, XYPairs={Name=XYPairs, X=[2, 20, 35], Y=[0, 18, 0]}}, ExtinctionCoeff={{http://www.w3.org/2001/XMLSchema-instance}type=MultiplyFunction, Name=MultiplyFunction}, FrostFraction={{http://www.w3.org/2001/XMLSchema-instance}type=LinearInterpolationFunction, Name=LinearInterpolationFunction, XProperty=[WeatherFile].MinT, XYPairs={Name=XYPairs, X=[-1, 0], Y=[0, 0]}}, Total={{http://www.w3.org/2001/XMLSchema-instance}type=CompositeBiomass, Name=CompositeBiomass, Propertys=[[Leaf].Live, [Leaf].Dead]}, CohortArrayLive={Name=ArrayBiomass, Propertys=[[Leaf].Live], ArraySize=[Leaf].MaxNodeNo}, CohortArrayDead={Name=ArrayBiomass, Propertys=[[Leaf].Dead], ArraySize=[Leaf].MaxNodeNo}, KDead=0.03}}
        Phenology
          Phases={GenericPhase=[{Name=Dormant, Start=Planting, End=Peeping, ThermalTime={{http://www.w3.org/2001/XMLSchema-instance}type=AirTemperatureFunction, Name=AirTemperatureFunction, XYPairs={Name=XYPairs, X=[2, 20, 35], Y=[0, 18, 0]}}, Target={{http://www.w3.org/2001/XMLSchema-instance}type=Constant, Name=Constant, Value=1}}, {Name=Vegetative, Start=Emergence, End=TuberInitiation, ThermalTime={{http://www.w3.org/2001/XMLSchema-instance}type=AirTemperatureFunction, Name=AirTemperatureFunction, XYPairs={Name=XYPairs, X=[2, 20, 35], Y=[0, 18, 0]}}, Target={{http://www.w3.org/2001/XMLSchema-instance}type=Constant, Name=Constant, Value=300}}, {Name=Senesced, Start=FullSenescence, End=Maturity, ThermalTime={{http://www.w3.org/2001/XMLSchema-instance}type=AirTemperatureFunction, Name=AirTemperatureFunction, XYPairs={Name=XYPairs, X=[2, 20, 35], Y=[0, 18, 0]}}, Target={{http://www.w3.org/2001/XMLSchema-instance}type=Constant, Name=Constant, Value=200}}], EmergingPhase={Name=Sprouting, Start=Peeping, End=Emergence, ThermalTime={{http://www.w3.org/2001/XMLSchema-instance}type=AirTemperatureFunction, Name=AirTemperatureFunction, XYPairs={Name=XYPairs, X=[2, 20, 35], Y=[0, 18, 0]}}, ShootLag=72, ShootRate=1.35}, LeafAppearancePhase={Name=EarlyTuber, Start=TuberInitiation, End=FinalLeaf, ThermalTime={{http://www.w3.org/2001/XMLSchema-instance}type=AirTemperatureFunction, Name=AirTemperatureFunction, XYPairs={Name=XYPairs, X=[2, 20, 35], Y=[0, 18, 0]}}}, LeafDeathPhase={Name=LateTuber, Start=FinalLeaf, End=FullSenescence, ThermalTime={{http://www.w3.org/2001/XMLSchema-instance}type=AirTemperatureFunction, Name=AirTemperatureFunction, XYPairs={Name=XYPairs, X=[2, 20, 35], Y=[0, 18, 0]}}}, EndPhase={Name=Maturity, Start=Maturity, End=Unused, ThermalTime={{http://www.w3.org/2001/XMLSchema-instance}type=AirTemperatureFunction, Name=AirTemperatureFunction, XYPairs={Name=XYPairs, X=[2, 20, 35], Y=[0, 18, 0]}}}}
          StageBasedInterpolation StageCode: Codes=[1, 2, 3, 4, 5, 6, 7]
            Stages=[Planting, Peeping, Emergence, TuberInitiation, FinalLeaf, FullSenescence, Maturity]
          AirTemperatureFunction
            XYPairs: X=[2, 20, 35]; Y=[0, 18, 0]
        Arbitrator: NArbitrationOption=PriorityThenRelativeAllocation; DMArbitrationOption=RelativeAllocation
        Structure: InitialiseStage=Emergence; PrimaryBudNo=2.2
          AirTemperatureFunction
            XYPairs: X=[2, 20, 35]; Y=[0, 18, 0]
          PhaseLookupValue: Start=Emergence; End=FinalLeaf
            DivideFunction NodeInitiationRateFunction
              VariableReference Phyllochron: VariableName=[Structure].MainStemNodeAppearanceRate.Phyllochron.Value
              Constant PrimordiaPerMainstemNode: Value=2
          PhaseLookupValue: Start=Emergence; End=FinalLeaf
            LinearInterpolationFunction Phyllochron: XProperty=[Structure].RelativeNodeApperance
              XYPairs: X=[0, 0.15, 0.74, 0.75]; Y=[5, 30, 30, 60]
          Constant: Value=34
          LinearInterpolationFunction: XProperty=[Stem].Live.Wt
            XYPairs: X=[0, 200, 1200, 4000]; Y=[20, 300, 700, 900]
          MultiplyFunction
            LinearInterpolationFunction: XProperty=[Structure].MainStemNodeNo
              XYPairs: X=[0, 7, 8, 13, 14, 34]; Y=[0, 0, 0.5, 0.5, 0, 0]
            LinearInterpolationFunction: XProperty=[Leaf].CoverGreen
              XYPairs: X=[0, 0.4, 0.55, 0.8, 1]; Y=[1, 1, 0.45, 0, 0]
          Constant: Value=0
          Constant: Value=0
        Summariser
          CompositeBiomass: Propertys=[[Leaf].Live, [Leaf].Dead, [Stem].Live, [Stem].Dead]
          CompositeBiomass: Propertys=[[Root].Live, [Root].Dead, [Tuber].Live, [Tuber].Dead]
          CompositeBiomass
            Propertys=[[Leaf].Live, [Leaf].Dead, [Stem].Live, [Stem].Dead, [Root].Live, [Root].Dead, [Tuber].Live, [Tuber].Dead]
          CompositeBiomass: Propertys=[[Leaf].Live, [Stem].Live, [Root].Live, [Tuber].Live]
          CompositeBiomass: Propertys=[[Leaf].Dead, [Stem].Dead, [Root].Dead, [Tuber].Dead]
      Manager PotatoSowingRule
        RowSpace = 280
        RowWidth = 770
        PlantingDepth = 120
        StemNumberPerSeedTuber = 2.2
        CultivarName = RussetBurbank
        SowingDate = 2003-10-20
```csharp
        using System;
        using Models.Core;
        using Models.PMF;
        namespace Models
        {
           [Serializable] 
           [System.Xml.Serialization.XmlInclude(typeof(Model))]
            public class Script : Model
            {      
               [Link] Plant Plant;
               [Link] Clock Clock;

               [Description("Spacing (mm) between plants within rows")]
               public double RowSpace { get; set; }
               [Description("Spacing (mm) between rows")]
               public double RowWidth { get; set; }
               [Description("Depth (mm) tubers are planted")]
               public double PlantingDepth { get; set; }
               [Description("Number of stems per seed tuber")]
               public double StemNumberPerSeedTuber { get; set; }
               [Description("Cultivar")]
               public string CultivarName { get; set; }
               [Description("Sowing Date")]
               public DateTime SowingDate { get; set; }

               [EventSubscribe("StartOfDay")]
               private void OnStartOfDay(object sender, EventArgs e)
               {
				double PlantPopulation = 1/((RowWidth/1000)*(RowSpace/1000));

				if (Clock.Today.Date == SowingDate)
                    Plant.Sow(Population:PlantPopulation, Cultivar:CultivarName, Depth:PlantingDepth, BudNumber:StemNumberPerSeedTuber);
                //Plant.Sow(... Contains the following arguements:
                //Population  double  Required  Seeds sowing/m2
                //Cultivar    string  Required  "NameOfCultivar"
                //Depth       double  Optional  Depth (mm) seed sown.   Default is 100mm 
                //MaxCover    double  Optional  Proportion (0-1) of the ground row crop will cover.   Default is 1.0
                //BudNumber   double  Optional  Number of mainstems per seed sown.  Default is 1.0
                //RowSpacing  double  Optional  Spaceing (mm) between drill rows when crop is sown.  Default is 150mm
                //CropClass   string  Optional  Crop class to instantiate when crop is sown.  Default is "Plant"
			   }
            }
        }
```
      Manager ExtraVariables
        InitialDay = false
        AccumPlantN = 0
        AccumMineralisation = 78.9481
        AccumDenit = 0
        AccumFert = 0
        AccumLeach = 0
        AccumDetach = 0
        DeltaSoilOMN = -17417.2
        DeltaSurfaceOMN = -11.56
        DeltaSoilMineralN = -98.8711
        AccumEO = -755.9
        AccumEP = 0
        AccumES = 0
        AccumDrainage = 0
        AccumRunoff = 0
        AccumOutflowLat = 0
        AccumIrrigation = 100
        AccumRainfall = 246.6
        SoilWaterDeficit = -110.101
        AccumTtemerg = 1894.12
        InitialSoilOMN = 18891.7
        InitialSurfaceOMN = 12
        InitialMineralN = 101.36
        SWC = 342.899
        DUL = 453
        OutFlowLat = 0
```csharp
        using System;
        using Models.Core;
		using System.Collections.Generic;
        using System.Text;
        using Models.PMF;
        using Models.Soils;
        using Models;
        using System.Xml.Serialization;
        namespace Models
        {
[Serializable] 
public class Script : Model
{      
[Link] Clock Clock;
[Link] Soils.SoilNitrogen SoilN;
[Link] Soils.SoilWater SoilWat;
[Link] Models.SurfaceOM.SurfaceOrganicMatter SOM;
[Link] Plant Plant;          
[Link] WeatherFile Met;   
[Link] Fertiliser Fert;
[Link] Irrigation Irrig;  
               
[XmlIgnore] public bool InitialDay { get; set; }

[XmlIgnore] public double AccumPlantN { get; set; }
[XmlIgnore] public double AccumMineralisation { get; set; }
[XmlIgnore] public double AccumDenit { get; set; }
[XmlIgnore] public double AccumFert { get; set; }
[XmlIgnore] public double AccumLeach { get; set; }
[XmlIgnore] public double AccumDetach { get; set; }
[XmlIgnore] public double DeltaSoilOMN { get; set; }
[XmlIgnore] public double DeltaSurfaceOMN { get; set; }
[XmlIgnore] public double DeltaSoilMineralN { get; set; }
[XmlIgnore] public double SoilNitrogenContent { get; set; }

[XmlIgnore] public double AccumEO { get; set; }
[XmlIgnore] public double AccumEP { get; set; }
[XmlIgnore] public double AccumES { get; set; }
[XmlIgnore] public double AccumDrainage { get; set; }
[XmlIgnore] public double AccumRunoff { get; set; }
[XmlIgnore] public double AccumOutflowLat { get; set; }
[XmlIgnore] public double AccumIrrigation { get; set; }
[XmlIgnore] public double AccumRainfall { get; set; }
[XmlIgnore] public double SoilWaterDeficit { get; set; }

[XmlIgnore] public double AccumTtemerg { get; set; }

[XmlIgnore] public double  InitialSoilOMN { get; set; }
[XmlIgnore] public double  InitialSurfaceOMN { get; set; }
[XmlIgnore] public double  InitialMineralN { get; set; }

[XmlIgnore] public double SWC { get; set; }
[XmlIgnore] public double DUL { get; set; }
[XmlIgnore] public double OutFlowLat { get; set; }

[EventSubscribe("Initialised")]
private void OnInitialised(object sender, EventArgs e)
{
InitialDay = true;
AccumPlantN = 0;
AccumMineralisation = 0;
AccumDenit = 0;
AccumFert = 0;
AccumLeach = 0;
AccumDetach = 0;
DeltaSoilOMN = 0;
DeltaSurfaceOMN = 0;
DeltaSoilMineralN = 0;
SoilNitrogenContent = 0;

AccumEO = 0;
AccumEP = 0;
AccumES = 0;
AccumDrainage = 0;
AccumRunoff = 0;
AccumOutflowLat = 0;
AccumIrrigation = 0;
AccumRainfall = 0;
SoilWaterDeficit = 0;

AccumTtemerg = 0;

SWC = 0;
DUL = 0;
}	   

[EventSubscribe("EndOfDay")]
private void OnEndOfDay(object sender, EventArgs e)
{
	int layers = SoilWat.dlayer.Length;
    if (InitialDay)
	{
      InitialSurfaceOMN = SOM.surfaceom_n;
      for (int layer = 0; layer < layers; layer++)
      { 
      InitialSoilOMN += (SoilN.biom_n[layer] + SoilN.fom_n[layer] + SoilN.hum_n[layer]);
      InitialMineralN += (SoilN.no3[layer] + SoilN.nh4[layer] + SoilN.urea[layer]);
      }
      InitialDay = false;
    }

//!!!!!! Nitrogen balance components !!!!!!
//!!!!!!^^^^^^^^^^^^^^^^^^^^^^^^^^^^^!!!!!!
AccumPlantN -= (double)this.Get("[Plant].Root.NUptake");
AccumFert += Fert.NitrogenApplied;
DeltaSurfaceOMN = SOM.surfaceom_n - InitialSurfaceOMN;
AccumDetach = 0; //plant2 doesn't detach yet
double MineralN = 0;
double OrganicN = 0;
//AccumLeach = AccumLeach - SoilN.leach_urea - SoilN.leach_no3 - SoilN.leach_nh4; //Fails
   for (int layer = 0; layer < layers; layer++)
    { 
    AccumMineralisation += (SoilN.dlt_n_min[layer] + SoilN.dlt_n_min_res[layer]);
    AccumDenit -= Utility.Math.Sum(SoilN.dnit);
    OrganicN += (SoilN.biom_n[layer] + SoilN.fom_n[layer] + SoilN.hum_n[layer]);
    MineralN += (SoilN.no3[layer] + SoilN.nh4[layer] + SoilN.urea[layer]);
    }
DeltaSoilOMN = OrganicN - InitialSoilOMN;
DeltaSoilMineralN = MineralN - InitialMineralN;
SoilNitrogenContent = MineralN;
//!!!!!! Water balance components !!!!!!
//!!!!!!^^^^^^^^^^^^^^^^^^^^^^^^^^!!!!!!
AccumEO -= SoilWat.eo;
AccumEP -= (double)this.Get("[Plant].Leaf.Transpiration");
AccumES -= SoilWat.es; 
AccumDrainage -= SoilWat.drain; 
AccumRunoff -= SoilWat.runoff; 
AccumIrrigation += Irrig.IrrigationApplied; 
AccumRainfall += Met.Rain;
SWC = 0;
DUL = 0;
double OutFlowLat = 0;
   for (int layer = 0; layer < layers; layer++)
   {
     SWC += SoilWat.sw_dep[layer];
     DUL += SoilWat.dul_dep[layer];
     OutFlowLat = SoilWat.outflow_lat[layer];
   }
AccumOutflowLat -= OutFlowLat;
SoilWaterDeficit =  (SWC - DUL);
}

[EventSubscribe("StartOfDay")]
private void OnStartOfDay(object sender, EventArgs e)
{
//!!!!!! Thermal time calculation !!!!!!
//!!!!!! ^^^^^^^^^^^^^^^^^^^^^^^^ !!!!!!
if (Plant.Phenology.StageCode.Value >= 3)
AccumTtemerg += Plant.Phenology.ThermalTime.Value;
}
}
}
```
      Operations
        2003-10-20  Fertiliser.Apply(100, Fertiliser.Types.UreaN, 0);
        2003-11-25  Fertiliser.Apply(69, Fertiliser.Types.UreaN,0);
        2003-11-26  Irrigation.Apply(15);
        2003-12-04  Irrigation.Apply(50);
        2003-12-16  Irrigation.Apply(15);
        2003-12-22  Irrigation.Apply(50);
        2003-12-30  Irrigation.Apply(50);
        2004-01-08  Irrigation.Apply(50);
        2004-01-21  Irrigation.Apply(50);
        2004-01-31  Irrigation.Apply(50);
        2004-02-27  Irrigation.Apply(25);
      Report: Events=[Clock].EndOfDay
        Variables:
          [Clock].Today
          [ExtraVariables].Script.AccumTtemerg
          [Plant].Phenology.CurrentPhaseName
          [Plant].Phenology.StageCode.Value
          [ExtraVariables].Script.AccumPlantN
          [ExtraVariables].Script.AccumMineralisation
          [ExtraVariables].Script.AccumDenit
          [ExtraVariables].Script.AccumFert
          [ExtraVariables].Script.AccumLeach
          [ExtraVariables].Script.AccumDetach
          [ExtraVariables].Script.DeltaSoilOMN
          [ExtraVariables].Script.DeltaSurfaceOMN
          [ExtraVariables].Script.DeltaSoilMineralN
          [Plant].Root.NSupplyUptake
          [SoilWater].eo
          [SoilWater].es
          [ExtraVariables].Script.SWC
          [ExtraVariables].Script.DUL
          [SoilWater].drain
          [SoilWater].runoff
          [ExtraVariables].Script.OutFlowLat
          [SoilWater].pond
          [ExtraVariables].Script.AccumEO
          [ExtraVariables].Script.AccumEP
          [ExtraVariables].Script.AccumES
          [ExtraVariables].Script.AccumDrainage
          [ExtraVariables].Script.AccumRunoff
          [ExtraVariables].Script.AccumRainfall
          [ExtraVariables].Script.AccumIrrigation
          [ExtraVariables].Script.AccumOutflowLat
          [ExtraVariables].Script.SoilWaterDeficit
          [Plant].Summariser.AboveGround.Wt
          [Plant].Summariser.BelowGround.Wt
          [Plant].Summariser.Total.Wt
          [Plant].Leaf.Dead.Wt
          [Plant].Leaf.Live.Wt
          [Plant].Stem.Dead.Wt
          [Plant].Stem.Live.Wt
          [Plant].Tuber.Dead.Wt
          [Plant].Tuber.Live.Wt
          [Plant].Root.Dead.Wt
          [Plant].Root.Live.Wt
          [Plant].Summariser.AboveGround.N
          [Plant].Summariser.BelowGround.N
          [Plant].Summariser.Total.N
          [Plant].Summariser.TotalLive.N
          [Plant].Summariser.TotalDead.N
          [Plant].Leaf.Dead.N
          [Plant].Leaf.Live.N
          [Plant].Stem.Dead.N
          [Plant].Stem.Live.N
          [Plant].Tuber.Dead.N
          [Plant].Tuber.Live.N
          [Plant].Root.Live.N
          [Plant].Root.Dead.N
          [Plant].Leaf.Live.NConc
          [Plant].Leaf.Dead.NConc
          [Plant].Stem.Live.NConc
          [Plant].Tuber.Live.NConc
          [Plant].Root.Live.NConc
          [Plant].Root.WaterSupply
          [Plant].Root.WaterUptake
          [Plant].Leaf.Transpiration
          [Plant].Leaf.WaterDemand
          [Plant].Root.Depth
          [Plant].Leaf.CoverGreen
          [Plant].Leaf.CoverTotal
          [Plant].Leaf.CoverDead
          [Plant].Leaf.LAI
          [Plant].Leaf.LAIDead
          [Plant].Structure.Height
          [Plant].Leaf.Fn
          [Plant].Leaf.Fw
          [Plant].Leaf.Photosynthesis.FT.Value
          [Plant].Leaf.Photosynthesis.FVPD.Value
          [Plant].Structure.PlantTotalNodeNo
          [Plant].Structure.TotalStemPopn
          [Plant].Leaf.PlantAppearedGreenLeafNo
          [Plant].Leaf.ExpandingCohortNo
          [Plant].Leaf.AppearedCohortNo
          [Plant].Leaf.DeadCohortNo
          [Plant].Structure.MainStemNodeNo
          [Plant].Leaf.SenescingCohortNo
          [Plant].Structure.PrimaryBudTotalNodeNo
          [Plant].Leaf.LeafCohortParameters.MinimumNConc.Value
          [Plant].Stem.MinimumNConc.Value
          [Plant].Tuber.MinimumNConc.Value
          [Plant].Root.MinimumNConc.Value
          [Plant].Leaf.LeafCohortParameters.MaximumNConc.Value
          [Plant].Stem.MaximumNConc.Value
          [Plant].Tuber.MaximumNConc.Value
          [Plant].Root.MaximumNConc.Value
          [Plant].Summariser.TotalLive.Wt
          [Plant].Stem.Live.StructuralWt
          [Plant].Stem.Live.NonStructuralWt
          [Plant].Leaf.SpecificArea
          [Plant].Summariser.TotalDead.Wt
          [Plant].Leaf.ExpandedCohortNo
          [SoilWater].sw_dep
          [SoilNitrogen].no3
          [ExtraVariables].Script.SoilNitrogenContent
          [Plant].Arbitrator.NDemand
    Input: FileName=TestObserved.txt
  DataStore: AutoCreateReport=true
  Tests
    Test:
      SimulationName  TableName  Type       ColumnNames                      Parameters
      Test            Report     Tolerance  Plant.Phenology.StageCode.Value  1,1
      Test            Report     Tolerance  Plant.Leaf.LAI                   1,1
      Test            Report     Tolerance  Plant.Leaf.CoverGreen            1,1
      Test            Report     Tolerance  Plant.Leaf.Live.Wt               1,1
      Test            Report     Tolerance  Plant.Stem.Live.Wt               1,1
      Test            Report     Tolerance  Plant.Tuber.Live.Wt              1,1
      Test            Report     Tolerance  Plant.Root.Live.Wt               1,1
      Test            Report     Tolerance  Plant.Leaf.Live.N                1,1
      Test            Report     Tolerance  Plant.Stem.Live.N                1,1
      Test            Report     Tolerance  Plant.Tuber.Live.N               1,1
      Test            Report     Tolerance  Plant.Root.Live.N                1,1
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