Simulations: Version=174
  Memo
    A (not very useful by itself) test of the rotation manager's features.

    - Many arcs from one node
    - Many arcs to one node
    - Loopback arcs
    - Boolean conditions
    - Integer conditions (returning -1, 1, 2)
  Simulation rotation
    Clock: Start=1900-01-01; End=1910-01-01
    Summary SummaryFile
    RotationManager: TopLevel=true; InitialState=initial; Verbose=false
      Nodes:
        ID  Name
        1   A
        2   initial
        3   A1
        4   A2
        5   A3
        6   B
      Arcs:
        {SourceID=2, DestinationID=1, Conditions=[[RotationScript].Script.CanGoToA], ID=7, Name=Arc 4}
        {SourceID=1, DestinationID=3, Conditions=[[RotationScript].Script.CanGoToA1], ID=8, Name=Arc 1}
        {SourceID=1, DestinationID=4, Conditions=[[RotationScript].Script.CanGoFromAToA2], ID=9, Name=Arc 2}
        {SourceID=1, DestinationID=5, Conditions=[[RotationScript].Script.CanGoFromAToA3], ID=10, Name=Arc 3}
        {SourceID=3, DestinationID=3, Conditions=[[RotationScript].Script.A1CanLoopback], Actions=[[RotationScript].Script.A1Loopback()], ID=11, Name=Arc 5}
        {SourceID=3, DestinationID=4, Conditions=[[RotationScript].Script.CanGoFromA1ToA2], ID=12, Name=Arc 6}
        {SourceID=4, DestinationID=6, Conditions=[[RotationScript].Script.CanGoFromA2ToB], ID=13, Name=Arc 7}
        {SourceID=5, DestinationID=6, Conditions=[[RotationScript].Script.CanGoFromA3ToB], ID=14, Name=Arc 8}
        {SourceID=6, DestinationID=1, Conditions=[[RotationScript].Script.CanGoFromBToA], ID=15, Name=Arc 9}
    Report TransitionReport: EventNames=[RotationManager].Transition
      VariableNames:
        [Clock].Today
        [Clock].Today.DayOfYear as doy
        [RotationManager].CurrentState as state
    Manager RotationScript
```csharp
using Models.Soils;
using APSIM.Shared.Utilities;
using System.Data;
using Models.Storage;
using Models.Core;
using System;

namespace Models
{
    [Serializable]
    public class Script : Model
    {
        [Link] private Clock clock;
        private int a1LoopbackCounter;

        [EventSubscribe("StartOfSimulation")]
        private void StartOfSim(object sender, EventArgs args)
        {
            a1LoopbackCounter = 0;
        }

        // Can go to A only on even-numbered days.
        public bool CanGoToA
        {
            get
            {
                return clock.Today.DayOfYear % 2 == 0;
            }
        }

        // Can go to A1 only in even years.
        public bool CanGoToA1
        {
            get
            {
                return clock.Today.Year % 2 == 0;
            }
        }

        // A1 can always loopback.
        public bool A1CanLoopback
        {
            get
            {
                return true;
            }
        }

        // Count the number of times we've looped back inside A1
        public void A1Loopback()
        {
            a1LoopbackCounter++;
        }

        // Can go from A1 to A2 only after looping back 5 times.
        public int CanGoFromA1ToA2
        {
            get
            {
                if (a1LoopbackCounter < 5)
                    return 0;
                if (a1LoopbackCounter == 5)
                    return 1;
                return 2;
            }
        }

        // Can go to A2 with normal priority if year >= 1901.
        // Can go to A2 with high priority if year == 1901.
        public int CanGoFromAToA2
        {
            get
            {
                if (clock.Today.Year == 1901)
                    return 2;
                if (clock.Today.Year > 1901)
                    return 1;
                return 0;
            }
        }

        // Can never go to A3 before 1905.
        // Can go to A3 with normal priority in even years.
        // Gan go to A3 with high priority in odd years.
        public int CanGoFromAToA3
        {
            get
            {
                if (clock.Today.Year < 1905)
                    return -1;
                if (clock.Today.Year % 2 == 0)
                    return 1;
                return 2;
            }
        }

        // Can go from A2 to B in December only.
        public bool CanGoFromA2ToB
        {
            get
            {
                return clock.Today.Month == 12;
            }
        }

        // Can go from A3 to B in July.
        public bool CanGoFromA3ToB
        {
            get
            {
                return clock.Today.Month == 7;
            }
        }

        // Can go from B to A only on January 1.
        public bool CanGoFromBToA
        {
            get
            {
                return clock.Today.DayOfYear == 1;
            }
        }
    }
}
```
    Manager ResultsValidator
```csharp
using Models.Soils;
using APSIM.Shared.Utilities;
using System.Data;
using Models.Storage;
using Models.Core;
using System;
using System.Globalization;

namespace Models
{
    [Serializable]
    public class Script : Model, ITest
    {
        public void Run()
        {
            IStorageReader storage = this.FindInScope<IDataStore>().Reader;
            DataTable data = storage.GetData("TransitionReport", "Current", new string[] { "rotation" }, new[] { "doy", "state" });
            int[] dates = DataTableUtilities.GetColumnAsIntegers(data, "doy");
            string[] states = DataTableUtilities.GetColumnAsStrings(data, "state", CultureInfo.InvariantCulture);

            if (dates.Length != expectedDates.Length)
                throw new Exception(string.Format("Incorrect number of dates. Expected: {0} but was: {1}", expectedDates.Length, dates.Length));
            for (int i = 0; i < dates.Length; i++)
                if (dates[i] != expectedDates[i])
                    throw new Exception(string.Format("Incorrect date. Expected: {0} but was {1}", expectedDates[i], dates[i]));
            for (int i = 0; i < states.Length; i++)
                if (states[i] != expectedStates[i])
                    throw new Exception(string.Format("Incorrect date. Expected: {0} but was {1}", expectedStates[i], states[i]));
            if (states.Length != expectedStates.Length)
                throw new Exception(string.Format("Incorrect number of dates. Expected: {0} but was: {1}", expectedStates.Length, states.Length));
        }

        private static readonly int[] expectedDates = new int[]
        {
            2,
            2,
            2,
            2,
            2,
            2,
            2,
            2,
            2,
            335,
            1,
            1,
            335,
            1,
            1,
            1,
            335,
            1,
            1,
            335,
            1,
            1,
            1,
            336,
            1,
            1,
            182,
            1,
            1,
            1,
            335,
            1,
            1,
            182,
            1,
            1,
            1,
            336,
            1,
            1,
            182,
            1,
            1,
            1
        };

        private static readonly string[] expectedStates = new string[]
        {
            "initial",
            "A",
            "A1",
            "A1",
            "A1",
            "A1",
            "A1",
            "A1",
            "A1",
            "A2",
            "B",
            "A",
            "A2",
            "B",
            "A",
            "A1",
            "A2",
            "B",
            "A",
            "A2",
            "B",
            "A",
            "A1",
            "A2",
            "B",
            "A",
            "A3",
            "B",
            "A",
            "A1",
            "A2",
            "B",
            "A",
            "A3",
            "B",
            "A",
            "A1",
            "A2",
            "B",
            "A",
            "A3",
            "B",
            "A",
            "A1"
        };
    }
}
```
  DataStore
