Simulations: Version=222
  DataStore
    Input Obs_Mace: FileNames=[GerminationLab_Obs_Mace.csv]
    Input Obs_Mace18: FileNames=[GerminationLab_Obs_Mace18.csv]
    Input Rpred: FileNames=[GerminationLab_Rpred.csv]
    PredictedObserved PO_Mace: PredictedTableName=T50Summary; ObservedTableName=Obs_Mace; FieldNameUsedForMatch=Temperature; FieldName2UsedForMatch=WaterPotential; AllColumns=true
    PredictedObserved PO_Mace18: PredictedTableName=T50Summary; ObservedTableName=Obs_Mace18; FieldNameUsedForMatch=Temperature; FieldName2UsedForMatch=WaterPotential; AllColumns=true
    PredictedObserved PO_Rpred: PredictedTableName=T50Summary; ObservedTableName=Rpred; FieldNameUsedForMatch=Temperature; FieldName2UsedForMatch=WaterPotential; AllColumns=true
  Experiment GerminationLab
    Factors
      Permutation
        Factor T
          Specification=[LabConditions].Script.Temperature = 5, 10, 15, 20, 25, 30, 35, 40
        Factor Psi
          Specification=[LabConditions].Script.WaterPotential = 0, -0.5, -1, -1.25, -1.5, -1.75
    Simulation LabSimulation
      Clock: Start=2000-01-01; End=2000-04-30
      Summary SummaryFile
      Weather: FileName=GerminationLab.met
      SoilArbitrator
      Zone Field: Area=1; Slope=0; AspectAngle=0; Altitude=50
        Report T50Summary: EventNames=[Clock].EndOfSimulation
          VariableNames:
            [LabConditions].Script.Temperature as Temperature
            [LabConditions].Script.WaterPotential as WaterPotential
            [LabConditions].Script.TargetWaterContent as TargetWaterContent
            [LabConditions].Script.AirTemperature as AirTemperature
            [GerminationTracker].Script.Germinated as Germinated
            [GerminationTracker].Script.T50_raw as T50_raw
            [GerminationTracker].Script.T50 as T50
            [GerminationTracker].Script.DaysAccumulated as DaysAccumulated
            [GerminationTracker].Script.MeanSeedTemperature as MeanSeedTemperature
            [GerminationTracker].Script.MinSeedTemperature as MinSeedTemperature
            [GerminationTracker].Script.MaxSeedTemperature as MaxSeedTemperature
            [GerminationTracker].Script.MeanSeedWaterPotential as MeanSeedWaterPotential
            [GerminationTracker].Script.MeanDailyRate as MeanDailyRate
        Report Daily: EventNames=[Clock].DoReport
          VariableNames:
            [Clock].Today
            [LabConditions].Script.Temperature as Temperature
            [LabConditions].Script.WaterPotential as WaterPotential
            [Wheat].Phenology.CurrentPhaseName
            [Wheat].Phenology.Germinating.SoilTemperatureSeed as SoilTemperatureSeed
            [Wheat].Phenology.Germinating.TemperatureFactor as TemperatureFactor
            [Wheat].Phenology.Germinating.WaterFactor as WaterFactor
            [Wheat].Phenology.Germinating.GerminatingWaterPotentialResponse.SeedWaterContent as SeedWaterContent
            [Wheat].Phenology.Germinating.GerminatingWaterPotentialResponse.SeedWaterPotential as SeedWaterPotential
            [Wheat].Phenology.Germinating.GerminatingWaterPotentialResponse.BaseWaterPotentialToday as BaseWaterPotential
            [Wheat].Phenology.Germinating.DailyGerminationRate as DailyGerminationRate
            [Wheat].Phenology.Germinating.ProgressThroughPhase as ProgressThroughPhase
            [Wheat].Phenology.Germinating.DaysSinceSowing as DaysSinceSowing
        Fertiliser
        SurfaceOrganicMatter: InitialResidueName=wheat_stubble; InitialResidueType=wheat; InitialResidueMass=500; InitialStandingFraction=0; InitialCPR=0; InitialCNR=100
        Plant Wheat
        MicroClimate: a_interception=0; b_interception=1; c_interception=0; d_interception=0; SoilHeatFluxFraction=0.4; MinimumHeightDiffForNewLayer=0; NightInterceptionFraction=0.5; ReferenceHeight=2
        Soil: ASCOrder=Chromosol; ASCSubOrder=Red; SoilType=Loamy duplex; Site=Temora; NearestTown=Temora; Region=Central West Slopes and Plains; State=New South Wales; Country=Australia; ApsoilNumber=913; Latitude=-34.4085; Longitude=147.531; LocationAccuracy=+/- 200m; YearOfSampling=0; DataSource=Collected by Brett Cocks (CES) for NVT.
          Physical
            Thickness  ParticleSizeSand  ParticleSizeSilt  ParticleSizeClay  Rocks  BD     AirDry  LL15   DUL    SAT
            100        5                 65                30                0.164  1.519  0.08    0.161  0.282  0.332
            200        5                 65                30                0.371  1.408  0.104   0.129  0.224  0.274
            300        5                 65                30                0      1.572  0.192   0.192  0.321  0.371
            300        5                 65                30                0      1.578  0.192   0.192  0.325  0.375
            300        5                 65                30                0      1.616  0.192   0.192  0.31   0.36
            300        5                 65                30                0      1.614  0.192   0.192  0.311  0.361
            300        5                 65                30                0      1.581  0.192   0.192  0.323  0.373
            BD, AirDry, LL15, DUL, SAT source: Unknown source or quality of data
            Rocks, ParticleSizeSand, ParticleSizeSilt, ParticleSizeClay source: Calculated
            SoilCrop wheatSoil: LL=[0.161, 0.129, 0.192, 0.208, 0.231, 0.259, 0.317]; KL=[0.06, 0.06, 0.06, 0.04, 0.04, 0.02, 0.01]; XF=[1, 1, 1, 1, 1, 1, 1]
              LL source: Field measured and checked for sensibility
            SoilCrop barleySoil: same as GerminationLab.LabSimulation.Field.Soil.Physical.wheatSoil
            SoilCrop canolaSoil: same as GerminationLab.LabSimulation.Field.Soil.Physical.wheatSoil
          WaterBalance SoilWater: SummerDate=1-Nov; SummerU=6; SummerCona=3.5; WinterDate=1-Apr; WinterU=2; WinterCona=2; DiffusConst=88; DiffusSlope=35; Salb=0.13; CN2Bare=73; CNRed=20; CNCov=0.8; PSIDul=-100; Thickness=[100, 200, 300, 300, 300, 300, 300]; SWCON=[0, 0, 0, 0, 0, 0, 0]
          Organic: FOMCNRatio=40; CarbonUnits=Total
            Thickness  Carbon  SoilCNRatio  FBiom  FInert  FOM
            100        1.67    12           0.04   0.4     347.129
            200        1       12           0.02   0.5     270.344
            300        0.5     12           0.02   0.7     163.972
            300        0.3     12           0.02   1       99.4541
            300        0.2     12           0.01   1       60.322
            300        0.1     12           0.01   1       36.5871
            300        0.1     12           0.01   1       22.1912
          Chemical: PHUnits=Water
            Thickness  PH   EC   CEC
            100        5.2  0.1  12.1025
            200        5.7  0.1  10.595
            300        6.6  0.1  9.47
            300        7.4  0.1  9.02
            300        8.3  0.1  8.795
            300        8.5  0.2  8.57
            300        8.5  0.2  8.57
            EC, CL source: Unknown source or quality of data (layer 1, 2, 3, 4, 5, 6)
            CEC source: Calculated
            PH source: Unknown source or quality of data
          Nutrient
          Water: Thickness=[100, 200, 300, 300, 300, 300, 300]; InitialValues=[0.185, 0.148, 0.218, 0.219, 0.216, 0.216, 0.218]; FilledFromTop=false
          Solute NO3: Thickness=[100, 200, 300, 300, 300, 300, 300]; InitialValues=[20, 30, 1, 1, 1, 1, 1]; InitialValuesUnits=kg/ha; WaterTableConcentration=0; D0=0; DepthConstant=0; MaxDepthSoluteAccessible=0; RunoffEffectivenessAtMovingSolute=0; MaxEffectiveRunoff=0
          Solute NH4: Thickness=[100, 200, 300, 300, 300, 300, 300]; InitialValues=[0.1, 0.1, 0.1, 0.1, 0.1, 0.1, 0.1]; InitialValuesUnits=kg/ha; WaterTableConcentration=0; D0=0; DepthConstant=0; MaxDepthSoluteAccessible=0; RunoffEffectivenessAtMovingSolute=0; MaxEffectiveRunoff=0
          Solute Urea: Thickness=[100, 200, 300, 300, 300, 300, 300]; InitialValues=[0, 0, 0, 0, 0, 0, 0]; InitialValuesUnits=ppm; WaterTableConcentration=0; D0=0; DepthConstant=0; MaxDepthSoluteAccessible=0; RunoffEffectivenessAtMovingSolute=0; MaxEffectiveRunoff=0
          SoilTemperature: InteractionsPerDay=8
        Manager LabConditions
          Temperature = 20
          WaterPotential = 0
          SowingDate = 03/01/2000 00:00:00
          SowingDepth = 20
          CultivarName = Mace
          Population = 100
```csharp
using System;
using System.Collections.Generic;
using Models.Core;
using Models.Climate;
using Models.Interfaces;
using Models.PMF;
using Models.Soils;
using APSIM.Shared.Utilities;

namespace Models
{
    /// <summary>
    /// Holds Petri-dish conditions: a constant seed-layer temperature (through constant weather with no
    /// radiation or rain) and a constant seed-layer water potential (by resetting the seed-layer water
    /// content just before phenology), then sows the crop.
    /// </summary>
    [Serializable]
    public class Script : Model
    {
        [Link] private Clock clock = null;
        [Link] private Weather weather = null;
        [Link] private IPhysical physical = null;
        [Link] private ISoilWater soilWater = null;
        [Link] private ISoilTemperature soilTemperature = null;
        [Link(Type = LinkType.Path, Path = "[Wheat]")] private Plant wheat = null;

        [Description("Temperature (oC)")] public double Temperature { get; set; }
        [Description("Water potential (MPa)")] public double WaterPotential { get; set; }
        [Description("Sowing date")] public DateTime SowingDate { get; set; }
        [Description("Sowing depth (mm)")] public double SowingDepth { get; set; }
        [Description("Cultivar")] public string CultivarName { get; set; }
        [Description("Population (plants/m2)")] public double Population { get; set; }

        /// <summary>Volumetric water content of the seed layer that gives the target water potential.</summary>
        public double TargetWaterContent { get; private set; }

        /// <summary>
        /// Air temperature applied to the weather (oC). It starts at Temperature and is corrected each day by
        /// the seed-layer error so that the simulated seed-layer soil temperature settles at Temperature.
        /// </summary>
        public double AirTemperature { get; private set; }

        private int seedLayer;

        [EventSubscribe("StartOfSimulation")]
        private void OnStartOfSimulation(object sender, EventArgs e)
        {
            AirTemperature = Temperature;
            seedLayer = SoilUtilities.LayerIndexOfDepth(physical.Thickness, SowingDepth);
            TargetWaterContent = ThetaFromPsi(WaterPotential, physical.AirDry[seedLayer], physical.LL15[seedLayer],
                                              physical.DUL[seedLayer], physical.SAT[seedLayer]);
        }

        [EventSubscribe("PreparingNewWeatherData")]
        private void OnPreparingNewWeatherData(object sender, EventArgs e)
        {
            // Annual average/amplitude set the soil temperature model's initial profile and lower boundary.
            weather.Tav = Temperature;
            weather.Amp = 0;
            weather.MaxT = AirTemperature;
            weather.MinT = AirTemperature;
            weather.Radn = 0;
            weather.Rain = 0;
        }

        [EventSubscribe("EndOfDay")]
        private void OnEndOfDay(object sender, EventArgs e)
        {
            AirTemperature += 0.5 * (Temperature - soilTemperature.Value[seedLayer]);
        }

        [EventSubscribe("DoManagement")]
        private void OnDoManagement(object sender, EventArgs e)
        {
            SetSeedLayerWater();
            if (clock.Today == SowingDate)
                wheat.Sow(CultivarName, Population, SowingDepth, 250);
        }

        [EventSubscribe("PrePhenology")]
        private void OnPrePhenology(object sender, EventArgs e)
        {
            SetSeedLayerWater();
        }

        private void SetSeedLayerWater()
        {
            double[] sw = (double[])soilWater.SW.Clone();
            sw[seedLayer] = TargetWaterContent;
            soilWater.SW = sw;
        }

        /// <summary>
        /// Inverse of GerminatingWaterPotentialResponse.PsiFromTheta: log10(-psi) is linear in water content
        /// between AirDry (-100 MPa), LL15 (-1.5 MPa), DUL (-0.033 MPa) and SAT (-0.001 MPa).
        /// </summary>
        public static double ThetaFromPsi(double psi, double airDry, double ll15, double dul, double sat)
        {
            if (psi >= -0.001)
                return sat;
            var theta = new List<double>();
            var logPsi = new List<double>();
            if (airDry < ll15)
            {
                theta.Add(airDry);
                logPsi.Add(Math.Log10(100));
            }
            theta.Add(ll15); logPsi.Add(Math.Log10(1.5));
            theta.Add(dul); logPsi.Add(Math.Log10(0.033));
            theta.Add(sat); logPsi.Add(Math.Log10(0.001));

            double y = Math.Log10(-psi);
            if (y >= logPsi[0])
                return theta[0];
            for (int i = 1; i < theta.Count; i++)
                if (y >= logPsi[i])
                    return theta[i - 1] + (theta[i] - theta[i - 1]) * (logPsi[i - 1] - y) / (logPsi[i - 1] - logPsi[i]);
            return sat;
        }
    }
}
```
        Manager GerminationTracker
          CensorDays = 14
```csharp
using System;
using System.Collections.Generic;
using System.Linq;
using Models.Core;
using Models.Functions;
using Models.PMF;
using Models.PMF.Phen;

namespace Models
{
    /// <summary>
    /// Records the day of 50% germination (T50) from the germination phase. T50_raw is the fractional day
    /// on which the accumulated rate reaches 1: (day - 1) + (1 - progress before that day) / rate that day.
    /// T50 is T50_raw floored at 1 day (daily model), and is NaN when germination takes longer than CensorDays.
    /// </summary>
    [Serializable]
    public class Script : Model
    {
        [Link(Type = LinkType.Path, Path = "[Wheat]")] private Plant wheat = null;
        [Link(Type = LinkType.Path, Path = "[Wheat].Phenology.Germinating")] private GerminatingPhaseHydroThermal phase = null;
        [Link(Type = LinkType.Path, Path = "[Wheat].Phenology.Germinating.GerminatingWaterPotentialResponse")] private GerminatingWaterPotentialResponse water = null;

        [Description("Censor T50 after this many days (experiment length)")] public double CensorDays { get; set; }

        public bool Germinated { get; private set; }
        public double T50_raw { get; private set; } = double.NaN;
        public double T50 { get; private set; } = double.NaN;
        public int DaysAccumulated { get { return rates.Count; } }
        public double MeanSeedTemperature { get { return temperatures.Count > 0 ? temperatures.Average() : double.NaN; } }
        public double MinSeedTemperature { get { return temperatures.Count > 0 ? temperatures.Min() : double.NaN; } }
        public double MaxSeedTemperature { get { return temperatures.Count > 0 ? temperatures.Max() : double.NaN; } }
        public double MeanSeedWaterPotential { get { return potentials.Count > 0 ? potentials.Average() : double.NaN; } }
        public double MeanDailyRate { get { return rates.Count > 0 ? rates.Average() : double.NaN; } }

        private List<double> rates = new List<double>();
        private List<double> temperatures = new List<double>();
        private List<double> potentials = new List<double>();

        [EventSubscribe("EndOfDay")]
        private void OnEndOfDay(object sender, EventArgs e)
        {
            if (!wheat.IsAlive || Germinated || phase.DaysSinceSowing <= rates.Count)
                return;

            // The phase ran today: record today's values.
            rates.Add(phase.DailyGerminationRate);
            temperatures.Add(phase.SoilTemperatureSeed);
            potentials.Add(water.SeedWaterPotential);

            if (phase.ProgressThroughPhase >= phase.Target)
            {
                Germinated = true;
                double progress = 0;
                for (int day = 1; day <= rates.Count; day++)
                {
                    double r = rates[day - 1];
                    if (progress + r >= 1)
                    {
                        T50_raw = (day - 1) + (1 - progress) / r;
                        break;
                    }
                    progress += r;
                }
                if (T50_raw <= CensorDays)
                    T50 = Math.Max(1, T50_raw);
            }
        }
    }
}
```
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