Simulations
  Simulation Slurp
    WeatherFile: FileName=ForeverSpringNoRain.met
    Clock: StartDate=2000-01-01; EndDate=2000-01-31
    Summary
    Zone Field: Area=0; Slope=0
      Soil: SoilType=Uniform soil; Latitude=0; Longitude=0
        Water
          Thickness  BD  AirDry  LL15  DUL   SAT  KS
          150        1   0.15    0.3   0.55  0.6  100
          150        1   0.15    0.3   0.55  0.6  100
          300        1   0.15    0.3   0.55  0.6  100
          300        1   0.15    0.3   0.55  0.6  100
          SoilCrop Slurp: LL=[0.3, 0.3, 0.3, 0.3]; KL=[0.1, 0.1, 0.1, 0.1]; XF=[1, 1, 1, 1]
        SoilWater: min_crit_temp=5; max_crit_temp=35; max_albedo=0.23; A_to_evap_fact=0.44; canopy_eos_coef=1.7; sw_top_crit=0.9; sumes1_max=100; sumes2_max=25; solute_flow_eff=[1]; solute_flux_eff=[1]; gravity_gradient=2E-05; specific_bd=2.65; hydrol_effective_depth=450; immobile_solutes=[nh4]; canopy_fact_default=0.5; act_evap_method=ritchie; irrigation_will_runoff=false; irrigation_layer=1; SummerCona=3; SummerU=6; SummerDate=1-Nov; WinterCona=3; WinterU=6; WinterDate=1-Apr; DiffusConst=40; DiffusSlope=16; Salb=0.13; slope=0; discharge_width=0; catchment_area=0; max_pond=0; CN2Bare=73; CNRed=20; CNCov=0.8
          canopy_fact  canopy_fact_height  Thickness  SWCON  KLAT
          1            0                   150        0      0
          1            600                 150        0      0
          0            1800                300        0      0
          0            30000               300        0      0
          mobile_solutes=[no3, urea, cl, br, org_n, org_c_pool1, org_c_pool2, org_c_pool3]
        SoilNitrogen: fom_type=[default, manure, mucuna, lablab, shemp, stable]; fract_carb=[0.2, 0.3, 0.54, 0.57, 0.45, 0]; fract_cell=[0.7, 0.3, 0.37, 0.37, 0.47, 0.1]; fract_lign=[0.1, 0.4, 0.09, 0.06, 0.08, 0.9]; wfpsN2N2O_x=[22, 88]; wfpsN2N2O_y=[0.1, 1]; oc=[1.04017, 0.889753, 0.889824, 0.889795]
        SoilOrganicMatter: RootCN=40; RootWt=200; SoilCN=12.5; EnrACoeff=7.4; EnrBCoeff=0.2; OCUnits=Total
          Thickness  OC    FBiom  FInert
          150        1.04  0.025  0.4
          150        0.89  0.02   0.6
          300        0.89  0.015  0.8
          300        0.89  0.01   0.9
        Analysis: PHUnits=Water; BoronUnits=HotWater
          Thickness  EC    PH
          150        0.2   8.4
          150        0.25  8.8
          300        0.31  9
          300        0.4   9.2
        InitialWater Initial water: PercentMethod=EvenlyDistributed; FractionFull=1; RelativeTo=LL15
        Sample: NO3Units=kgha; NH4Units=kgha; SWUnits=Volumetric; OCUnits=Total; PHUnits=Water
          Thickness  NO3  NH4
          100        40   0.1
          200        30   0.1
          300        14   0.1
          300        14   0.1
      SurfaceOrganicMatter: crit_residue_wt=2000; opt_temp=20; cum_eos_max=20; cnrf_coeff=0.277; cnrf_optcn=25; c_fract=0.4; leach_rain_tot=25; min_rain_to_leach=10; crit_min_surfom_orgC=0.004; default_cpr=0; default_standing_fraction=0; standing_extinct_coeff=0.5; fractionFaecesAdded=0.5; PoolName=Slurp; type=Slurp; mass=1000; standing_fraction=0; cnr=80
        TillageTypes
      Slurp: localFrgr=1; localLAI=5; localLAItot=5; localCoverGreen=1; localCoverTot=1; localCanopyHeight=500; localCanopyDepth=500; localMaximumStomatalConductance=0.011; localRootDepth=600; localSurfaceRootLengthDensity=0.05; localRootExplorationByLayer=[1, 1, 1, 0]; localRootLengthDensityByVolume=[0.04375, 0.03125, 0.0125, 0]
      Arbitrator: scalerPlant=[0.580066]; dltSWdep=[0, 0, -0.185296, 0]; scalerLayer=[0, 0, 0.0355386, 0]; scalerPlantNitrogen=[0]; dltNO3=[0, 0, 0, 0]; scalerLayerNitrogen=[0, 0, 0, 0]; dltNH4=[0, 0, 0, 0]; dltNitrogen=[0, 0, 0, 0]; ArbitEOS=0
      Manager SlurpUpdates
        DateToUpdate = 2000-01-15
        VariableToUpdate = LAI
        tempValue = 3.5
```csharp
using System;
using Models.Core;
using Models.PMF;
using Models.PMF.Slurp;
namespace Models
{
	[Serializable]
	[System.Xml.Serialization.XmlInclude(typeof(Model))]
	public class Script : Model
	{
		[Link] Clock Clock;
		[Link] Slurp Slurp;
		[Link] Report Report;
		[Link] Summary Summary;
		

		[Description("Date to change states or properties")] public DateTime DateToUpdate {get; set;}
		[Description("Variable to update (e.g. LAI, LAItot, CoverGreen")] public string VariableToUpdate {get; set;}        
        [Description("Value to update to")] public double tempValue { get; set; }

        //[Description("Green LAI (m2/m2)")] public double tempLAI { get; set;}
        //[Description("Total LAI (m2/m2)")] public double tempLAItot { get; set; }
        //[Description("Green cover (m2/m2)")] public double tempCoverGreen { get; set; }
        //[Description("Total cover (m2/m2)")] public double tempCoverTot { get; set; }
        //[Description("Height of the canopy (mm)")] public double tempCanopyHeight { get; set; }
        //[Description("Depth of the canopy (mm)")] public double tempCanopyDepth { get; set; }
        //[Description("Maximum stomatal conductance (m/s)")] public double tempMaximumStomatalConductance { get; set; }
        //[Description("Frgr - effect on stomatal conductance (-)")] public double tempFrgr { get; set; }
        //[Description("Nitrogen demand (kgN /ha /day)")] public double tempPotentialNitrogenDemand { get; set; }
        //[Description("Rooting Depth (mm)")] public double tempRootDepth { get; set; }
        //[Description("Root length density at the soil surface (mm/mm3)")] public double tempSurfaceRootLengthDensity { get; set; }

		public override void OnSimulationCommencing()
		{
		    
		}
		
		[EventSubscribe("DoManagement")]
		private void OnDoManagement(object sender, EventArgs e)
		{	
		    int temp = 15;
		    int temp1 = 16;
		    //if(temp1 < temp)
	        //if (Slurp.ActualEP < 10.0)	
	        //if (Math.Round(Clock.Today.Day, 0) > temp)	
			//if (Utility.Math.Round(Clock.Today.Day, 0) == Utility.Math.Round(DateToUpdate.Day,0))
			//if (Clock.Today.Day == DateToUpdate.Day)
			//if ((Clock.Today.Year == DateToUpdate.Year) && (Clock.Today.Month == DateToUpdate.Month) && (Clock.Today.Day == DateToUpdate.Day))
			if (Clock.Today > DateToUpdate)
			//if(DateTime.Compare(Clock.Today.Date, DateToUpdate.Date)==0);
			{
			    if (VariableToUpdate.Equals("LAI", StringComparison.Ordinal))
			    {
                	Summary.WriteMessage(FullPath, "Bloody if statement");
			        Slurp.CanopyProperties.LAI = tempValue;
			    }
			    else if (VariableToUpdate.Equals("LAItot", StringComparison.Ordinal))
			    {
			        Slurp.CanopyProperties.LAItot = tempValue;
			    }
			}
        }
	}
}
```
      Report: EventNames=[Clock].DoReport
        VariableNames:
          [Clock].Today
          [Clock].Today.Day
          [SlurpUpdates].DateToUpdate
          [SlurpUpdates].tempValue
          [Slurp].localLAI
          [Slurp].CanopyProperties
          [Slurp].PotentialEP
          [Slurp].ActualEP
          [Slurp].potentialNitrogenDemand
          [Slurp].actualNitrogenSupply
          [Slurp].localRootDepth
          [Arbitrator].scalerLayer
          [Arbitrator].scalerPlant
          [Soil].SoilWater.drain
          [Soil].SoilWater.es
          [Arbitrator].dltSWdep
          [Soil].SoilWater.sw_dep
  DataStore
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