Simulations: Version=1
  Memo TitlePage
    # The APSIM Soil Arbitrator Model

    _Huth, N.I., Fainges, J.L. and Holzworth, D.P._
  DataStore
  Folder Simple Test Using Split Populations
    Memo
      This test compares the water and nitrogen competition for simulations where a static crop canopy with LAI of 3, rooting depth of 1m and a daily N demand of 0.15 kgN/ha is a single crop, two half-populations or three one third-populations.  In each case the total canopy size and water demand of each of the single or split populations will be the same.  If the soil arbitrator is operating correctly the overall water and nitrogen balance of each simulation should be the same.  In the case of the split populations, the water and nitrogen supplies provided by the soil arbitrator to the sub-populations should sum to the same value calculated in the simulation for the full population.

      This test simulation also tests that the uptakes provided by the arbitrator are passed to the correct instances of each crop model within a multiple zone simulation.  In such a simulation there may be multiple instances of a wheat model for example.  The arbitrator must communicate such that the correct information is supplied to each instance of each particular crop model.

      The simulation includes 3 fields with up to three crops in each.

      Field 1

      Wheat: LAI = 3 (m<sup>2</sup>/m<sup>2</sup>), N demand = 0.15 (kg/ha)

      Field 2

      Wheat: LAI = 1.5 (m<sup>2</sup>/m<sup>2</sup>), N demand = 0.075 (kg/ha)

      Barley: LAI = 1.5 (m<sup>2</sup>/m<sup>2</sup>), N demand = 0.075 (kg/ha)

      Field 3

      Wheat: LAI = 1.0 (m<sup>2</sup>/m<sup>2</sup>), N demand = 0.05 (kg/ha)

      Barley: LAI = 1.0 (m<sup>2</sup>/m<sup>2</sup>), N demand = 0.05 (kg/ha)

      Oats:   LAI = 1.0 (m<sup>2</sup>/m<sup>2</sup>), N demand = 0.05 (kg/ha)

      The crops are simple instances of a static plant model and so the crop type is only of use in referencing the various instances of the models.
    Simulation SplitPopulations: Area=0; Slope=0
      Clock: StartDate=1900-01-01; EndDate=1904-12-31
      Summary SummaryFile
      Weather: FileName=%root%\Examples\WeatherFiles\Dalby.met
      SoilArbitrator
      Zone Field1: Area=1; Slope=0
        Report Report1: EventNames=[Clock].EndOfDay
          VariableNames:
            [Clock].Today
            sum([Soil].SoilWater.SWmm) as SWTotal
            sum([Soil].SoilNitrogen.NO3) as NO3Total
            sum([Soil].SoilNitrogen.NH4) as NH4Total
            [Wheat].PotentialEP
            [Wheat].EP
        Fertiliser
        Soil: ASCOrder=Vertosol; ASCSubOrder=Black; SoilType=Clay; Site=Norwin; NearestTown=Norwin; Region=Darling Downs and Granite Belt; State=Queensland; Country=Australia; NaturalVegetation=Qld. Bluegrass, possible Qld. Blue gum; ApsoilNumber=900; Latitude=-27.581836; Longitude=151.320206; LocationAccuracy=+/- 20m
          DataSource=CSIRO Sustainable Ecosystems, Toowoomba; Characteriesd as part of the GRDC funded project"Doing it better, doing it smarter, managing soil water in Australian agriculture' 2011
          Comments=OC, CLL for all crops estimated-based on Bongeen Mywybilla Soil No1
          Water
            Thickness  BD       AirDry    LL15      DUL       SAT       KS
            150        1.01056  0.13025   0.2605    0.521     0.588655  20
            150        1.07146  0.198689  0.248362  0.496723  0.565677  20
            300        1.09394  0.28      0.28      0.488438  0.557193  20
            300        1.15861  0.28      0.28      0.480297  0.532787  20
            300        1.17301  0.28      0.28      0.471584  0.527354  20
            300        1.16287  0.28      0.28      0.457071  0.53118   20
            300        1.1875   0.28      0.28      0.452332  0.521888  20
            SoilCrop WheatSoil: LL=[0.261, 0.248, 0.28, 0.306, 0.36, 0.392, 0.446]; KL=[0.06, 0.06, 0.06, 0.03, 0.03, 0.03, 0.03]; XF=[1, 1, 1, 1, 1, 1, 1]
          SoilWater: residueinterception=0; SummerDate=1-Nov; SummerU=5; SummerCona=5; WinterDate=1-Apr; WinterU=5; WinterCona=5; DiffusConst=40; DiffusSlope=16; Salb=0.12; CN2Bare=73; CNRed=20; CNCov=0.8; max_pond=0; Thickness=[150, 150, 300, 300, 300, 300, 300]; SWCON=[0.3, 0.3, 0.3, 0.3, 0.3, 0.3, 0.3]
          SoilNitrogen: fom_type=[default, manure, mucuna, lablab, shemp, stable]; fract_carb=[0.2, 0.3, 0.54, 0.57, 0.45, 0]; fract_cell=[0.7, 0.3, 0.37, 0.37, 0.47, 0.1]; fract_lign=[0.1, 0.4, 0.09, 0.06, 0.08, 0.9]; wfpsN2N2O_x=[22, 88]; wfpsN2N2O_y=[0.1, 1]
          SoilOrganicMatter: RootCN=40; RootWt=1000; SoilCN=12; EnrACoeff=7.4; EnrBCoeff=0.2; OCUnits=Total
            Thickness  OC    FBiom  FInert
            150        1.2   0.04   0.4
            150        0.96  0.02   0.6
            300        0.6   0.02   0.8
            300        0.3   0.02   1
            300        0.18  0.01   1
            300        0.12  0.01   1
            300        0.12  0.01   1
          Analysis: Thickness=[150, 150, 300, 300, 300, 300, 300]; PH=[8, 8, 8, 8, 8, 8, 8]; PHUnits=Water; BoronUnits=HotWater
          InitialWater: PercentMethod=EvenlyDistributed; FractionFull=1
          Sample InitialN: NO3Units=ppm; NH4Units=ppm; SWUnits=Volumetric; OCUnits=Total; PHUnits=Water
            Thickness  NO3  NH4
            150        1    0.1
            150        1    0.1
            300        1    0.1
            300        1    0.1
            300        1    0.1
            300        1    0.1
            300        1    0.1
        SurfaceOrganicMatter: PoolName=wheat_stubble; type=wheat; mass=500; standing_fraction=0; cnr=100; CriticalResidueWeight=2000; OptimumDecompTemp=20; MaxCumulativeEOS=20; CNRatioDecompCoeff=0.277; CNRatioDecompThreshold=25; TotalLeachRain=25; MinRainToLeach=10; CriticalMinimumOrganicC=0.004; DefaultCPRatio=0; DefaultStandingFraction=0; StandingExtinctCoeff=0.5; FractionFaecesAdded=0.5
          Pools:
            {PoolName=wheat_stubble, ResidueType=wheat, Mass=500, CNRatio=100, StandingFraction=0}
          ResidueTypes: LoadFromResource=ResidueTypes
        MicroClimate: air_pressure=1010; soil_emissivity=0.96; sun_angle=15; soil_heat_flux_fraction=0.4; night_interception_fraction=0.5; windspeed_default=3; refheight=2; albedo=0.15; emissivity=0.96; gsmax=0.01; r50=200; a_interception=0; b_interception=1; c_interception=0; d_interception=0; soil_albedo=0.3
        SimpleTree wheat: CanopyType=wheat; LAI=3; Height=10000; RootDepth=1000; NDemand=0.15
      Zone Field2: Area=1; Slope=0
        Report Report2: EventNames=[Clock].EndOfDay
          VariableNames:
            [Clock].Today
            sum([Soil].SoilWater.SWmm) as SWTotal
            sum([Soil].SoilNitrogen.NO3) as NO3Total
            sum([Soil].SoilNitrogen.NH4) as NH4Total
            [Wheat].PotentialEP
            [Barley].PotentialEP
            ([Wheat].PotentialEP+[Barley].PotentialEP) as TotalPEP
            [Wheat].EP
            [Barley].EP
            ([Wheat].EP+[Barley].EP) as TotalEP
        Fertiliser
        Soil: ASCOrder=Vertosol; ASCSubOrder=Black; SoilType=Clay; Site=Norwin; NearestTown=Norwin; Region=Darling Downs and Granite Belt; State=Queensland; Country=Australia; NaturalVegetation=Qld. Bluegrass, possible Qld. Blue gum; ApsoilNumber=900; Latitude=-27.581836; Longitude=151.320206; LocationAccuracy=+/- 20m
          DataSource=CSIRO Sustainable Ecosystems, Toowoomba; Characteriesd as part of the GRDC funded project"Doing it better, doing it smarter, managing soil water in Australian agriculture' 2011
          Comments=OC, CLL for all crops estimated-based on Bongeen Mywybilla Soil No1
          Water
            Thickness  BD       AirDry    LL15      DUL       SAT       KS
            150        1.01056  0.13025   0.2605    0.521     0.588655  20
            150        1.07146  0.198689  0.248362  0.496723  0.565677  20
            300        1.09394  0.28      0.28      0.488438  0.557193  20
            300        1.15861  0.28      0.28      0.480297  0.532787  20
            300        1.17301  0.28      0.28      0.471584  0.527354  20
            300        1.16287  0.28      0.28      0.457071  0.53118   20
            300        1.1875   0.28      0.28      0.452332  0.521888  20
            SoilCrop WheatSoil: LL=[0.261, 0.248, 0.28, 0.306, 0.36, 0.392, 0.446]; KL=[0.03, 0.03, 0.03, 0.015, 0.015, 0.015, 0.015]; XF=[1, 1, 1, 1, 1, 1, 1]
            SoilCrop BarleySoil: LL=[0.261, 0.248, 0.28, 0.306, 0.36, 0.392, 0.446]; KL=[0.03, 0.03, 0.03, 0.015, 0.015, 0.015, 0.015]; XF=[1, 1, 1, 1, 1, 1, 1]
          SoilWater: same as Simple Test Using Split Populations.SplitPopulations.Field1.Soil.SoilWater
          SoilNitrogen: fom_type=[default, manure, mucuna, lablab, shemp, stable]; fract_carb=[0.2, 0.3, 0.54, 0.57, 0.45, 0]; fract_cell=[0.7, 0.3, 0.37, 0.37, 0.47, 0.1]; fract_lign=[0.1, 0.4, 0.09, 0.06, 0.08, 0.9]; wfpsN2N2O_x=[22, 88]; wfpsN2N2O_y=[0.1, 1]
          SoilOrganicMatter: same as Simple Test Using Split Populations.SplitPopulations.Field1.Soil.SoilOrganicMatter
          Analysis: Thickness=[150, 150, 300, 300, 300, 300, 300]; PH=[8, 8, 8, 8, 8, 8, 8]; PHUnits=Water; BoronUnits=HotWater
          InitialWater: PercentMethod=EvenlyDistributed; FractionFull=1
          Sample InitialN: same as Simple Test Using Split Populations.SplitPopulations.Field1.Soil.InitialN
        SurfaceOrganicMatter: same as Simple Test Using Split Populations.SplitPopulations.Field1.SurfaceOrganicMatter
        MicroClimate: same as Simple Test Using Split Populations.SplitPopulations.Field1.MicroClimate
        SimpleTree wheat: CanopyType=wheat; LAI=1.5; Height=10000; RootDepth=1000; NDemand=0.075
        SimpleTree barley: CanopyType=barley; LAI=1.5; Height=10000; RootDepth=1000; NDemand=0.075
      Zone Field3: Area=1; Slope=0
        Report Report3: EventNames=[Clock].EndOfDay
          VariableNames:
            [Clock].Today
            sum([Soil].SoilWater.SWmm) as SWTotal
            sum([Soil].SoilNitrogen.NO3) as NO3Total
            sum([Soil].SoilNitrogen.NH4) as NH4Total
            [Wheat].PotentialEP
            [Barley].PotentialEP
            [Oats].PotentialEP
            ([Wheat].PotentialEP+[Barley].PotentialEP+[Oats].PotentialEP) as TotalPEP
            [Wheat].EP
            [Barley].EP
            [Oats].EP
            ([Wheat].EP+[Barley].EP+[Oats].EP) as TotalEP
        Fertiliser
        Soil: ASCOrder=Vertosol; ASCSubOrder=Black; SoilType=Clay; Site=Norwin; NearestTown=Norwin; Region=Darling Downs and Granite Belt; State=Queensland; Country=Australia; NaturalVegetation=Qld. Bluegrass, possible Qld. Blue gum; ApsoilNumber=900; Latitude=-27.581836; Longitude=151.320206; LocationAccuracy=+/- 20m
          DataSource=CSIRO Sustainable Ecosystems, Toowoomba; Characteriesd as part of the GRDC funded project"Doing it better, doing it smarter, managing soil water in Australian agriculture' 2011
          Comments=OC, CLL for all crops estimated-based on Bongeen Mywybilla Soil No1
          Water
            Thickness  BD       AirDry    LL15      DUL       SAT       KS
            150        1.01056  0.13025   0.2605    0.521     0.588655  20
            150        1.07146  0.198689  0.248362  0.496723  0.565677  20
            300        1.09394  0.28      0.28      0.488438  0.557193  20
            300        1.15861  0.28      0.28      0.480297  0.532787  20
            300        1.17301  0.28      0.28      0.471584  0.527354  20
            300        1.16287  0.28      0.28      0.457071  0.53118   20
            300        1.1875   0.28      0.28      0.452332  0.521888  20
            SoilCrop WheatSoil: LL=[0.261, 0.248, 0.28, 0.306, 0.36, 0.392, 0.446]; KL=[0.02, 0.02, 0.02, 0.01, 0.01, 0.01, 0.01]; XF=[1, 1, 1, 1, 1, 1, 1]
            SoilCrop BarleySoil: LL=[0.261, 0.248, 0.28, 0.306, 0.36, 0.392, 0.446]; KL=[0.02, 0.02, 0.02, 0.01, 0.01, 0.01, 0.01]; XF=[1, 1, 1, 1, 1, 1, 1]
            SoilCrop OatsSoil: LL=[0.261, 0.248, 0.28, 0.306, 0.36, 0.392, 0.446]; KL=[0.02, 0.02, 0.02, 0.01, 0.01, 0.01, 0.01]; XF=[1, 1, 1, 1, 1, 1, 1]
          SoilWater: same as Simple Test Using Split Populations.SplitPopulations.Field1.Soil.SoilWater
          SoilNitrogen: fom_type=[default, manure, mucuna, lablab, shemp, stable]; fract_carb=[0.2, 0.3, 0.54, 0.57, 0.45, 0]; fract_cell=[0.7, 0.3, 0.37, 0.37, 0.47, 0.1]; fract_lign=[0.1, 0.4, 0.09, 0.06, 0.08, 0.9]; wfpsN2N2O_x=[22, 88]; wfpsN2N2O_y=[0.1, 1]
          SoilOrganicMatter: same as Simple Test Using Split Populations.SplitPopulations.Field1.Soil.SoilOrganicMatter
          Analysis: Thickness=[150, 150, 300, 300, 300, 300, 300]; PH=[8, 8, 8, 8, 8, 8, 8]; PHUnits=Water; BoronUnits=HotWater
          InitialWater: PercentMethod=EvenlyDistributed; FractionFull=1
          Sample InitialN: same as Simple Test Using Split Populations.SplitPopulations.Field1.Soil.InitialN
        SurfaceOrganicMatter: same as Simple Test Using Split Populations.SplitPopulations.Field1.SurfaceOrganicMatter
        MicroClimate: same as Simple Test Using Split Populations.SplitPopulations.Field1.MicroClimate
        SimpleTree wheat: CanopyType=wheat; LAI=1; Height=10000; RootDepth=1000; NDemand=0.05
        SimpleTree barley: CanopyType=barley; LAI=1; Height=10000; RootDepth=1000; NDemand=0.05
        SimpleTree oats: CanopyType=oats; LAI=1; Height=10000; RootDepth=1000; NDemand=0.05
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