Simulations
  Simulation Saturated_Flow_Only: Area=0; Slope=0
    Weather: FileName=Saturated Flow Only.met
    Clock: StartDate=1940-01-01; EndDate=1940-03-02
    Summary summaryfile
    Zone paddock: Area=1; Slope=0
      Soil: SoilType=Black Vertosol; LocalName=Waco; Site=Jimbour; NearestTown=Jimbour, Q 4352; Region=South East Queensland; NaturalVegetation=Grassland, mainly Qld bluegrass; Latitude=0; Longitude=0
        Sample Soil sample: NO3Units=ppm; NH4Units=ppm; SWUnits=Volumetric; OCUnits=Total; PHUnits=Water
          Thickness  NO3  NH4  SW
          150        0    0    0.59
          150        0    0    0.58
          300        0    0    0.59
          300        0    0    0.58
          300        0    0    0.57
          300        0    0    0.55
          300        0    0    0.55
          300        0    0    0.53
          300        0    0    0.52
          300        0    0    0.51
          300        0    0    0.49
        Water
          Thickness  BD    AirDry  LL15  DUL   SAT
          150        1.02  0.15    0.29  0.54  0.59
          150        1.03  0.26    0.29  0.53  0.58
          300        1.02  0.29    0.29  0.54  0.59
          300        1.02  0.29    0.29  0.54  0.58
          300        1.06  0.3     0.3   0.52  0.57
          300        1.11  0.31    0.31  0.5   0.55
          300        1.12  0.32    0.32  0.5   0.55
          300        1.15  0.33    0.33  0.48  0.53
          300        1.18  0.34    0.34  0.47  0.52
          300        1.2   0.35    0.35  0.46  0.51
          300        1.25  0.36    0.36  0.44  0.49
        SoilWater: SummerDate=1-Nov; WinterDate=1-Apr; Salb=0.13; CN2Bare=1; min_crit_temp=5; max_crit_temp=35; max_albedo=0.23; A_to_evap_fact=0.44; canopy_eos_coef=1.7; sw_top_crit=0.9; sumes1_max=100; sumes2_max=25; solute_flow_eff=[1]; solute_flux_eff=[1]; gravity_gradient=2E-05; specific_bd=2.65; hydrol_effective_depth=450; immobile_solutes=[NH4]; canopy_fact=[1, 1, 0, 0]; canopy_fact_height=[0, 600, 1800, 30000]; canopy_fact_default=0.5; act_evap_method=ritchie; irrigation_will_runoff=false; irrigation_layer=1
          zero: residueinterception, SummerU, SummerCona, WinterU, WinterCona, DiffusConst, DiffusSlope, CNRed, CNCov, slope, discharge_width, catchment_area, max_pond
          Thickness  SWCON  KLAT
          150        0.3    0
          150        0.3    0
          300        0.3    0
          300        0.3    0
          300        0.3    0
          300        0.3    0
          300        0.3    0
          300        0.3    0
          300        0.3    0
          300        0.3    0
          300        0.3    0
          mobile_solutes=[NO3, urea, cl, br, org_n, org_c_pool1, org_c_pool2, org_c_pool3]
        SoilNitrogen: fom_type=[default, manure, mucuna, lablab, shemp, stable]; fract_carb=[0.2, 0.3, 0.54, 0.57, 0.45, 0]; fract_cell=[0.7, 0.3, 0.37, 0.37, 0.47, 0.1]; fract_lign=[0.1, 0.4, 0.09, 0.06, 0.08, 0.9]; wfpsN2N2O_x=[22, 88]; wfpsN2N2O_y=[0.1, 1]; oc=[0, 0, 0, 0, 0, 0, 0, 0, 0, 0, 0]
        SoilOrganicMatter: RootCN=40; RootWt=0; SoilCN=12.5; EnrACoeff=7.4; EnrBCoeff=0.2; OCUnits=Total
          Thickness  OC  FBiom  FInert
          150        0   0.025  0.4
          150        0   0.02   0.6
          300        0   0.015  0.8
          300        0   0.01   0.9
          300        0   0.01   0.95
          300        0   0.01   0.95
          300        0   0.01   0.95
          300        0   0.01   0.95
          300        0   0.01   0.95
          300        0   0.01   0.95
          300        0   0.01   0.95
        Analysis: Thickness=[150, 150, 300, 300, 300, 300, 300, 300, 300, 300, 300]; PH=[8.4, 8.8, 9, 9.2, 9.2, 9.1, 9, 9, 8.9, 8.9, 8.9]; PHUnits=Water; BoronUnits=HotWater
      Report: EventNames=[Clock].DoReport
        VariableNames:
          [Soil].SoilWater.dlayer as dlayer
          [Soil].SoilWater.sat_dep as sat_dep
          [Soil].SoilWater.dul_dep as dul_dep
          [Soil].SoilWater.ll15_dep as ll15_dep
          [Soil].SoilWater.air_dry_dep as air_dry_dep
          [Clock].Today
          [Weather].Rain as rain
          [Soil].SoilWater.sw_dep as sw_dep
          [Soil].SoilWater.flux as flux
          [Soil].SoilWater.drain as drain
          [Soil].SoilWater.runoff as runoff
          [Soil].SoilWater.es as es
      SurfaceOrganicMatter: PondActive=no; ReportAdditions=no; ReportRemovals=no; PoolName=wheat_stubble; type=wheat; mass=0; standing_fraction=0; cpr=0; cnr=80; CriticalResidueWeight=2000; OptimumDecompTemp=20; MaxCumulativeEOS=20; CNRatioDecompCoeff=0.277; CNRatioDecompThreshold=25; TotalLeachRain=25; MinRainToLeach=10; CriticalMinimumOrganicC=0.004; DefaultCPRatio=0; DefaultStandingFraction=0; StandingExtinctCoeff=0.5; FractionFaecesAdded=0.5
        Pools:
          {PoolName=wheat_stubble, ResidueType=wheat, Mass=0, CNRatio=80, CPRatio=0, StandingFraction=0}
        ResidueTypes ResidueTypesList: LoadFromResource=ResidueTypes
        TillageTypes TillageTypesList
      MicroClimate: air_pressure=1010; soil_emissivity=0.96; sun_angle=15; soil_heat_flux_fraction=0.4; night_interception_fraction=0.5; windspeed_default=3; refheight=2; albedo=0.15; emissivity=0.96; gsmax=0.01; r50=200; a_interception=0; b_interception=1; c_interception=0; d_interception=0; soil_albedo=0.23
  Simulation Unsaturated_Flow_Only: Area=0; Slope=0
    Weather: FileName=Unsaturated Flow Only.met
    Clock: StartDate=1940-01-01; EndDate=1950-12-31
    Summary summaryfile
    Zone paddock: Area=1; Slope=0
      Soil: SoilType=Black Vertosol; LocalName=Waco; Site=Jimbour; NearestTown=Jimbour, Q 4352; Region=South East Queensland; NaturalVegetation=Grassland, mainly Qld bluegrass; Latitude=0; Longitude=0
        Sample Soil sample: NO3Units=ppm; NH4Units=ppm; SWUnits=Volumetric; OCUnits=Total; PHUnits=Water
          Thickness  NO3  NH4  SW
          150        0    0    0.54
          150        0    0    0.53
          300        0    0    0.29
          300        0    0    0.54
          300        0    0    0.3
          300        0    0    0.5
          300        0    0    0.32
          300        0    0    0.48
          300        0    0    0.34
          300        0    0    0.46
          300        0    0    0.36
        Water: same as Saturated_Flow_Only.paddock.Soil.Water
        SoilWater: SummerDate=1-Nov; WinterDate=1-Apr; DiffusConst=40; DiffusSlope=16; Salb=0.13; CN2Bare=1; min_crit_temp=5; max_crit_temp=35; max_albedo=0.23; A_to_evap_fact=0.44; canopy_eos_coef=1.7; sw_top_crit=0.9; sumes1_max=100; sumes2_max=25; solute_flow_eff=[1]; solute_flux_eff=[1]; gravity_gradient=2E-05; specific_bd=2.65; hydrol_effective_depth=450; immobile_solutes=[NH4]; canopy_fact=[1, 1, 0, 0]; canopy_fact_height=[0, 600, 1800, 30000]; canopy_fact_default=0.5; act_evap_method=ritchie; irrigation_will_runoff=false; irrigation_layer=1
          zero: residueinterception, SummerU, SummerCona, WinterU, WinterCona, CNRed, CNCov, slope, discharge_width, catchment_area, max_pond
          Thickness  SWCON  KLAT
          150        0      0
          150        0      0
          300        0      0
          300        0      0
          300        0      0
          300        0      0
          300        0      0
          300        0      0
          300        0      0
          300        0      0
          300        0      0
          mobile_solutes=[NO3, urea, cl, br, org_n, org_c_pool1, org_c_pool2, org_c_pool3]
        SoilNitrogen: same as Saturated_Flow_Only.paddock.Soil.SoilNitrogen
        SoilOrganicMatter: same as Saturated_Flow_Only.paddock.Soil.SoilOrganicMatter
        Analysis: Thickness=[150, 150, 300, 300, 300, 300, 300, 300, 300, 300, 300]; PH=[8.4, 8.8, 9, 9.2, 9.2, 9.1, 9, 9, 8.9, 8.9, 8.9]; PHUnits=Water; BoronUnits=HotWater
      Report: EventNames=[Clock].DoReport
        VariableNames:
          [Soil].SoilWater.dlayer as dlayer
          [Soil].SoilWater.sat_dep as sat_dep
          [Soil].SoilWater.dul_dep as dul_dep
          [Soil].SoilWater.ll15_dep as ll15_dep
          [Soil].SoilWater.air_dry_dep as air_dry_dep
          [Clock].Today
          [Weather].Rain as rain
          [Soil].SoilWater.sw_dep as sw_dep
          [Soil].SoilWater.flow as flow
          [Soil].SoilWater.drain as drain
          [Soil].SoilWater.runoff as runoff
          [Soil].SoilWater.es as es
      SurfaceOrganicMatter: same as Saturated_Flow_Only.paddock.SurfaceOrganicMatter
      MicroClimate: same as Saturated_Flow_Only.paddock.MicroClimate
  Simulation Runoff_Only: Area=0; Slope=0
    Weather: FileName=Runoff Only.met
    Clock: StartDate=1940-01-01; EndDate=1950-12-31
    Summary summaryfile
    Zone paddock: Area=1; Slope=0
      Soil: SoilType=Black Vertosol; LocalName=Waco; Site=Jimbour; NearestTown=Jimbour, Q 4352; Region=South East Queensland; NaturalVegetation=Grassland, mainly Qld bluegrass; Latitude=0; Longitude=0
        Sample Soil sample: NO3Units=ppm; NH4Units=ppm; SWUnits=Volumetric; OCUnits=Total; PHUnits=Water
          Thickness  NO3  NH4  SW
          150        0    0    0.59
          150        0    0    0.58
          300        0    0    0.29
          300        0    0    0.29
          300        0    0    0.3
          300        0    0    0.31
          300        0    0    0.32
          300        0    0    0.33
          300        0    0    0.34
          300        0    0    0.35
          300        0    0    0.36
        Water: same as Saturated_Flow_Only.paddock.Soil.Water
        SoilWater: SummerDate=1-Nov; WinterDate=1-Apr; Salb=0.13; CN2Bare=73; min_crit_temp=5; max_crit_temp=35; max_albedo=0.23; A_to_evap_fact=0.44; canopy_eos_coef=1.7; sw_top_crit=0.9; sumes1_max=100; sumes2_max=25; solute_flow_eff=[1]; solute_flux_eff=[1]; gravity_gradient=2E-05; specific_bd=2.65; hydrol_effective_depth=450; immobile_solutes=[NH4]; canopy_fact=[1, 1, 0, 0]; canopy_fact_height=[0, 600, 1800, 30000]; canopy_fact_default=0.5; act_evap_method=ritchie; irrigation_will_runoff=false; irrigation_layer=1
          zero: residueinterception, SummerU, SummerCona, WinterU, WinterCona, DiffusConst, DiffusSlope, CNRed, CNCov, slope, discharge_width, catchment_area, max_pond
          Thickness  SWCON  KLAT
          150        0      0
          150        0      0
          300        0      0
          300        0      0
          300        0      0
          300        0      0
          300        0      0
          300        0      0
          300        0      0
          300        0      0
          300        0      0
          mobile_solutes=[NO3, urea, cl, br, org_n, org_c_pool1, org_c_pool2, org_c_pool3]
        SoilNitrogen: same as Saturated_Flow_Only.paddock.Soil.SoilNitrogen
        SoilOrganicMatter: same as Saturated_Flow_Only.paddock.Soil.SoilOrganicMatter
        Analysis: Thickness=[150, 150, 300, 300, 300, 300, 300, 300, 300, 300, 300]; PH=[8.4, 8.8, 9, 9.2, 9.2, 9.1, 9, 9, 8.9, 8.9, 8.9]; PHUnits=Water; BoronUnits=HotWater
      Report: EventNames=[Clock].DoReport
        VariableNames:
          [Clock].Today
          [Weather].Rain as rain
          [Soil].SoilWater.runoff as runoff
          [Soil].SoilWater.dlayer as dlayer
          [Soil].SoilWater.sat_dep as sat_dep
          [Soil].SoilWater.dul_dep as dul_dep
          [Soil].SoilWater.ll15_dep as ll15_dep
          [Soil].SoilWater.air_dry_dep as air_dry_dep
          [Soil].SoilWater.sw_dep as sw_dep
          [Soil].SoilWater.flux as flux
          [Soil].SoilWater.flow as flow
          [Soil].SoilWater.drain as drain
          [Soil].SoilWater.es as es
          [Soil].SoilWater.infiltration as infiltration
      SurfaceOrganicMatter: same as Saturated_Flow_Only.paddock.SurfaceOrganicMatter
      MicroClimate: same as Saturated_Flow_Only.paddock.MicroClimate
  Simulation Soil_Evaporation_Only: Area=0; Slope=0
    Weather: FileName=Soil Evaporation Only.met
    Clock: StartDate=1940-01-01; EndDate=1941-01-01
    Summary summaryfile
    Zone paddock: Area=1; Slope=0
      Manager AvgTempCalculation
        avgTemp = 24.95
```csharp
using System;
using Models.Core;
using Models.PMF;
using Models.PMF.OldPlant;
namespace Models
{
	[Serializable]
	[System.Xml.Serialization.XmlInclude(typeof(Model))]
	public class Script : Model
	{
		public double avgTemp{get; set;}
		
		[Link] Clock Clock;
		[Link] Weather Met;
		[EventSubscribe("DoManagement")]
		private void OnDoManagement(object sender, EventArgs e)
		{
			avgTemp = (Met.MaxT + Met.MinT)/2;
			/*	
			avgTemp = (maxt + mint)/2
			*/
		}
	}
}
```
      Soil: SoilType=Black Vertosol; LocalName=Waco; Site=Jimbour; NearestTown=Jimbour, Q 4352; Region=South East Queensland; NaturalVegetation=Grassland, mainly Qld bluegrass; Latitude=0; Longitude=0
        Sample Soil sample: same as Saturated_Flow_Only.paddock.Soil.Soil sample
        Water: same as Saturated_Flow_Only.paddock.Soil.Water
        SoilWater: SummerDate=1-Nov; SummerU=6; SummerCona=3.5; WinterDate=1-Apr; WinterU=5; WinterCona=2.5; Salb=0.13; CN2Bare=1; min_crit_temp=5; max_crit_temp=35; max_albedo=0.23; A_to_evap_fact=0.44; canopy_eos_coef=1.7; sw_top_crit=0.9; sumes1_max=100; sumes2_max=25; solute_flow_eff=[1]; solute_flux_eff=[1]; gravity_gradient=2E-05; specific_bd=2.65; hydrol_effective_depth=450; immobile_solutes=[NH4]; canopy_fact=[1, 1, 0, 0]; canopy_fact_height=[0, 600, 1800, 30000]; canopy_fact_default=0.5; act_evap_method=ritchie; irrigation_will_runoff=false; irrigation_layer=1
          zero: residueinterception, DiffusConst, DiffusSlope, CNRed, CNCov, slope, discharge_width, catchment_area, max_pond
          Thickness  SWCON  KLAT
          150        0      0
          150        0      0
          300        0      0
          300        0      0
          300        0      0
          300        0      0
          300        0      0
          300        0      0
          300        0      0
          300        0      0
          300        0      0
          mobile_solutes=[NO3, urea, cl, br, org_n, org_c_pool1, org_c_pool2, org_c_pool3]
        SoilNitrogen: same as Saturated_Flow_Only.paddock.Soil.SoilNitrogen
        SoilOrganicMatter: same as Saturated_Flow_Only.paddock.Soil.SoilOrganicMatter
        Analysis: Thickness=[150, 150, 300, 300, 300, 300, 300, 300, 300, 300, 300]; PH=[8.4, 8.8, 9, 9.2, 9.2, 9.1, 9, 9, 8.9, 8.9, 8.9]; PHUnits=Water; BoronUnits=HotWater
      Report: EventNames=[Clock].DoReport
        VariableNames:
          [Soil].SoilWater.dlayer as dlayer
          [Soil].SoilWater.sat_dep as sat_dep
          [Soil].SoilWater.dul_dep as dul_dep
          [Soil].SoilWater.sw_dep as sw_dep
          [Soil].SoilWater.ll15_dep as ll15_dep
          [Soil].SoilWater.air_dry_dep as air_dry_dep
          [Soil].SoilWater.flux as flux
          [Soil].SoilWater.drain as drain
          [Soil].SoilWater.runoff as runoff
          [Weather].Rain as rain
          [Clock].Today.DayOfYear as day
          [Clock].Today
          [Soil].SoilWater.u as u
          [Soil].SoilWater.cona as cona
          [Soil].SoilWater.t as t
          [Soil].SoilWater.es as es
          [Soil].SoilWater.eo as eo
          [Soil].SoilWater.eos as eos
          [Soil].SoilWater.sw_dep[1] as sw_top
          [Weather].Radn as radn
          [AvgTempCalculation].Script.avgTemp as avgTemp
      SurfaceOrganicMatter: same as Saturated_Flow_Only.paddock.SurfaceOrganicMatter
      MicroClimate: same as Saturated_Flow_Only.paddock.MicroClimate
  Simulation Ponding_Only: Area=0; Slope=0
    Weather: FileName=Ponding Only.met
    Clock: StartDate=1940-01-01; EndDate=1940-03-02
    Summary summaryfile
    Zone paddock: Area=1; Slope=0
      Soil: SoilType=Black Vertosol; LocalName=Waco; Site=Jimbour; NearestTown=Jimbour, Q 4352; Region=South East Queensland; NaturalVegetation=Grassland, mainly Qld bluegrass; Latitude=0; Longitude=0
        Sample Soil sample: NO3Units=ppm; NH4Units=ppm; SWUnits=Volumetric; OCUnits=Total; PHUnits=Water
          Thickness  NO3  NH4  SW
          150        0    0    0
          150        0    0    0
          300        0    0    0
          300        0    0    0
          300        0    0    0
          300        0    0    0
          300        0    0    0
          300        0    0    0
          300        0    0    0
          300        0    0    0
          300        0    0    0
        Water
          Thickness  BD    AirDry  LL15  DUL   SAT   KS
          150        1.02  0.15    0.29  0.54  0.59  1
          150        1.03  0.26    0.29  0.53  0.58  24
          300        1.02  0.29    0.29  0.54  0.59  24
          300        1.02  0.29    0.29  0.54  0.58  24
          300        1.06  0.3     0.3   0.52  0.57  24
          300        1.11  0.31    0.31  0.5   0.55  24
          300        1.12  0.32    0.32  0.5   0.55  24
          300        1.15  0.33    0.33  0.48  0.53  24
          300        1.18  0.34    0.34  0.47  0.52  24
          300        1.2   0.35    0.35  0.46  0.51  24
          300        1.25  0.36    0.36  0.44  0.49  24
        SoilWater: SummerDate=1-Nov; WinterDate=1-Apr; Salb=0.13; CN2Bare=1; max_pond=300; min_crit_temp=5; max_crit_temp=35; max_albedo=0.23; A_to_evap_fact=0.44; canopy_eos_coef=1.7; sw_top_crit=0.9; sumes1_max=100; sumes2_max=25; solute_flow_eff=[1]; solute_flux_eff=[1]; gravity_gradient=2E-05; specific_bd=2.65; hydrol_effective_depth=450; immobile_solutes=[NH4]; canopy_fact=[1, 1, 0, 0]; canopy_fact_height=[0, 600, 1800, 30000]; canopy_fact_default=0.5; act_evap_method=ritchie; irrigation_will_runoff=false; irrigation_layer=1
          zero: residueinterception, SummerU, SummerCona, WinterU, WinterCona, DiffusConst, DiffusSlope, CNRed, CNCov, slope, discharge_width, catchment_area
          Thickness  SWCON  KLAT
          150        0      0
          150        0      0
          300        0      0
          300        0      0
          300        0      0
          300        0      0
          300        0      0
          300        0      0
          300        0      0
          300        0      0
          300        0      0
          mobile_solutes=[NO3, urea, cl, br, org_n, org_c_pool1, org_c_pool2, org_c_pool3]
        SoilNitrogen: same as Saturated_Flow_Only.paddock.Soil.SoilNitrogen
        SoilOrganicMatter: same as Saturated_Flow_Only.paddock.Soil.SoilOrganicMatter
        Analysis: Thickness=[150, 150, 300, 300, 300, 300, 300, 300, 300, 300, 300]; PH=[8.4, 8.8, 9, 9.2, 9.2, 9.1, 9, 9, 8.9, 8.9, 8.9]; PHUnits=Water; BoronUnits=HotWater
      Manager calculate total_pond
        total_pond = 0
```csharp
using System;
using Models.Core;
using Models.PMF;
using Models.PMF.OldPlant;
using Models.Soils;
namespace Models
{
	[Serializable]
	[System.Xml.Serialization.XmlInclude(typeof(Model))]
	public class Script : Model
	{		
		[Link] Clock Clock;
		[Link] Soil Soil;
				
		public double total_pond {get; set;}
				

		//[EventSubscribe("Commencing")]
		//private void OnCommencing(object sender, EventArgs e)
		//{
		//	Soil.SoilWater.SetMaxPond(200); 
		//}
				
		[EventSubscribe("DoManagementCalculations")]
		private void OnDoManagementCalculations(object sender, EventArgs e)
		{
			total_pond = Soil.SoilWater.pond + Soil.SoilWater.pond_evap; 
		}
	}
}
```
      Report: EventNames=[Clock].DoReport
        VariableNames:
          [Soil].SoilWater.dlayer as dlayer
          [Soil].SoilWater.sat_dep as sat_dep
          [Soil].SoilWater.dul_dep as dul_dep
          [Soil].SoilWater.ll15_dep as ll15_dep
          [Soil].SoilWater.air_dry_dep as air_dry_dep
          [Clock].Today
          [Weather].Rain as rain
          [Soil].SoilWater.pond_evap as pond_evap
          [Soil].SoilWater.pond as pond
          [calculate total_pond].Script.total_pond as total_pond
          [Soil].SoilWater.runoff as runoff
          [Soil].SoilWater.es as es
          [Soil].SoilWater.drain as drain
          [Soil].SoilWater.flux as flux
          [Soil].SoilWater.flow as flow
          [Soil].SoilWater.sw_dep as sw_dep
      SurfaceOrganicMatter: same as Saturated_Flow_Only.paddock.SurfaceOrganicMatter
      MicroClimate: same as Saturated_Flow_Only.paddock.MicroClimate
  Simulation Ponding_with_Soil_Evap: Area=0; Slope=0
    Weather: FileName=Ponding Only.met
    Clock: StartDate=1940-01-01; EndDate=1940-03-02
    Summary summaryfile
    Zone paddock: Area=1; Slope=0
      Soil: SoilType=Black Vertosol; LocalName=Waco; Site=Jimbour; NearestTown=Jimbour, Q 4352; Region=South East Queensland; NaturalVegetation=Grassland, mainly Qld bluegrass; Latitude=0; Longitude=0
        Sample Soil sample: same as Ponding_Only.paddock.Soil.Soil sample
        Water: same as Ponding_Only.paddock.Soil.Water
        SoilWater: residueinterception=0; SummerDate=1-Nov; SummerU=6; SummerCona=3.5; WinterDate=1-Apr; WinterU=5; WinterCona=2.5; DiffusConst=0; DiffusSlope=0; Salb=0.13; CN2Bare=1; CNRed=0; CNCov=0; slope=0; discharge_width=0; catchment_area=0; max_pond=300; min_crit_temp=5; max_crit_temp=35; max_albedo=0.23; A_to_evap_fact=0.44; canopy_eos_coef=1.7; sw_top_crit=0.9; sumes1_max=100; sumes2_max=25; solute_flow_eff=[1]; solute_flux_eff=[1]; gravity_gradient=2E-05; specific_bd=2.65; hydrol_effective_depth=450; immobile_solutes=[NH4]; canopy_fact=[1, 1, 0, 0]; canopy_fact_height=[0, 600, 1800, 30000]; canopy_fact_default=0.5; act_evap_method=ritchie; irrigation_will_runoff=false; irrigation_layer=1
          Thickness  SWCON  KLAT
          150        0      0
          150        0      0
          300        0      0
          300        0      0
          300        0      0
          300        0      0
          300        0      0
          300        0      0
          300        0      0
          300        0      0
          300        0      0
          mobile_solutes=[NO3, urea, cl, br, org_n, org_c_pool1, org_c_pool2, org_c_pool3]
        SoilNitrogen: same as Saturated_Flow_Only.paddock.Soil.SoilNitrogen
        SoilOrganicMatter: same as Saturated_Flow_Only.paddock.Soil.SoilOrganicMatter
        Analysis: Thickness=[150, 150, 300, 300, 300, 300, 300, 300, 300, 300, 300]; PH=[8.4, 8.8, 9, 9.2, 9.2, 9.1, 9, 9, 8.9, 8.9, 8.9]; PHUnits=Water; BoronUnits=HotWater
      Manager calculate total_pond
        total_pond = 0
```csharp
using System;
using Models.Core;
using Models.PMF;
using Models.PMF.OldPlant;
using Models.Soils;
namespace Models
{
	[Serializable]
	[System.Xml.Serialization.XmlInclude(typeof(Model))]
	public class Script : Model
	{		
		[Link] Clock Clock;
		[Link] Soil Soil;
				
		public double total_pond {get; set;}
				
		[EventSubscribe("DoManagementCalculations")]
		private void OnDoManagementCalculations(object sender, EventArgs e)
		{
			total_pond = Soil.SoilWater.pond + Soil.SoilWater.pond_evap; 
		}
	}
}
```
      Report: EventNames=[Clock].DoReport
        VariableNames:
          [Soil].SoilWater.dlayer as dlayer
          [Soil].SoilWater.sat_dep as sat_dep
          [Soil].SoilWater.dul_dep as dul_dep
          [Soil].SoilWater.ll15_dep as ll15_dep
          [Soil].SoilWater.air_dry_dep as air_dry_dep
          [Clock].Today
          [Weather].Rain as rain
          [Soil].SoilWater.eos as eos
          [Soil].SoilWater.es as es
          [Soil].SoilWater.pond_evap as pond_evap
          [Soil].SoilWater.pond as pond
          [calculate total_pond].Script.total_pond as total_pond
          [Soil].SoilWater.runoff as runoff
          [Soil].SoilWater.drain as drain
          [Soil].SoilWater.flux as flux
          [Soil].SoilWater.flow as flow
          [Soil].SoilWater.sw_dep as sw_dep
      SurfaceOrganicMatter: PoolName=wheat_stubble; type=wheat; mass=0; standing_fraction=0; cpr=0; cnr=80; CriticalResidueWeight=2000; OptimumDecompTemp=20; MaxCumulativeEOS=20; CNRatioDecompCoeff=0.277; CNRatioDecompThreshold=25; TotalLeachRain=25; MinRainToLeach=10; CriticalMinimumOrganicC=0.004; DefaultCPRatio=0; DefaultStandingFraction=0; StandingExtinctCoeff=0.5; FractionFaecesAdded=0.5
        Pools:
          {PoolName=wheat_stubble, ResidueType=wheat, Mass=0, CNRatio=80, CPRatio=0, StandingFraction=0}
        ResidueTypes ResidueTypesList: LoadFromResource=ResidueTypes
        TillageTypes TillageTypesList
      MicroClimate: same as Saturated_Flow_Only.paddock.MicroClimate
  Memo Differences
    Ponding_with_Soil_Evap I changed from using MWCON to cause the pond to using KS. The new soilwater module does not support MWCON anymore. This is the reason that flux has 1 mm lost each day. Because you had to set KS to 1 in the top layer to cause the ponding. So that is maxiumum 1mm per day that can pass through. You can have less.

    Ponding_with_Soil_Evap does not match soilwat output because soilwat has a bug in it, where soil evaporation still occurs even when a pond is present. Which is clearly wrong. So this new soilwater fixes that problem. Although still may need some tweaking. The upshot is that even though they are different. You can ignore the difference for this particular simulation because it is due to a bug being corrected.

    WaterTable_Calculation does not match the soilwat output but matches the existing SoilWater output. nb. I think there is a bug in the WaterTable calculation. But this bug is also in SoilWat. So ignore it for now and fix it later. See the //TODO: in the Calc_DepthToWaterTable() for more information about it.

    Lateral Outflow does not work but niether does Lateral Outflow for exsiting SoilWater

    Runoff_with_SurfaceOM does not match the soilwat output. The surfaceom_cover does not degrade over time. However the existing SoilWater has the same issue so the outputs match.

    Runoff_with_Irrigation does not match the soilwat output. This is a new feature. You have to specify will_runoff=1 inorder to active runoff with irrigation. Clearly it is not working however it is also not working in the existing soilwater so they match. THe irrigations don't cause any runoff at the momement.

    Subsurface_Irrigion does not work either. This is another new feature. Once again it does not work in the existing soilwater either. No one will be using these new features so it does not matter if they don't work.

    Solute_Unsaturated_Flow_Only does match but the new soilwater goes to 3 decimal places whereas the original soilwat only went to 1. When you round the new soilwater outputs they seem to be correct. However the total NO3 in the soil seems to be more wrong. This maybe caused by the small rounding differences adding up over time. Elizabeth Myer said that someone she new tried to to a detailed Nitrogen balance using Apsim and he could not do it due to these small roundings in the flow_no3 etc. So perhaps the fact that the new soilwater does not match is a good thing. Perhaps it is more accurate and perhaps now a Nitrogen balance using this new soilwater module will actually balance out.

    Solute_Irrigation the new Irrigation module in ApsimX does not support applying irrigations with solutes. We will need to add an Apply method that contains the extra solute parameters eg. Irrigation.Apply(Amount, NO3Amount, NH4Amount).
  Simulation WaterTable_Calculation: Area=0; Slope=0
    Weather: FileName=WaterTable Only.met
    Clock: StartDate=1940-01-01; EndDate=1940-03-02
    Summary summaryfile
    Zone paddock: Area=1; Slope=0
      Soil: SoilType=Black Vertosol; LocalName=Waco; Site=Jimbour; NearestTown=Jimbour, Q 4352; Region=South East Queensland; NaturalVegetation=Grassland, mainly Qld bluegrass; Latitude=0; Longitude=0
        Sample Soil sample: NO3Units=ppm; NH4Units=ppm; SWUnits=Volumetric; OCUnits=Total; PHUnits=Water
          Thickness  NO3  NH4  SW
          150        0    0    0
          150        0    0    0
          300        0    0    0.79
          300        0    0    0.79
          300        0    0    0.79
          300        0    0    0.79
          300        0    0    0.6
          300        0    0    0.6
          300        0    0    0.6
          300        0    0    0.6
          300        0    0    0.6
        Water
          Thickness  BD    AirDry  LL15  DUL  SAT
          150        1.02  0.15    0.29  0.5  0.8
          150        1.03  0.26    0.29  0.5  0.8
          300        1.02  0.29    0.29  0.5  0.8
          300        1.02  0.29    0.29  0.5  0.8
          300        1.06  0.3     0.3   0.5  0.8
          300        1.11  0.31    0.31  0.5  0.8
          300        1.12  0.32    0.32  0.5  0.8
          300        1.15  0.33    0.33  0.5  0.8
          300        1.18  0.34    0.34  0.5  0.8
          300        1.2   0.35    0.35  0.5  0.8
          300        1.25  0.36    0.36  0.5  0.8
        SoilWater: SummerDate=1-Nov; WinterDate=1-Apr; Salb=0.13; CN2Bare=1; min_crit_temp=5; max_crit_temp=35; max_albedo=0.23; A_to_evap_fact=0.44; canopy_eos_coef=1.7; sw_top_crit=0.9; sumes1_max=100; sumes2_max=25; solute_flow_eff=[1]; solute_flux_eff=[1]; gravity_gradient=2E-05; specific_bd=2.65; hydrol_effective_depth=450; immobile_solutes=[NH4]; canopy_fact=[1, 1, 0, 0]; canopy_fact_height=[0, 600, 1800, 30000]; canopy_fact_default=0.5; act_evap_method=ritchie; irrigation_will_runoff=false; irrigation_layer=1
          zero: residueinterception, SummerU, SummerCona, WinterU, WinterCona, DiffusConst, DiffusSlope, CNRed, CNCov, slope, discharge_width, catchment_area, max_pond
          Thickness  SWCON  KLAT
          150        0      0
          150        0      0
          300        0.102  0
          300        0.103  0
          300        0.104  0
          300        0.105  0
          300        0.106  0
          300        0.107  0
          300        0.108  0
          300        0.109  0
          300        0      0
          mobile_solutes=[NO3, urea, cl, br, org_n, org_c_pool1, org_c_pool2, org_c_pool3]
        SoilNitrogen: same as Saturated_Flow_Only.paddock.Soil.SoilNitrogen
        SoilOrganicMatter: same as Saturated_Flow_Only.paddock.Soil.SoilOrganicMatter
        Analysis: Thickness=[150, 150, 300, 300, 300, 300, 300, 300, 300, 300, 300]; PH=[8.4, 8.8, 9, 9.2, 9.2, 9.1, 9, 9, 8.9, 8.9, 8.9]; PHUnits=Water; BoronUnits=HotWater
      Report: EventNames=[Clock].DoReport
        VariableNames:
          [Soil].SoilWater.dlayer as dlayer
          [Soil].SoilWater.sat_dep as sat_dep
          [Soil].SoilWater.dul_dep as dul_dep
          [Soil].SoilWater.ll15_dep as ll15_dep
          [Soil].SoilWater.air_dry_dep as air_dry_dep
          [Clock].Today
          [Weather].Rain as rain
          [Soil].SoilWater.runoff as runoff
          [Soil].SoilWater.drain as drain
          [Soil].SoilWater.WaterTable as water_table
          [Soil].SoilWater.sw_dep as sw_dep
          [Soil].SoilWater.es as es
          [Soil].SoilWater.flux as flux
          [Soil].SoilWater.flow as flow
      SurfaceOrganicMatter: same as Ponding_with_Soil_Evap.paddock.SurfaceOrganicMatter
      MicroClimate: same as Saturated_Flow_Only.paddock.MicroClimate
  Simulation Lateral_Outflow_Only: Area=0; Slope=0
    Weather: FileName=Lateral Outflow Only.met
    Clock: StartDate=1940-01-01; EndDate=1940-03-02
    Summary summaryfile
    Zone paddock: Area=1; Slope=0
      Soil: SoilType=Black Vertosol; LocalName=Waco; Site=Jimbour; NearestTown=Jimbour, Q 4352; Region=South East Queensland; NaturalVegetation=Grassland, mainly Qld bluegrass; Latitude=0; Longitude=0
        Sample Soil sample: same as Saturated_Flow_Only.paddock.Soil.Soil sample
        Water: same as Saturated_Flow_Only.paddock.Soil.Water
        SoilWater: SummerDate=1-Nov; WinterDate=1-Apr; Salb=0.13; CN2Bare=1; min_crit_temp=5; max_crit_temp=35; max_albedo=0.23; A_to_evap_fact=0.44; canopy_eos_coef=1.7; sw_top_crit=0.9; sumes1_max=100; sumes2_max=25; solute_flow_eff=[1]; solute_flux_eff=[1]; gravity_gradient=2E-05; specific_bd=2.65; hydrol_effective_depth=450; immobile_solutes=[NH4]; canopy_fact=[1, 1, 0, 0]; canopy_fact_height=[0, 600, 1800, 30000]; canopy_fact_default=0.5; act_evap_method=ritchie; irrigation_will_runoff=false; irrigation_layer=1
          zero: residueinterception, SummerU, SummerCona, WinterU, WinterCona, DiffusConst, DiffusSlope, CNRed, CNCov, slope, discharge_width, catchment_area, max_pond
          Thickness  SWCON  KLAT
          150        0      0
          150        0      0
          300        0      0
          300        0      0
          300        0      0
          300        0      0
          300        0      0
          300        0      0
          300        0      0
          300        0      0
          300        0      0
          mobile_solutes=[NO3, urea, cl, br, org_n, org_c_pool1, org_c_pool2, org_c_pool3]
        SoilNitrogen: same as Saturated_Flow_Only.paddock.Soil.SoilNitrogen
        SoilOrganicMatter: same as Saturated_Flow_Only.paddock.Soil.SoilOrganicMatter
        Analysis: Thickness=[150, 150, 300, 300, 300, 300, 300, 300, 300, 300, 300]; PH=[8.4, 8.8, 9, 9.2, 9.2, 9.1, 9, 9, 8.9, 8.9, 8.9]; PHUnits=Water; BoronUnits=HotWater
      Report: EventNames=[Clock].DoReport
        VariableNames:
          [Soil].SoilWater.dlayer as dlayer
          [Soil].SoilWater.sat_dep as sat_dep
          [Soil].SoilWater.dul_dep as dul_dep
          [Soil].SoilWater.ll15_dep as ll15_dep
          [Soil].SoilWater.air_dry_dep as air_dry_dep
          [Clock].Today
          [Weather].Rain as rain
          [Soil].SoilWater.outflow_lat as outflow_lat
          [Soil].SoilWater.sw_dep as sw_dep
          [Soil].SoilWater.flux as flux
          [Soil].SoilWater.drain as drain
          [Soil].SoilWater.runoff as runoff
          [Soil].SoilWater.es as es
      SurfaceOrganicMatter: same as Ponding_with_Soil_Evap.paddock.SurfaceOrganicMatter
      MicroClimate: same as Saturated_Flow_Only.paddock.MicroClimate
  Simulation Soil_Evaporation_with_SurfaceOM: Area=0; Slope=0
    Weather: FileName=Soil Evaporation with SurfaceOM.met
    Clock: StartDate=1940-01-01; EndDate=1941-01-01
    Summary summaryfile
    Zone paddock: Area=1; Slope=0
      Manager AvgTempCalculation: same as Soil_Evaporation_Only.paddock.AvgTempCalculation
      Soil: same as Soil_Evaporation_Only.paddock.Soil
      SurfaceOrganicMatter SurfaceOM: PoolName=wheat_stubble; type=wheat; mass=1000; standing_fraction=0; cnr=80; CriticalResidueWeight=2000; OptimumDecompTemp=20; MaxCumulativeEOS=20; CNRatioDecompCoeff=0.277; CNRatioDecompThreshold=25; TotalLeachRain=25; MinRainToLeach=10; CriticalMinimumOrganicC=0.004; DefaultCPRatio=0; DefaultStandingFraction=0; StandingExtinctCoeff=0.5; FractionFaecesAdded=0.5
        Pools:
          {PoolName=wheat_stubble, ResidueType=wheat, Mass=1000, CNRatio=80, StandingFraction=0}
        ResidueTypes ResidueTypesList: LoadFromResource=ResidueTypes
        TillageTypes TillageTypesList
      Report: EventNames=[Clock].DoReport
        VariableNames:
          [Soil].SoilWater.dlayer as dlayer
          [Soil].SoilWater.sat_dep as sat_dep
          [Soil].SoilWater.dul_dep as dul_dep
          [Soil].SoilWater.sw_dep as sw_dep
          [Soil].SoilWater.ll15_dep as ll15_dep
          [Soil].SoilWater.air_dry_dep as air_dry_dep
          [Soil].SoilWater.flux as flux
          [Soil].SoilWater.drain as drain
          [Soil].SoilWater.runoff as runoff
          [Weather].Rain as rain
          [Clock].Today.DayOfYear as day
          [Clock].Today
          [Soil].SoilWater.u as u
          [Soil].SoilWater.cona as cona
          [Soil].SoilWater.t as t
          [SurfaceOrganicMatter].surfaceom_cover as surfaceom_cover
          [Soil].SoilWater.es as es
          [Soil].SoilWater.eo as eo
          [Soil].SoilWater.eos as eos
          [Soil].SoilWater.sw_dep[1] as sw_top
          [Weather].Radn as radn
          [AvgTempCalculation].Script.avgTemp as avgTemp
      MicroClimate: same as Saturated_Flow_Only.paddock.MicroClimate
  Simulation Runoff_with_SurfaceOM: Area=0; Slope=0
    Weather: FileName=Runoff with SurfaceOM.met
    Clock: StartDate=1940-01-01; EndDate=1950-12-31
    Summary summaryfile
    Zone paddock: Area=1; Slope=0
      Soil: SoilType=Black Vertosol; LocalName=Waco; Site=Jimbour; NearestTown=Jimbour, Q 4352; Region=South East Queensland; NaturalVegetation=Grassland, mainly Qld bluegrass; Latitude=0; Longitude=0
        Sample Soil sample: same as Runoff_Only.paddock.Soil.Soil sample
        Water: same as Saturated_Flow_Only.paddock.Soil.Water
        SoilWater: SummerDate=1-Nov; WinterDate=1-Apr; Salb=0.13; CN2Bare=73; CNRed=20; CNCov=0.8; min_crit_temp=5; max_crit_temp=35; max_albedo=0.23; A_to_evap_fact=0.44; canopy_eos_coef=1.7; sw_top_crit=0.9; sumes1_max=100; sumes2_max=25; solute_flow_eff=[1]; solute_flux_eff=[1]; gravity_gradient=2E-05; specific_bd=2.65; hydrol_effective_depth=450; immobile_solutes=[NH4]; canopy_fact=[1, 1, 0, 0]; canopy_fact_height=[0, 600, 1800, 30000]; canopy_fact_default=0.5; act_evap_method=ritchie; irrigation_will_runoff=false; irrigation_layer=1
          zero: residueinterception, SummerU, SummerCona, WinterU, WinterCona, DiffusConst, DiffusSlope, slope, discharge_width, catchment_area, max_pond
          Thickness  SWCON  KLAT
          150        0      0
          150        0      0
          300        0      0
          300        0      0
          300        0      0
          300        0      0
          300        0      0
          300        0      0
          300        0      0
          300        0      0
          300        0      0
          mobile_solutes=[NO3, urea, cl, br, org_n, org_c_pool1, org_c_pool2, org_c_pool3]
        SoilNitrogen: same as Saturated_Flow_Only.paddock.Soil.SoilNitrogen
        SoilOrganicMatter: same as Saturated_Flow_Only.paddock.Soil.SoilOrganicMatter
        Analysis: Thickness=[150, 150, 300, 300, 300, 300, 300, 300, 300, 300, 300]; PH=[8.4, 8.8, 9, 9.2, 9.2, 9.1, 9, 9, 8.9, 8.9, 8.9]; PHUnits=Water; BoronUnits=HotWater
      SurfaceOrganicMatter SurfaceOM: PoolName=wheat_stubble; type=wheat; mass=5000; standing_fraction=0; cnr=80; CriticalResidueWeight=2000; OptimumDecompTemp=20; MaxCumulativeEOS=20; CNRatioDecompCoeff=0.277; CNRatioDecompThreshold=25; TotalLeachRain=25; MinRainToLeach=10; CriticalMinimumOrganicC=0.004; DefaultCPRatio=0; DefaultStandingFraction=0; StandingExtinctCoeff=0.5; FractionFaecesAdded=0.5
        Pools:
          {PoolName=wheat_stubble, ResidueType=wheat, Mass=5000, CNRatio=80, StandingFraction=0}
        ResidueTypes ResidueTypesList: LoadFromResource=ResidueTypes
        TillageTypes TillageTypesList
      Report: EventNames=[Clock].DoReport
        VariableNames:
          [Clock].Today
          [Weather].Rain as rain
          [Soil].SoilWater.runoff as runoff
          [SurfaceOrganicMatter].surfaceom_cover as surfaceom_cover
          [Soil].SoilWater.dlayer as dlayer
          [Soil].SoilWater.sat_dep as sat_dep
          [Soil].SoilWater.dul_dep as dul_dep
          [Soil].SoilWater.ll15_dep as ll15_dep
          [Soil].SoilWater.air_dry_dep as air_dry_dep
          [Soil].SoilWater.sw_dep as sw_dep
          [Soil].SoilWater.flux as flux
          [Soil].SoilWater.flow as flow
          [Soil].SoilWater.drain as drain
          [Soil].SoilWater.es as es
          [Soil].SoilWater.infiltration as infiltration
      MicroClimate: same as Saturated_Flow_Only.paddock.MicroClimate
  Simulation Runoff_after_Tillage_Event: Area=0; Slope=0
    Weather: FileName=Runoff after Tillage Event.met
    Clock: StartDate=1940-01-01; EndDate=1950-12-31
    Summary summaryfile
    Zone paddock: Area=1; Slope=0
      Soil: same as Runoff_Only.paddock.Soil
      Manager TillageSW
        tillage_date = 1940-01-03
        CumWater = 200
        CnRed = 15
```csharp
using System;
using Models.Core;
using Models.PMF;
using Models.PMF.OilPalm;
using Models.Soils;
using Models.SurfaceOM;

namespace Models
{ 
	[Serializable]
	[System.Xml.Serialization.XmlInclude(typeof(Model))]
	public class Script : Model
	{
		[Link] Clock Clock;
		[Link] Soil Soil;
		[Link] SurfaceOrganicMatter SurfaceOM;
		
		
		[Description("Tillage date")]
		public DateTime tillage_date {get; set;}
		
		[Description("Cumulative Water since tillage, where reduction stops")]
		[Units("mm")]
		public int CumWater {get; set;}
		
		[Description("Runoff Curve Number Reduction straight after tillage")]
		public int CnRed {get; set;}
		
		
		
       [EventSubscribe("DoManagement")]
       private void OnDoManagement(object sender, EventArgs e)
		{
		if (Clock.Today == tillage_date)
			{
				TillageType data = new TillageType();
				data.cn_rain = CumWater;
				data.cn_red = CnRed;
			   	Soil.SoilWater.Tillage(data);
	        }
        }
	}
}
```
      Report: EventNames=[Clock].DoReport
        VariableNames:
          [Clock].Today
          [Weather].Rain as rain
          [Soil].SoilWater.runoff as runoff
          [Soil].SoilWater.dlayer as dlayer
          [Soil].SoilWater.sat_dep as sat_dep
          [Soil].SoilWater.dul_dep as dul_dep
          [Soil].SoilWater.ll15_dep as ll15_dep
          [Soil].SoilWater.air_dry_dep as air_dry_dep
          [Soil].SoilWater.sw_dep as sw_dep
          [Soil].SoilWater.flux as flux
          [Soil].SoilWater.flow as flow
          [Soil].SoilWater.drain as drain
          [Soil].SoilWater.es as es
      SurfaceOrganicMatter: same as Ponding_with_Soil_Evap.paddock.SurfaceOrganicMatter
      MicroClimate: same as Saturated_Flow_Only.paddock.MicroClimate
  Simulation Runoff_with_Irrigation: Area=0; Slope=0
    Weather: FileName=Runoff with Irrigation.met
    Clock: StartDate=1940-01-01; EndDate=1950-12-31
    Summary summaryfile
    Zone paddock: Area=1; Slope=0
      Soil: same as Runoff_Only.paddock.Soil
      Irrigation
      Operations Operations Schedule
        1940-01-02  [Irrigation].Apply(10);
        1940-01-05  [Irrigation].Apply(20);
        1940-01-08  [Irrigation].Apply(50);
        1940-01-11  [Irrigation].Apply(100);
        1940-01-14  [Irrigation].Apply(250);
        1940-01-17  [Irrigation].Apply(500);
        1940-01-20  [Irrigation].Apply(1000);
        1940-01-23  [Irrigation].Apply(2000);
      Report: EventNames=[Clock].DoReport
        VariableNames:
          [Clock].Today
          [Irrigation].irrigation
          [Soil].SoilWater.runoff as runoff
          [Soil].SoilWater.dlayer as dlayer
          [Soil].SoilWater.sat_dep as sat_dep
          [Soil].SoilWater.dul_dep as dul_dep
          [Soil].SoilWater.ll15_dep as ll15_dep
          [Soil].SoilWater.air_dry_dep as air_dry_dep
          [Soil].SoilWater.sw_dep as sw_dep
          [Soil].SoilWater.flux as flux
          [Soil].SoilWater.flow as flow
          [Soil].SoilWater.drain as drain
          [Soil].SoilWater.es as es
      SurfaceOrganicMatter: same as Saturated_Flow_Only.paddock.SurfaceOrganicMatter
      MicroClimate: same as Saturated_Flow_Only.paddock.MicroClimate
  Simulation Subsurface_Irrigation: Area=0; Slope=0
    Weather: FileName=Subsurface Irrigation.met
    Clock: StartDate=1940-01-01; EndDate=1940-01-31
    Summary summaryfile
    Zone paddock: Area=1; Slope=0
      Soil: SoilType=Black Vertosol; LocalName=Waco; Site=Jimbour; NearestTown=Jimbour, Q 4352; Region=South East Queensland; NaturalVegetation=Grassland, mainly Qld bluegrass; Latitude=0; Longitude=0
        Sample Soil sample: same as Ponding_Only.paddock.Soil.Soil sample
        Water: same as Saturated_Flow_Only.paddock.Soil.Water
        SoilWater: same as Unsaturated_Flow_Only.paddock.Soil.SoilWater
        SoilNitrogen: same as Saturated_Flow_Only.paddock.Soil.SoilNitrogen
        SoilOrganicMatter: same as Saturated_Flow_Only.paddock.Soil.SoilOrganicMatter
        Analysis: Thickness=[150, 150, 300, 300, 300, 300, 300, 300, 300, 300, 300]; PH=[8.4, 8.8, 9, 9.2, 9.2, 9.1, 9, 9, 8.9, 8.9, 8.9]; PHUnits=Water; BoronUnits=HotWater
      Irrigation
      Operations Operations Schedule
        1940-01-01  [Irrigation].Apply(10);
        1940-01-02  [Irrigation].Apply(10);
        1940-01-04  [Irrigation].Apply(10);
        1940-01-06  [Irrigation].Apply(10);
        1940-01-08  [Irrigation].Apply(10);
        1940-01-10  [Irrigation].Apply(10);
        1940-01-12  [Irrigation].Apply(10);
      Manager ResetSW1
        reset_date = 1940-01-03
```csharp
using System;
using Models.Core;
using Models.PMF;
using Models.PMF.OilPalm;
using Models.Soils;
using Models.SurfaceOM;

namespace Models
{ 
	[Serializable]
	[System.Xml.Serialization.XmlInclude(typeof(Model))]
	public class Script : Model
	{
		[Link] Clock Clock;
		[Link] Soil Soil;
		[Link] SurfaceOrganicMatter SurfaceOM;
		[Description("Reset date")]
		public DateTime reset_date {get; set;}

		
       [EventSubscribe("DoManagement")]
       private void OnDoManagement(object sender, EventArgs e)
		{
		if (Clock.Today == reset_date)
		   Soil.SoilWater.Reset();
        }
	}
}
```
      Manager ResetSW2
        reset_date = 1940-01-05
        script: same as in Subsurface_Irrigation.paddock.ResetSW1
      Manager ResetSW3
        reset_date = 1940-01-07
        script: same as in Subsurface_Irrigation.paddock.ResetSW1
      Manager ResetSW4
        reset_date = 1940-01-09
        script: same as in Subsurface_Irrigation.paddock.ResetSW1
      Manager ResetSW5
        reset_date = 1940-01-11
        script: same as in Subsurface_Irrigation.paddock.ResetSW1
      Report: EventNames=[Clock].DoReport
        VariableNames:
          [Clock].Today
          [Soil].SoilWater.irrigation_layer
          [Irrigation].irrigation
          [Soil].SoilWater.dlayer as dlayer
          [Soil].SoilWater.sat_dep as sat_dep
          [Soil].SoilWater.dul_dep as dul_dep
          [Soil].SoilWater.ll15_dep as ll15_dep
          [Soil].SoilWater.air_dry_dep as air_dry_dep
          [Weather].Rain as rain
          [Soil].SoilWater.sw_dep as sw_dep
          [Soil].SoilWater.flow as flow
          [Soil].SoilWater.drain as drain
          [Soil].SoilWater.runoff as runoff
          [Soil].SoilWater.es as es
      SurfaceOrganicMatter: same as Saturated_Flow_Only.paddock.SurfaceOrganicMatter
      MicroClimate: same as Saturated_Flow_Only.paddock.MicroClimate
  Folder Solute Tests
    Simulation Solute_Saturated_Flow_Only: Area=0; Slope=0
      Weather: FileName=Solute - Saturated Flow Only.met
      Clock: StartDate=1940-01-01; EndDate=1940-03-02
      Summary summaryfile
      Zone paddock: Area=1; Slope=0
        Soil: SoilType=Black Vertosol; LocalName=Waco; Site=Jimbour; NearestTown=Jimbour, Q 4352; Region=South East Queensland; NaturalVegetation=Grassland, mainly Qld bluegrass; Latitude=0; Longitude=0
          Sample Soil sample: NO3Units=kgha; NH4Units=kgha; SWUnits=Volumetric; OCUnits=Total; PHUnits=Water
            Thickness  NO3  NH4  SW
            150        350  350  0.59
            150        250  250  0.58
            300        350  350  0.59
            300        250  250  0.58
            300        350  350  0.57
            300        250  250  0.55
            300        350  350  0.55
            300        250  250  0.53
            300        350  350  0.52
            300        250  250  0.51
            300        350  350  0.49
          Water: same as Saturated_Flow_Only.paddock.Soil.Water
          SoilWater: same as Saturated_Flow_Only.paddock.Soil.SoilWater
          SoilNitrogen: same as Saturated_Flow_Only.paddock.Soil.SoilNitrogen
          SoilOrganicMatter: same as Saturated_Flow_Only.paddock.Soil.SoilOrganicMatter
          Analysis: Thickness=[150, 150, 300, 300, 300, 300, 300, 300, 300, 300, 300]; PH=[1, 1, 1, 1, 1, 1, 1, 1, 1, 1, 1]; PHUnits=Water; BoronUnits=HotWater
        Report: EventNames=[Clock].DoReport
          VariableNames:
            [Soil].SoilWater.dlayer as dlayer
            [Soil].SoilWater.sat_dep as sat_dep
            [Soil].SoilWater.dul_dep as dul_dep
            [Soil].SoilWater.ll15_dep as ll15_dep
            [Soil].SoilWater.air_dry_dep as air_dry_dep
            [Weather].Rain as rain
            [Soil].SoilWater.sw_dep as sw_dep
            [Soil].SoilWater.flux as flux
            [Soil].SoilWater.drain as drain
            [Soil].SoilWater.runoff as runoff
            [Soil].SoilWater.es as es
            [Clock].Today
            [Soil].SoilWater.LeachNO3 as leach_no3
            [Soil].SoilWater.LeachNH4 as leach_nh4
            [Soil].SoilWater.LeachUrea as leach_urea
            [Soil].SoilNitrogen.NO3 as no3
            [Soil].SoilNitrogen.NH4 as nh4
            [Soil].SoilNitrogen.urea as urea
        SurfaceOrganicMatter: same as Ponding_with_Soil_Evap.paddock.SurfaceOrganicMatter
        MicroClimate: same as Saturated_Flow_Only.paddock.MicroClimate
    Simulation Solute_Unsaturated_Flow_Only: Area=0; Slope=0
      Weather: FileName=Solute - Unsaturated Flow Only.met
      Clock: StartDate=1940-01-01; EndDate=1950-12-31
      Summary summaryfile
      Zone paddock: Area=1; Slope=0
        Soil: SoilType=Black Vertosol; LocalName=Waco; Site=Jimbour; NearestTown=Jimbour, Q 4352; Region=South East Queensland; NaturalVegetation=Grassland, mainly Qld bluegrass; Latitude=0; Longitude=0
          Sample Soil sample: NO3Units=kgha; NH4Units=kgha; SWUnits=Volumetric; OCUnits=Total; PHUnits=Water
            Thickness  NO3  NH4  SW
            150        350  350  0.54
            150        250  250  0.53
            300        350  350  0.29
            300        250  250  0.54
            300        350  350  0.3
            300        250  250  0.5
            300        350  350  0.32
            300        250  250  0.48
            300        350  350  0.34
            300        250  250  0.46
            300        350  350  0.36
          Water: same as Saturated_Flow_Only.paddock.Soil.Water
          SoilWater: same as Unsaturated_Flow_Only.paddock.Soil.SoilWater
          SoilNitrogen: same as Saturated_Flow_Only.paddock.Soil.SoilNitrogen
          SoilOrganicMatter: same as Saturated_Flow_Only.paddock.Soil.SoilOrganicMatter
          Analysis: Thickness=[150, 150, 300, 300, 300, 300, 300, 300, 300, 300, 300]; PH=[1, 1, 1, 1, 1, 1, 1, 1, 1, 1, 1]; PHUnits=Water; BoronUnits=HotWater
        Report: EventNames=[Clock].DoReport
          VariableNames:
            [Soil].SoilWater.dlayer as dlayer
            [Soil].SoilWater.sat_dep as sat_dep
            [Soil].SoilWater.dul_dep as dul_dep
            [Soil].SoilWater.ll15_dep as ll15_dep
            [Soil].SoilWater.air_dry_dep as air_dry_dep
            [Weather].Rain as rain
            [Soil].SoilWater.sw_dep as sw_dep
            [Soil].SoilWater.flux as flux
            [Soil].SoilWater.drain as drain
            [Soil].SoilWater.runoff as runoff
            [Soil].SoilWater.es as es
            [Clock].Today
            [Soil].SoilWater.flow_no3 as flow_no3
            [Soil].SoilWater.flow_nh4 as flow_nh4
            [Soil].SoilWater.flow_urea as flow_urea
            [Soil].SoilNitrogen.NO3 as no3
            [Soil].SoilNitrogen.NH4 as nh4
            [Soil].SoilNitrogen.urea as urea
        SurfaceOrganicMatter: same as Ponding_with_Soil_Evap.paddock.SurfaceOrganicMatter
        MicroClimate: same as Saturated_Flow_Only.paddock.MicroClimate
    Simulation Solute_Irrigation: Area=0; Slope=0
      Weather: FileName=Solute - Irrigation Only.met
      Clock: StartDate=1940-01-01; EndDate=1940-06-01
      Summary summaryfile
      Zone paddock: Area=1; Slope=0
        Irrigation
        Soil: SoilType=Black Vertosol; LocalName=Waco; Site=Jimbour; NearestTown=Jimbour, Q 4352; Region=South East Queensland; NaturalVegetation=Grassland, mainly Qld bluegrass; Latitude=0; Longitude=0
          Sample Soil sample: NO3Units=ppm; NH4Units=ppm; SWUnits=Volumetric; OCUnits=Total; PHUnits=Water
            Thickness  NO3  NH4  SW
            150        0    0    0.001
            150        0    0    0.001
            300        0    0    0.001
            300        0    0    0.001
            300        0    0    0.001
            300        0    0    0.001
            300        0    0    0.001
            300        0    0    0.001
            300        0    0    0.001
            300        0    0    0.001
            300        0    0    0.001
          Water: same as Saturated_Flow_Only.paddock.Soil.Water
          SoilWater: same as Runoff_with_SurfaceOM.paddock.Soil.SoilWater
          SoilNitrogen: same as Saturated_Flow_Only.paddock.Soil.SoilNitrogen
          SoilOrganicMatter: same as Saturated_Flow_Only.paddock.Soil.SoilOrganicMatter
          Analysis: Thickness=[150, 150, 300, 300, 300, 300, 300, 300, 300, 300, 300]; PH=[1, 1, 1, 1, 1, 1, 1, 1, 1, 1, 1]; PHUnits=Water; BoronUnits=HotWater
        Operations Operations Schedule
          1940-02-01  [Irrigation].Apply(20);
          1940-03-01  [Irrigation].Apply(20);
          1940-04-01  [Irrigation].Apply(20);
        Report: EventNames=[Clock].DoReport
          VariableNames:
            [Weather].Rain as rain
            [Soil].SoilWater.runoff as runoff
            [Soil].SoilWater.dlayer as dlayer
            [Soil].SoilWater.dul_dep as dul_dep
            [Soil].SoilWater.ll15_dep as ll15_dep
            [Soil].SoilWater.air_dry_dep as air_dry_dep
            [Soil].SoilWater.flux as flux
            [Soil].SoilWater.flow as flow
            [Soil].SoilWater.drain as drain
            [Soil].SoilWater.es as es
            [Clock].Today
            [Irrigation].irrigation
            [Soil].SoilWater.sw_dep as sw_dep
            [Soil].SoilNitrogen.NO3 as no3
            [Soil].SoilNitrogen.NH4 as nh4
        SurfaceOrganicMatter: same as Ponding_with_Soil_Evap.paddock.SurfaceOrganicMatter
        MicroClimate: same as Saturated_Flow_Only.paddock.MicroClimate
  Folder Manager Set Variables
    Folder cause ExternalMassFlow Event
      Simulation WaterTable_Set_to_a_fixed_depth: Area=0; Slope=0
        Weather: FileName=WaterTable - Set to a fixed depth.met
        Clock: StartDate=1940-01-01; EndDate=1940-03-02
        Summary summaryfile
        Zone paddock: Area=1; Slope=0
          Soil: SoilType=Black Vertosol; LocalName=Waco; Site=Jimbour; NearestTown=Jimbour, Q 4352; Region=South East Queensland; NaturalVegetation=Grassland, mainly Qld bluegrass; Latitude=0; Longitude=0
            Sample Soil sample: same as Ponding_Only.paddock.Soil.Soil sample
            Water: same as WaterTable_Calculation.paddock.Soil.Water
            SoilWater: same as Lateral_Outflow_Only.paddock.Soil.SoilWater
            SoilNitrogen: same as Saturated_Flow_Only.paddock.Soil.SoilNitrogen
            SoilOrganicMatter: same as Saturated_Flow_Only.paddock.Soil.SoilOrganicMatter
            Analysis: Thickness=[150, 150, 300, 300, 300, 300, 300, 300, 300, 300, 300]; PH=[8.4, 8.8, 9, 9.2, 9.2, 9.1, 9, 9, 8.9, 8.9, 8.9]; PHUnits=Water; BoronUnits=HotWater
          Manager set water table
```csharp
using System;
using Models.Core;
using Models.PMF;
using Models.PMF.OldPlant;
using Models.Soils;
namespace Models
{
	[Serializable]
	[System.Xml.Serialization.XmlInclude(typeof(Model))]
	public class Script : Model
	{
		[Link] Clock Clock;
		[Link] Soil soil;
		
		[EventSubscribe("DoManagement")]
		private void OnDoManagement(object sender, EventArgs e)
		{
		
			soil.SoilWater.SetWaterTable(2000);
		
		
			/*
			
			'Soil Water' set water_table = 2000
			*/
		}
	}
}
```
          Report: EventNames=[Clock].DoReport
            VariableNames:
              [Soil].SoilWater.dlayer as dlayer
              [Soil].SoilWater.sat_dep as sat_dep
              [Soil].SoilWater.dul_dep as dul_dep
              [Soil].SoilWater.ll15_dep as ll15_dep
              [Soil].SoilWater.air_dry_dep as air_dry_dep
              [Clock].Today
              [Weather].Rain as rain
              [Soil].SoilWater.runoff as runoff
              [Soil].SoilWater.es as es
              [Soil].SoilWater.drain as drain
              [Soil].SoilWater.WaterTable as water_table
              [Soil].SoilWater.sw as sw
              [Soil].SoilWater.flux as flux
              [Soil].SoilWater.flow as flow
              [Soil].SoilWater.sw_dep as sw_dep
          SurfaceOrganicMatter: same as Saturated_Flow_Only.paddock.SurfaceOrganicMatter
          MicroClimate: same as Saturated_Flow_Only.paddock.MicroClimate
      Simulation Setable_Variables_Water: Area=0; Slope=0
        Weather: FileName=Setable Variables - Water.met
        Clock: StartDate=1940-01-01; EndDate=1940-01-20
        Summary summaryfile
        Zone paddock: Area=1; Slope=0
          Soil: same as Manager Set Variables.cause ExternalMassFlow Event.WaterTable_Set_to_a_fixed_depth.paddock.Soil
          Manager set setable variables
```csharp
using System;
using Models.Core;
using Models.PMF;
using Models.PMF.OldPlant;
using Models.Soils;

namespace Models
{
	[Serializable]
	[System.Xml.Serialization.XmlInclude(typeof(Model))]
	public class Script : Model
	{
		[Link] Clock Clock;
		[Link] Soil soil;
		
		[EventSubscribe("DoManagement")]
		private void OnDoManagement(object sender, EventArgs e)
		{
		
			//!sw's (fractional values)
			
			if (Clock.Today == new DateTime(1940, 01, 02))
				{
			    soil.SoilWater.sw = 
			    new double[] {0.3, 0.3, 0.3, 0.3, 0.3, 0.3, 0.3, 0.3, 0.3, 0.3, 0.3};
				}
			
			
			if (Clock.Today == new DateTime(1940, 01, 05)) 
				{
			    soil.SoilWater.dlt_sw = 
			    new double[] {0.2, 0.2, 0.2, 0.2, 0.2, 0.2, 0.2, 0.2, 0.2, 0.2, 0.2};
				}
			
			
			

			//!reset the soil water again
			
			if (Clock.Today == new DateTime(1940, 01, 08))
				{
			    soil.SoilWater.Reset();    
				}
			
			
			
			
			//!sw_dep's (in millimeters)
			
			if (Clock.Today == new DateTime(1940, 01, 11))
				{
			    soil.SoilWater.sw_dep = 
			    new double[] {30, 30, 30, 30, 30, 30, 30, 30, 30, 30, 30};
				}
			
			
			if (Clock.Today == new DateTime(1940, 01, 14))
				{
			    soil.SoilWater.dlt_sw_dep = 
			    new double[] {-20, -20, -20, -20, -20, -20, -20, -20, -20, -20, -20};
				}
			
			
			
			//!reset the soil water again
			
			if (Clock.Today == new DateTime(1940, 01, 17))
				{
			    soil.SoilWater.Reset();
				}	
		
		
	
		
		
			/*	

			!sw's (fractional values)
			
			if day = 2 and year = 1940 then
			
			          'Soil Water' set sw = 0.3 0.3 0.3 0.3 0.3 0.3 0.3 0.3 0.3 0.3 0.3    
			endif
			
			
			if day = 5 and year = 1940 then 
			
			       'Soil Water' set dlt_sw =  0.2 0.2 0.2 0.2 0.2 0.2 0.2 0.2 0.2 0.2 0.2    
			endif
			
			
			
			
			!reset the soil water again
			
			if day = 8 and year = 1940 then
			
			   'Soil Water' reset    
			endif
			
			
			
			
			!sw_dep's (in millimeters)
			
			if day = 11 and year = 1940 then
			
			       'Soil Water' set sw_dep = 30 30 30 30 30 30 30 30 30 30 30   
			endif
			
			
			if day = 14 and year = 1940 then
			
			   'Soil Water' set dlt_sw_dep = -20 -20 -20 -20 -20 -20 -20 -20 -20 -20 -20   
			endif
			
			
			if day = 17 and year = 1940 then
			
			   'Soil Water' reset
			endif
			*/
		}
	}
}
```
          Report: EventNames=[Clock].DoReport
            VariableNames:
              [Clock].Today
              [Soil].SoilWater.sw as sw
              [Soil].SoilWater.sw_dep as sw_dep
              [Soil].SoilWater.dlayer as dlayer
              [Soil].SoilWater.sat as sat
              [Soil].SoilWater.dul as dul
              [Soil].SoilWater.ll15 as ll15
              [Soil].SoilWater.air_dry as air_dry
              [Soil].SoilWater.sat_dep as sat_dep
              [Soil].SoilWater.dul_dep as dul_dep
              [Soil].SoilWater.ll15_dep as ll15_dep
              [Soil].SoilWater.air_dry_dep as air_dry_dep
              [Weather].Rain as rain
              [Soil].SoilWater.runoff as runoff
          SurfaceOrganicMatter: same as Saturated_Flow_Only.paddock.SurfaceOrganicMatter
          MicroClimate: same as Saturated_Flow_Only.paddock.MicroClimate
  DataStore
    Input: FileName=OLD_Outputs\Saturated Flow Only (OLD).out
    Input old_unsaturated: FileName=OLD_Outputs\Unsaturated Flow Only (OLD).out
    Input old_runoff: FileName=OLD_Outputs\Runoff Only (OLD).out
    Input old_soil_evap: FileName=OLD_Outputs\Soil Evaporation Only (OLD).out
    Input old_ponding: FileName=OLD_Outputs\Ponding Only using KS (OLD).out
    Input old_ponding_soil_evap: FileName=OLD_Outputs\Ponding with Soil Evap (OLD).out
    Input old_watertable_calc: FileName=OLD_Outputs\WaterTable Calculation (OLD).out
    Input old_lateral_outflow: FileName=OLD_Outputs\Lateral Outflow Only (OLD).out
    Input old_soil_evap_surfaceom: FileName=OLD_Outputs\Soil Evaporation with SurfaceOM (OLD).out
    Input old_runoff_surfaceom: FileName=OLD_Outputs\Runoff with SurfaceOM (OLD).out
    Input old_runoff_tillage_event: FileName=OLD_Outputs\Runoff after Tillage Event (OLD).out
    Input new_runoff_irrigation: FileName=OLD_Outputs\Runoff with Irrigation (NEW).out
    Input new_subsurface_irrigation: FileName=OLD_Outputs\Subsurface Irrigation (NEW).out
    Input old_solute_saturated: FileName=OLD_Outputs\Solute - Saturated Flow Only (OLD).out
    Input old_solute_unsaturated: FileName=OLD_Outputs\Solute - Unsaturated Flow Only (OLD).out
    Input old_solute_irrigation: FileName=OLD_Outputs\Solute - Irrigation (OLD).out
    Input old_setable_vars_erosion: FileName=OLD_Outputs\Setable Variables - Erosion (OLD).out
    Input old_setable_vars_runoff: FileName=OLD_Outputs\Setable Variables - Runoff (OLD).out
    Input old_watertable_fixed_depth: FileName=OLD_Outputs\WaterTable - Set to a fixed depth (OLD).out
    Input old_setable_vars_water: FileName=OLD_Outputs\Setable Variables - Water (OLD).out
