Simulations: Version=171
  DataStore
    ExcelInput Observed: FileNames=[Observed.xlsx]; SheetNames=[PLOT5]
    PredictedObserved: PredictedTableName=Report; ObservedTableName=PLOT5; FieldNameUsedForMatch=SimulationName; FieldName2UsedForMatch=Date; AllColumns=false
    ExcelInput Analytical: FileNames=[SoilTemperature-AnalyticalSolution.xlsx]; SheetNames=[AnalyticalDataForAPSIM]
  Simulation Wagga
    Memo
      This simulation is a duplicate of the Eucalyptus validation Wagga simulation. The only change is the addition of the soil temperature model.
    Weather: FileName=%root%\Tests\Validation\Eucalyptus\wwepp.met
    Clock: Start=1991-07-01; End=1995-06-30
    Summary
    SoilArbitrator Soil Arbitrator
    Zone Plantation: Area=1; Slope=0; AspectAngle=0; Altitude=50
      Soil: Latitude=0; Longitude=0
        Water: Thickness=[100, 300, 600, 1000, 1000, 1000, 1000, 1000]; InitialValues=[0.16, 0.15, 0.14, 0.13, 0.12, 0.12, 0.099, 0.05]; InitialPAWmm=364; RelativeTo=LL15; FilledFromTop=true
        Physical
          Thickness  ParticleSizeClay  BD    AirDry  LL15  DUL   SAT
          100        9                 1.5   0.01    0.05  0.16  0.29
          300        11                1.6   0.01    0.05  0.15  0.29
          600        13                1.68  0.01    0.05  0.14  0.29
          1000       14                1.75  0.02    0.05  0.13  0.29
          1000       25                1.7   0.05    0.05  0.12  0.29
          1000       35                1.7   0.05    0.05  0.12  0.29
          1000       42                1.7   0.05    0.05  0.12  0.29
          1000       40                1.7   0.05    0.05  0.12  0.29
          SoilCrop EucalyptusSoil: LL=[0.01, 0.01, 0.01, 0.01, 0.01, 0.01, 0.01, 0.01]; KL=[0.07, 0.07, 0.05, 0.02, 0.02, 0.02, 0.01, 0.01]; XF=[1, 1, 1, 1, 0.3, 0.2, 0, 0]
          SoilCrop SCRUMSoil: LL=[0.01, 0.01, 0.01, 0.01, 0.01, 0.01, 0.01, 0.01]; KL=[0.07, 0.07, 0.05, 0.02, 0.02, 0.02, 0.01, 0.01]; XF=[1, 1, 1, 1, 0.3, 0.2, 0, 0]
        WaterBalance SoilWater: SummerDate=1-Nov; SummerU=4; SummerCona=3.5; WinterDate=1-Apr; WinterU=4; WinterCona=3.5; DiffusConst=88; DiffusSlope=35.4; Salb=0.13; CN2Bare=65; CNRed=20; CNCov=0.8; DischargeWidth=0; CatchmentArea=0; PSIDul=-100
          Thickness  SWCON  KLAT
          100        0.9    0
          300        0.9    0
          600        0.9    0
          1000       0.6    0
          1000       0.6    0
          1000       0.6    0
          1000       0.6    0
          1000       0.6    0
        Organic: FOMCNRatio=60; CarbonUnits=Total
          Thickness  Carbon  SoilCNRatio  FBiom  FInert  FOM
          100        2       14.5         0.04   0.4     0.29407
          300        1       14.5         0.03   0.5     0.253108
          600        0.5     14.5         0.02   0.5     0.187507
          1000       0.2     14.5         0.01   0.5     0.113729
          1000       0.12    14.5         0.01   0.9     0.06898
          1000       0.1     14.5         0.01   0.99    0.0418385
          1000       0.1     14.5         0.01   0.99    0.0253763
          1000       0.1     14.5         0.01   0.99    0.0153915
        Chemical: Thickness=[100, 300, 600, 1000, 1000, 1000, 1000, 1000]; PH=[5.8, 5.7, 5.7, 5.9, 5.7, 5.7, 5.7, 5.7]; PHUnits=Water
        CERESSoilTemperature Temperature
        Nutrient
        SoilTemperature
        LayerStructure: Thickness=[2, 2, 6, 10, 30, 50, 100, 100, 100, 100, 100]
        Solute NO3: Thickness=[100, 300, 600, 1000, 1000, 1000, 1000, 1000]; InitialValues=[0.1, 0.1, 0.1, 0.01, 0.01, 0.01, 0.01, 0.01]; InitialValuesUnits=kg/ha; WaterTableConcentration=0; D0=0; DepthConstant=0; MaxDepthSoluteAccessible=0; RunoffEffectivenessAtMovingSolute=0; MaxEffectiveRunoff=0
        Solute NH4: Thickness=[100, 300, 600, 1000, 1000, 1000, 1000, 1000]; InitialValues=[0.01, 0.01, 0.01, 0.01, 0.01, 0.01, 0.01, 0.01]; InitialValuesUnits=kg/ha; WaterTableConcentration=0; D0=0; DepthConstant=0; MaxDepthSoluteAccessible=0; RunoffEffectivenessAtMovingSolute=0; MaxEffectiveRunoff=0
        Solute Urea: Thickness=[100, 300, 600, 1000, 1000, 1000, 1000, 1000]; InitialValues=[0, 0, 0, 0, 0, 0, 0, 0]; InitialValuesUnits=kg/ha; WaterTableConcentration=0; D0=0; DepthConstant=0; MaxDepthSoluteAccessible=0; RunoffEffectivenessAtMovingSolute=0; MaxEffectiveRunoff=0
      Irrigation
      Fertiliser
      SurfaceOrganicMatter: InitialResidueName=Wheat; InitialResidueType=Wheat; InitialResidueMass=2000; InitialStandingFraction=0; InitialCPR=0; InitialCNR=80
      MicroClimate: a_interception=0; b_interception=1; c_interception=0; d_interception=0; SoilHeatFluxFraction=0; MinimumHeightDiffForNewLayer=0; NightInterceptionFraction=0; ReferenceHeight=2
      Plant Eucalyptus
      Plant SCRUM
      Manager TreeTransplantRule
        RowSpace = 3
        RowWidth = 3
        CultivarName = grandisCoffsHarbour
        SowingDate = 07/01/1991 00:00:00
```csharp
using Models.Soils;
using System;
using Models.Core;
using Models.PMF;
namespace Models
{
    [Serializable] 
    [System.Xml.Serialization.XmlInclude(typeof(Model))]
    public class Script : Model
    {
        [Link] Plant Plant;
        [Link] Clock Clock;

        [Description("Spacing (m) between plants within rows")]
        public double RowSpace { get; set; }
        [Description("Spacing (m) between rows")]
        public double RowWidth { get; set; }

        [Description("Cultivar")]
        [Display(Type=DisplayType.CultivarName)]
        public string CultivarName { get; set; }
        [Description("Sowing Date")]
        public DateTime SowingDate { get; set; }

        [EventSubscribe("DoManagement")]
        private void OnDoManagement(object sender, EventArgs e)
        {
            double PlantPopulation = 1 / (RowWidth * RowSpace);

            if (Clock.Today.Date == SowingDate)
                Plant.Sow(population: PlantPopulation, 
                    cultivar: CultivarName, 
                    depth: 100, 
                    rowSpacing: 150);
            //Plant.Sow(... Contains the following arguements:
            //Population  double  Required  Seeds sowing/m2
            //Cultivar    string  Required  "NameOfCultivar"
            //Depth       double  Optional  Depth (mm) seed sown.   Default is 100mm 
            //MaxCover    double  Optional  Proportion (0-1) of the ground row crop will cover.   Default is 1.0
            //BudNumber   double  Optional  Number of mainstems per seed sown.  Default is 1.0
            //RowSpacing  double  Optional  Spaceing (mm) between drill rows when crop is sown.  Default is 150mm
            //CropClass   string  Optional  Crop class to instantiate when crop is sown.  Default is "Plant"
        }
    }
}
```
      Operations WeedSowing
        1991-07-01  [SCRUM].Sow(population: 1, cultivar: Barley_Autumn, depth: 10, rowSpacing: 150);
      Operations FertiliserOperations
        1987-02-09  [Fertiliser].Apply(192, Fertiliser.Types.UreaN, 0);
        1987-05-20  [Fertiliser].Apply(192, Fertiliser.Types.UreaN, 0);
        1987-08-28  [Fertiliser].Apply(96, Fertiliser.Types.UreaN, 0);
        1987-12-06  [Fertiliser].Apply(256, Fertiliser.Types.UreaN, 0);
        1988-02-29  [Fertiliser].Apply(256, Fertiliser.Types.UreaN, 0);
        1988-07-18  [Fertiliser].Apply(128, Fertiliser.Types.UreaN, 0);
        1988-10-26  [Fertiliser].Apply(192, Fertiliser.Types.UreaN, 0);
        1989-06-09  [Fertiliser].Apply(128, Fertiliser.Types.UreaN, 0);
        1989-10-27  [Fertiliser].Apply(96, Fertiliser.Types.UreaN, 0);
      Report: EventNames=[Clock].DoReport
        VariableNames:
          [Clock].Today as Date
          [Soil].SoilTemperature.AverageSoilTemp
          [Soil].SoilTemperature.AverageSoilTemp[1] as SoilTemperature@1
          [Soil].SoilTemperature.AverageSoilTemp[2] as SoilTemperature@25
          [Soil].SoilTemperature.AverageSoilTemp[3] as SoilTemperature@75
          [Soil].SoilTemperature.AverageSoilTemp[4] as SoilTemperature@150
          [Soil].SoilTemperature.AverageSoilTemp[5] as SoilTemperature@250
          [Eucalyptus].Age
          [Eucalyptus].AboveGround.Wt
          [Eucalyptus].BelowGround.Wt
          [Eucalyptus].Leaf.Dead.Wt
          [Eucalyptus].Leaf.Live.Wt
          [Eucalyptus].Branch.Live.Wt
          [Eucalyptus].Leaf.Detached.Wt
          [Eucalyptus].Stem.Live.Wt
          [Eucalyptus].Total.N
          [Eucalyptus].Leaf.Live.N
          [Eucalyptus].Leaf.CoverGreen
          [Eucalyptus].Leaf.LAI
          [Eucalyptus].TotalLive.Wt
          [Eucalyptus].IndividualTreeLiveWt
          [Eucalyptus].IndividualTreeStemWt
          [Eucalyptus].Stem.DBH
          [Eucalyptus].Stem.Ht
          [Eucalyptus].RootShootRatio
          [Eucalyptus].Stem.Vol
          [Eucalyptus].Stem.MAI
          [SCRUM].Stover.LAI
          [SCRUM].Stover.Wt
      Manager AutoFertigate
        FASW = 0
        WaterDeficit = 0
        AutoIrrigationOn = True
        FASWThreshold = 0.95
        FASWDepth = 1000
        NConc = 3
```csharp
using Models.Interfaces;
using APSIM.Shared.Utilities;
using System.Xml.Serialization;
using Models;
using Models.PMF;
using Models.Soils;
using System.Text;
using System.Collections.Generic;
using Models.Core;
using System;
using Models.Soils.Nutrients;

namespace Models
{
    [Serializable] 
    public class Script : Model
    {
        [Link] private Plant Chickpea;
        [Link] private Zone zone;
        [Link] private Irrigation irrigation;
        [Link] private Fertiliser fertiliser;
        [Link] private Soil soil;
        [Link]
        private IPhysical soilPhysical;
        [Link]
        private ISoilWater waterBalance;
        public double FASW { get; set; }
        public double WaterDeficit  { get; set; }
    
        
        [Description("Auto irrigation on?")]
        public bool AutoIrrigationOn { get; set; }
        
        [Description("Threshold fraction available water (0-1)")]
        public double FASWThreshold { get; set; }

        [Description("Soil depth (mm) to which fraction available water is calculated")]
        public double FASWDepth { get; set; }

        [Description("N Concentration in irrigation water (ppm)")]
        public double NConc { get; set; }

        [EventSubscribe("DoManagement")]
        private void OnDoManagement(object sender, EventArgs e)
        {
            CalculateFASW();
            if (AutoIrrigationOn)
            {
                if (FASW < FASWThreshold)
                {
                    double amount = WaterDeficit * 10000.0 * NConc/1000000.0;
                    irrigation.Apply(WaterDeficit, depth: 0);
                    fertiliser.Apply(Amount: amount, Type: Fertiliser.Types.NO3N);
                }
            }
        }
        
        private void CalculateFASW()
        {
            double[] LL15 = MathUtilities.Multiply(soilPhysical.LL15, soilPhysical.Thickness);
            double[] DUL = MathUtilities.Multiply(soilPhysical.DUL, soilPhysical.Thickness);
        
            int nlayr = GetLayerIndex();
            double cumdep = MathUtilities.Sum(soilPhysical.Thickness, 0, nlayr, 0.0);

            double excess_fr = MathUtilities.Divide((cumdep - FASWDepth), soilPhysical.Thickness[nlayr], 0.0);

            // note that results may be strange if swdep < ll15
            double avail_sw = (MathUtilities.Sum(waterBalance.SWmm, 0, nlayr, 0.0)
                              - excess_fr * waterBalance.SWmm[nlayr])
                              - (MathUtilities.Sum(LL15, 0, nlayr, 0.0)
                              - excess_fr * LL15[nlayr]);


            double pot_avail_sw = (MathUtilities.Sum(DUL, 0, nlayr, 0.0)
                                  - excess_fr * DUL[nlayr])
                                  - (MathUtilities.Sum(LL15, 0, nlayr, 0.0)
                                  - excess_fr * LL15[nlayr]);

            FASW = MathUtilities.Divide(avail_sw, pot_avail_sw, 0.0);
            WaterDeficit = MathUtilities.Constrain(pot_avail_sw - avail_sw, 0.0, 100000);
        }

        private int GetLayerIndex()
        {
            double[] cumThickness = soilPhysical.ThicknessCumulative;
            for (int i = 1; i < cumThickness.Length; i++)
            {
                if (FASWDepth < cumThickness[i])
                    return i - 1;
            }
            
            return cumThickness.Length - 1;
        }

    }
}
```
      Manager Harvesting
        Crop = [Eucalyptus]
```csharp
using Models.Soils.Nutrients;
using System;
using Models.Core;
using Models.PMF;
using Models.Soils;
using Models.Soils.Nutrients;
using Models.Utilities;
using APSIM.Shared.Utilities;

namespace Models
{
    [Serializable] 
    public class Script : Model
    {
        [Description("Crop")]
        public IPlant Crop { get; set; }
        
        [EventSubscribe("DoManagement")]
        private void OnDoManagement(object sender, EventArgs e)
        {
            if (Crop.IsReadyForHarvesting)
            {
                Crop.Harvest();
                Crop.EndCrop();
            }
        }
    }
}
```
  Experiment Analytical
    Factors
      Factor Site: Specification=[Weather].ExcelWorkSheetName=Dalby,Lincoln
    Simulation ComparisonWithAnalytical
      Memo
        The intention for the analytical solution is to test the numerics and also if the soil layering that most people use (many centimetres even at the surface) with SoilWater are causing any issues with the quality of the solution. This would be under highly idealised conditions but is a necessary step - the advantage is that it is only testing the soil temperature solution (not the water, crop, ...).

        * set up the soil water model such that the profile is uniform (all the same water content, bulk density, texture, carbon) with no crop and there are no changes in water content with time. I can't exactly remember how I did this last time but I would try setting it up with the soil at LL15 (are going to need a few different levels of this for testing) and if that didn't work then at SAT with Ksat and swcon = 0

        * need a couple of artificial weather files at latitude = 0 degrees, no rainfall, no radiation, and with air temperature of varying amplitude and average as from the spreadsheet

        Need to start with soil layers of about 1 cm each (where are pretty confident that the solution will work) but be set up to expand these out to more normal layering (can probably use the layering component for these).

        With the above, use the spreadsheet outputs as validation/testing data for the idealised setting for various depths in the soil. Would also like to understand how well the model copes with initial soil temperatures.

        After that, test things that should affect damping depth (bulk density, carbon, water content, texture ...)

        Notes:

        * The simulation reads dummy weather data from AnalyticalWeather.xlsx.

        * The soil physical node has a uniform profile specified.

        * The water balance component has been replaced by a manager script (DummyWaterBalance) that ensures water content (a user specified parameter) does not change during the simulation.

        * A 'LayerStructure' component can be added to the soil to get 1cm layers. There is a 'LayerStructure' component in the Wagga simulation that can be copied/pasted.
      Clock: Start=2000-01-01; End=2000-12-31
      Weather: FileName=AnalyticalWeather.xlsx; ExcelWorkSheetName=Sheet1
      Summary
      Zone Field: Area=1; Slope=0; AspectAngle=0; Altitude=50
        MicroClimate: a_interception=0; b_interception=0; c_interception=0; d_interception=0; SoilHeatFluxFraction=0; MinimumHeightDiffForNewLayer=0; NightInterceptionFraction=0; ReferenceHeight=2
        Manager DummyWaterBalance
          SW = 0.05, 0.05, 0.05, 0.05, 0.05, 0.05, 0.05, 0.05
          Eos = 0
          Es = 0
          Eo = 0
          Salb = 0
```csharp
using Models.PMF;
using Models.Core;
using System;
using Models.Interfaces;
using Models.Soils;
using APSIM.Shared.Utilities;

namespace Models
{
    [Serializable] 
    public class Script : Model, ISoilWater
    {
        [Link]
        private Physical physical;
        [Link]
        private IPhysical soilPhysical;

        ///<summary>Gets or sets soil thickness for each layer (mm)(</summary>
        public double[] Thickness { get { return soilPhysical.Thickness; } }

        ///<summary>Gets or sets soil thickness for each layer (mm)(</summary>
        public double[] LayerThickness { get { return soilPhysical.Thickness; } }

        ///<summary>Gets or sets volumetric soil water content (mm/mm)(</summary>
        [Description("Soil water content (mm/mm), comma separated values")]
        public double[] SW { get; set; }

        ///<summary>Gets soil water content (mm)</summary>
        public double[] SWmm { get { return MathUtilities.Multiply(SW, Thickness); } }

        ///<summary>Gets extractable soil water relative to LL15(mm)</summary>
        public double[] ESW { get { throw new NotImplementedException(); } }

        ///<summary>Gets extractable soil water relative to LL15(mm)</summary>
        public double[] PSI { get { throw new NotImplementedException(); } }

        ///<summary>Gets K</summary>
        public double[] K { get { throw new NotImplementedException(); } }
        
        ///<summary>Gets PoreInteractionIndex</summary>
        public double[] PoreInteractionIndex { get { throw new NotImplementedException(); } set { throw new NotImplementedException(); }}
                
        ///<summary>Gets potential evaporation from soil surface (mm)</summary>
        [Description("Eos (mm)")]
        public double Eos { get; set; }

        /// <summary>Gets the actual (realised) soil water evaporation (mm)</summary>
        [Description("Es (mm)")]
        public double Es { get; set; }

        /// <summary>Gets potential evapotranspiration of the whole soil-plant system (mm)</summary>
        [Description("Eo (mm)")]
        public double Eo { get; set; }

        /// <summary>Gets the amount of water runoff (mm)</summary>
        public double Runoff { get { return 0; } }
        
        /// <summary>Gets the amount of water drainage from bottom of profile(mm)</summary>
        public double Drainage { get { return 0; } }

        /// <summary>Fraction of incoming radiation reflected from bare soil</summary>
        [Description("Salb")]
        public double Salb { get; set; }

        /// <summary>Amount of water moving laterally out of the profile (mm)</summary>
        public double[] LateralOutflow { get { throw new NotImplementedException(); } }

        /// <summary>Amount of N leaching as NO3-N from the deepest soil layer (kg /ha)</summary>
        public double LeachNO3 { get { return 0; } }

        /// <summary>Amount of N leaching as NH4-N from the deepest soil layer (kg /ha)</summary>
        public double LeachNH4 { get { return 0; } }
        
        /// <summary>Amount of N leaching as urea-N  from the deepest soil layer (kg /ha)</summary>
        public double LeachUrea { get { return 0; } }

        /// <summary>Amount of Cl leaching  from the deepest soil layer (kg /ha)</summary>
        public double LeachCl { get { return 0; } }
        
        /// <summary>Amount of N leaching as NO3 from each soil layer (kg /ha)</summary>
        public double[] FlowNO3 { get { throw new NotImplementedException(); } }

        /// <summary>Amount of N leaching as NH4 from each soil layer (kg /ha)</summary>
        public double[] FlowNH4 { get { throw new NotImplementedException(); } }

        /// <summary>Amount of N leaching as urea from each soil layer (kg /ha)</summary>
        public double[] FlowUrea { get { throw new NotImplementedException(); } }

        /// <summary>Amount of N leaching as urea from each soil layer (kg /ha)</summary>
        public double[] FlowCl { get { throw new NotImplementedException(); } }

        /// <summary>Amount of water moving upward from each soil layer during unsaturated flow (negative value means downward movement) (mm)</summary>
        public double[] Flow  { get { throw new NotImplementedException(); } }

        /// <summary>Amount of water moving downward out of each soil layer due to gravity drainage (above DUL) (mm)</summary>
        public double[] Flux { get { throw new NotImplementedException(); } }

        /// <summary> This is set by Microclimate and is rainfall less that intercepted by the canopy and residue components </summary>
        public double PotentialInfiltration { get; set; }
        
        /// <summary> The amount of rainfall intercepted by crop and residue canopies </summary>
        public double PrecipitationInterception { get; set; }

        /// <summary>Water table depth (mm)</summary>
        public double WaterTable { get; set; }
        
        /// <summary>Pond depth (mm)</summary>
        public double Pond { get; set; }

        /// <summary>Pond depth (mm)</summary>
        public double SubsurfaceDrain { get; set; }

        /// <summary>Sets the water table.</summary>
        /// <param name="InitialDepth">The initial depth.</param> 
        public void SetWaterTable(double InitialDepth)
        {
            throw new NotImplementedException();
        }

        /// <summary>The efficiency (0-1) that solutes move down with water.</summary>
        public double[] SoluteFluxEfficiency { get; set; }

        /// <summary>The efficiency (0-1) that solutes move up with water.</summary>
        public double[] SoluteFlowEfficiency { get; set; }

        ///<summary>Perform a reset</summary>
        public void Reset()
        {
            throw new NotImplementedException();
        }

        ///<summary>Perform tillage</summary>
        public void Tillage(TillageType Data)
        {
            throw new NotImplementedException();
        }

        ///<summary>Perform tillage</summary>
        public void Tillage(string tillageType)
        {
            throw new NotImplementedException();
        }

        ///<summary>Remove water from the profile</summary>
        public void RemoveWater(double[] amountToRemove)
        {
            throw new NotImplementedException();
        }
        public void Standardise(double[] targetThickness)
        {
        
        
        }
        
        /// <summary>Plant available water SW-LL15 (mm/mm).</summary>
        [Units("mm/mm")]
        public double[] PAW
        {
            get
            {
                return SoilUtilities.CalcPAWC(soilPhysical.Thickness,
                                              soilPhysical.LL15,
                                              SW,
                                              null);
            }
        }

        /// <summary>Plant available water SW-LL15 (mm).</summary>
        [Units("mm")]
        public double[] PAWmm
        {
            get
            {
                return MathUtilities.Multiply(PAW, soilPhysical.Thickness);
            }
        }

    }
}
```
        Soil: Latitude=0; Longitude=0
          Water: Thickness=[100, 100, 200, 300, 300, 300, 200, 300]; InitialValues=[0.16, 0.16, 0.16, 0.16, 0.16, 0.16, 0.16, 0.16]; InitialPAWmm=198; RelativeTo=LL15; FilledFromTop=true
          Physical
            Thickness  ParticleSizeClay  BD   AirDry  LL15  DUL   SAT
            100        9                 1.5  0.01    0.05  0.16  0.29
            100        9                 1.5  0.01    0.05  0.16  0.29
            200        9                 1.5  0.01    0.05  0.16  0.29
            300        9                 1.5  0.01    0.05  0.16  0.29
            300        9                 1.5  0.01    0.05  0.16  0.29
            300        9                 1.5  0.01    0.05  0.16  0.29
            200        9                 1.5  0.01    0.05  0.16  0.29
            300        9                 1.5  0.01    0.05  0.16  0.29
          Organic: FOMCNRatio=60; CarbonUnits=Total
            Thickness  Carbon  SoilCNRatio  FBiom  FInert  FOM
            100        2       14.5         0.04   0.4     0.29407
            300        2       14.5         0.04   0.4     0.294
            600        2       14.5         0.04   0.4     0.294
            1000       2       14.5         0.04   0.4     0.294
            1000       2       14.5         0.04   0.4     0.294
            1000       2       14.5         0.04   0.4     0.294
            1000       2       14.5         0.04   0.4     0.294
            1000       2       14.5         0.04   0.4     0.294
          Chemical: Thickness=[100, 300, 600, 1000, 1000, 1000, 1000, 1000]; PH=[6.5, 6.5, 6.5, 6.5, 6.5, 6.5, 6.5, 6.5]; PHUnits=Water
          SoilTemperature
          Solute NO3: same as Wagga.Plantation.Soil.NO3
          Solute NH4: same as Wagga.Plantation.Soil.NH4
          Solute Urea: same as Wagga.Plantation.Soil.Urea
        Report AnalyticalReport: EventNames=[Clock].DoReport
          VariableNames:
            [Clock].Today as Date
            [Soil].SoilTemperature.AverageSoilTemp
            [Soil].SoilTemperature.AverageSoilTemp[1] as SoilTemperature@1
            [Soil].SoilTemperature.AverageSoilTemp[2] as SoilTemperature@20
            [Soil].SoilTemperature.AverageSoilTemp[6] as SoilTemperature@150
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