Simulations: Version=30
  Memo TitlePage
    # The APSIM Plantain Model

    _Rogerio Cichota, AgResearch, New Zealand_

    ##Preamble

    Plantain (*Plantago lanceolata*), also know as English plantain, ribgrass, or ribwort, is a herbaceous perennial herb with a broad distribution in the native grasslands of Eurasia ([SagarHarper_1964]; [StewartPlantain_1996]).  It is now common around the world in suitable habitats with temperate and subtropical climates.  The plant consists of a rosette of basal semi-erect leaves which may have one or more flowering stalks.  The leaves are green to grey-green in colour, have a characteristic lanceolate shape with 3 to 5 parallel veins along the length and have few or no hairs.  The stems are leafless, growing some 10-15cm above the leaves and have scattered hairs toward the base of the plant.  Each stalk terminates in an ovoid inflorescence containing many small flowers each with a pointed bract.  The inflrescence is 1-4cm long and changes shape over time (from a cone to a cilinder) as the flowers mature from the based to the top, the colour also changes from the initial grey-green to light brown when mature.  The flowering period goes from late spring to early fall and varies between plants, it can last several months for a population of plants in a given locale.  Plantain does not need vernalisation to trigger flowering.  The flowers are wind-pollinated and are replaced by a small seed capsule containing two small seeds, with weight varying between 1.5 and 2.0 mg per seed. Seeds have an oblong shape and the colour varies from dark brown to black.  The root system consists of a relatively shallow crown of coarse fibrous roots including adventitious roots ([SandersonElwinger_2000a]) and although technically a taprooted species it does not have the typical solid deep taproot.  Plantain can allocate greater proportion of roots at depth, giving a competitive advantage over shallow root grasses ([StewartPlantain_1996]; [NieEtAl_2008]; [vanDenBergeEtAl_2014]).
    Selection of plantain cultivars for use as forage have focused mostly on narrow leaf varieties, which have an erect, bushy, growth habit and ability to tiller under grazing ([StewartPlantain_1996]), more recently some emphasis has also been put on the ability to growth over cold periods.  Forage plantain can grow large leaves, up to around 40cm instead of typical 15-25cm, and these are highly palatable to grazing animals, being specifically targeted by sheep ([SagarHarper_1964]; [StewartPlantain_1996]; [RumballKeog_1997]; [QuijadaThesis_2015]). Reproductive organs are less palatable and mature stalks are avoided by grazers ([StewartPlantain_1996]; [MoorheadPigot_2009]; [AyalaEtAl_2011]).  Plantain is highly nutritious, has good digestibility, and the mineral composition usually is higher than ryegras-clover swards ([StewartPlantain_1996]; [JacobsWard_2010]; [ElgersmaEtal_2014]; [LeeEtAlYields_2015]).  Potential medicinal effects of plantain have been suggested and few bio-active compounds that may alter rumen fermentation and N partitionin in the animal are being investigated ([StewartPlantain_1996]; [QuijadaThesis_2015]; [JansmaThesis_2016]).

    **Objective:**  The model presented here has been built using the Plant Modelling Framework (PMF) of [brown_plant_2014] to simulate the growth of a forage plantin crop.  Currently, the focus is on describing biomass accumulation and regrowth after harvest on monocultural swards. As part of APSIM's PMF, using plantain in mixed swards is possible, but this has not been properly tested yet.  Likewise, describing the effect of population decrease on plant growth was not attempted; for swards free of weeds and within typical population ranges, the changes in plant size (number of tillers) and LAI should compensate for loss of population, but competition with weeds and others would alter this pattern significantly.
    Simulating variations in plant N concentration (seasonal or due to changes in soil status)  is not a major focus of the current model.  Further development of PMF's supply/demand processes are needed for capturing the variations in N content typically seen in perennial species.

    ## Generic background
  Replacements
    Manager Defoliate
      Crop =
      cutPasture_StartDate = 2050-05-20
      cutPasture_EndDate = 2100-12-31
      defoliateType = Graze
      interval2Cut = 21
      durationOfCut = 1
      removeAmountType = DMToRemove
      herbageAmount = 500
      fracDM2Remove = 1
      fracN2Remove = 1
      urineDepth = 10
      fracN2Dung = 0.4
      fracPopDecline = 0.05
```csharp
// Defoliates on a regular cycle or one-off via a schedule
// currently defoliates by the amount specified spread evenly over the specified period

using System;
using Models.Core;
using System.Collections.Generic;
using System.Text;
using Models;
using Models.Soils;
using Models.PMF;
using System.Xml.Serialization;
using APSIM.Shared.Utilities;

namespace Models
{
    [Serializable]
    public class Script : Model
    {
        [Link] Zone zone;
        [Link] Clock Clock;
        [Link] Plant Plantain;
        [Link] Fertiliser fertiliser;
        [Link] ISummary summary = null;

        [Description("Choose the crop to harvest:")]
        public IPlant Crop { get; set; }

        [Description("Enter the date to start the rotation (dd/mm/yyyy):")]
        public DateTime cutPasture_StartDate { get; set; }

        [Description("Enter the date to end the rotation (dd/mm/yyyy):")]
        public DateTime cutPasture_EndDate { get; set; }

        [Description("Select type of defoliation:")]
        public defoliationTypes defoliateType { get; set; }

        [Description("Enter the interval between defoliations (days):")]
        public int interval2Cut { get; set; }

        [Description("Enter the number of days to defoliate over (days):")]
        public int durationOfCut { get; set; }

        [Description("Choose what amount is being defined:")]
        public removeAmountTypes removeAmountType { get; set; }

        [Description("Enter the amount to use (kgDM/ha):")]
        public double herbageAmount { get; set; }

        [Description("Enter the fraction of DM that is removed from the field (0-1):")]
        public double fracDM2Remove { get; set; }

        [Description("Enter the fraction of N that is removed from the field (0-1):")]
        public double fracN2Remove { get; set; }

        [Description("Enter the depth down to which urine will applied (mm):")]
        public double urineDepth { get; set; }

        [Description("Enter the proportion of N returned in dung (0-1):")]
        public double fracN2Dung { get; set; }

        [Description("Enter the fraction of population decline due to defoliation (0-1):")]
        public double fracPopDecline { get; set; }

        //fraction of each plant part returned as residue (0-1), wastage
        private double leafResidueFrac = 0.01;
        private double stemResidueFrac = 0.01;
        private double flowerResidueFrac = 0.01;
        private double minLeafAmount = 5.0;

        //Outputs
        //Pasture DM defoliated today (kg/ha)
        [XmlIgnore] public double DefoliatedDM{ get; set; }
        //N defoliate today (kg/ha)
        [XmlIgnore] public double DefoliatedN{ get; set; }
        //Pasture DM harvested today (kg/ha)
        [XmlIgnore] public double HarvestedDM{ get; set; }
        //N harvested today (kg/ha)
        [XmlIgnore] public double HarvestedN{ get; set; }
        //DM removed from the paddock (kg/ha)
        [XmlIgnore] public double RemovedDM{ get; set; }
        //N removed from the paddock (kg/ha)
        [XmlIgnore] public double RemovedN{ get; set; }
        //DM returned to the paddock (kg/ha)
        [XmlIgnore] public double ReturnedDM{ get; set; }
        //N returned to the paddock (kg/ha)
        [XmlIgnore] public double ReturnedN{ get; set; }
        //N returned as dung (SurfaceOM)
        [XmlIgnore] public double NReturnedInDung{ get; set; }
        //N returned as urine (urea)
        [XmlIgnore] public double NReturnedInUrine{ get; set; }
        //Number of days after last harvest
        [XmlIgnore] public int DaysAfterCut{ get; set; }
        //Total standing DM (Leaf + Stem/Sheath) before cut
        [XmlIgnore] public double PreHarvestDM{ get; set; }
        //Total standing DM (Leaf + Stem/Sheath) after cut
        [XmlIgnore] public double PostHarvestDM{ get; set; }

        //Pasture DM harvested this rotation (kg/ha)
        [XmlIgnore] public double RotationHarvestedDM{ get; set; }
        //Pasture DM to be harvested this rotation (kg/ha)
        [XmlIgnore] public double RotationHarvestingDM{ get; set; }

        //N concentration of the defoliated material (kg/kg)
        [XmlIgnore] public double HarvestedNconc{ get; set; }

        //Internal variables
        private RemovalFractions removalFractions;
        //The fraction of urine to be applied in each layer
        private double[] FracLayer;
        // total herbage to remove in g/m2 per day
        private double herbageToRemove;
        // counter
        private int daysCutting = 0;
        // type of defoliation (Cut or Graze)
        private string defoliationType;
        // type of DM amount (ResidualDM or DMToRemove)
        private string amountType;
        // auxiliary
        private bool aCutHasHappened = false;
        private bool isStillCutting = false;
        private double cumAmountHarvested;

        // event to add residue / dung to surface OM
        public event BiomassRemovedDelegate BiomassRemoved;

        [EventSubscribe("Commencing")]
        private void OnSimulationCommencing(object sender, EventArgs e)
        {
            removalFractions = new RemovalFractions();
            DaysAfterCut = 0;
            resetVariables();
            if (defoliateType == defoliationTypes.Cut)
                defoliationType = "Cut";
            else
                defoliationType = "Graze";

            if (removeAmountType == removeAmountTypes.ResidualDM)
                amountType = "ResidualDM";
            else
                amountType = "DMToRemove";

            // make sure that rotation start when startDate<simulationStartDay
            if ((Clock.Today > cutPasture_StartDate) && (Clock.Today < cutPasture_EndDate))
                cutPasture_StartDate = Clock.Today;

            // initialise variables
            resetVariables();
        }

        [EventSubscribe("DoManagement")]
        private void OnDoManagement(object sender, EventArgs e)
        {
            if (Clock.Today == cutPasture_StartDate)
                DaysAfterCut = interval2Cut;

            if ((Clock.Today >= cutPasture_StartDate) && (Clock.Today <= cutPasture_EndDate))
            {
                // Check whether we should start cutting
                if ((Plantain.IsEmerged) && (DaysAfterCut > 0) && (DaysAfterCut == interval2Cut))
                {
                    Defoliate(defoliationType, herbageAmount * 0.1, amountType, durationOfCut);
                }
            }

            // Check whether we need to continue cutting
            //if ((daysCutting > 0) && (daysCutting <= durationOfCut))
            if (isStillCutting)
            {
                // reset outputs
                resetVariables();

                removeDM(herbageToRemove, defoliationType);
                returnExcreta();
                cumAmountHarvested += HarvestedDM;
                daysCutting += 1;
            }

            // reset outputs
            if (daysCutting < 0)
            {
                resetVariables();
                daysCutting = 0;
            }
        }

        [EventSubscribe("DoManagementCalculations")]
        private void OnDoManagementCalculations(object sender, EventArgs e)
        {
            if ((daysCutting > 0) && (daysCutting < durationOfCut))
                isStillCutting = true;

            if (daysCutting == durationOfCut)
            {
                PostHarvestDM = (double)zone.Get("Plantain.AboveGround.Wt");
                RotationHarvestedDM = cumAmountHarvested;
                aCutHasHappened = true;
                isStillCutting = false;
                daysCutting = -1;
                Plantain.Population = Plantain.Population * (1.0 - fracPopDecline);
            }

            if (aCutHasHappened && (daysCutting == 0))
                DaysAfterCut += 1;
        }

        public enum removeAmountTypes
        {
            /// <summary>Setting DM amount to remove</summary>
            DMToRemove,
            /// <summary>Setting residual DM amount</summary>
            ResidualDM
        }

        public enum defoliationTypes
        {
            /// <summary>Cut</summary>
            Cut,
            /// <summary>Graze</summary>
            Graze
        }

        // resets the values of all outputs
        private void resetVariables()
        {
            DefoliatedDM = 0.0;
            DefoliatedN = 0.0;
            HarvestedDM = 0.0;
            HarvestedN = 0.0;
            RemovedDM = 0.0;
            RemovedN = 0.0;
            ReturnedDM = 0.0;
            ReturnedN = 0.0;
            NReturnedInDung = 0.0;
            NReturnedInUrine = 0.0;
            RotationHarvestedDM = 0.0;
            RotationHarvestingDM = 0.0;
            HarvestedNconc = 0.0;
        }

        // Perform the basic calculations for defoliation
        public void Defoliate(string defoliationType, double amountDM, string amountType, int duration)
        {
            // get the existing plant amount
            PreHarvestDM = (double)zone.Get("Plantain.AboveGround.Wt");

            // check duration
            if (duration <= 0)
                throw new Exception("Duration of graze/cut rotation is zero or negative");
            
            // check amount to remove
            if ((amountType == "DMToRemove") && (PreHarvestDM > 0.0))
            {
                summary.WriteMessage(this, "   Defoliating " + (10.0 * amountDM).ToString("#0.0") + "kg/ha over " + duration + " days");
                herbageToRemove = amountDM / duration;
            }
            else if ((amountType == "ResidualDM") && (PreHarvestDM > amountDM))
            {
                summary.WriteMessage(this, "   Defoliating down to approximately " + (10.0 * amountDM).ToString("#0.0") + "kg/ha over " + duration + " days");
                herbageToRemove = (PreHarvestDM - amountDM) / duration;
            }
            else
            {
                herbageToRemove = 0.0;
                summary.WriteMessage(this, "   Defoliation will not happend because there is not enough plant material");
                return;
            }

            RotationHarvestingDM = herbageToRemove * duration;
            durationOfCut = duration;
            // first defoliation
            removeDM(herbageToRemove, defoliationType);
            returnExcreta();
            cumAmountHarvested = HarvestedDM;
            daysCutting = 1;
            DaysAfterCut = 0;
        }

        private void removeDM(double removeAmount, string removeType)
        {
            // get the existing biomass
            double leafLiveWt = (double)zone.Get("Plantain.Leaf.Live.Wt");
            double stemLiveWt = (double)zone.Get("Plantain.Stem.Live.Wt");
            double flowerLiveWt = (double)zone.Get("Plantain.Inflorescence.Live.Wt");
            double leafDeadWt = (double)zone.Get("Plantain.Leaf.Dead.Wt");
            double stemDeadWt = (double)zone.Get("Plantain.Stem.Dead.Wt");
            double flowerDeadWt = (double)zone.Get("Plantain.Inflorescence.Dead.Wt");
            double leafLiveN = (double)zone.Get("Plantain.Leaf.Live.N");
            double stemLiveN = (double)zone.Get("Plantain.Stem.Live.N");
            double flowerLiveN = (double)zone.Get("Plantain.Inflorescence.Live.N");
            double leafDeadN = (double)zone.Get("Plantain.Leaf.Dead.N");
            double stemDeadN = (double)zone.Get("Plantain.Stem.Dead.N");
            double flowerDeadN = (double)zone.Get("Plantain.Inflorescence.Dead.N");

            double existingWt = leafLiveWt + leafDeadWt + stemLiveWt + stemDeadWt + flowerLiveWt + flowerDeadWt;
            double existingN = leafLiveN + leafDeadN + stemLiveN + stemDeadN + flowerLiveN + flowerDeadN;

            // Can we harvest anything?
            double removingWt = Math.Min(existingWt, removeAmount);
            if (removingWt > 0.0)
            {
                // get the fractions to remove for each organ (will override the default values)
                // the default is [Plantain].Leaf.BiomassRemovalDefaults.Cut.FractionRemoved, or equivalent
                // >> double leafFracToRemove = removeAmount * (leafLiveWt + leafDeadWt) / existingWt / existingWt;
                double fracToRemove = removingWt / existingWt;
                double leafFracToRemove = 0.0;
                if ((leafLiveWt + leafDeadWt) > 0.0)
                {
                    if (leafLiveWt < minLeafAmount)
                    {
                        // leafWt cannot go below a minimum
                        leafFracToRemove = (removingWt + leafLiveWt - minLeafAmount) / existingWt;
                    }
                    else
                        leafFracToRemove = fracToRemove;
                }

                double stemFracToRemove = ((stemLiveWt + stemDeadWt) > 0.0) ? fracToRemove : 0.0;
                double flowerFracToRemove = ((flowerLiveWt + flowerDeadWt) > 0.0) ? fracToRemove : 0.0;

                // get the fractions to residue (i.e. wastage - will override the default values)
                // the default is [Plantain].Leaf.BiomassRemovalDefaults.Cut.FractionToResidue, or equivalent
                double leafFracToResidue = leafResidueFrac * leafFracToRemove;
                double stemFracToResidue = stemResidueFrac * stemFracToRemove;
                double flowerFracToResidue = flowerResidueFrac * flowerFracToRemove;

                // correct the values to defoliate (so our removing = remove + residue)
                leafFracToRemove -= leafFracToResidue;
                stemFracToRemove -= stemFracToResidue;
                flowerFracToRemove -= flowerFracToResidue;

                // set removal fractions (these overrides the default removals in the plant)
                removalFractions.SetFractionToRemove("Leaf", leafFracToRemove, "Live");
                removalFractions.SetFractionToResidue("Leaf", leafFracToResidue, "Live");
                removalFractions.SetFractionToRemove("Leaf", leafFracToRemove, "Dead");
                removalFractions.SetFractionToResidue("Leaf", leafFracToResidue, "Dead");
                removalFractions.SetFractionToRemove("Stem", stemFracToRemove, "Live");
                removalFractions.SetFractionToResidue("Stem", stemFracToResidue, "Live");
                removalFractions.SetFractionToRemove("Stem", stemFracToRemove, "Dead");
                removalFractions.SetFractionToResidue("Stem", stemFracToResidue, "Dead");
                removalFractions.SetFractionToRemove("Inflorescence", flowerFracToRemove, "Live");
                removalFractions.SetFractionToResidue("Inflorescence", flowerFracToResidue, "Live");
                removalFractions.SetFractionToRemove("Inflorescence", flowerFracToRemove, "Dead");
                removalFractions.SetFractionToResidue("Inflorescence", flowerFracToResidue, "Dead");

                removalFractions.SetFractionToRemove("Root", 0.0);
                removalFractions.SetFractionToResidue("Root", 0.0);
                removalFractions.SetFractionToRemove("Taproot", 0.0);
                removalFractions.SetFractionToResidue("Taproot", 0.0);

                // Actually do the biomass removal
                Plantain.RemoveBiomass(removeType, removalFractions);

                // get the new existing plant amount
                double postHarvestWt = (double)zone.Get("Plantain.AboveGround.Wt");
                double postHarvestN = (double)zone.Get("Plantain.AboveGround.N");

                // get total defoliation (total plant stuff lost)
                DefoliatedDM = existingWt - postHarvestWt;
                DefoliatedN = existingN - postHarvestN;
                if (DefoliatedDM > 0.0)
                   HarvestedNconc = DefoliatedN/DefoliatedDM;

                // get total harvested (plant stuff removed from plants)
                HarvestedDM = (double)zone.Get("Plantain.Leaf.Removed.Wt")
                + (double)zone.Get("Plantain.Stem.Removed.Wt")
                + (double)zone.Get("Plantain.Inflorescence.Removed.Wt");
                HarvestedN = (double)zone.Get("Plantain.Leaf.Removed.N")
                + (double)zone.Get("Plantain.Stem.Removed.N")
                + (double)zone.Get("Plantain.Inflorescence.Removed.N");

                // get amounts actually removed from field and that to be returned (residue or dung/urine)
                RemovedDM = HarvestedDM * fracDM2Remove;
                RemovedN = HarvestedN * fracN2Remove;
                ReturnedDM = HarvestedDM - RemovedDM;
                ReturnedN = HarvestedN - RemovedN;
                NReturnedInDung = ReturnedN * fracN2Dung;
                NReturnedInUrine = ReturnedN - NReturnedInDung;
            }
            else
            {
            }
        }

        // Return dung and urine
        private void returnExcreta()
        {
            if ((ReturnedDM > 0.0) || (NReturnedInDung > 0.0))
            {
                PMF.BiomassRemovedType BiomassDung = new PMF.BiomassRemovedType();
                string[] type = new string[] { "RuminantDung_PastureFed" };
                float[] dltdm = new float[] { (Single)ReturnedDM };
                float[] dltn = new float[] { (Single)NReturnedInDung };
                float[] dltp = new float[] { 0 };
                float[] fraction = new float[] { 1 };     // fraction is always 1.0 here

                BiomassDung.crop_type = "RuminantDung_PastureFed";
                BiomassDung.dm_type = type;
                BiomassDung.dlt_crop_dm = dltdm;
                BiomassDung.dlt_dm_n = dltn;
                BiomassDung.dlt_dm_p = dltp;
                BiomassDung.fraction_to_residue = fraction;
                BiomassRemoved.Invoke(BiomassDung);
            }

            if (NReturnedInUrine > 0.0)
            {
                fertiliser.Apply(NReturnedInUrine * 10, Fertiliser.Types.UreaN, urineDepth);
            }
        }
    }
}
```
    Manager ExtraVariables
```csharp
using System;
using Models.Core;
using System.Collections.Generic;
using System.Text;
using Models.Soils;
using Models.PMF;
using Models;
using System.Xml.Serialization;
using APSIM.Shared.Utilities;

namespace Models
{
    [Serializable] 
    public class Script : Model
    {
        [Link] Clock Clock;
        [Link] Soils.Soil Soil;
        [Link] Models.SurfaceOM.SurfaceOrganicMatter SOM;
        [Link] Weather Met;
        [Link] Fertiliser Fert;
        [Link] Irrigation Irrig;
        [Link] Plant Plantain;
        [Link] Zone zone;
        [Link] ISummary summary;
                    
        [XmlIgnore] public bool InitialDay { get; set; }
        
        [XmlIgnore] public double AccumPlantN { get; set; }
        [XmlIgnore] public double AccumMineralisation { get; set; }
        [XmlIgnore] public double AccumDenit { get; set; }
        [XmlIgnore] public double AccumFert { get; set; }
        [XmlIgnore] public double AccumLeach { get; set; }
        [XmlIgnore] public double AccumDetach { get; set; }
        [XmlIgnore] public double DeltaSoilOMN { get; set; }
        [XmlIgnore] public double DeltaSurfaceOMN { get; set; }
        [XmlIgnore] public double DeltaSoilMineralN { get; set; }
        [XmlIgnore] public double SoilNitrogenContent { get; set; }
        
        [XmlIgnore] public double AccumEO { get; set; }
        [XmlIgnore] public double AccumEP { get; set; }
        [XmlIgnore] public double AccumES { get; set; }
        [XmlIgnore] public double AccumDrainage { get; set; }
        [XmlIgnore] public double AccumRunoff { get; set; }
        [XmlIgnore] public double AccumOutflowLat { get; set; }
        [XmlIgnore] public double AccumIrrigation { get; set; }
        [XmlIgnore] public double AccumRainfall { get; set; }
        [XmlIgnore] public double SoilWaterDeficit { get; set; }
    
        [XmlIgnore] public double  InitialSoilOMN { get; set; }
        [XmlIgnore] public double  InitialSurfaceOMN { get; set; }
        [XmlIgnore] public double  InitialMineralN { get; set; }
        
        [XmlIgnore] public double SWC { get; set; }
        [XmlIgnore] public double DUL { get; set; }
        [XmlIgnore] public double OutFlowLat { get; set; }

        [XmlIgnore] public double FomN { get; set; }
        [XmlIgnore] public double BiomN { get; set; }
        [XmlIgnore] public double HumN { get; set; }
        [XmlIgnore] public double OrganicN { get; set; }
        [XmlIgnore] public double NO3N { get; set; }
        [XmlIgnore] public double NH4N { get; set; }
        [XmlIgnore] public double UreaN { get; set; }
        [XmlIgnore] public double MineralN { get; set; }
        [XmlIgnore] public double DltNMinRes { get; set; }
        [XmlIgnore] public double DltNMinTot { get; set; }
        
        [XmlIgnore] public double LeafFraction { get; set; }
        [XmlIgnore] public double StemFraction { get; set; }
        [XmlIgnore] public double InflorescenceFraction { get; set; }
        
        [XmlIgnore] public double ShootRootRatio { get; set; }

        [XmlIgnore] public double Leaf_DMSupply { get; set; }
        [XmlIgnore] public double Stem_DMSupply { get; set; }
        [XmlIgnore] public double Inflorescence_DMSupply { get; set; }
        [XmlIgnore] public double Root_DMSupply { get; set; }
        [XmlIgnore] public double Taproot_DMSupply { get; set; }
        [XmlIgnore] public double Leaf_DMDemand { get; set; }
        [XmlIgnore] public double Stem_DMDemand { get; set; }
        [XmlIgnore] public double Inflorescence_DMDemand { get; set; }
        [XmlIgnore] public double Root_DMDemand { get; set; }
        [XmlIgnore] public double Taproot_DMDemand { get; set; }
        
        [XmlIgnore] public double Leaf_NSupply { get; set; }
        [XmlIgnore] public double Stem_NSupply { get; set; }
        [XmlIgnore] public double Inflorescence_NSupply { get; set; }
        [XmlIgnore] public double Taproot_NSupply { get; set; }
        [XmlIgnore] public double Root_NSupply { get; set; }
        [XmlIgnore] public double Leaf_NDemand { get; set; }
        [XmlIgnore] public double Stem_NDemand { get; set; }
        [XmlIgnore] public double Inflorescence_NDemand { get; set; }
        [XmlIgnore] public double Taproot_NDemand { get; set; }
        [XmlIgnore] public double Root_NDemand { get; set; }
        
        [XmlIgnore] public double Leaf_NSupplyReallocation { get; set; }
        [XmlIgnore] public double Stem_NSupplyReallocation { get; set; }
        [XmlIgnore] public double Root_NSupplyReallocation { get; set; }
        
        [XmlIgnore] public double AccumHarvestedWt { get; set; }

        private DateTime YearStartDate;
    
        [EventSubscribe("Commencing")]
        private void OnSimulationCommencing(object sender, EventArgs e)
        {
            InitialDay = true;
        }
        
        [EventSubscribe("DoManagement")]
        private void OnDoManagement(object sender, EventArgs e)
        {
            //!!!!!! Nitrogen balance components !!!!!!
            //!!!!!!^^^^^^^^^^^^^^^^^^^^^^^^^^^^^!!!!!!
            FomN = MathUtilities.Sum(Soil.SoilNitrogen.FOMN);
            HumN = MathUtilities.Sum(Soil.SoilNitrogen.HumicN);
            BiomN = MathUtilities.Sum(Soil.SoilNitrogen.MicrobialN);
            OrganicN = FomN + HumN + BiomN;
            NO3N = MathUtilities.Sum(Soil.NO3N);
            NH4N = MathUtilities.Sum(Soil.NH4N);
            UreaN = MathUtilities.Sum(Soil.SoilNitrogen.urea);
            MineralN = NO3N + NH4N + UreaN; 
            DltNMinRes = MathUtilities.Sum(Soil.SoilNitrogen.dlt_n_min_res);
            DltNMinTot = MathUtilities.Sum(Soil.SoilNitrogen.MineralisedN);
            int layers = Soil.Thickness.Length;
            if (InitialDay == true)
            {
                InitialSurfaceOMN = SOM.N;
                InitialSoilOMN = OrganicN;
                InitialMineralN = MineralN;
                InitialDay = false;

                // check whether we're in the north or south hemisphere
                if (Met.Latitude >= 0.0)
                    YearStartDate = DateTime.Parse("01/01/2000");
                else
                    YearStartDate = DateTime.Parse("01/07/2000");
            }
            DeltaSurfaceOMN = SOM.N - InitialSurfaceOMN;
            AccumLeach = AccumLeach - Soil.SoilWater.LeachNH4 - Soil.SoilWater.LeachNO3 - Soil.SoilWater.LeachUrea; //Fails
            AccumMineralisation += MathUtilities.Sum(Soil.SoilNitrogen.MineralisedN);
            AccumDenit -= MathUtilities.Sum(Soil.SoilNitrogen.Denitrification);
            AccumPlantN -= (double)zone.Get("Plantain.Root.NUptake");
            DeltaSoilOMN = OrganicN - InitialSoilOMN;
            DeltaSoilMineralN = MineralN - InitialMineralN;
            SoilNitrogenContent = MineralN;
            
            //!!!!!! Water balance components !!!!!!
            //!!!!!!^^^^^^^^^^^^^^^^^^^^^^^^^^!!!!!!

            AccumRainfall += Met.Rain;
            //AccumEP -= (double)zone.Get("[Plantain].Leaf.Transpiration");
            AccumEP -= (double)zone.Get("Plantain.Root.WaterUptake");
            SoilWaterDeficit = (SWC - DUL);
            double OutFlowLat = MathUtilities.Sum(Soil.SoilWater.outflow_lat);
            AccumOutflowLat -= OutFlowLat;
            
            //!!!!!! Stem and leaf fraction !!!!!!
            if ((double)zone.Get("Plantain.AboveGround.Wt") > 0)
            {
                LeafFraction = (double)zone.Get("Plantain.Leaf.Wt") / (double)zone.Get("Plantain.AboveGround.Wt");
                StemFraction = (double)zone.Get("Plantain.Stem.Wt") / (double)zone.Get("Plantain.AboveGround.Wt");
                InflorescenceFraction = (double)zone.Get("Plantain.Inflorescence.Wt") / (double)zone.Get("Plantain.AboveGround.Wt");
            }
            else
            {
                LeafFraction = 0;
                StemFraction = 0;
            }
            
            //!!!!!! Plant DM components !!!!!!
            //!!!!!!^^^^^^^^^^^^^^^^^^^^^^^^^^!!!!!!
            ShootRootRatio = MathUtilities.Divide((double)zone.Get("Plantain.AboveGroundLive.Wt"), (double)zone.Get("Plantain.BelowGroundLive.Wt"), 0.0);
            PMF.Interfaces.BiomassSupplyType Leaf_DMSupplies = (PMF.Interfaces.BiomassSupplyType)zone.Get("Plantain.Leaf.DMSupply");
            PMF.Interfaces.BiomassSupplyType Stem_DMSupplies = (PMF.Interfaces.BiomassSupplyType)zone.Get("Plantain.Stem.DMSupply");
            PMF.Interfaces.BiomassSupplyType Inflorescence_DMSupplies = (PMF.Interfaces.BiomassSupplyType)zone.Get("Plantain.Inflorescence.DMSupply");
            PMF.Interfaces.BiomassSupplyType Root_DMSupplies = (PMF.Interfaces.BiomassSupplyType)zone.Get("Plantain.Root.DMSupply");
            PMF.Interfaces.BiomassSupplyType Taproot_DMSupplies = (PMF.Interfaces.BiomassSupplyType)zone.Get("Plantain.Taproot.DMSupply");
            PMF.Interfaces.BiomassPoolType Leaf_DMDemands = (PMF.Interfaces.BiomassPoolType)zone.Get("Plantain.Leaf.DMDemand");
            PMF.Interfaces.BiomassPoolType Stem_DMDemands = (PMF.Interfaces.BiomassPoolType)zone.Get("Plantain.Stem.DMDemand");
            PMF.Interfaces.BiomassPoolType Inflorescence_DMDemands = (PMF.Interfaces.BiomassPoolType)zone.Get("Plantain.Inflorescence.DMDemand");
            PMF.Interfaces.BiomassPoolType Root_DMDemands = (PMF.Interfaces.BiomassPoolType)zone.Get("Plantain.Root.DMDemand");
            PMF.Interfaces.BiomassPoolType Taproot_DMDemands = (PMF.Interfaces.BiomassPoolType)zone.Get("Plantain.Taproot.DMDemand");

            PMF.Interfaces.BiomassSupplyType Leaf_NSupplies = (PMF.Interfaces.BiomassSupplyType)zone.Get("Plantain.Leaf.NSupply");
            PMF.Interfaces.BiomassSupplyType Stem_NSupplies = (PMF.Interfaces.BiomassSupplyType)zone.Get("Plantain.Stem.NSupply");
            PMF.Interfaces.BiomassSupplyType Inflorescence_NSupplies = (PMF.Interfaces.BiomassSupplyType)zone.Get("Plantain.Inflorescence.NSupply");
            PMF.Interfaces.BiomassSupplyType Taproot_NSupplies = (PMF.Interfaces.BiomassSupplyType)zone.Get("Plantain.Taproot.NSupply");
            PMF.Interfaces.BiomassSupplyType Root_NSupplies = (PMF.Interfaces.BiomassSupplyType)zone.Get("Plantain.Root.NSupply");
            
            PMF.Interfaces.BiomassPoolType Leaf_NDemands = (PMF.Interfaces.BiomassPoolType)zone.Get("Plantain.Leaf.NDemand");
            PMF.Interfaces.BiomassPoolType Stem_NDemands = (PMF.Interfaces.BiomassPoolType)zone.Get("Plantain.Stem.NDemand");
            PMF.Interfaces.BiomassPoolType Inflorescence_NDemands = (PMF.Interfaces.BiomassPoolType)zone.Get("Plantain.Inflorescence.NDemand");
            PMF.Interfaces.BiomassPoolType Taproot_NDemands = (PMF.Interfaces.BiomassPoolType)zone.Get("Plantain.Taproot.NDemand");
            PMF.Interfaces.BiomassPoolType Root_NDemands = (PMF.Interfaces.BiomassPoolType)zone.Get("Plantain.Root.NDemand");
            
            Leaf_DMSupply = Leaf_DMSupplies.Fixation + Leaf_DMSupplies.Uptake + Leaf_DMSupplies.Reallocation + Leaf_DMSupplies.Retranslocation;
            Stem_DMSupply = Stem_DMSupplies.Fixation + Stem_DMSupplies.Uptake + Stem_DMSupplies.Reallocation + Stem_DMSupplies.Retranslocation;
            Inflorescence_DMSupply = Inflorescence_DMSupplies.Fixation + Inflorescence_DMSupplies.Uptake + Inflorescence_DMSupplies.Reallocation + Inflorescence_DMSupplies.Retranslocation;
            Root_DMSupply = Root_DMSupplies.Fixation + Root_DMSupplies.Uptake + Root_DMSupplies.Reallocation + Root_DMSupplies.Retranslocation;
            Taproot_DMSupply = Taproot_DMSupplies.Fixation + Taproot_DMSupplies.Uptake + Taproot_DMSupplies.Reallocation + Taproot_DMSupplies.Retranslocation;
            Leaf_DMDemand = Leaf_DMDemands.Structural + Leaf_DMDemands.Storage + Leaf_DMDemands.Metabolic;
            Stem_DMDemand = Stem_DMDemands.Structural + Stem_DMDemands.Storage + Stem_DMDemands.Metabolic;
            Inflorescence_DMDemand = Inflorescence_DMDemands.Structural + Inflorescence_DMDemands.Storage + Inflorescence_DMDemands.Metabolic;
            Root_DMDemand = Root_DMDemands.Structural + Root_DMDemands.Storage + Root_DMDemands.Metabolic;
            Taproot_DMDemand = Taproot_DMDemands.Structural + Taproot_DMDemands.Storage + Taproot_DMDemands.Metabolic;
            
            Leaf_NSupply = Leaf_NSupplies.Fixation + Leaf_NSupplies.Uptake + Leaf_NSupplies.Reallocation + Leaf_NSupplies.Retranslocation;
            Stem_NSupply = Stem_NSupplies.Fixation + Stem_NSupplies.Uptake + Stem_NSupplies.Reallocation + Stem_NSupplies.Retranslocation;
            Inflorescence_NSupply = Inflorescence_NSupplies.Fixation + Inflorescence_NSupplies.Uptake + Inflorescence_NSupplies.Reallocation + Inflorescence_NSupplies.Retranslocation;
            Taproot_NSupply = Taproot_NSupplies.Fixation + Taproot_NSupplies.Uptake + Taproot_NSupplies.Reallocation + Taproot_NSupplies.Retranslocation;
            Root_NSupply = Root_NSupplies.Fixation + Root_NSupplies.Uptake + Root_NSupplies.Reallocation + Root_NSupplies.Retranslocation;

            Leaf_NDemand = Leaf_NDemands.Structural + Leaf_NDemands.Storage + Leaf_NDemands.Metabolic;
            Stem_NDemand = Stem_NDemands.Structural + Stem_NDemands.Storage + Stem_NDemands.Metabolic;
            Inflorescence_NDemand = Inflorescence_NDemands.Structural + Inflorescence_NDemands.Storage + Inflorescence_NDemands.Metabolic;
            Taproot_NDemand = Taproot_NDemands.Structural + Taproot_NDemands.Storage + Taproot_NDemands.Metabolic;
            Root_NDemand = Root_NDemands.Structural + Root_NDemands.Storage + Root_NDemands.Metabolic;

            Leaf_NSupplyReallocation = Leaf_NSupplies.Reallocation;
            Stem_NSupplyReallocation = Stem_NSupplies.Reallocation;
            Root_NSupplyReallocation = Root_NSupplies.Reallocation;
            
            //!!!!!! Plant Harvest !!!!!!
            if (Clock.Today.DayOfYear == YearStartDate.DayOfYear)
                AccumHarvestedWt = (double)zone.Get("[Defoliate].Script.DefoliatedDM");
            else
                AccumHarvestedWt += (double)zone.Get("[Defoliate].Script.DefoliatedDM");            
        }
        
        [EventSubscribe("DoManagementCalculations")]
        private void OnDoManagementCalculations(object sender, EventArgs e)
        {
            FomN = MathUtilities.Sum(Soil.SoilNitrogen.FOMN);
            HumN = MathUtilities.Sum(Soil.SoilNitrogen.HumicN);
            BiomN = MathUtilities.Sum(Soil.SoilNitrogen.MicrobialN);
            AccumFert += Fert.NitrogenApplied;
            AccumIrrigation += Irrig.IrrigationApplied;
            
            
            AccumEO -= Soil.SoilWater.Eo;
            AccumES -= Soil.SoilWater.Es; 
            AccumDrainage -= Soil.SoilWater.Drainage;
            AccumRunoff -= Soil.SoilWater.Runoff;
            SWC = MathUtilities.Sum(Soil.SoilWater.SWmm);
            DUL = MathUtilities.Sum(Soil.DULmm);
        }
    }
}
```
    Report: EventNames=[Clock].DoReport
      VariableNames:
        [Clock].Today as Date
        [MicroClimate].net_radn
        [Weather].Radn as SolarRadiation
        [Plantain].Leaf.RadIntTot as InterceptedRadiation
        [Weather].Rain as Rainfall
        [Irrigation].IrrigationApplied as IrrigationApplied
        [Soil].SoilWater.Eo as Eo
        [Soil].SoilWater.Es as Evaporation
        [Plantain].Leaf.Transpiration as Transpiration
        [Soil].SoilWater.pond as PondedWater
        [Soil].SoilWater.Drainage as Drainage
        [Soil].SoilWater.Runoff as Runoff
        sum([Soil].SoilWater.outflow_lat) as LateralFlow
        sum([Soil].SoilWater.SWmm) as TotalSWC
        sum([Soil].DULmm) as TotalDUL
        [Fertiliser].NitrogenApplied as FertiliserN
        sum([Soil].SoilNitrogen.Denitrification) as DenitrifiedN
        ([Soil].SoilWater.LeachNH4 + [Soil].SoilWater.LeachNO3) as LeachedN
        (-1*[Plantain].Root.NUptake) as UptakeN
        sum([Soil].SoilNitrogen.MineralisedN) as MineralisedSoilN
        sum([Soil].SoilNitrogen.dlt_n_min_res) as MineralisedSurfOMN
        ([Plantain].Leaf.Detached.N+[Plantain].Stem.Detached.N+[Plantain].Inflorescence.Detached.N) as DetachedAGN
        ([Plantain].Taproot.Detached.N+[Plantain].Root.Detached.N) as DetachedBGN
        (sum([Soil].SoilNitrogen.urea) + sum([Soil].SoilNitrogen.NH4) + sum([Soil].SoilNitrogen.NO3)) as SoilNContent
        sum([Soil].SoilNitrogen.urea) as SoilUrea
        sum([Soil].SoilNitrogen.NH4) as SoilNH4
        sum([Soil].SoilNitrogen.NO3) as SoilNO3
        (sum([Soil].SoilNitrogen.NH4[1:3])+sum([Soil].SoilNitrogen.NO3[1:3])) as TopSoilN
        [SurfaceOrganicMatter].N as TotalSurfOMN
        sum([Soil].SoilNitrogen.FOMN) as TotalFOMN
        sum([Soil].SoilNitrogen.HumicN) as TotalHumicN
        sum([Soil].SoilNitrogen.MicrobialN as TotalMicrobialN
        ([Plantain].Total.N) as TotalPlantN
        [Defoliate].Script.RotationHarvestingDM
        [Defoliate].Script.RotationHarvestedDM as RotationHarvestedWt
        [Defoliate].Script.PreHarvestDM
        [Defoliate].Script.PostHarvestDM
        [Defoliate].Script.DefoliatedDM
        [Defoliate].Script.HarvestedDM
        [Defoliate].Script.RemovedDM
        [Defoliate].Script.DefoliatedN
        [Defoliate].Script.HarvestedN
        [Defoliate].Script.RemovedN
        [Defoliate].Script.NReturnedInDung
        [Defoliate].Script.NReturnedInUrine
        [Defoliate].Script.DefoliatedDM as HarvestedWt
        [Defoliate].Script.DaysAfterCut
        [ExtraVariables].Script.AccumHarvestedWt as CumulativeHarvestedWt
        [Defoliate].Script.HarvestedNconc
        [Plantain].Phenology.ThermalTime.Value()
        [Plantain].Phenology.Photoperiod.Value()
        [Plantain].Phenology.Vernalisation.TodaysVernalisation
        [Plantain].Phenology.Vernalisation.DaysVernalised
        [Plantain].Population
        [Plantain].Phenology.CurrentPhaseName
        [Plantain].Phenology.Stage
        [Plantain].Root.LengthDensity
        [Plantain].Leaf.ExtinctionCoefficientFunction.Value()
        [Plantain].AboveGroundLive.Wt
        ([Plantain].Leaf.Live.Wt / ([Plantain].AboveGroundLive.Wt + 0.000001)) as LeafFraction
        ([Plantain].Stem.Live.Wt / ([Plantain].AboveGroundLive.Wt + 0.000001)) as StemFraction
        ([Plantain].Inflorescence.Live.Wt / ([Plantain].AboveGroundLive.Wt + 0.000001)) as FlowerFraction
        ([Plantain].Taproot.Live.Wt / ([Plantain].BelowGround.Wt + 0.000001)) as TaprootFraction
        ([Plantain].Root.Live.Wt / ([Plantain].BelowGround.Wt + 0.000001)) as RootFraction
        [Plantain].Arbitrator.DM.TotalFixationSupply
        [Plantain].Arbitrator.DM.TotalPlantDemand
        [Plantain].Arbitrator.DM.Allocated
        [Plantain].Arbitrator.DM.SinkLimitation
        [Plantain].Arbitrator.DM.NutrientLimitation
        [Plantain].Arbitrator.FDM
        [ExtraVariables].Script.Leaf_DMSupply
        [ExtraVariables].Script.Stem_DMSupply
        [ExtraVariables].Script.Inflorescence_DMSupply
        [ExtraVariables].Script.Root_DMSupply
        [ExtraVariables].Script.Taproot_DMSupply
        [ExtraVariables].Script.Leaf_DMDemand
        [ExtraVariables].Script.Stem_DMDemand
        [ExtraVariables].Script.Inflorescence_DMDemand
        [ExtraVariables].Script.Root_DMDemand
        [ExtraVariables].Script.Taproot_DMDemand
        [Plantain].Arbitrator.N.TotalPlantSupply
        [Plantain].Arbitrator.N.TotalPlantDemand
        [Plantain].Arbitrator.N.Allocated
        [Plantain].Arbitrator.FN
        [Plantain].Arbitrator.WSupply
        [Plantain].Arbitrator.WDemand
        [Plantain].Arbitrator.WAllocated
        [Plantain].Arbitrator.FW
        [Plantain].Root.NSupplyUptake
        [Plantain].Root.NTakenUp
        [Plantain].Root.NSupply.Uptake
        [Plantain].Root.NUptake
        [ExtraVariables].Script.Leaf_NSupply
        [ExtraVariables].Script.Stem_NSupply
        [ExtraVariables].Script.Inflorescence_NSupply
        [ExtraVariables].Script.Root_NSupply
        [ExtraVariables].Script.Taproot_NSupply
        [ExtraVariables].Script.Leaf_NDemand
        [ExtraVariables].Script.Stem_NDemand
        [ExtraVariables].Script.Inflorescence_NDemand
        [ExtraVariables].Script.Root_NDemand
        [ExtraVariables].Script.Taproot_NDemand
        [Plantain].ShootRootRatio.Value()
        [Plantain].TargetShootRootRatio.Value()
        [Plantain].AdjustedShootRootRatio.Value()
        [Plantain].Leaf.DMDemandFunction.PartitionFraction.Value()
        [Plantain].Stem.DMDemandFunction.PartitionFraction.Value()
        [Plantain].Inflorescence.DMDemandFunction.PartitionFraction.Value()
        [Plantain].Taproot.DMDemandFunction.PartitionFraction.Value()
        [Plantain].Root.PartitionFraction.Value()
        [Plantain].StemsLeafRatio.Value()
        [Plantain].FlowerStemRatio.Value()
        [Plantain].TaprootRootRatio.Value()
        [Plantain].TargetStemsLeafRatio.Value()
        [Plantain].TargetFlowerStemRatio.Value()
        [Plantain].TargetTaprootRootRatio.Value()
        [Plantain].Total.Wt
        [Plantain].Total.N
        [Plantain].Total.NConc
        [Plantain].AboveGround.Wt
        [Plantain].BelowGround.Wt
        [Plantain].AboveGround.N
        [Plantain].BelowGround.N
        [Plantain].AboveGroundLive.NConc
        [Plantain].BelowGroundLive.NConc
        [Plantain].Leaf.Wt
        [Plantain].Leaf.Live.Wt
        [Plantain].Leaf.Live.N
        [Plantain].Leaf.Live.NConc
        [Plantain].Leaf.Dead.Wt
        [Plantain].Leaf.Dead.NConc
        [Plantain].Leaf.CoverTotal
        [Plantain].Leaf.CoverGreen
        [Plantain].Leaf.CoverDead
        [Plantain].Leaf.LAITotal
        [Plantain].Leaf.LAI
        [Plantain].Leaf.LAIDead
        [Plantain].Leaf.Height
        [Plantain].Leaf.PotentialBiomass.Value()
        [Plantain].Leaf.Transpiration
        [Plantain].Leaf.Fw
        [Plantain].Leaf.Fn
        [Plantain].Leaf.Photosynthesis.FCO2
        [Plantain].Leaf.Photosynthesis.FN
        [Plantain].Leaf.Photosynthesis.FT
        [Plantain].Leaf.Photosynthesis.FW
        [Plantain].Leaf.Photosynthesis.FVPD
        [Plantain].Leaf.FRGR
        [Plantain].Stem.Live.Wt
        [Plantain].Stem.Live.N
        [Plantain].Stem.Live.NConc
        [Plantain].Stem.Dead.Wt
        [Plantain].Stem.Dead.NConc
        [Plantain].Inflorescence.Live.Wt
        [Plantain].Inflorescence.Live.N
        [Plantain].Inflorescence.Live.NConc
        [Plantain].Inflorescence.Dead.Wt
        [Plantain].Inflorescence.Dead.NConc
        [Plantain].Taproot.Live.Wt
        [Plantain].Taproot.Live.N
        [Plantain].Taproot.Live.NConc
        [Plantain].Taproot.Dead.Wt
        [Plantain].Taproot.Dead.NConc
        [Plantain].Root.Live.Wt
        [Plantain].Root.Live.N
        [Plantain].Root.Live.NConc
        [Plantain].Root.Dead.Wt
        [Plantain].Root.Dead.NConc
        [Plantain].Root.Depth
        [Plantain].Root.WaterDemand
        [Plantain].Root.WaterUptake
        [Plantain].Leaf.Live.StructuralWt
        [Plantain].Leaf.Live.StorageWt
        [Plantain].Leaf.Live.MetabolicWt
        [Plantain].Leaf.Live.StructuralN
        [Plantain].Leaf.Live.StorageN
        [Plantain].Leaf.Live.MetabolicN
        [Plantain].Leaf.Dead.StructuralWt
        [Plantain].Leaf.Dead.StorageWt
        [Plantain].Leaf.Dead.MetabolicWt
        [Plantain].Leaf.Dead.StructuralN
        [Plantain].Leaf.Dead.StorageN
        [Plantain].Leaf.Dead.MetabolicN
        [Plantain].Stem.Live.StructuralWt
        [Plantain].Stem.Live.StorageWt
        [Plantain].Stem.Live.MetabolicWt
        [Plantain].Stem.Live.StructuralN
        [Plantain].Stem.Live.StorageN
        [Plantain].Inflorescence.Live.StructuralWt
        [Plantain].Inflorescence.Live.StorageWt
        [Plantain].Inflorescence.Live.StructuralN
        [Plantain].Inflorescence.Live.StorageN
        [Plantain].Root.Live.StructuralWt
        [Plantain].Root.Live.StorageWt
        [Plantain].Root.Live.StructuralN
        [Plantain].Root.Live.StorageN
        [Plantain].Taproot.Live.StructuralWt
        [Plantain].Taproot.Live.StorageWt
        [Plantain].Taproot.Live.StructuralN
        [Plantain].Taproot.Live.StorageN
        [Plantain].Leaf.Live.StructuralNConc
        [Plantain].Leaf.Live.StorageNConc
        [Plantain].Root.Live.StructuralNConc
        [Plantain].Root.Live.StorageNConc
        [Plantain].Leaf.DMDemandFunction.PartitionFraction.Value()
        [Plantain].Stem.DMDemandFunction.PartitionFraction.Value()
        [Plantain].Inflorescence.DMDemandFunction.PartitionFraction.Value()
        [Plantain].Root.PartitionFraction.Value()
        [Plantain].Taproot.DMDemandFunction.PartitionFraction.Value()
        [Plantain].Leaf.Allocated.Wt
        [Plantain].Stem.Allocated.Wt
        [Plantain].Inflorescence.Allocated.Wt
        [Plantain].Taproot.Allocated.Wt
        [Plantain].Root.Allocated.Wt
        [Plantain].Leaf.Senesced.Wt
        [Plantain].Stem.Senesced.Wt
        [Plantain].Inflorescence.Senesced.Wt
        [Plantain].Taproot.Senesced.Wt
        [Plantain].Root.Senesced.Wt
        [Plantain].Leaf.Detached.Wt
        [Plantain].Stem.Detached.Wt
        [Plantain].Inflorescence.Detached.Wt
        [Plantain].Taproot.Detached.Wt
        [Plantain].Root.Detached.Wt
        [Plantain].Leaf.Removed.Wt
        [Plantain].Stem.Removed.Wt
        [Plantain].Inflorescence.Removed.Wt
        [Plantain].Taproot.Removed.Wt
        [Plantain].Root.Removed.Wt
  DataStore
    ExcelInput Observed: FileName=Observed.xlsx; SheetNames=[Observed]
    PredictedObserved: PredictedTableName=Report; ObservedTableName=Observed; FieldNameUsedForMatch=Date
      Tests
        Memo Note
          Where:
           - n: The number of PO (predicted-observed) pairs for the given variable;
           - Slope: The slope of the straight line linear regression. A perfect fit would have a value of 1;
           - Intercept: The intercept of the straight line linear regression. A perfect fit would have a value of 0;
           - SEslope: Standard error in the slope;
           - SEintercept: Standard error in the intercept.;
           - R2: The value for the coefficient of determination. It varies between 0 and 1, where 1 is a perfect fit;
           - RMSE: Root Mean Squared Error. 0 is a perfect fit. Values less than half the standard deviation of the observed data are acceptable;
           - NSE: Nash-Sutcliffe Efficiency. Indicates how well the PO data fits the 1:1 line. Ranges from -∞ to 1 with 1 being the optimal value while values  between 0 and 1 are generally viewed as acceptable. Values < 0 indicate unacceptable model performance;
           - ME: Mean Error between predicted and observed values. 0 is a perfect fit;
           - MAE: Mean Absolute Error. 0 is a perfect fit. Values less than half the standard deviation of the observed data are acceptable;
           - RSR: Ratio between the RMSE and the standard deviation of observations. 0 is a perfect fit;
  Folder Validation
    Memo Note
      The performance of the plantain model is evaluated in simulations based on experiments conducted primarily in New Zealand.  Datasets from USA have been added, but they should be taken with caution as there was limited information about the experiments and published results corresponded to annual or seasonal aggregates only.  Note that population is not explicitly simulated by the model, only a decrease in plant numbers as function of cuts or grazings is considered.  The literature suggest that severe defoliation may reduce population by increasing death rate, but mostly is infered from other species and even then the variation is high.  Plantain persistency has been shown to be low, usually restricted to 2-4 years, but very little actuall data is available.

      The model describes N content in the above ground tissues reasonably well only for treatments where N deficit was not high (See results for the FRNL datasets with annual fertiliser rates of 200 kgN/ha and above).  The measured data showed little effect on plant N concentration for the treatment  with nil or low N rates, wehreas the model predicts differences between them.  The variability among replicates is high and there wer only three or four replicates, this may blur some of the differences.   Also, there was no information from which potential sources of nitrogen, such as soil mineralisation or N fixation from 'weeds' (the present of white clover was noted), could be identified and used to adjust the simulations.  Besides these isses, some of the underlying PMF code may need to be upgraded in order to describe some processes under plant cut/grazing and re-growth conditions.  Processes for computing N demand and supply (especially regarding remobilisation within living tissues) are still under developement and this needs especific detailed datasets.  The SimpleLeaf module was employed to simulate the plant canopy in the plantain model, this was done because there was not enough data to parameterise the more complex PMF approach.  This means that the model has only one leaf cohort with simple N thresholds (only maximum and minimum), this may be too simplistic to capture the nuances of the re-growth processes especially when sustained by the remobilisation from storage organs (taproot and old tissue).  The model will be upgraded in the near future as the work on the code to improve the description of those specific processes is ongoing.
    Folder New Zealand
      Experiment FRNLLincoln
        Memo
          ###FRNL Lincoln###

          Simulation setup based on field trial performed at Lincoln University Research Dairy Farm, New Zealand, between 2014 and 2016.  The experiment was part of the FRNL (Forages for Reduced Nitrogen Leaching) program and the data is basically unpublished (references will be added when this come about).  Here only plots with pure plantain are used.
          The experiment consisted of six fertiliser treatments (N rates of 0, 50, 100, 200, 350 and 500 kg/ha/yr) in four replicates, and measurements comprised yield and quality indicators (here N content is used).
          Data supplied by Grant Edwards, Lincoln University.

          The soil at the experimental site was a Templeton fine sandy loam (an Immature Pallic soil, USDA: Udic Haplustept), the required parameters were inferred based on data from the New Zealand National Soils Database (Landcare Research).
          Weather data was obtained from nearby Broadfields weather station (NIWA).
        Factors
          Factor NRate: Specifications=[NRate]
            Operations 0
            Operations 50
              2014-10-08  [Fertiliser].Apply(Amount: 5, Type: Fertiliser.Types.UreaN, Depth: 10)
              2014-10-31  [Fertiliser].Apply(Amount: 5, Type: Fertiliser.Types.UreaN, Depth: 10)
              2014-11-26  [Fertiliser].Apply(Amount: 5, Type: Fertiliser.Types.UreaN, Depth: 10)
              2014-12-17  [Fertiliser].Apply(Amount: 5, Type: Fertiliser.Types.UreaN, Depth: 10)
              2015-01-20  [Fertiliser].Apply(Amount: 5, Type: Fertiliser.Types.UreaN, Depth: 10)
              2015-02-12  [Fertiliser].Apply(Amount: 5, Type: Fertiliser.Types.UreaN, Depth: 10)
              2015-03-10  [Fertiliser].Apply(Amount: 5, Type: Fertiliser.Types.UreaN, Depth: 10)
              2015-04-17  [Fertiliser].Apply(Amount: 5, Type: Fertiliser.Types.UreaN, Depth: 10)
              2015-05-20  [Fertiliser].Apply(Amount: 5, Type: Fertiliser.Types.UreaN, Depth: 10)
              2015-09-09  [Fertiliser].Apply(Amount: 5, Type: Fertiliser.Types.UreaN, Depth: 10)
              2015-10-06  [Fertiliser].Apply(Amount: 5, Type: Fertiliser.Types.UreaN, Depth: 10)
              2015-11-06  [Fertiliser].Apply(Amount: 5, Type: Fertiliser.Types.UreaN, Depth: 10)
              2015-12-09  [Fertiliser].Apply(Amount: 5, Type: Fertiliser.Types.UreaN, Depth: 10)
              2016-01-07  [Fertiliser].Apply(Amount: 5, Type: Fertiliser.Types.UreaN, Depth: 10)
              2016-02-10  [Fertiliser].Apply(Amount: 5, Type: Fertiliser.Types.UreaN, Depth: 10)
              2016-03-07  [Fertiliser].Apply(Amount: 5, Type: Fertiliser.Types.UreaN, Depth: 10)
              2016-04-02  [Fertiliser].Apply(Amount: 5, Type: Fertiliser.Types.UreaN, Depth: 10)
              2016-05-04  [Fertiliser].Apply(Amount: 5, Type: Fertiliser.Types.UreaN, Depth: 10)
              2016-08-31  [Fertiliser].Apply(Amount: 5, Type: Fertiliser.Types.UreaN, Depth: 10)
              2016-10-05  [Fertiliser].Apply(Amount: 5, Type: Fertiliser.Types.UreaN, Depth: 10)
            Operations 100
              2014-10-08  [Fertiliser].Apply(Amount: 10, Type: Fertiliser.Types.UreaN, Depth: 10)
              2014-10-31  [Fertiliser].Apply(Amount: 10, Type: Fertiliser.Types.UreaN, Depth: 10)
              2014-11-26  [Fertiliser].Apply(Amount: 10, Type: Fertiliser.Types.UreaN, Depth: 10)
              2014-12-17  [Fertiliser].Apply(Amount: 10, Type: Fertiliser.Types.UreaN, Depth: 10)
              2015-01-20  [Fertiliser].Apply(Amount: 10, Type: Fertiliser.Types.UreaN, Depth: 10)
              2015-02-12  [Fertiliser].Apply(Amount: 10, Type: Fertiliser.Types.UreaN, Depth: 10)
              2015-03-10  [Fertiliser].Apply(Amount: 10, Type: Fertiliser.Types.UreaN, Depth: 10)
              2015-04-17  [Fertiliser].Apply(Amount: 10, Type: Fertiliser.Types.UreaN, Depth: 10)
              2015-05-20  [Fertiliser].Apply(Amount: 10, Type: Fertiliser.Types.UreaN, Depth: 10)
              2015-09-09  [Fertiliser].Apply(Amount: 10, Type: Fertiliser.Types.UreaN, Depth: 10)
              2015-10-06  [Fertiliser].Apply(Amount: 10, Type: Fertiliser.Types.UreaN, Depth: 10)
              2015-11-06  [Fertiliser].Apply(Amount: 10, Type: Fertiliser.Types.UreaN, Depth: 10)
              2015-12-09  [Fertiliser].Apply(Amount: 10, Type: Fertiliser.Types.UreaN, Depth: 10)
              2016-01-07  [Fertiliser].Apply(Amount: 10, Type: Fertiliser.Types.UreaN, Depth: 10)
              2016-02-10  [Fertiliser].Apply(Amount: 10, Type: Fertiliser.Types.UreaN, Depth: 10)
              2016-03-07  [Fertiliser].Apply(Amount: 10, Type: Fertiliser.Types.UreaN, Depth: 10)
              2016-04-02  [Fertiliser].Apply(Amount: 10, Type: Fertiliser.Types.UreaN, Depth: 10)
              2016-05-04  [Fertiliser].Apply(Amount: 10, Type: Fertiliser.Types.UreaN, Depth: 10)
              2016-08-31  [Fertiliser].Apply(Amount: 10, Type: Fertiliser.Types.UreaN, Depth: 10)
              2016-10-05  [Fertiliser].Apply(Amount: 10, Type: Fertiliser.Types.UreaN, Depth: 10)
            Operations 200
              2014-10-08  [Fertiliser].Apply(Amount: 20, Type: Fertiliser.Types.UreaN, Depth: 10)
              2014-10-31  [Fertiliser].Apply(Amount: 20, Type: Fertiliser.Types.UreaN, Depth: 10)
              2014-11-26  [Fertiliser].Apply(Amount: 20, Type: Fertiliser.Types.UreaN, Depth: 10)
              2014-12-17  [Fertiliser].Apply(Amount: 20, Type: Fertiliser.Types.UreaN, Depth: 10)
              2015-01-20  [Fertiliser].Apply(Amount: 20, Type: Fertiliser.Types.UreaN, Depth: 10)
              2015-02-12  [Fertiliser].Apply(Amount: 20, Type: Fertiliser.Types.UreaN, Depth: 10)
              2015-03-10  [Fertiliser].Apply(Amount: 20, Type: Fertiliser.Types.UreaN, Depth: 10)
              2015-04-17  [Fertiliser].Apply(Amount: 20, Type: Fertiliser.Types.UreaN, Depth: 10)
              2015-05-20  [Fertiliser].Apply(Amount: 20, Type: Fertiliser.Types.UreaN, Depth: 10)
              2015-09-09  [Fertiliser].Apply(Amount: 20, Type: Fertiliser.Types.UreaN, Depth: 10)
              2015-10-06  [Fertiliser].Apply(Amount: 20, Type: Fertiliser.Types.UreaN, Depth: 10)
              2015-11-06  [Fertiliser].Apply(Amount: 20, Type: Fertiliser.Types.UreaN, Depth: 10)
              2015-12-09  [Fertiliser].Apply(Amount: 20, Type: Fertiliser.Types.UreaN, Depth: 10)
              2016-01-07  [Fertiliser].Apply(Amount: 20, Type: Fertiliser.Types.UreaN, Depth: 10)
              2016-02-10  [Fertiliser].Apply(Amount: 20, Type: Fertiliser.Types.UreaN, Depth: 10)
              2016-03-07  [Fertiliser].Apply(Amount: 20, Type: Fertiliser.Types.UreaN, Depth: 10)
              2016-04-02  [Fertiliser].Apply(Amount: 20, Type: Fertiliser.Types.UreaN, Depth: 10)
              2016-05-04  [Fertiliser].Apply(Amount: 20, Type: Fertiliser.Types.UreaN, Depth: 10)
              2016-08-31  [Fertiliser].Apply(Amount: 20, Type: Fertiliser.Types.UreaN, Depth: 10)
              2016-10-05  [Fertiliser].Apply(Amount: 20, Type: Fertiliser.Types.UreaN, Depth: 10)
            Operations 350
              2014-10-08  [Fertiliser].Apply(Amount: 35, Type: Fertiliser.Types.UreaN, Depth: 10)
              2014-10-31  [Fertiliser].Apply(Amount: 35, Type: Fertiliser.Types.UreaN, Depth: 10)
              2014-11-26  [Fertiliser].Apply(Amount: 35, Type: Fertiliser.Types.UreaN, Depth: 10)
              2014-12-17  [Fertiliser].Apply(Amount: 35, Type: Fertiliser.Types.UreaN, Depth: 10)
              2015-01-20  [Fertiliser].Apply(Amount: 35, Type: Fertiliser.Types.UreaN, Depth: 10)
              2015-02-12  [Fertiliser].Apply(Amount: 35, Type: Fertiliser.Types.UreaN, Depth: 10)
              2015-03-10  [Fertiliser].Apply(Amount: 35, Type: Fertiliser.Types.UreaN, Depth: 10)
              2015-04-17  [Fertiliser].Apply(Amount: 35, Type: Fertiliser.Types.UreaN, Depth: 10)
              2015-05-20  [Fertiliser].Apply(Amount: 35, Type: Fertiliser.Types.UreaN, Depth: 10)
              2015-09-09  [Fertiliser].Apply(Amount: 35, Type: Fertiliser.Types.UreaN, Depth: 10)
              2015-10-06  [Fertiliser].Apply(Amount: 35, Type: Fertiliser.Types.UreaN, Depth: 10)
              2015-11-06  [Fertiliser].Apply(Amount: 35, Type: Fertiliser.Types.UreaN, Depth: 10)
              2015-12-09  [Fertiliser].Apply(Amount: 35, Type: Fertiliser.Types.UreaN, Depth: 10)
              2016-01-07  [Fertiliser].Apply(Amount: 35, Type: Fertiliser.Types.UreaN, Depth: 10)
              2016-02-10  [Fertiliser].Apply(Amount: 35, Type: Fertiliser.Types.UreaN, Depth: 10)
              2016-03-07  [Fertiliser].Apply(Amount: 35, Type: Fertiliser.Types.UreaN, Depth: 10)
              2016-04-02  [Fertiliser].Apply(Amount: 35, Type: Fertiliser.Types.UreaN, Depth: 10)
              2016-05-04  [Fertiliser].Apply(Amount: 35, Type: Fertiliser.Types.UreaN, Depth: 10)
              2016-08-31  [Fertiliser].Apply(Amount: 35, Type: Fertiliser.Types.UreaN, Depth: 10)
              2016-10-05  [Fertiliser].Apply(Amount: 35, Type: Fertiliser.Types.UreaN, Depth: 10)
            Operations 500
              2014-10-08  [Fertiliser].Apply(Amount: 50, Type: Fertiliser.Types.UreaN, Depth: 10)
              2014-10-31  [Fertiliser].Apply(Amount: 50, Type: Fertiliser.Types.UreaN, Depth: 10)
              2014-11-26  [Fertiliser].Apply(Amount: 50, Type: Fertiliser.Types.UreaN, Depth: 10)
              2014-12-17  [Fertiliser].Apply(Amount: 50, Type: Fertiliser.Types.UreaN, Depth: 10)
              2015-01-20  [Fertiliser].Apply(Amount: 50, Type: Fertiliser.Types.UreaN, Depth: 10)
              2015-02-12  [Fertiliser].Apply(Amount: 50, Type: Fertiliser.Types.UreaN, Depth: 10)
              2015-03-10  [Fertiliser].Apply(Amount: 50, Type: Fertiliser.Types.UreaN, Depth: 10)
              2015-04-17  [Fertiliser].Apply(Amount: 50, Type: Fertiliser.Types.UreaN, Depth: 10)
              2015-05-20  [Fertiliser].Apply(Amount: 50, Type: Fertiliser.Types.UreaN, Depth: 10)
              2015-09-09  [Fertiliser].Apply(Amount: 50, Type: Fertiliser.Types.UreaN, Depth: 10)
              2015-10-06  [Fertiliser].Apply(Amount: 50, Type: Fertiliser.Types.UreaN, Depth: 10)
              2015-11-06  [Fertiliser].Apply(Amount: 50, Type: Fertiliser.Types.UreaN, Depth: 10)
              2015-12-09  [Fertiliser].Apply(Amount: 50, Type: Fertiliser.Types.UreaN, Depth: 10)
              2016-01-07  [Fertiliser].Apply(Amount: 50, Type: Fertiliser.Types.UreaN, Depth: 10)
              2016-02-10  [Fertiliser].Apply(Amount: 50, Type: Fertiliser.Types.UreaN, Depth: 10)
              2016-03-07  [Fertiliser].Apply(Amount: 50, Type: Fertiliser.Types.UreaN, Depth: 10)
              2016-04-02  [Fertiliser].Apply(Amount: 50, Type: Fertiliser.Types.UreaN, Depth: 10)
              2016-05-04  [Fertiliser].Apply(Amount: 50, Type: Fertiliser.Types.UreaN, Depth: 10)
              2016-08-31  [Fertiliser].Apply(Amount: 50, Type: Fertiliser.Types.UreaN, Depth: 10)
              2016-10-05  [Fertiliser].Apply(Amount: 50, Type: Fertiliser.Types.UreaN, Depth: 10)
        Simulation FRNLLincoln
          Clock: StartDate=2014-03-01; EndDate=2016-05-31
          Weather: FileName=Lincoln-Broadfields.met
          Summary summaryfile
          SoilArbitrator Soil Arbitrator
          Zone Field: Area=1; Slope=0
            Folder Management
              Operations Sowing
                2014-03-20  [Plantain].Sow(population: 200, cultivar: "Tonic", depth: 10, rowSpacing: 150)
              Operations IrrigationSchedule
                2014-10-31  [Irrigation].Apply(amount: 7)
                2014-11-03  [Irrigation].Apply(amount: 7)
                2014-11-05  [Irrigation].Apply(amount: 8)
                2014-11-07  [Irrigation].Apply(amount: 8)
                2014-11-10  [Irrigation].Apply(amount: 7)
                2014-11-11  [Irrigation].Apply(amount: 7)
                2014-11-12  [Irrigation].Apply(amount: 8)
                2014-11-17  [Irrigation].Apply(amount: 9)
                2014-11-18  [Irrigation].Apply(amount: 7)
                2014-11-19  [Irrigation].Apply(amount: 7)
                2014-11-24  [Irrigation].Apply(amount: 8)
                2014-11-25  [Irrigation].Apply(amount: 9)
                2014-11-27  [Irrigation].Apply(amount: 10)
                2014-12-01  [Irrigation].Apply(amount: 8)
                2014-12-02  [Irrigation].Apply(amount: 8)
                2014-12-04  [Irrigation].Apply(amount: 7)
                2014-12-08  [Irrigation].Apply(amount: 7)
                2014-12-09  [Irrigation].Apply(amount: 7)
                2014-12-12  [Irrigation].Apply(amount: 8)
                2014-12-15  [Irrigation].Apply(amount: 10)
                2014-12-17  [Irrigation].Apply(amount: 10)
                2014-12-19  [Irrigation].Apply(amount: 7)
                2014-12-20  [Irrigation].Apply(amount: 7)
                2014-12-21  [Irrigation].Apply(amount: 8)
                2014-12-22  [Irrigation].Apply(amount: 10)
                2014-12-25  [Irrigation].Apply(amount: 8)
                2014-12-26  [Irrigation].Apply(amount: 8)
                2014-12-27  [Irrigation].Apply(amount: 7)
                2014-12-28  [Irrigation].Apply(amount: 10)
                2014-12-29  [Irrigation].Apply(amount: 8)
                2014-12-30  [Irrigation].Apply(amount: 8)
                2015-01-02  [Irrigation].Apply(amount: 7)
                2015-01-05  [Irrigation].Apply(amount: 10)
                2015-01-08  [Irrigation].Apply(amount: 8)
                2015-01-09  [Irrigation].Apply(amount: 9)
                2015-01-12  [Irrigation].Apply(amount: 7)
                2015-01-13  [Irrigation].Apply(amount: 7)
                2015-01-16  [Irrigation].Apply(amount: 8)
                2015-01-19  [Irrigation].Apply(amount: 7)
                2015-01-20  [Irrigation].Apply(amount: 7)
                2015-01-21  [Irrigation].Apply(amount: 8)
                2015-01-26  [Irrigation].Apply(amount: 10)
                2015-01-27  [Irrigation].Apply(amount: 10)
                2015-01-29  [Irrigation].Apply(amount: 8)
                2015-02-02  [Irrigation].Apply(amount: 10)
                2015-02-04  [Irrigation].Apply(amount: 8)
                2015-02-05  [Irrigation].Apply(amount: 7)
                2015-02-09  [Irrigation].Apply(amount: 8)
                2015-02-11  [Irrigation].Apply(amount: 7)
                2015-02-12  [Irrigation].Apply(amount: 10)
                2015-02-16  [Irrigation].Apply(amount: 10)
                2015-02-17  [Irrigation].Apply(amount: 10)
                2015-02-18  [Irrigation].Apply(amount: 8)
                2015-02-24  [Irrigation].Apply(amount: 10)
                2015-02-26  [Irrigation].Apply(amount: 7)
                2015-02-27  [Irrigation].Apply(amount: 8)
                2015-03-02  [Irrigation].Apply(amount: 7)
                2015-03-03  [Irrigation].Apply(amount: 7)
                2015-03-05  [Irrigation].Apply(amount: 8)
                2015-03-10  [Irrigation].Apply(amount: 8)
                2015-03-12  [Irrigation].Apply(amount: 9)
                2015-03-13  [Irrigation].Apply(amount: 7)
                2015-03-16  [Irrigation].Apply(amount: 10)
                2015-03-19  [Irrigation].Apply(amount: 9)
                2015-03-20  [Irrigation].Apply(amount: 8)
                2015-03-23  [Irrigation].Apply(amount: 9)
                2015-03-24  [Irrigation].Apply(amount: 7)
                2015-03-26  [Irrigation].Apply(amount: 10)
                2015-03-30  [Irrigation].Apply(amount: 7)
                2015-04-02  [Irrigation].Apply(amount: 10)
                2015-04-03  [Irrigation].Apply(amount: 8)
                2015-04-06  [Irrigation].Apply(amount: 7)
                2015-04-08  [Irrigation].Apply(amount: 10)
                2015-04-17  [Irrigation].Apply(amount: 10)
                2015-05-20  [Irrigation].Apply(amount: 10)
                2015-06-09  [Irrigation].Apply(amount: 10)
                2015-09-09  [Irrigation].Apply(amount: 10)
                2015-09-30  [Irrigation].Apply(amount: 10)
                2015-10-02  [Irrigation].Apply(amount: 8)
                2015-10-06  [Irrigation].Apply(amount: 10)
                2015-10-09  [Irrigation].Apply(amount: 10)
                2015-10-12  [Irrigation].Apply(amount: 8)
                2015-10-13  [Irrigation].Apply(amount: 7)
                2015-10-16  [Irrigation].Apply(amount: 10)
                2015-10-20  [Irrigation].Apply(amount: 10)
                2015-10-21  [Irrigation].Apply(amount: 8)
                2015-10-23  [Irrigation].Apply(amount: 7)
                2015-10-26  [Irrigation].Apply(amount: 7)
                2015-10-27  [Irrigation].Apply(amount: 9)
                2015-11-02  [Irrigation].Apply(amount: 10)
                2015-11-03  [Irrigation].Apply(amount: 8)
                2015-11-04  [Irrigation].Apply(amount: 9)
                2015-11-06  [Irrigation].Apply(amount: 9)
                2015-11-09  [Irrigation].Apply(amount: 10)
                2015-11-11  [Irrigation].Apply(amount: 7)
                2015-11-16  [Irrigation].Apply(amount: 10)
                2015-11-18  [Irrigation].Apply(amount: 9)
                2015-11-20  [Irrigation].Apply(amount: 7)
                2015-11-23  [Irrigation].Apply(amount: 10)
                2015-11-24  [Irrigation].Apply(amount: 8)
                2015-11-25  [Irrigation].Apply(amount: 7)
                2015-11-27  [Irrigation].Apply(amount: 9)
                2015-11-30  [Irrigation].Apply(amount: 7)
                2015-12-01  [Irrigation].Apply(amount: 7)
                2015-12-04  [Irrigation].Apply(amount: 9)
                2015-12-07  [Irrigation].Apply(amount: 10)
                2015-12-09  [Irrigation].Apply(amount: 9)
                2015-12-10  [Irrigation].Apply(amount: 9)
                2015-12-22  [Irrigation].Apply(amount: 8)
                2015-12-24  [Irrigation].Apply(amount: 9)
                2015-12-26  [Irrigation].Apply(amount: 8)
                2015-12-29  [Irrigation].Apply(amount: 7)
                2015-12-31  [Irrigation].Apply(amount: 7)
                2016-01-01  [Irrigation].Apply(amount: 10)
                2016-01-07  [Irrigation].Apply(amount: 10)
                2016-01-09  [Irrigation].Apply(amount: 7)
                2016-01-11  [Irrigation].Apply(amount: 7)
                2016-01-12  [Irrigation].Apply(amount: 7)
                2016-01-13  [Irrigation].Apply(amount: 9)
                2016-01-15  [Irrigation].Apply(amount: 10)
                2016-01-21  [Irrigation].Apply(amount: 7)
                2016-01-25  [Irrigation].Apply(amount: 8)
                2016-01-30  [Irrigation].Apply(amount: 7)
                2016-02-02  [Irrigation].Apply(amount: 10)
                2016-02-03  [Irrigation].Apply(amount: 10)
                2016-02-05  [Irrigation].Apply(amount: 9)
                2016-02-08  [Irrigation].Apply(amount: 10)
                2016-02-11  [Irrigation].Apply(amount: 10)
                2016-02-12  [Irrigation].Apply(amount: 7)
                2016-02-15  [Irrigation].Apply(amount: 8)
                2016-02-16  [Irrigation].Apply(amount: 8)
                2016-02-22  [Irrigation].Apply(amount: 7)
                2016-02-23  [Irrigation].Apply(amount: 7)
                2016-02-25  [Irrigation].Apply(amount: 7)
                2016-02-26  [Irrigation].Apply(amount: 7)
                2016-03-01  [Irrigation].Apply(amount: 7)
                2016-03-02  [Irrigation].Apply(amount: 8)
                2016-03-04  [Irrigation].Apply(amount: 10)
                2016-03-07  [Irrigation].Apply(amount: 9)
                2016-03-08  [Irrigation].Apply(amount: 4)
                2016-03-10  [Irrigation].Apply(amount: 8)
                2016-03-14  [Irrigation].Apply(amount: 8)
                2016-03-15  [Irrigation].Apply(amount: 10)
                2016-03-18  [Irrigation].Apply(amount: 9)
                2016-03-21  [Irrigation].Apply(amount: 10)
                2016-03-22  [Irrigation].Apply(amount: 9)
                2016-03-23  [Irrigation].Apply(amount: 9)
                2016-03-28  [Irrigation].Apply(amount: 8)
                2016-04-02  [Irrigation].Apply(amount: 10)
                2016-04-08  [Irrigation].Apply(amount: 10)
                2016-05-04  [Irrigation].Apply(amount: 10)
                2016-08-31  [Irrigation].Apply(amount: 10)
                2016-10-05  [Irrigation].Apply(amount: 10)
                2016-10-18  [Irrigation].Apply(amount: 10)
                2016-10-26  [Irrigation].Apply(amount: 10)
              Operations NRate
              Manager Defoliate
                Message =
```csharp
using System;
using Models.Core;
using System.Collections.Generic;
using System.Text;
using Models;
using Models.Soils;
using Models.PMF;
using System.Xml.Serialization;
using APSIM.Shared.Utilities;

namespace Models
{
    [Serializable]
    public class Script : Model
    {
        [Description("This script is set in 'Replacements':")]
        public string Message { get; set; }
    }
}
```
              Operations DefoliationSchedule
                2014-10-08  [Defoliate].Script.Defoliate(defoliationType: "Cut", amountDM: 40, amountType: "ResidualDM", duration: 1)
                2014-10-30  [Defoliate].Script.Defoliate(defoliationType: "Cut", amountDM: 40, amountType: "ResidualDM", duration: 1)
                2014-11-25  [Defoliate].Script.Defoliate(defoliationType: "Cut", amountDM: 40, amountType: "ResidualDM", duration: 1)
                2014-12-17  [Defoliate].Script.Defoliate(defoliationType: "Cut", amountDM: 40, amountType: "ResidualDM", duration: 1)
                2015-01-16  [Defoliate].Script.Defoliate(defoliationType: "Cut", amountDM: 40, amountType: "ResidualDM", duration: 1)
                2015-02-11  [Defoliate].Script.Defoliate(defoliationType: "Cut", amountDM: 40, amountType: "ResidualDM", duration: 1)
                2015-03-10  [Defoliate].Script.Defoliate(defoliationType: "Cut", amountDM: 40, amountType: "ResidualDM", duration: 1)
                2015-04-16  [Defoliate].Script.Defoliate(defoliationType: "Cut", amountDM: 40, amountType: "ResidualDM", duration: 1)
                2015-05-20  [Defoliate].Script.Defoliate(defoliationType: "Cut", amountDM: 40, amountType: "ResidualDM", duration: 1)
                2015-09-02  [Defoliate].Script.Defoliate(defoliationType: "Cut", amountDM: 40, amountType: "ResidualDM", duration: 1)
                2015-10-06  [Defoliate].Script.Defoliate(defoliationType: "Cut", amountDM: 40, amountType: "ResidualDM", duration: 1)
                2015-11-06  [Defoliate].Script.Defoliate(defoliationType: "Cut", amountDM: 40, amountType: "ResidualDM", duration: 1)
                2015-12-07  [Defoliate].Script.Defoliate(defoliationType: "Cut", amountDM: 40, amountType: "ResidualDM", duration: 1)
                2016-01-07  [Defoliate].Script.Defoliate(defoliationType: "Cut", amountDM: 40, amountType: "ResidualDM", duration: 1)
                2016-02-04  [Defoliate].Script.Defoliate(defoliationType: "Cut", amountDM: 40, amountType: "ResidualDM", duration: 1)
                2016-03-04  [Defoliate].Script.Defoliate(defoliationType: "Cut", amountDM: 40, amountType: "ResidualDM", duration: 1)
                2016-03-31  [Defoliate].Script.Defoliate(defoliationType: "Cut", amountDM: 40, amountType: "ResidualDM", duration: 1)
                2016-05-04  [Defoliate].Script.Defoliate(defoliationType: "Cut", amountDM: 40, amountType: "ResidualDM", duration: 1)
              Manager ExtraVariables
```csharp
// This will be replaced by the "ExtraVariables" section in "Replacements"

using System;
using Models.Core;

namespace Models
{
    [Serializable] 
    public class Script : Model
    {
    }
}
```
            MicroClimate: a_interception=0; b_interception=1; c_interception=0; d_interception=0; soil_albedo=0.23; sun_angle=15; soil_heat_flux_fraction=0.4; night_interception_fraction=0.5; refheight=2; albedo=0.15; emissivity=0.96; RadIntTotal=0
            Irrigation
            Fertiliser
            SurfaceOrganicMatter: PoolName=grass; type=grass; mass=500; standing_fraction=0; cnr=40; CriticalResidueWeight=2000; OptimumDecompTemp=20; MaxCumulativeEOS=20; CNRatioDecompCoeff=0.277; CNRatioDecompThreshold=25; TotalLeachRain=25; MinRainToLeach=10; CriticalMinimumOrganicC=0.004; DefaultCPRatio=0; DefaultStandingFraction=0; StandingExtinctCoeff=0.5; FractionFaecesAdded=0.5
              Pools:
                {PoolName=grass, ResidueType=grass, Mass=500, CNRatio=40, StandingFraction=0}
              ResidueTypes ResidueTypesList: LoadFromResource=ResidueTypes
            Soil TempletonPaparua: SoilType=Udic Haplustept (US),  Immature Pallic Soil (NZ); LocalName=Templeton Fine Sandy Loam; Site=LURDF; NearestTown=Lincoln; Region=Canterbury; Country=New Zealand; Latitude=0; Longitude=0; DataSource=Adapted based on data from the NZ Natioanl Soils Database
              Comments=Different references name the soil at the site as either Templeton or Paparua (very similar soils)
              Analysis: PHUnits=Water; BoronUnits=HotWater
                Thickness  Rocks  PH  CEC   ParticleSizeSand  ParticleSizeSilt  ParticleSizeClay
                150        0      6   13.9  17.4              60.9              21.8
                150        0      6   9.9   24.8              56.9              18.3
                200        0      6   10.1  21                59.5              19.5
                250        0      6   7.4   37                52.6              10.3
                250        0      6   7.1   43.6              46.9              9.5
                500        0      6   7.6   24.2              59.3              16.6
              Water
                Thickness  BD    AirDry  LL15   DUL    SAT    KS
                150        1.35  0.057   0.17   0.34   0.439  2913.761
                150        1.43  0.159   0.177  0.325  0.409  1052.63
                200        1.54  0.186   0.186  0.327  0.362  182.149
                250        1.54  0.132   0.132  0.251  0.358  1272.997
                250        1.48  0.116   0.116  0.24   0.365  1767.199
                500        1.41  0.138   0.138  0.273  0.39   586.553
                SoilCrop PlantainSoil: LL=[0.17, 0.18, 0.19, 0.13, 0.12, 0.14]; KL=[0.12, 0.11, 0.06, 0.03, 0.01, 0.01]; XF=[1, 1, 1, 1, 1, 1]
              SoilWater: SummerDate=1-Nov; SummerU=6; SummerCona=3.5; WinterDate=1-apr; WinterU=2; WinterCona=2; DiffusConst=88; DiffusSlope=35; Salb=0.13; CN2Bare=73; CNRed=20; CNCov=0.8; max_pond=0; Thickness=[150, 150, 200, 250, 250, 500]; SWCON=[0.5, 0.41, 0.27, 0.39, 0.49, 0.42]; residueinterception=0
              SoilNitrogen: fom_type=[default, manure, mucuna, lablab, shemp, stable]; fract_carb=[0.2, 0.3, 0.54, 0.57, 0.45, 0]; fract_cell=[0.7, 0.3, 0.37, 0.37, 0.47, 0.1]; fract_lign=[0.1, 0.4, 0.09, 0.06, 0.08, 0.9]
              SoilOrganicMatter: RootCN=40; RootWt=1000; SoilCN=11.3; EnrACoeff=7.4; EnrBCoeff=0.2; OCUnits=Total
                Thickness  OC    FBiom  FInert
                150        2.6   0.045  0.475
                150        1.01  0.025  0.695
                200        0.4   0.022  0.845
                250        0.19  0.02   0.89
                250        0.22  0.01   0.96
                500        0.18  0.01   0.99
              InitialWater Initial water: PercentMethod=FilledFromTop; FractionFull=0.99
              Sample Initial nitrogen: NO3Units=kgha; NH4Units=kgha; SWUnits=Volumetric; OCUnits=Total; PHUnits=Water
                Thickness  NO3     NH4
                150        10.125  1
                150        8.58    0.75
                450        10.395  1.386
                250        5.55    0.5
                500        5.5     0.5
              CERESSoilTemperature
            Plant Plantain: CropType=Plantain
            Report: EventNames=[Clock].DoReport
            SoluteManager
      Experiment FRNLRuakura
        Memo
          ###FRNL Ruakura###

          This simulation setup was based on field trials performed at DairyNZ's Scott Farm, in Ruakura, New Zealand, between 2014 and 2016.  The experiment was part of the FRNL (Forages for Reduced Nitrogen Leaching) program and the data is basically unpublished (references will be added when this come about).  Here only plots with pure plantain are used.
          The experiment consisted of six fertiliser treatments (N rates of 0, 50, 100, 200, 350 and 500 kg/ha/yr) in three replicates, and measurements comprised yield and quality indicators (here N content is used).
          Observed data supplied by Grant Edwards, Lincoln University.

          The soil at the experimental site was a Horotiu silt loam (an Orthic Allophanic soil; USDA: Typic Udivitrand), the parameters required were inferred using data from the New Zealand National Soils Database (Landcare Research).
          Weather data was obtained from nearby Ruakura weather station (NIWA).
        Factors
          Factor NRate: Specifications=[NRate]
            Operations 0
            Operations 50
              2014-12-22  [Fertiliser].Apply(Amount: 5, Type: Fertiliser.Types.UreaN, Depth: 10)
              2015-01-19  [Fertiliser].Apply(Amount: 5, Type: Fertiliser.Types.UreaN, Depth: 10)
              2015-03-23  [Fertiliser].Apply(Amount: 5, Type: Fertiliser.Types.UreaN, Depth: 10)
              2015-05-01  [Fertiliser].Apply(Amount: 5, Type: Fertiliser.Types.UreaN, Depth: 10)
              2015-06-18  [Fertiliser].Apply(Amount: 5, Type: Fertiliser.Types.UreaN, Depth: 10)
              2015-09-09  [Fertiliser].Apply(Amount: 5, Type: Fertiliser.Types.UreaN, Depth: 10)
              2015-10-29  [Fertiliser].Apply(Amount: 5, Type: Fertiliser.Types.UreaN, Depth: 10)
              2015-10-09  [Fertiliser].Apply(Amount: 5, Type: Fertiliser.Types.UreaN, Depth: 10)
              2015-11-24  [Fertiliser].Apply(Amount: 5, Type: Fertiliser.Types.UreaN, Depth: 10)
              2015-12-17  [Fertiliser].Apply(Amount: 5, Type: Fertiliser.Types.UreaN, Depth: 10)
              2016-01-26  [Fertiliser].Apply(Amount: 5, Type: Fertiliser.Types.UreaN, Depth: 10)
              2016-04-12  [Fertiliser].Apply(Amount: 5, Type: Fertiliser.Types.UreaN, Depth: 10)
              2016-06-30  [Fertiliser].Apply(Amount: 5, Type: Fertiliser.Types.UreaN, Depth: 10)
            Operations 100
              2014-12-22  [Fertiliser].Apply(Amount: 10, Type: Fertiliser.Types.UreaN, Depth: 10)
              2015-01-19  [Fertiliser].Apply(Amount: 10, Type: Fertiliser.Types.UreaN, Depth: 10)
              2015-03-23  [Fertiliser].Apply(Amount: 10, Type: Fertiliser.Types.UreaN, Depth: 10)
              2015-05-01  [Fertiliser].Apply(Amount: 10, Type: Fertiliser.Types.UreaN, Depth: 10)
              2015-06-18  [Fertiliser].Apply(Amount: 10, Type: Fertiliser.Types.UreaN, Depth: 10)
              2015-09-09  [Fertiliser].Apply(Amount: 10, Type: Fertiliser.Types.UreaN, Depth: 10)
              2015-10-09  [Fertiliser].Apply(Amount: 10, Type: Fertiliser.Types.UreaN, Depth: 10)
              2015-10-29  [Fertiliser].Apply(Amount: 10, Type: Fertiliser.Types.UreaN, Depth: 10)
              2015-11-24  [Fertiliser].Apply(Amount: 10, Type: Fertiliser.Types.UreaN, Depth: 10)
              2015-12-17  [Fertiliser].Apply(Amount: 10, Type: Fertiliser.Types.UreaN, Depth: 10)
              2016-01-26  [Fertiliser].Apply(Amount: 10, Type: Fertiliser.Types.UreaN, Depth: 10)
              2016-04-12  [Fertiliser].Apply(Amount: 10, Type: Fertiliser.Types.UreaN, Depth: 10)
              2016-06-30  [Fertiliser].Apply(Amount: 10, Type: Fertiliser.Types.UreaN, Depth: 10)
            Operations 200
              2014-12-22  [Fertiliser].Apply(Amount: 20, Type: Fertiliser.Types.UreaN, Depth: 10)
              2015-01-19  [Fertiliser].Apply(Amount: 20, Type: Fertiliser.Types.UreaN, Depth: 10)
              2015-03-23  [Fertiliser].Apply(Amount: 20, Type: Fertiliser.Types.UreaN, Depth: 10)
              2015-05-01  [Fertiliser].Apply(Amount: 20, Type: Fertiliser.Types.UreaN, Depth: 10)
              2015-06-18  [Fertiliser].Apply(Amount: 20, Type: Fertiliser.Types.UreaN, Depth: 10)
              2015-09-09  [Fertiliser].Apply(Amount: 20, Type: Fertiliser.Types.UreaN, Depth: 10)
              2015-10-09  [Fertiliser].Apply(Amount: 20, Type: Fertiliser.Types.UreaN, Depth: 10)
              2015-10-29  [Fertiliser].Apply(Amount: 20, Type: Fertiliser.Types.UreaN, Depth: 10)
              2015-11-24  [Fertiliser].Apply(Amount: 20, Type: Fertiliser.Types.UreaN, Depth: 10)
              2015-12-17  [Fertiliser].Apply(Amount: 20, Type: Fertiliser.Types.UreaN, Depth: 10)
              2016-01-26  [Fertiliser].Apply(Amount: 20, Type: Fertiliser.Types.UreaN, Depth: 10)
              2016-04-12  [Fertiliser].Apply(Amount: 20, Type: Fertiliser.Types.UreaN, Depth: 10)
              2016-06-30  [Fertiliser].Apply(Amount: 20, Type: Fertiliser.Types.UreaN, Depth: 10)
            Operations 350
              2014-12-22  [Fertiliser].Apply(Amount: 35, Type: Fertiliser.Types.UreaN, Depth: 10)
              2015-01-19  [Fertiliser].Apply(Amount: 35, Type: Fertiliser.Types.UreaN, Depth: 10)
              2015-03-23  [Fertiliser].Apply(Amount: 35, Type: Fertiliser.Types.UreaN, Depth: 10)
              2015-05-01  [Fertiliser].Apply(Amount: 35, Type: Fertiliser.Types.UreaN, Depth: 10)
              2015-06-18  [Fertiliser].Apply(Amount: 35, Type: Fertiliser.Types.UreaN, Depth: 10)
              2015-09-09  [Fertiliser].Apply(Amount: 35, Type: Fertiliser.Types.UreaN, Depth: 10)
              2015-10-09  [Fertiliser].Apply(Amount: 35, Type: Fertiliser.Types.UreaN, Depth: 10)
              2015-10-29  [Fertiliser].Apply(Amount: 35, Type: Fertiliser.Types.UreaN, Depth: 10)
              2015-11-24  [Fertiliser].Apply(Amount: 35, Type: Fertiliser.Types.UreaN, Depth: 10)
              2015-12-17  [Fertiliser].Apply(Amount: 35, Type: Fertiliser.Types.UreaN, Depth: 10)
              2016-01-26  [Fertiliser].Apply(Amount: 35, Type: Fertiliser.Types.UreaN, Depth: 10)
              2016-04-12  [Fertiliser].Apply(Amount: 35, Type: Fertiliser.Types.UreaN, Depth: 10)
              2016-06-30  [Fertiliser].Apply(Amount: 35, Type: Fertiliser.Types.UreaN, Depth: 10)
            Operations 500
              2014-12-22  [Fertiliser].Apply(Amount: 50, Type: Fertiliser.Types.UreaN, Depth: 10)
              2015-01-19  [Fertiliser].Apply(Amount: 50, Type: Fertiliser.Types.UreaN, Depth: 10)
              2015-03-23  [Fertiliser].Apply(Amount: 50, Type: Fertiliser.Types.UreaN, Depth: 10)
              2015-05-01  [Fertiliser].Apply(Amount: 50, Type: Fertiliser.Types.UreaN, Depth: 10)
              2015-06-18  [Fertiliser].Apply(Amount: 50, Type: Fertiliser.Types.UreaN, Depth: 10)
              2015-09-09  [Fertiliser].Apply(Amount: 50, Type: Fertiliser.Types.UreaN, Depth: 10)
              2015-10-09  [Fertiliser].Apply(Amount: 50, Type: Fertiliser.Types.UreaN, Depth: 10)
              2015-10-29  [Fertiliser].Apply(Amount: 50, Type: Fertiliser.Types.UreaN, Depth: 10)
              2015-11-24  [Fertiliser].Apply(Amount: 50, Type: Fertiliser.Types.UreaN, Depth: 10)
              2015-12-17  [Fertiliser].Apply(Amount: 50, Type: Fertiliser.Types.UreaN, Depth: 10)
              2016-01-26  [Fertiliser].Apply(Amount: 50, Type: Fertiliser.Types.UreaN, Depth: 10)
              2016-04-12  [Fertiliser].Apply(Amount: 50, Type: Fertiliser.Types.UreaN, Depth: 10)
              2016-06-30  [Fertiliser].Apply(Amount: 50, Type: Fertiliser.Types.UreaN, Depth: 10)
        Simulation FRNLRuakura
          Clock: StartDate=2014-06-01; EndDate=2016-06-30
          Weather: FileName=Ruakura.met
          Summary summaryfile
          SoilArbitrator Soil Arbitrator
          Zone Field: Area=1; Slope=0
            Folder Management
              Operations Sowing
                2014-10-24  [Plantain].Sow(population: 200, cultivar: "Tonic", depth: 10, rowSpacing: 150)
              Operations NRate
              Operations BaseFertiliser
                2014-10-13  [Fertiliser].Apply(Amount: 26.4, Type: Fertiliser.Types.UreaN, Depth: 10)
                2014-12-23  [Fertiliser].Apply(Amount: 3.9, Type: Fertiliser.Types.UreaN, Depth: 10)
              Manager Defoliate: same as Validation.New Zealand.FRNLLincoln.FRNLLincoln.Field.Management.Defoliate
              Operations DefoliationSchedule
                2014-12-16  [Defoliate].Script.Defoliate(defoliationType: "Cut", amountDM: 60, amountType: "ResidualDM", duration: 1)
                2015-01-14  [Defoliate].Script.Defoliate(defoliationType: "Cut", amountDM: 60, amountType: "ResidualDM", duration: 1)
                2015-03-18  [Defoliate].Script.Defoliate(defoliationType: "Cut", amountDM: 60, amountType: "ResidualDM", duration: 1)
                2015-04-28  [Defoliate].Script.Defoliate(defoliationType: "Cut", amountDM: 60, amountType: "ResidualDM", duration: 1)
                2015-06-17  [Defoliate].Script.Defoliate(defoliationType: "Cut", amountDM: 60, amountType: "ResidualDM", duration: 1)
                2015-09-07  [Defoliate].Script.Defoliate(defoliationType: "Cut", amountDM: 60, amountType: "ResidualDM", duration: 1)
                2015-10-07  [Defoliate].Script.Defoliate(defoliationType: "Cut", amountDM: 60, amountType: "ResidualDM", duration: 1)
                2015-10-28  [Defoliate].Script.Defoliate(defoliationType: "Cut", amountDM: 60, amountType: "ResidualDM", duration: 1)
                2015-11-23  [Defoliate].Script.Defoliate(defoliationType: "Cut", amountDM: 60, amountType: "ResidualDM", duration: 1)
                2015-12-16  [Defoliate].Script.Defoliate(defoliationType: "Cut", amountDM: 60, amountType: "ResidualDM", duration: 1)
                2016-01-25  [Defoliate].Script.Defoliate(defoliationType: "Cut", amountDM: 60, amountType: "ResidualDM", duration: 1)
                2016-04-11  [Defoliate].Script.Defoliate(defoliationType: "Cut", amountDM: 60, amountType: "ResidualDM", duration: 1)
                2016-06-29  [Defoliate].Script.Defoliate(defoliationType: "Cut", amountDM: 60, amountType: "ResidualDM", duration: 1)
                2016-09-21  [Defoliate].Script.Defoliate(defoliationType: "Cut", amountDM: 60, amountType: "ResidualDM", duration: 1)
              Manager ExtraVariables
                script: same as in Validation.New Zealand.FRNLLincoln.FRNLLincoln.Field.Management.ExtraVariables
            MicroClimate: a_interception=0; b_interception=1; c_interception=0; d_interception=0; soil_albedo=0.23; sun_angle=15; soil_heat_flux_fraction=0.4; night_interception_fraction=0.5; refheight=2; albedo=0.15; emissivity=0.96; RadIntTotal=0
            Irrigation
            Fertiliser
            SurfaceOrganicMatter: same as Validation.New Zealand.FRNLLincoln.FRNLLincoln.Field.SurfaceOrganicMatter
            Soil HorotiuSoil: SoilType=Typic Udivitrand (US), Typic Orthic Allophanic Soil (NZ); LocalName=Horotiu silt loam; Site=Ruakura; NearestTown=Hamilton; Region=Waikato; Country=New Zealand; Latitude=0; Longitude=0; DataSource=Based primarily on data from Close et al, 2003
              Analysis: PHUnits=Water; BoronUnits=HotWater
                Thickness  Rocks  PH  CEC   ParticleSizeSand  ParticleSizeSilt  ParticleSizeClay
                200        0      6   23.1  47                33                20
                200        0      6   17.2  65                17                19
                130        2      6   12.4  76                13                11
                140        5      6   10    84                10                7
                380        5      6   7.2   88                8                 5
                230        19     6   3.1   91                6                 3
                220        33     6   1.6   94                5                 1
              Water
                Thickness  BD    AirDry  LL15   DUL    SAT    KS
                200        0.88  0.114   0.228  0.373  0.581  553
                200        0.85  0.209   0.22   0.34   0.609  5083
                130        1.03  0.182   0.182  0.323  0.54   8353
                140        1.11  0.15    0.15   0.282  0.5    13589
                380        1.11  0.142   0.142  0.2    0.5    38963
                230        1.03  0.103   0.103  0.16   0.446  45280
                220        1.03  0.08    0.08   0.13   0.37   53606
                SoilCrop PlantainSoil: LL=[0.23, 0.22, 0.18, 0.15, 0.14, 0.1, 0.08]; KL=[0.1, 0.08, 0.05, 0.02, 0.01, 0.01, 0]; XF=[1, 1, 1, 1, 1, 1, 0.5]
              SoilWater: SummerDate=21-Sep; SummerU=6; SummerCona=3.5; WinterDate=23-Mar; WinterU=6; WinterCona=2.5; DiffusConst=88; DiffusSlope=35; Salb=0.2; CN2Bare=0.7; CNRed=20; CNCov=0.8; max_pond=0; Thickness=[200, 200, 130, 140, 380, 230, 220]; SWCON=[0.55, 0.6, 0.7, 0.7, 0.75, 0.8, 0.8]; residueinterception=0
              SoilNitrogen: fom_type=[default, manure, mucuna, lablab, shemp, stable]; fract_carb=[0.2, 0.3, 0.54, 0.57, 0.45, 0]; fract_cell=[0.7, 0.3, 0.37, 0.37, 0.47, 0.1]; fract_lign=[0.1, 0.4, 0.09, 0.06, 0.08, 0.9]
              SoilOrganicMatter: RootCN=40; RootWt=1000; SoilCN=12.5; EnrACoeff=7.4; EnrBCoeff=0.2; OCUnits=Total
                Thickness  OC    FBiom  FInert
                200        8     0.06   0.6
                200        1.88  0.03   0.645
                130        0.93  0.021  0.675
                140        0.43  0.01   0.7
                380        0.13  0.01   0.78
                230        0.1   0.01   0.87
                220        0.07  0.01   0.95
              InitialWater Initial water: PercentMethod=EvenlyDistributed; FractionFull=0.9
              Sample Initial nitrogen: NO3Units=kgha; NH4Units=kgha; SWUnits=Volumetric; OCUnits=Total; PHUnits=Water
                Thickness  NO3    NH4
                200        26.4   0.88
                200        17     0.34
                600        32.78  0.609708
                500        5.19   0.48267
              CERESSoilTemperature
            Plant Plantain: CropType=Plantain
            Report: EventNames=[Clock].DoReport
            SoluteManager
      Memo SubTitle
        ### All data from New Zealand
    Folder USA
      Experiment RELARC_01
        Memo
          ###RELARC 01###

          This simulation was adapted from a defoliation trial conducted in 1998-1999, at Russell E. Larson Agricultural Research Center, Pennsylvania, USA.  The trial consisted of small plots where two plantain cultivars ('*Lancelot*' and '*Tonic*') were sown separately in May-1997 (at 11.0 kg seed/ha).  Population decreased markedly after the 1998/99 winter and plantain plots were no longer used. Plots were fertilized with 27 kgP and 72 kgK/ha in October 1997. Fertilizer N was applied at 56 kg/ha in June and July of 1998.  Treatments were replicated five times and the soil at the site was a Hagerstown silt loam (fine, mixed, semiactive mesic Typic Hapludalfs).
          Each plot was divided in two, one-half was harvested every 3 wk and the other half every 5 wk. Each strip was cut to a 7-cm height with a rotary mower.  Dates for each cut were given, but only annual and treatment yields are reported;  population numbers were provided for few specific dates.  Yield for each harvest were arbitrarily inferred, therefore they should be seen as rough indication only.
          Met file was built using data obtained from NOAA website.  The data set was largely complete except for solar radiation, which was added from an alternative interpolated set for this location, also from NOAA.
          Information to assemble the soil data was obtained from USGS.

          References:
          Sanderson, M.A.; Labreveux, M.; Hall, M.H.; Elwinger, G.F. 2003. Forage yield and persistence of chicory and english plantain. Crop Science, 43: 995-1000.
        Factors
          Factor Cultivar: Specifications=[Sowing]
            Operations Lancelot
              1997-05-16  [Plantain].Sow(population: 250, cultivar: "Lancelot", depth: 10, rowSpacing: 150)
            Operations Tonic
              1997-05-16  [Plantain].Sow(population: 250, cultivar: "Tonic", depth: 10, rowSpacing: 150)
          Factor CutFrequency: Specifications=[Cuttings]
            Operations 3wks
              1998-05-19  [Defoliate].Script.Defoliate(defoliationType: "Cut", amountDM: 50, amountType: "ResidualDM", duration: 1)
              1998-06-10  [Defoliate].Script.Defoliate(defoliationType: "Cut", amountDM: 50, amountType: "ResidualDM", duration: 1)
              1998-06-30  [Defoliate].Script.Defoliate(defoliationType: "Cut", amountDM: 50, amountType: "ResidualDM", duration: 1)
              1998-07-21  [Defoliate].Script.Defoliate(defoliationType: "Cut", amountDM: 50, amountType: "ResidualDM", duration: 1)
              1998-08-11  [Defoliate].Script.Defoliate(defoliationType: "Cut", amountDM: 50, amountType: "ResidualDM", duration: 1)
              1998-09-02  [Defoliate].Script.Defoliate(defoliationType: "Cut", amountDM: 50, amountType: "ResidualDM", duration: 1)
              1998-09-23  [Defoliate].Script.Defoliate(defoliationType: "Cut", amountDM: 50, amountType: "ResidualDM", duration: 1)
              1999-05-20  [Defoliate].Script.Defoliate(defoliationType: "Cut", amountDM: 50, amountType: "ResidualDM", duration: 1)
              1999-06-10  [Defoliate].Script.Defoliate(defoliationType: "Cut", amountDM: 50, amountType: "ResidualDM", duration: 1)
              1999-07-01  [Defoliate].Script.Defoliate(defoliationType: "Cut", amountDM: 50, amountType: "ResidualDM", duration: 1)
              1999-07-22  [Defoliate].Script.Defoliate(defoliationType: "Cut", amountDM: 50, amountType: "ResidualDM", duration: 1)
              1999-08-12  [Defoliate].Script.Defoliate(defoliationType: "Cut", amountDM: 50, amountType: "ResidualDM", duration: 1)
              1999-09-02  [Defoliate].Script.Defoliate(defoliationType: "Cut", amountDM: 50, amountType: "ResidualDM", duration: 1)
              1999-09-23  [Defoliate].Script.Defoliate(defoliationType: "Cut", amountDM: 50, amountType: "ResidualDM", duration: 1)
            Operations 5wks
              1998-05-19  [Defoliate].Script.Defoliate(defoliationType: "Cut", amountDM: 50, amountType: "ResidualDM", duration: 1)
              1998-06-24  [Defoliate].Script.Defoliate(defoliationType: "Cut", amountDM: 50, amountType: "ResidualDM", duration: 1)
              1998-07-29  [Defoliate].Script.Defoliate(defoliationType: "Cut", amountDM: 50, amountType: "ResidualDM", duration: 1)
              1998-09-02  [Defoliate].Script.Defoliate(defoliationType: "Cut", amountDM: 50, amountType: "ResidualDM", duration: 1)
              1998-10-07  [Defoliate].Script.Defoliate(defoliationType: "Cut", amountDM: 50, amountType: "ResidualDM", duration: 1)
              1999-05-20  [Defoliate].Script.Defoliate(defoliationType: "Cut", amountDM: 50, amountType: "ResidualDM", duration: 1)
              1999-06-24  [Defoliate].Script.Defoliate(defoliationType: "Cut", amountDM: 50, amountType: "ResidualDM", duration: 1)
              1999-07-29  [Defoliate].Script.Defoliate(defoliationType: "Cut", amountDM: 50, amountType: "ResidualDM", duration: 1)
              1999-09-02  [Defoliate].Script.Defoliate(defoliationType: "Cut", amountDM: 50, amountType: "ResidualDM", duration: 1)
              1999-10-07  [Defoliate].Script.Defoliate(defoliationType: "Cut", amountDM: 50, amountType: "ResidualDM", duration: 1)
        Simulation RELARC_01
          Clock: StartDate=1997-05-01; EndDate=1998-12-31
          Weather: FileName=StateCollege.met
          Summary
          SoilArbitrator Soil Arbitrator
          Zone Field: Area=1; Slope=0
            Folder Management
              Manager ExtraVariables
```csharp
using System;
using Models.Core;
using System.Collections.Generic;
using System.Text;
using Models.Soils;
using Models.PMF;
using Models;
using System.Xml.Serialization;
using APSIM.Shared.Utilities;

namespace Models
{
    [Serializable] 
    public class Script : Model
    {
        [Link] Clock Clock;
        [Link] Soils.Soil Soil;
        [Link] Models.SurfaceOM.SurfaceOrganicMatter SOM;
        [Link] Weather Met;
        [Link] Fertiliser Fert;
        [Link] Irrigation Irrig;
        [Link] Plant Plantain;
        [Link] Zone zone;
                    
        [XmlIgnore] public bool InitialDay { get; set; }
        
        [XmlIgnore] public double AccumPlantN { get; set; }
        [XmlIgnore] public double AccumMineralisation { get; set; }
        [XmlIgnore] public double AccumDenit { get; set; }
        [XmlIgnore] public double AccumFert { get; set; }
        [XmlIgnore] public double AccumLeach { get; set; }
        [XmlIgnore] public double AccumDetach { get; set; }
        [XmlIgnore] public double DeltaSoilOMN { get; set; }
        [XmlIgnore] public double DeltaSurfaceOMN { get; set; }
        [XmlIgnore] public double DeltaSoilMineralN { get; set; }
        [XmlIgnore] public double SoilNitrogenContent { get; set; }
        
        [XmlIgnore] public double AccumEO { get; set; }
        [XmlIgnore] public double AccumEP { get; set; }
        [XmlIgnore] public double AccumES { get; set; }
        [XmlIgnore] public double AccumDrainage { get; set; }
        [XmlIgnore] public double AccumRunoff { get; set; }
        [XmlIgnore] public double AccumOutflowLat { get; set; }
        [XmlIgnore] public double AccumIrrigation { get; set; }
        [XmlIgnore] public double AccumRainfall { get; set; }
        [XmlIgnore] public double SoilWaterDeficit { get; set; }
    
        [XmlIgnore] public double  InitialSoilOMN { get; set; }
        [XmlIgnore] public double  InitialSurfaceOMN { get; set; }
        [XmlIgnore] public double  InitialMineralN { get; set; }
        
        [XmlIgnore] public double SWC { get; set; }
        [XmlIgnore] public double DUL { get; set; }
        [XmlIgnore] public double OutFlowLat { get; set; }

        [XmlIgnore] public double FomN { get; set; }
        [XmlIgnore] public double BiomN { get; set; }
        [XmlIgnore] public double HumN { get; set; }
        [XmlIgnore] public double OrganicN { get; set; }
        [XmlIgnore] public double NO3N { get; set; }
        [XmlIgnore] public double NH4N { get; set; }
        [XmlIgnore] public double UreaN { get; set; }
        [XmlIgnore] public double MineralN { get; set; }
        [XmlIgnore] public double DltNMinRes { get; set; }
        [XmlIgnore] public double DltNMinTot { get; set; }
        
        [EventSubscribe("Commencing")]
        private void OnSimulationCommencing(object sender, EventArgs e)
        {
            InitialDay = true;
        }
        
        [EventSubscribe("DoManagement")]
        private void OnDoManagement(object sender, EventArgs e)
        {
            //!!!!!! Nitrogen balance components !!!!!!
            //!!!!!!^^^^^^^^^^^^^^^^^^^^^^^^^^^^^!!!!!!
            FomN = MathUtilities.Sum(Soil.SoilNitrogen.FOMN);
            HumN = MathUtilities.Sum(Soil.SoilNitrogen.HumicN);
            BiomN = MathUtilities.Sum(Soil.SoilNitrogen.MicrobialN);
            OrganicN = FomN + HumN + BiomN;
            NO3N = MathUtilities.Sum(Soil.NO3N);
            NH4N = MathUtilities.Sum(Soil.NH4N);
            UreaN = MathUtilities.Sum(Soil.SoilNitrogen.urea);
            MineralN = NO3N + NH4N + UreaN; 
            DltNMinRes = MathUtilities.Sum(Soil.SoilNitrogen.dlt_n_min_res);
            DltNMinTot = MathUtilities.Sum(Soil.SoilNitrogen.MineralisedN);
            int layers = Soil.Thickness.Length;
            if (InitialDay == true)
            {
                InitialSurfaceOMN = SOM.N;
                InitialSoilOMN = OrganicN;
                InitialMineralN = MineralN;
                InitialDay = false;
            }
            DeltaSurfaceOMN = SOM.N - InitialSurfaceOMN;
            AccumLeach = AccumLeach - Soil.SoilWater.LeachNH4 - Soil.SoilWater.LeachNO3 - Soil.SoilWater.LeachUrea; //Fails
            AccumMineralisation += MathUtilities.Sum(Soil.SoilNitrogen.MineralisedN);
            AccumDenit -= MathUtilities.Sum(Soil.SoilNitrogen.Denitrification);
            AccumPlantN -= (double)zone.Get("Plantain.Root.NUptake");
            DeltaSoilOMN = OrganicN - InitialSoilOMN;
            DeltaSoilMineralN = MineralN - InitialMineralN;
            SoilNitrogenContent = MineralN;
            
            //!!!!!! Water balance components !!!!!!
            //!!!!!!^^^^^^^^^^^^^^^^^^^^^^^^^^!!!!!!

            AccumRainfall += Met.Rain;
            //AccumEP -= (double)zone.Get("[Plantain].Leaf.Transpiration");
            AccumEP -= (double)zone.Get("Plantain.Root.WaterUptake");
            SoilWaterDeficit = (SWC - DUL);
            double OutFlowLat = MathUtilities.Sum(Soil.SoilWater.outflow_lat);
            AccumOutflowLat -= OutFlowLat;
        }
        
        [EventSubscribe("DoManagementCalculations")]
        private void OnDoManagementCalculations(object sender, EventArgs e)
        {
            FomN = MathUtilities.Sum(Soil.SoilNitrogen.FOMN);
            HumN = MathUtilities.Sum(Soil.SoilNitrogen.HumicN);
            BiomN = MathUtilities.Sum(Soil.SoilNitrogen.MicrobialN);
            AccumFert += Fert.NitrogenApplied;
            AccumIrrigation += Irrig.IrrigationApplied;
            
            
            AccumEO -= Soil.SoilWater.Eo;
            AccumES -= Soil.SoilWater.Es; 
            AccumDrainage -= Soil.SoilWater.Drainage;
            AccumRunoff -= Soil.SoilWater.Runoff;
            SWC = MathUtilities.Sum(Soil.SoilWater.SWmm);
            DUL = MathUtilities.Sum(Soil.DULmm);
        }
    }
}
```
              Operations Sowing
              Operations FertiliserSchedule
                1998-06-01  [Fertiliser].Apply(Amount: 56, Type: Fertiliser.Types.NH4NO3N, Depth: 10)
                1998-07-15  [Fertiliser].Apply(Amount: 56, Type: Fertiliser.Types.NH4NO3N, Depth: 10)
              Operations BaseCut
                1997-09-15  [Defoliate].Script.Defoliate(defoliationType: "Cut", amountDM: 50, amountType: "ResidualDM", duration: 1)
              Operations Cuttings
              Manager Defoliate: same as Validation.New Zealand.FRNLLincoln.FRNLLincoln.Field.Management.Defoliate
            MicroClimate: a_interception=0; b_interception=1; c_interception=0; d_interception=0; soil_albedo=0.23; sun_angle=15; soil_heat_flux_fraction=0.4; night_interception_fraction=0.5; refheight=2; albedo=0.26; emissivity=0.96; RadIntTotal=0
            SurfaceOrganicMatter: PondActive=no; ReportAdditions=no; ReportRemovals=no; PoolName=grass; type=grass; mass=500; standing_fraction=0; cnr=40; CriticalResidueWeight=2000; OptimumDecompTemp=20; MaxCumulativeEOS=20; CNRatioDecompCoeff=0.277; CNRatioDecompThreshold=25; TotalLeachRain=25; MinRainToLeach=10; CriticalMinimumOrganicC=0.004; DefaultCPRatio=0; DefaultStandingFraction=0; StandingExtinctCoeff=0.5; FractionFaecesAdded=0.5
              Pools:
                {PoolName=grass, ResidueType=grass, Mass=500, CNRatio=40, StandingFraction=0}
              ResidueTypes: LoadFromResource=ResidueTypes
              TillageTypes TillageTypesList
            Irrigation
            Fertiliser
            Soil HagerstownSoil: SoilType=Typic Hapludult (US); LocalName=Ramsey fine-loam; State=West Virginia; Country=USA; NaturalVegetation=Forest; Latitude=0; Longitude=0; DataSource=National Cooperative Soil Survey, US
              Comments=Generic soil description based on data of the same sol type from different locations
              Analysis: PHUnits=Water; BoronUnits=HotWater
                Thickness  Rocks  PH  CEC   ParticleSizeSand  ParticleSizeSilt  ParticleSizeClay
                100        4.4    6   10.3  11.4              66.9              21.7
                120        5.7    6   10.3  10.9              66.7              22.4
                130        10.2   6   9.1   11.9              64.3              23.8
                200        8.9    6   8.8   13.7              60.8              25.5
                300        9.4    6   10.1  11.1              45.6              43.3
                300        8.1    6   10    8.7               39.9              51.4
                350        1.6    6   9.7   9.3               42.7              48
              Water
                Thickness  BD    AirDry  LL15   DUL    SAT    KS
                100        1.3   0.048   0.12   0.277  0.465  1200
                120        1.38  0.085   0.094  0.264  0.421  420
                130        1.37  0.079   0.079  0.238  0.381  275
                200        1.41  0.094   0.094  0.222  0.381  200
                300        1.47  0.141   0.141  0.255  0.338  80
                300        1.48  0.155   0.155  0.28   0.359  40
                350        1.52  0.166   0.166  0.296  0.409  80
                SoilCrop PlantainSoil: LL=[0.12, 0.09, 0.08, 0.09, 0.14, 0.16, 0.17]; KL=[0.1, 0.09, 0.08, 0.05, 0.03, 0.02, 0.02]; XF=[1, 1, 1, 1, 1, 1, 1]
              SoilWater: SummerDate=21-Mar; SummerU=6; SummerCona=3.5; WinterDate=23-Sep; WinterU=6; WinterCona=2.5; DiffusConst=88; DiffusSlope=35; Salb=0.13; CN2Bare=73; CNRed=20; CNCov=0.8; max_pond=0; Thickness=[100, 120, 130, 200, 300, 300, 350]; SWCON=[0.6, 0.5, 0.3, 0.3, 0.25, 0.2, 0.3]; residueinterception=0
              SoilNitrogen: fom_type=[default, manure, mucuna, lablab, shemp, stable]; fract_carb=[0.2, 0.3, 0.54, 0.57, 0.45, 0]; fract_cell=[0.7, 0.3, 0.37, 0.37, 0.47, 0.1]; fract_lign=[0.1, 0.4, 0.09, 0.06, 0.08, 0.9]
              SoilOrganicMatter: RootCN=40; RootWt=1000; SoilCN=11; EnrACoeff=7.4; EnrBCoeff=0.2; OCUnits=Total
                Thickness  OC    FBiom  FInert
                100        3.26  0.05   0.4
                120        1.17  0.03   0.6
                130        0.39  0.02   0.75
                200        0.4   0.015  0.875
                300        0.25  0.01   0.95
                300        0.2   0.01   0.99
                350        0.15  0.01   0.99
              InitialWater Initial water: PercentMethod=EvenlyDistributed; FractionFull=0.95
              Sample Initial nitrogen: NO3Units=kgha; NH4Units=kgha; SWUnits=Volumetric; OCUnits=Total; PHUnits=Water
                Thickness  NO3  NH4
                100        20   2
                120        15   2
                330        10   1
                950        5    0.5
              CERESSoilTemperature
            Plant Plantain: CropType=Plantain
            Report: EventNames=[Clock].DoReport
            SoluteManager
      Experiment RELARC_02
        Memo
          ###RELARC 02###

          This simulation was adapted from a defoliation trial conducted in 2000-2001, at Russell E. Larson Agricultural Research Center, Pennsylvania, USA.  The trial was established in small plots, replicated five times, with plantain sown in April-1999 (Cultivars '*Lancelot*' and '*Tonic*'.  Only data from the first year is used as the population declined markedly in the second winter.  All plots received 4.5 t/ha of limestone and were fertilized with 56 kg N/ha in April, June and July of 2000.  The soil at the site was a Hagerstown silt loam (fine, mixed, semiactive mesic Typic Hapludalfs).
          Each plot was mechanically mowed to height of 7cm every 4 weeks.  Only annual and treatment yields are reported, however population was given for specific dates.  Dates for each harvest were reported.  From these data, yield was arbitrarily inferred for each harvest, therefore they should be seen as rough approximation only (N variation between cultivars were considered here).
          Met file was built using data obtained from NOAA website.  The data set was largely complete except for solar radiation, which was added from an alternative interpolated set for this location, also from NOAA.
          Information to assemble the soil data was obtained from USGS.

          References:
          Sanderson, M.A.; Labreveux, M.; Hall, M.H.; Elwinger, G.F. 2003. Forage yield and persistence of chicory and english plantain. Crop Science, 43: 995-1000.
        Factors
          Factor Cultivar: Specifications=[Sowing]
            Operations Lancelot
              1999-04-28  [Plantain].Sow(population: 300, cultivar: "Lancelot", depth: 10, rowSpacing: 150)
            Operations Tonic
              1999-04-28  [Plantain].Sow(population: 300, cultivar: "Tonic", depth: 10, rowSpacing: 150)
        Simulation RELARC_02
          Clock: StartDate=1999-04-01; EndDate=2000-12-31
          Weather: FileName=StateCollege.met
          Summary
          SoilArbitrator Soil Arbitrator
          Zone Field: Area=1; Slope=0
            Folder Management
              Manager ExtraVariables: same as Validation.USA.RELARC_01.RELARC_01.Field.Management.ExtraVariables
              Operations Sowing
              Operations FertiliserSchedule
                2000-04-15  [Fertiliser].Apply(Amount: 56, Type: Fertiliser.Types.NH4NO3N, Depth: 10)
                2000-06-01  [Fertiliser].Apply(Amount: 56, Type: Fertiliser.Types.NH4NO3N, Depth: 10)
                2000-07-05  [Fertiliser].Apply(Amount: 56, Type: Fertiliser.Types.NH4NO3N, Depth: 10)
              Operations Cuttings
                1999-09-15  [Defoliate].Script.Defoliate(defoliationType: "Cut", amountDM: 50, amountType: "ResidualDM", duration: 1)
                2000-05-16  [Defoliate].Script.Defoliate(defoliationType: "Cut", amountDM: 50, amountType: "ResidualDM", duration: 1)
                2000-06-14  [Defoliate].Script.Defoliate(defoliationType: "Cut", amountDM: 50, amountType: "ResidualDM", duration: 1)
                2000-07-11  [Defoliate].Script.Defoliate(defoliationType: "Cut", amountDM: 50, amountType: "ResidualDM", duration: 1)
                2000-08-08  [Defoliate].Script.Defoliate(defoliationType: "Cut", amountDM: 50, amountType: "ResidualDM", duration: 1)
                2000-09-05  [Defoliate].Script.Defoliate(defoliationType: "Cut", amountDM: 50, amountType: "ResidualDM", duration: 1)
              Manager Defoliate: same as Validation.New Zealand.FRNLLincoln.FRNLLincoln.Field.Management.Defoliate
            MicroClimate: a_interception=0; b_interception=1; c_interception=0; d_interception=0; soil_albedo=0.23; sun_angle=15; soil_heat_flux_fraction=0.4; night_interception_fraction=0.5; refheight=2; albedo=0.26; emissivity=0.96; RadIntTotal=0
            SurfaceOrganicMatter: same as Validation.USA.RELARC_01.RELARC_01.Field.SurfaceOrganicMatter
            Irrigation
            Fertiliser
            Soil HagerstownSoil: same as Validation.USA.RELARC_01.RELARC_01.Field.HagerstownSoil
            Plant Plantain: CropType=Plantain
            Report: EventNames=[Clock].DoReport
            SoluteManager
      Memo SubTitle
        ### All data from USA
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