Simulations: Version=27
  Memo TitlePage
    # The APSIM Potato Model

    _Brown, H.E., Huth, N.I. and Holzworth, D.P._

    ##Building the model.
    The APSIM potato model has been described in part by [Brown_etal_2011] and developed using the Plant Modelling Framework (PMF) of [brown_plant_2014]. This new framework provides a library of plant organ and process submodels that can be coupled, at runtime, to construct a model in much the same way that models can be coupled to construct a simulation. This means that dynamic composition of lower level process and organ classes (e.g. photosynthesis, leaf) into larger constructions (e.g. maize, wheat, sorghum) can be achieved by the model developer without additional coding.

    The model consists of:

    * a phenology model to simulate development between growth phases
    * a structure model to simulate plant morphology
    * a collection of organs to simulate the biomass (N and Weight) of various plant parts
    * an arbitrator to allocate biomass to the various plant organs

    ##Pecularities of potato
    Potato is a challenging crop to model because it is vegetatviely propigated.  For seed propigated crops, plants are always equally dormant at planting and their development begins from there.  With potato the physiological status of the seed tubers vary depending on:

    * the conditions the mother plant encountered late in its life (Stress, Desication etc)
    * the conditions that the tuber was stored in (Cool store, ground store, dry store etc)
    * treatment of the seed prior to planting (chitting, cutting etc).

    All of these factors infuence the developmental behaviour of the crop that is produced including:

    * The timing of emergence
    * The number of stems produced per plant and subsequent tuber number and canopy development
    * The timing of tuber initiation and subsequent growth and partitioning
    * The duration of haulm growth and subsequent tuber filling duration

    There are an enormous number of potato cultivars and they all differ in their responses of post planting behavour due to pre planting seed conditions, there is not a good quantitative understanding of how environment and managemet of seed potato prior to planting influences post planting behaviour and it is beyond the scope of the current APSIM infrastructure to provide environmental conditions during storage of seed.  We have tried but with a list of excuses this long we have not yet succeeded in building the effects of seed physiology into the potato model in anything other than a very elementry way.  However, it is possible to set the model up to capture seed effects for specific simulations.

    ##Including a potato crop in an APSIM simulation
    There is a Potato example simulation available by clicking the "Open an Example" icon available on the first tab displayed when APSIM Next Gen is opened.  This provides a useful demonstration of how to simulate a potato crop and provides some useful graphs for viewing models predictions.
    To incluce a potato crop in a simulation the "Potato" model needs to be added to the paddock, field or zone in which it is to be grown.  This can be done by right clicking on the "Paddock", selecting "Add" from the drop down menu and then selecting "Potato" from the list that comes up.  A sowing action also needs to be set to start the crop off and a harvest event to remove the potato crop so the next crop can be simulated.  The "PlantandHarvest" manager module that is included in the "Potato" example simulation has script written to instigate these events and can be copied from the example simulation into other simulations.
    ###Setting sowing depth (emergence date)
    The potato model predicts emergence date as a function of sowing depth and all subsequent phenology is dependent on this timing.  Because this date is effected by seed physiology and can't yet be modeled we recommend that planting depth is not set at the actual planting depth, but varied to ensure the model predicts a realistic emergence date.  Planting depth is set in the 'PlantandHarvest' module
    ###Setting stem number (tuber number and early canopy growth)
    The 'PlantandHarvest' script sets the "Number of stems per seed piece".  This varies enormiously due to seed physiology and variety and should be set to a number that is realistic for the cultivar being simulated and the pre-planting treatment of the seed tubers.  This parameter influences tuber number and the early development of the canopy so should be set carefully.
    ###Setting final leaf number (Crop duration)
    The duration of a potato crop is determined by the number of leaves that the mainstem produces and how long it takes for these to appear and seness.  This responds to photoperiod in many varieties and is influenced by the pre-planting treatment of seed tubers.  As such this parameter is given a default value for each cultivar but can also be set in the "PlantandHarvest" script if more is know about the expected determinany of the potatoes under the circumstances being simulated.  Please read  [Brown_etal_2011] for a clear definition of final leaf number.
  Replacements
    Report: EventNames=[Clock].DoReport
      VariableNames:
        [Clock].Today
        [Potato].AboveGround.N
        [Potato].BelowGround.N
        [Potato].Leaf.AppearedCohortNo
        [Potato].Leaf.CoverDead
        [Potato].Leaf.CoverGreen
        [Potato].Leaf.CoverTotal
        [Potato].Leaf.Dead.N
        [Potato].Leaf.Dead.NConc
        [Potato].Leaf.DeadCohortNo
        [Potato].Leaf.ExpandedCohortNo
        [Potato].Leaf.ExpandingCohortNo
        [Potato].Leaf.Fn
        [Potato].Leaf.Fw
        [Potato].Leaf.LAI
        [Potato].Leaf.LAIDead
        [Potato].Leaf.Live.N
        [Potato].Leaf.Live.Wt
        [Potato].Leaf.Live.NConc
        [Potato].Leaf.PlantAppearedGreenLeafNo
        [Potato].Leaf.SenescingCohortNo
        [Potato].Leaf.SpecificArea
        [Potato].Phenology.CurrentPhaseName
        [Potato].Phenology.Stage
        [Potato].Root.Dead.N
        [Potato].Root.Dead.NConc
        [Potato].Root.Dead.Wt
        [Potato].Root.Depth
        [Potato].Root.Live.N
        [Potato].Root.Live.NConc
        [Potato].Root.Live.Wt
        [Potato].Stem.Dead.N
        [Potato].Stem.Dead.NConc
        [Potato].Stem.Live.N
        [Potato].Stem.Live.NConc
        [Potato].Stem.Live.StorageWt
        [Potato].Stem.Live.StructuralWt
        [Potato].Stem.Live.Wt
        [Potato].Structure.Height
        [Potato].Structure.LeafTipsAppeared
        [Potato].Structure.PlantTotalNodeNo
        [Potato].Structure.PrimaryBudTotalNodeNo
        [Potato].Structure.TotalStemPopn
        [Potato].Total.N
        [Potato].TotalDead.N
        [Potato].TotalLive.N
        [Potato].TotalLive.Wt
        [Potato].Tuber.Dead.N
        [Potato].Tuber.Dead.NConc
        [Potato].Tuber.Dead.Wt
        [Potato].Tuber.LiveFWt.DryMatterContent.Value()
        [Potato].Tuber.Live.N
        [Potato].Tuber.Live.NConc
        [Potato].Tuber.Live.Wt
        [Potato].Tuber.LiveFWt
        [PlantandHarvest].Script.FinalTag
  DataStore
    ExcelInput Observed: FileName=Observed.xlsx; SheetNames=[Observed]
    PredictedObserved TimeSeriesData: PredictedTableName=Report; ObservedTableName=Observed; FieldNameUsedForMatch=Clock.Today
    PredictedObserved FinalYieldData: PredictedTableName=Report; ObservedTableName=Observed; FieldNameUsedForMatch=PlantandHarvest.Script.FinalTag
  Folder Validation
    Memo
      A test dataset has been developed to test the APSIM Potato model for a range of environmental (soil and climate) conditions, management options (sowing dates, populations, nitrogen rates) and genetic backgrounds (different regions, cultivar types).  These tests have been grouped into various geographical regions to allow users to evaluate the suitability of the model for their particular region of interest.  Graphs of model performance are provided for yield, biomass production, canopy development and nitrogen uptake.
    Folder Combined Results
      Memo Combined Results
        Simulation results for the combined datasets from the various countries are shown in the following graphs.  The model is able to adequately capture the influence of growing conditions (soil, climate) and management (population, nitrogen,  sowing date).
    Folder New Zealand
      Memo
        **Model development**

        A range of experimental data has been collected by Plant and Food Research over a long period and was available for fitting thet growth and development parameters for the potato model.

        * **ABlock** experiment was used for fitting leaf appearance and size parameters and biomass production and partitioning
        * **Baxters** experiment was used for fitting branching parameters
        * **FUE** experiment was used for fitting nitrogen responses
        * **FUE_NI** experiment was used for fitting nitrogen response in winter grown potato
        * **FSP** experiment was used for fitting growth and development parameters in cooler situations
      Experiment ABlock
        Memo
          This trial was run in A Block of the Plant and Food Research farm on a templeton silt loam, which is a deep, stone free soil of high plant available water capacity (160 mm/m).  8 cultivars of potato were planted representing a range of commercially important varieties in New Zealand:

          * Russet Burbank is a main crop variety grown for processing into fries
          * Jersey is a short variety grown for early table potato production
          * Red Rascal is a main crop table potato variety
          * Horizon is a main crop tabel variety
          * Ilam hardy is commonly grown as an early table variety
          * Karaka is a crisping variety
          * Nooksac  is a main crop variety grown for processing into fries
          * Rua is a main crop table potato variety

          All potatoes were planted on 20/10/2003 and irrigated, fertiliser and pesticide were applied to ensure the crop remaind unstressed and healthy.  Each variety was intensively sampled throughout the growth period to provide data for developing cultivar parameters for different varieties.
        Factors
          Factor Cultivar
            Factor Burbank
              Specifications:
                [PlantandHarvest].Script.CultivarName=RussetBurbank
                [PlantandHarvest].Script.StemNumberPerSeedTuber=2.2
                [PlantandHarvest].Script.PlantingDepth=120
            Factor Horizon
              Specifications:
                [PlantandHarvest].Script.CultivarName=Horizon
                [PlantandHarvest].Script.StemNumberPerSeedTuber=3.2
                [PlantandHarvest].Script.PlantingDepth=135
            Factor IlamHardy
              Specifications:
                [PlantandHarvest].Script.CultivarName=IlamHardy
                [PlantandHarvest].Script.StemNumberPerSeedTuber=4.63
                [PlantandHarvest].Script.PlantingDepth=135
            Factor JerseyBenny
              Specifications:
                [PlantandHarvest].Script.CultivarName=JerseyBenny
                [PlantandHarvest].Script.StemNumberPerSeedTuber=3.6
                [PlantandHarvest].Script.PlantingDepth=160
            Factor Karaka
              Specifications:
                [PlantandHarvest].Script.CultivarName=Karaka
                [PlantandHarvest].Script.StemNumberPerSeedTuber=3
                [PlantandHarvest].Script.PlantingDepth=135
            Factor Nooksac
              Specifications:
                [PlantandHarvest].Script.CultivarName=Nooksac
                [PlantandHarvest].Script.StemNumberPerSeedTuber=2.3
                [PlantandHarvest].Script.PlantingDepth=165
            Factor RedRascal
              Specifications:
                [PlantandHarvest].Script.CultivarName=RedRascal
                [PlantandHarvest].Script.StemNumberPerSeedTuber=4.87
                [PlantandHarvest].Script.PlantingDepth=140
            Factor Rua
              Specifications:
                [PlantandHarvest].Script.CultivarName=Rua
                [PlantandHarvest].Script.StemNumberPerSeedTuber=2.55
                [PlantandHarvest].Script.PlantingDepth=140
        Simulation RussetBurbank
          Weather: FileName=lincoln.met
          Clock: StartDate=2003-10-20; EndDate=2004-06-05
          Summary
          SoilArbitrator Soil Arbitrator
          Zone Field: Area=1; Slope=0
            Soil: SoilType=Sedementary; LocalName=Lincoln; Latitude=0; Longitude=0
              Water
                Thickness  BD   AirDry  LL15  DUL   SAT
                100        1.2  0.08    0.16  0.33  0.5
                200        1.2  0.16    0.16  0.33  0.5
                300        1.2  0.15    0.15  0.31  0.44
                300        1.2  0.13    0.13  0.27  0.46
                300        1.2  0.15    0.15  0.3   0.44
                300        1.2  0.15    0.15  0.3   0.44
                SoilCrop PotatoSoil: LL=[0.13, 0.13, 0.1, 0.15, 0.3, 0.3]; KL=[0.1, 0.06, 0.04, 0.01, 0, 0]; XF=[1, 1, 1, 1, 0, 0]
              SoilWater: SummerDate=1-Nov; SummerU=9; SummerCona=4.4; WinterDate=1-Apr; WinterU=9; WinterCona=4.4; DiffusConst=88; DiffusSlope=35.4; Salb=0.18; CN2Bare=0; CNRed=-9E-05; CNCov=0; slope=0; discharge_width=0; catchment_area=0; max_pond=0; residueinterception=0
                Thickness  SWCON  KLAT
                100        0.55   0
                200        0.55   0
                300        0.55   0
                300        0.55   0
                300        0.55   0
                300        0.55   0
              SoilNitrogen: fom_type=[default, manure, mucuna, lablab, shemp, stable]; fract_carb=[0.2, 0.3, 0.54, 0.57, 0.45, 0]; fract_cell=[0.7, 0.3, 0.37, 0.37, 0.47, 0.1]; fract_lign=[0.1, 0.4, 0.09, 0.06, 0.08, 0.9]
              SoilOrganicMatter: RootCN=30; RootWt=3000; SoilCN=11.5; EnrACoeff=7.4; EnrBCoeff=0.2; OCUnits=Total
                Thickness  OC    FBiom  FInert
                100        3.5   0.025  0.3
                200        2.5   0.025  0.4
                300        1.2   0.015  0.75
                300        1.03  0.01   0.9
                300        0.47  0.01   0.96
                300        0.47  0.01   0.96
              Analysis: Thickness=[100, 200, 300, 300, 300, 300]; PH=[6.6, 6.2, 5.7, 5.5, 5.5, 5.5]; PHUnits=Water; BoronUnits=HotWater
              InitialWater Initial water: PercentMethod=FilledFromTop; FractionFull=1
              Sample: NO3Units=kgha; NH4Units=kgha; SWUnits=Volumetric; OCUnits=Total; PHUnits=Water
                Thickness  NO3   NH4
                100        40    0.1
                200        30    0.1
                300        14    0.1
                300        14    0.1
                300        1.38  0.1
                300        1.38  0.1
              CERESSoilTemperature
            SurfaceOrganicMatter: PondActive=no; ReportAdditions=no; ReportRemovals=no; PoolName=Wheat; type=Wheat; mass=2000; standing_fraction=0; cnr=80; CriticalResidueWeight=2000; OptimumDecompTemp=20; MaxCumulativeEOS=20; CNRatioDecompCoeff=0.277; CNRatioDecompThreshold=25; TotalLeachRain=25; MinRainToLeach=10; CriticalMinimumOrganicC=0.004; DefaultCPRatio=0; DefaultStandingFraction=0; StandingExtinctCoeff=0.5; FractionFaecesAdded=0.5
              Pools:
                {PoolName=Wheat, ResidueType=Wheat, Mass=2000, CNRatio=80, StandingFraction=0}
              ResidueTypes: LoadFromResource=ResidueTypes
              TillageTypes TillageTypesList
            Irrigation
            Fertiliser
            MicroClimate: a_interception=0; b_interception=1; c_interception=0; d_interception=0; soil_albedo=0.23; sun_angle=15; soil_heat_flux_fraction=0.4; night_interception_fraction=0.5; refheight=2; albedo=0.26; emissivity=0.96; RadIntTotal=0
            Plant Potato: CropType=Potato
            Folder Management
              Operations
                2003-10-20  [Fertiliser].Apply(100, Fertiliser.Types.UreaN, 0);
                2003-11-25  [Fertiliser].Apply(69, Fertiliser.Types.UreaN,0);
                2003-11-26  [Irrigation].Apply(15);
                2003-12-04  [Irrigation].Apply(50);
                2003-12-16  [Irrigation].Apply(15);
                2003-12-22  [Irrigation].Apply(50);
                2003-12-30  [Irrigation].Apply(50);
                2004-01-08  [Irrigation].Apply(50);
                2004-01-21  [Irrigation].Apply(50);
                2004-01-31  [Irrigation].Apply(50);
                2004-02-27  [Irrigation].Apply(25);
              Manager PlantandHarvest
                PlantingDate = 2003-10-20
                CultivarName = RussetBurbank
                RowSpace = 280
                RowWidth = 770
                PlantingDepth = 120
                StemNumberPerSeedTuber = 2.2
                SetFinalLeafNumber = 0
                HarvestDate = 2004-06-01
```csharp
using System;
using Models.Core;
using Models.PMF;
using APSIM.Shared.Utilities;
using System.Xml.Serialization;
        
namespace Models
{
    [Serializable] 
    [System.Xml.Serialization.XmlInclude(typeof(Model))]
    public class Script : Model
    {
        [Link] Plant Potato;
        [Link] Clock Clock;
        [Link] Zone zone;
        [Link] Summary Summary;
        
        [Description("Planting Date")]
        public DateTime PlantingDate { get; set; }
        [Description("Cultivar")]
        [Display(DisplayType = DisplayAttribute.DisplayTypeEnum.CultivarName)]
        public string CultivarName { get; set; }
        [Description("Spacing (mm) between plants within rows")]
        public double RowSpace { get; set; }
        [Description("Spacing (mm) between rows")]
        public double RowWidth { get; set; }
        [Description("Depth (mm) tubers are planted")]
        public double PlantingDepth { get; set; }
        [Description("Number of stems per seed tuber")]
        public double StemNumberPerSeedTuber { get; set; }
        [Description("Final leaf number.  Leave at 0 if not known")]
        public double SetFinalLeafNumber { get; set; }
        [Description("HarvestDate Date")]
        public DateTime HarvestDate { get; set; }
        
        [XmlIgnore] public string FinalTag { get; set; }
        [XmlIgnore] public bool Harvested { get; set; }
        [XmlIgnore] public bool ReadyForHarvest { get; set; }
        
        
        [EventSubscribe("Commencing")]
        private void OnSimulationCommencing(object sender, EventArgs e)
        {
            FinalTag = "";
            Harvested = false;
            ReadyForHarvest = false;
        }
        
        [EventSubscribe("DoManagement")]
        private void OnDoManagement(object sender, EventArgs e)
        {
            double PlantPopulation = 1 / ((RowWidth / 1000) * (RowSpace / 1000));

            if (Clock.Today.Date == PlantingDate)
                Potato.Sow(population: PlantPopulation, cultivar: CultivarName, depth: PlantingDepth, rowSpacing: 150, budNumber: StemNumberPerSeedTuber);
            
            if (ReadyForHarvest == true)
            {
                Potato.RemoveBiomass("Harvest");
                Potato.EndCrop();
                ReadyForHarvest = false;
                Harvested = true;
                Summary.WriteMessage(this, "is working");
            }
            FinalTag = "";   
            
            if (SetFinalLeafNumber > 0)
                zone.Set("Potato.Structure.FinalLeafNumber.FixedValue", SetFinalLeafNumber);
            if (SetFinalLeafNumber > 80)
                Summary.WriteWarning(this, "Model is producing > 80 leaves which is guite alot.  Is this expected?  If not check you haven't set a invalid number in the Final Leaf Number box in" + this.Name);
        }
        
        [EventSubscribe("DoManagementCalculations")]
        private void OnDoManagementCalculations(object sender, EventArgs e)
        {
            if ((Clock.Today == HarvestDate) && (Harvested == false))
            {
                FinalTag = "yield";
                ReadyForHarvest = true;
            }
            //if ((Potato.Phenology.Stage >= 7) && (Harvested == false))
            //{
            //    FinalTag = "yield";
            //    ReadyForHarvest = true;
            //}
        }
    }
}
```
            Report: EventNames=[Clock].DoReport
            SoluteManager
      Experiment Baxters
        Memo
          **Sowing date and Sowing Density Experiment**

          This trial was run in Baxters block of the Plant and Food Research farm on a shallow templeton silt loam, which had a compacted layer from 30-60 cm above a stony sub soil below 60cm.  Russet Burbank potatoes were planted on 3 dates:

          * 14 October 1999
          * 2 November 1999
          * 23 November 1999

          Two populations were established at each planting:

          * 2 Plants/m<sup>2</sup>
          * 4 Plants/m<sup>2</sup>

          Fertiliser and pesticide were applied to ensure the crop remaind unstressed and healthy but irrigation was somewhat limited and did constrain growth at times.  Each treatment intensively sampled throughout the growth period to provide data for developing cultivar parameters for different varieties.  The same seed line was used for each sowing date so seed was becoming progressively more mature with leater plantings.  As such the stem number per plant increaesed from 3 - 5.7 from the early to the late sowing and and the final leaf number decreased.  The differences in canopy and production between the population treatments were very small becasue the low population treatment branched extensively.  This combination of different stem numbers and populations provided an excelent data set for parameterising branching.
        Factors
          Factor PlantingDate
            Factor 14Oct
              Specifications:
                [PlantandHarvest].Script.PlantingDate=1998-10-14
                [PlantandHarvest].Script.PlantingDepth=200
                [PlantandHarvest].Script.StemNumberPerSeedTuber=3.0
                [PlantandHarvest].Script.SetFinalLeafNumber=40
            Factor 2Nov
              Specifications:
                [PlantandHarvest].Script.PlantingDate=1998-11-02
                [PlantandHarvest].Script.PlantingDepth=160
                [PlantandHarvest].Script.StemNumberPerSeedTuber=3.8
                [PlantandHarvest].Script.SetFinalLeafNumber=34
            Factor 23Nov
              Specifications:
                [PlantandHarvest].Script.PlantingDate=1998-11-23
                [PlantandHarvest].Script.PlantingDepth=120
                [PlantandHarvest].Script.StemNumberPerSeedTuber=5.7
                [PlantandHarvest].Script.SetFinalLeafNumber=28
          Factor PlantDensity
            Factor 4: Specifications=[PlantandHarvest].Script.RowSpace=300
            Factor 2: Specifications=[PlantandHarvest].Script.RowSpace=600
        Simulation BaxtersBase
          Weather: FileName=lincoln.met
          Clock: StartDate=1998-10-14; EndDate=1999-05-01
          Summary
          SoilArbitrator Soil Arbitrator
          Zone Field: Area=1; Slope=0
            Soil: Latitude=0; Longitude=0
              Analysis: Thickness=[100, 200, 300, 300, 300, 300]; PH=[6.6, 6.2, 5.7, 5.5, 5.5, 5.5]; PHUnits=Water; BoronUnits=HotWater
              InitialWater Initial water: PercentMethod=EvenlyDistributed; FractionFull=1
              Water
                Thickness  BD   AirDry  LL15  DUL   SAT
                100        1.2  0.08    0.13  0.33  0.5
                200        1.2  0.13    0.13  0.33  0.5
                300        1.2  0.1     0.1   0.31  0.44
                300        1.2  0.06    0.06  0.15  0.46
                300        1.2  0.04    0.04  0.1   0.44
                300        1.2  0.02    0.02  0.06  0.44
                SoilCrop wheatSoil: LL=[0.13, 0.13, 0.1, 0.08, 0.11, 0.11]; KL=[0.06, 0.06, 0.06, 0.06, 0.06, 0.06]; XF=[1, 1, 1, 1, 1, 1]
                SoilCrop PotatoSoil: LL=[0.13, 0.13, 0.27, 0.27, 0.3, 0.3]; KL=[0.1, 0.06, 0.03, 0.01, 0, 0]; XF=[1, 1, 0.1, 0, 0, 0]
              SoilWater: SummerDate=1-Nov; SummerU=9; SummerCona=4.4; WinterDate=1-Apr; WinterU=9; WinterCona=4.4; DiffusConst=88; DiffusSlope=35.4; Salb=0.18; CN2Bare=68; CNRed=20; CNCov=0.8; slope=0; discharge_width=0; catchment_area=0; max_pond=0; residueinterception=0
                Thickness  SWCON  KLAT
                100        0.55   0
                200        0.55   0
                300        0.55   0
                300        0.55   0
                300        0.55   0
                300        0.55   0
              SoilNitrogen: fom_type=[default, manure, mucuna, lablab, shemp, stable]; fract_carb=[0.2, 0.3, 0.54, 0.57, 0.45, 0]; fract_cell=[0.7, 0.3, 0.37, 0.37, 0.47, 0.1]; fract_lign=[0.1, 0.4, 0.09, 0.06, 0.08, 0.9]
              SoilOrganicMatter: RootCN=30; RootWt=3000; SoilCN=11.5; EnrACoeff=7.4; EnrBCoeff=0.2; OCUnits=Total
                Thickness  OC    FBiom  FInert
                100        1.82  0.025  0.3
                200        1.47  0.025  0.4
                300        1.2   0.015  0.75
                300        1.03  0.01   0.9
                300        0.47  0.01   0.96
                300        0.47  0.01   0.96
              Sample Initial nitrogen: NO3Units=kgha; NH4Units=ppm; SWUnits=Volumetric; OCUnits=Total; PHUnits=Water
                Thickness  NO3  NH4
                100        217  0
                200        30   0
                300        5    0
                300        5    0
                300        0    0
                300        0    0
              CERESSoilTemperature
            Irrigation
            Fertiliser
            MicroClimate: a_interception=0; b_interception=1; c_interception=0; d_interception=0; soil_albedo=0.23; sun_angle=15; soil_heat_flux_fraction=0.4; night_interception_fraction=0.5; refheight=2; albedo=0.26; emissivity=0.96; RadIntTotal=0
            Plant Potato: CropType=Potato
            Report: EventNames=[Clock].DoReport
            SurfaceOrganicMatter surface organic matter: ReportAdditions=no; ReportRemovals=no; PoolName=wheat; type=wheat; mass=2000; standing_fraction=0; cnr=80; CriticalResidueWeight=2000; OptimumDecompTemp=20; MaxCumulativeEOS=20; CNRatioDecompCoeff=0.277; CNRatioDecompThreshold=25; TotalLeachRain=25; MinRainToLeach=10; CriticalMinimumOrganicC=0.004; DefaultCPRatio=0; DefaultStandingFraction=0; StandingExtinctCoeff=0.5; FractionFaecesAdded=0.5
              Pools:
                {PoolName=wheat, ResidueType=wheat, Mass=2000, CNRatio=80, StandingFraction=0}
              ResidueTypes: LoadFromResource=ResidueTypes
            Folder Management
              Operations
                1998-10-02  [Irrigation].Apply(40);
                1998-10-26  [Irrigation].Apply(70);
                1998-12-15  [Irrigation].Apply(70);
                1998-12-29  [Irrigation].Apply(10);
                1998-12-30  [Irrigation].Apply(55);
                1999-01-07  [Irrigation].Apply(50);
                1999-01-21  [Irrigation].Apply(40);
                1999-02-10  [Irrigation].Apply(28);
                1999-02-19  [Irrigation].Apply(15);
                1999-03-09  [Irrigation].Apply(25);
                1998-12-29  [Fertiliser].Apply(150, Fertiliser.Types.UreaN, 10);
              Manager PlantandHarvest
                PlantingDate = 1998-10-14
                CultivarName = RussetBurbank
                RowSpace = 300
                RowWidth = 770
                PlantingDepth = 200
                StemNumberPerSeedTuber = 3
                SetFinalLeafNumber = 34
                HarvestDate = 1999-04-27
```csharp
using System;
using Models.Core;
using Models.PMF;
using APSIM.Shared.Utilities;
using System.Xml.Serialization;
        
namespace Models
{
    [Serializable] 
    [System.Xml.Serialization.XmlInclude(typeof(Model))]
    public class Script : Model
    {
        [Link] Plant Potato;
        [Link] Clock Clock;
        [Link] Zone zone;
        [Link] Summary Summary;
        
        [Description("Planting Date")]
        public DateTime PlantingDate { get; set; }
        [Description("Cultivar")]
        [Display(DisplayType = DisplayAttribute.DisplayTypeEnum.CultivarName)]
        public string CultivarName { get; set; }
        [Description("Spacing (mm) between plants within rows")]
        public double RowSpace { get; set; }
        [Description("Spacing (mm) between rows")]
        public double RowWidth { get; set; }
        [Description("Depth (mm) tubers are planted")]
        public double PlantingDepth { get; set; }
        [Description("Number of stems per seed tuber")]
        public double StemNumberPerSeedTuber { get; set; }
        [Description("Final leaf number.  Leave at 0 if not known")]
        public int SetFinalLeafNumber { get; set; }
        [Description("HarvestDate Date")]
        public DateTime HarvestDate { get; set; }
        
        [XmlIgnore] public string FinalTag { get; set; }
        [XmlIgnore] public bool Harvested { get; set; }
        [XmlIgnore] public bool ReadyForHarvest { get; set; }
        
        [EventSubscribe("Commencing")]
        private void OnSimulationCommencing(object sender, EventArgs e)
        {
            FinalTag = "";
            Harvested = false;
            ReadyForHarvest = false;
        }
        
        [EventSubscribe("DoManagement")]
        private void OnDoManagement(object sender, EventArgs e)
        {
            double PlantPopulation = 1 / ((RowWidth / 1000) * (RowSpace / 1000));

            if (Clock.Today.Date == PlantingDate)
                Potato.Sow(population: PlantPopulation, cultivar: CultivarName, depth: PlantingDepth, rowSpacing: 150, budNumber: StemNumberPerSeedTuber);
            
            if (ReadyForHarvest == true)
            {
                Potato.Harvest();
                Potato.EndCrop();
                ReadyForHarvest = false;
                Harvested = true;
                Summary.WriteMessage(this, "is working");
            }
            FinalTag = "";   
            
            if (SetFinalLeafNumber > 0)
                zone.Set("Potato.Structure.FinalLeafNumber.FixedValue", SetFinalLeafNumber);
            if (SetFinalLeafNumber > 80)
                Summary.WriteWarning(this, "Model is producing > 80 leaves which is guite alot.  Is this expected?  If not check you haven't set a invalid number in the Final Leaf Number box in" + this.Name);
        }
        
        [EventSubscribe("DoManagementCalculations")]
        private void OnDoManagementCalculations(object sender, EventArgs e)
        {
            if ((Clock.Today == HarvestDate) && (Harvested == false))
            {
                FinalTag = "yield";
                ReadyForHarvest = true;
            }
            if ((Potato.Phenology.Stage >= 7) && (Harvested == false))
            {
                FinalTag = "yield";
                ReadyForHarvest = true;
            }
        }
    }
}
```
            SoluteManager
      Experiment FUE
        Memo
          **Fertiliser Use Efficiency experiment (FUE)**

          This trial was run in A Block of the Plant and Food Research farm on a templeton silt loam, which is a deep, stone free soil of high plant available water capacity (160 mm/m).  Russet burbank potatos were planted on the 21st of October 1999 and irrigation and pesticide were applied to avoid stresses.  Different nitrogen fertiliser treatments were applied:

          * Nil
          * 150 kg/ha applied at planting
          * 300 kg/ha applied at planting
          * 275 kg/ha in split application of 25kg/ha weekly
        Factors
          Factor Nitrogen: Specifications=[FertiliserApplications]
            Operations 300early
              1999-10-19  [Fertiliser].Apply(150, Fertiliser.Types.UreaN, 10);
              1999-12-01  [Fertiliser].Apply(150, Fertiliser.Types.UreaN, 10);
            Operations 150early
              1999-10-19  [Fertiliser].Apply(150, Fertiliser.Types.UreaN, 10);
            Operations 275split
              1999-10-19  [Fertiliser].Apply(100, Fertiliser.Types.UreaN, 10);
              1999-12-01  [Fertiliser].Apply(25, Fertiliser.Types.UreaN, 10);
              1999-12-13  [Fertiliser].Apply(25, Fertiliser.Types.UreaN, 10);
              2000-01-17  [Fertiliser].Apply(13, Fertiliser.Types.UreaN, 10);
              2000-01-21  [Fertiliser].Apply(13, Fertiliser.Types.UreaN, 10);
              2000-01-24  [Fertiliser].Apply(13, Fertiliser.Types.UreaN, 10);
              2000-01-31  [Fertiliser].Apply(13, Fertiliser.Types.UreaN, 10);
              2000-02-07  [Fertiliser].Apply(13, Fertiliser.Types.UreaN, 10);
              2000-02-14  [Fertiliser].Apply(13, Fertiliser.Types.UreaN, 10);
              2000-02-21  [Fertiliser].Apply(13, Fertiliser.Types.UreaN, 10);
              2000-02-28  [Fertiliser].Apply(13, Fertiliser.Types.UreaN, 10);
              2000-03-06  [Fertiliser].Apply(13, Fertiliser.Types.UreaN, 10);
              2000-03-13  [Fertiliser].Apply(13, Fertiliser.Types.UreaN, 10);
              2000-03-20  [Fertiliser].Apply(13, Fertiliser.Types.UreaN, 10);
              2000-03-27  [Fertiliser].Apply(13, Fertiliser.Types.UreaN, 10);
            Operations Nil
        Simulation FUE_base
          Weather: FileName=lincoln.met
          Clock: StartDate=1999-10-19; EndDate=2000-06-30
          Summary
          SoilArbitrator Soil Arbitrator
          Zone paddock: Area=1; Slope=0
            Soil: Latitude=0; Longitude=0
              Analysis: Thickness=[100, 200, 300, 300, 300, 300]; PH=[6.6, 6.2, 5.7, 5.5, 5.5, 5.5]; PHUnits=Water; BoronUnits=HotWater
              InitialWater Initial water: PercentMethod=EvenlyDistributed; FractionFull=1
              Water
                Thickness  BD   AirDry  LL15  DUL   SAT
                100        1.2  0.08    0.16  0.33  0.5
                200        1.2  0.16    0.16  0.33  0.5
                300        1.2  0.14    0.14  0.31  0.44
                300        1.2  0.11    0.11  0.27  0.46
                300        1.2  0.16    0.16  0.3   0.44
                300        1.2  0.15    0.15  0.3   0.44
                SoilCrop wheatSoil: LL=[0.13, 0.13, 0.1, 0.08, 0.11, 0.11]; KL=[0.06, 0.06, 0.06, 0.06, 0.06, 0.06]; XF=[1, 1, 1, 1, 1, 1]
                SoilCrop PotatoSoil: LL=[0.13, 0.13, 0.1, 0.15, 0.3, 0.3]; KL=[0.1, 0.06, 0.04, 0.01, 0, 0]; XF=[1, 1, 1, 1, 0, 0]
              SoilWater: same as Validation.New Zealand.Baxters.BaxtersBase.Field.Soil.SoilWater
              SoilNitrogen: fom_type=[default, manure, mucuna, lablab, shemp, stable]; fract_carb=[0.2, 0.3, 0.54, 0.57, 0.45, 0]; fract_cell=[0.7, 0.3, 0.37, 0.37, 0.47, 0.1]; fract_lign=[0.1, 0.4, 0.09, 0.06, 0.08, 0.9]
              SoilOrganicMatter: RootCN=30; RootWt=3000; SoilCN=11.5; EnrACoeff=7.4; EnrBCoeff=0.2; OCUnits=Total
                Thickness  OC    FBiom  FInert
                100        4.5   0.025  0.3
                200        3.5   0.025  0.3
                300        1.2   0.015  0.75
                300        1.03  0.01   0.9
                300        0.47  0.01   0.96
                300        0.47  0.01   0.96
              Sample Initial nitrogen: NO3Units=kgha; NH4Units=kgha; SWUnits=Volumetric; OCUnits=Total; PHUnits=Water
                Thickness  NO3  NH4
                100        15   0.12
                100        15   0.24
                200        41   0.36
                200        10   0.36
                200        40   0.36
                700        5    0.36
              CERESSoilTemperature
            Fertiliser
            Irrigation
            SurfaceOrganicMatter surface organic matter: PoolName=wheat; type=wheat; mass=0; standing_fraction=0; cnr=60; CriticalResidueWeight=2000; OptimumDecompTemp=20; MaxCumulativeEOS=20; CNRatioDecompCoeff=0.277; CNRatioDecompThreshold=25; TotalLeachRain=25; MinRainToLeach=10; CriticalMinimumOrganicC=0.004; DefaultCPRatio=0; DefaultStandingFraction=0; StandingExtinctCoeff=0.5; FractionFaecesAdded=0.5
              Pools:
                {PoolName=wheat, ResidueType=wheat, Mass=0, CNRatio=60, StandingFraction=0}
              ResidueTypes: LoadFromResource=ResidueTypes
            MicroClimate: a_interception=0; b_interception=0; c_interception=0; d_interception=0; soil_albedo=0.23; sun_angle=15; soil_heat_flux_fraction=0.4; night_interception_fraction=0.5; refheight=2; albedo=0.15; emissivity=0.96; RadIntTotal=0
            Plant Potato: CropType=Potato
            Folder Manager folder
              Operations IrrigationApplications
                1999-12-09  [Irrigation].Apply(55);
                1999-12-23  [Irrigation].Apply(25);
                1999-12-30  [Irrigation].Apply(25);
                2000-01-21  [Irrigation].Apply(38);
                2000-02-10  [Irrigation].Apply(50);
                2000-02-16  [Irrigation].Apply(25);
                2000-03-01  [Irrigation].Apply(38);
              Operations FertiliserApplications: same as Validation.New Zealand.FUE.Factors.Nitrogen.275split
              Manager PlantandHarvest
                PlantingDate = 1999-10-21
                CultivarName = RussetBurbank
                RowSpace = 280
                RowWidth = 770
                PlantingDepth = 170
                StemNumberPerSeedTuber = 5
                SetFinalLeafNumber = 28
                HarvestDate = 2000-04-03
```csharp
using System;
using Models.Core;
using Models.PMF;
using APSIM.Shared.Utilities;
using System.Xml.Serialization;
        
namespace Models
{
    [Serializable] 
    [System.Xml.Serialization.XmlInclude(typeof(Model))]
    public class Script : Model
    {
        [Link] Plant Potato;
        [Link] Clock Clock;
        [Link] Zone zone;
        [Link] Summary Summary;
        
        [Description("Planting Date")]
        public DateTime PlantingDate { get; set; }
        [Description("Cultivar")]
        [Display(DisplayType = DisplayAttribute.DisplayTypeEnum.CultivarName)]
        public string CultivarName { get; set; }
        [Description("Spacing (mm) between plants within rows")]
        public double RowSpace { get; set; }
        [Description("Spacing (mm) between rows")]
        public double RowWidth { get; set; }
        [Description("Depth (mm) tubers are planted")]
        public double PlantingDepth { get; set; }
        [Description("Number of stems per seed tuber")]
        public double StemNumberPerSeedTuber { get; set; }
        [Description("Final leaf number.  Leave at 0 if not known")]
        public double SetFinalLeafNumber { get; set; }
        [Description("HarvestDate Date")]
        public DateTime HarvestDate { get; set; }
        
        [XmlIgnore] public string FinalTag { get; set; }
        [XmlIgnore] public bool Harvested { get; set; }
        [XmlIgnore] public bool ReadyForHarvest { get; set; }
        
        
        [EventSubscribe("Commencing")]
        private void OnSimulationCommencing(object sender, EventArgs e)
        {
            FinalTag = "";
            Harvested = false;
            ReadyForHarvest = false;
        }
        
        [EventSubscribe("DoManagement")]
        private void OnDoManagement(object sender, EventArgs e)
        {
            double PlantPopulation = 1 / ((RowWidth / 1000) * (RowSpace / 1000));

            if (Clock.Today.Date == PlantingDate)
                Potato.Sow(population: PlantPopulation, cultivar: CultivarName, depth: PlantingDepth, rowSpacing: 150, budNumber: StemNumberPerSeedTuber);
            
            if (ReadyForHarvest == true)
            {
                Potato.Harvest();
                Potato.EndCrop();
                ReadyForHarvest = false;
                Harvested = true;
                Summary.WriteMessage(this, "is working");
            }
            FinalTag = "";   
            
            if (SetFinalLeafNumber > 0)
                zone.Set("Potato.Structure.FinalLeafNumber.FixedValue", SetFinalLeafNumber);
            if (SetFinalLeafNumber > 80)
                Summary.WriteWarning(this, "Model is producing > 80 leaves which is guite alot.  Is this expected?  If not check you haven't set a invalid number in the Final Leaf Number box in" + this.Name);
        }
        
        [EventSubscribe("DoManagementCalculations")]
        private void OnDoManagementCalculations(object sender, EventArgs e)
        {
            if ((Clock.Today == HarvestDate) && (Harvested == false))
            {
                FinalTag = "yield";
                ReadyForHarvest = true;
            }
            if ((Potato.Phenology.Stage >= 7) && (Harvested == false))
            {
                FinalTag = "yield";
                ReadyForHarvest = true;
            }
        }
    }
}
```
            Report: EventNames=[Clock].DoReport
            SoluteManager
      Experiment FSP
        Memo: same as Validation.New Zealand.FUE.Memo
        Factors
          Factor Nitrogen: Specifications=[operations]
            Operations 472
              2000-05-02  [Fertiliser].Apply(300, Fertiliser.Types.UreaN, 10);
              2000-06-14  [Fertiliser].Apply(170, Fertiliser.Types.UreaN, 10);
            Operations 350
              2000-05-02  [Fertiliser].Apply(180, Fertiliser.Types.UreaN, 10);
              2000-06-14  [Fertiliser].Apply(57, Fertiliser.Types.UreaN, 10);
              2000-07-10  [Fertiliser].Apply(57, Fertiliser.Types.UreaN, 10);
              2000-08-03  [Fertiliser].Apply(57, Fertiliser.Types.UreaN, 10);
            Operations 242
              2000-05-02  [Fertiliser].Apply(180, Fertiliser.Types.UreaN, 10);
              2000-06-14  [Fertiliser].Apply(46, Fertiliser.Types.UreaN, 10);
              2000-07-10  [Fertiliser].Apply(46, Fertiliser.Types.UreaN, 10);
            Operations 0
              2000-05-02  [Fertiliser].Apply(0, Fertiliser.Types.UreaN, 10);
              2000-06-14  [Fertiliser].Apply(0, Fertiliser.Types.UreaN, 10);
        Simulation FSPBase
          Weather: FileName=Pukehohe.met
          Clock: StartDate=2000-05-01; EndDate=2000-12-01
          Summary
          SoilArbitrator Soil Arbitrator
          Zone Field: Area=1; Slope=0
            Soil: Latitude=0; Longitude=0
              Analysis: Thickness=[100, 200, 300, 300, 300, 300]; PH=[6.6, 6.2, 5.7, 5.5, 5.5, 5.5]; PHUnits=Water; BoronUnits=HotWater
              InitialWater Initial water: PercentMethod=EvenlyDistributed; FractionFull=1
              Water
                Thickness  BD   AirDry  LL15  DUL   SAT
                100        1.2  0.08    0.13  0.33  0.5
                200        1.2  0.08    0.13  0.33  0.5
                300        1.2  0.05    0.1   0.31  0.44
                300        1.2  0.04    0.08  0.27  0.46
                300        1.2  0.06    0.11  0.3   0.44
                300        1.2  0.06    0.11  0.3   0.44
                SoilCrop wheatSoil: LL=[0.13, 0.13, 0.1, 0.08, 0.11, 0.11]; KL=[0.06, 0.06, 0.06, 0.06, 0.06, 0.06]; XF=[1, 1, 1, 1, 1, 1]
                SoilCrop PotatoSoil: LL=[0.13, 0.13, 0.1, 0.08, 0.11, 0.11]; KL=[0.1, 0.1, 0.07, 0.05, 0.05, 0.05]; XF=[1, 1, 1, 1, 1, 1]
              SoilWater: same as Validation.New Zealand.Baxters.BaxtersBase.Field.Soil.SoilWater
              SoilNitrogen: fom_type=[default, manure, mucuna, lablab, shemp, stable]; fract_carb=[0.2, 0.3, 0.54, 0.57, 0.45, 0]; fract_cell=[0.7, 0.3, 0.37, 0.37, 0.47, 0.1]; fract_lign=[0.1, 0.4, 0.09, 0.06, 0.08, 0.9]
              SoilOrganicMatter: RootCN=30; RootWt=3000; SoilCN=11.5; EnrACoeff=7.4; EnrBCoeff=0.2; OCUnits=Total
                Thickness  OC    FBiom  FInert
                100        1.82  0.025  0.6
                200        1.47  0.025  0.7
                300        1.2   0.015  0.75
                300        1.03  0.01   0.9
                300        0.47  0.01   0.96
                300        0.47  0.01   0.96
              Sample Initial nitrogen: NO3Units=ppm; NH4Units=ppm; SWUnits=Volumetric; OCUnits=Total; PHUnits=Water
                Thickness  NO3  NH4
                100        15   0.1
                200        7    0.1
                300        7    0.1
                300        1    0.1
                300        1    0.1
                300        1    0.1
              CERESSoilTemperature
            Irrigation
            Fertiliser
            MicroClimate: a_interception=0; b_interception=1; c_interception=0; d_interception=0; soil_albedo=0.23; sun_angle=15; soil_heat_flux_fraction=0.4; night_interception_fraction=0.5; refheight=2; albedo=0.26; emissivity=0.96; RadIntTotal=0
            Plant Potato: CropType=Potato
            Folder Manager Folder
              Manager PlantandHarvest
                PlantingDate = 2000-05-02
                CultivarName = IlamHardy
                RowSpace = 280
                RowWidth = 770
                PlantingDepth = 170
                StemNumberPerSeedTuber = 3
                SetFinalLeafNumber = 34
                HarvestDate = 2000-10-16
                script: same as in Validation.New Zealand.FUE.FUE_base.paddock.Manager folder.PlantandHarvest
              Operations
                2000-05-02  [Fertiliser].Apply(300, Fertiliser.Types.UreaN, 10);
                2000-06-14  [Fertiliser].Apply(170, Fertiliser.Types.UreaN, 10);
            Report: EventNames=[Clock].DoReport
            SurfaceOrganicMatter surface organic matter: PoolName=wheat; type=wheat; mass=2000; standing_fraction=0; cnr=80; CriticalResidueWeight=2000; OptimumDecompTemp=20; MaxCumulativeEOS=20; CNRatioDecompCoeff=0.277; CNRatioDecompThreshold=25; TotalLeachRain=25; MinRainToLeach=10; CriticalMinimumOrganicC=0.004; DefaultCPRatio=0; DefaultStandingFraction=0; StandingExtinctCoeff=0.5; FractionFaecesAdded=0.5
              Pools:
                {PoolName=wheat, ResidueType=wheat, Mass=2000, CNRatio=80, StandingFraction=0}
              ResidueTypes: LoadFromResource=ResidueTypes
            SoluteManager
      Experiment FUE_NI
        Factors
          Factor Nitrogen: Specifications=[operations]
            Operations 368
              2004-05-10  [Fertiliser].Apply(230, Fertiliser.Types.UreaN, 10);
              2004-07-17  [Fertiliser].Apply(69, Fertiliser.Types.UreaN, 10);
              2004-08-26  [Fertiliser].Apply(69, Fertiliser.Types.UreaN, 10);
            Operations 253
              2004-05-10  [Fertiliser].Apply(115, Fertiliser.Types.UreaN, 10);
              2004-07-17  [Fertiliser].Apply(69, Fertiliser.Types.UreaN, 10);
              2004-08-26  [Fertiliser].Apply(69, Fertiliser.Types.UreaN, 10);
            Operations 0
              2004-05-10  [Fertiliser].Apply(0, Fertiliser.Types.UreaN, 10);
              2004-07-17  [Fertiliser].Apply(0, Fertiliser.Types.UreaN, 10);
              2004-08-26  [Fertiliser].Apply(0, Fertiliser.Types.UreaN, 10);
        Simulation FUE_NI_base
          Weather: FileName=Pukehohe.met
          Clock: StartDate=2004-05-10; EndDate=2004-12-31
          Summary
          SoilArbitrator Soil Arbitrator
          Zone paddock: Area=1; Slope=0
            Soil: Latitude=0; Longitude=0
              Analysis: Thickness=[100, 200, 300, 300, 300, 300]; PH=[6.6, 6.2, 5.7, 5.5, 5.5, 5.5]; PHUnits=Water; BoronUnits=HotWater
              InitialWater Initial water: PercentMethod=EvenlyDistributed; FractionFull=1
              Water
                Thickness  BD   AirDry  LL15  DUL   SAT
                100        1.2  0.08    0.13  0.33  0.5
                200        1.2  0.08    0.13  0.33  0.5
                300        1.2  0.05    0.1   0.31  0.44
                300        1.2  0.04    0.08  0.27  0.46
                300        1.2  0.06    0.11  0.3   0.44
                300        1.2  0.06    0.11  0.3   0.44
                SoilCrop wheatSoil: LL=[0.13, 0.13, 0.1, 0.08, 0.11, 0.11]; KL=[0.06, 0.06, 0.06, 0.06, 0.06, 0.06]; XF=[1, 1, 1, 1, 1, 1]
                SoilCrop potato2Soil: LL=[0.13, 0.13, 0.1, 0.15, 0.3, 0.3]; KL=[0.1, 0.1, 0.07, 0.05, 0.05, 0.05]; XF=[1, 1, 1, 1, 0, 0]
                SoilCrop PotatoSoil: LL=[0.13, 0.13, 0.1, 0.15, 0.3, 0.3]; KL=[0.1, 0.1, 0.07, 0.05, 0.05, 0.05]; XF=[1, 1, 1, 1, 0, 0]
              SoilWater: same as Validation.New Zealand.Baxters.BaxtersBase.Field.Soil.SoilWater
              SoilNitrogen: fom_type=[default, manure, mucuna, lablab, shemp, stable]; fract_carb=[0.2, 0.3, 0.54, 0.57, 0.45, 0]; fract_cell=[0.7, 0.3, 0.37, 0.37, 0.47, 0.1]; fract_lign=[0.1, 0.4, 0.09, 0.06, 0.08, 0.9]
              SoilOrganicMatter: same as Validation.New Zealand.Baxters.BaxtersBase.Field.Soil.SoilOrganicMatter
              Sample Initial nitrogen: NO3Units=ppm; NH4Units=ppm; SWUnits=Volumetric; OCUnits=Total; PHUnits=Water
                Thickness  NO3      NH4
                100        5        0.1
                200        3        0.1
                300        8        0.1
                300        7        0.1
                300        1.38889  0.1
                300        1.38889  0.1
              CERESSoilTemperature
            Fertiliser
            Irrigation
            SurfaceOrganicMatter surface organic matter: same as Validation.New Zealand.FSP.FSPBase.Field.surface organic matter
            MicroClimate: a_interception=0; b_interception=0; c_interception=0; d_interception=0; soil_albedo=0.23; sun_angle=15; soil_heat_flux_fraction=0.4; night_interception_fraction=0.5; refheight=2; albedo=0.15; emissivity=0.96; RadIntTotal=0
            Plant Potato: CropType=Potato
            Folder Manager folder
              Operations
                2004-05-10  [Fertiliser].Apply(0, Fertiliser.Types.UreaN, 10);
                2004-07-17  [Fertiliser].Apply(0, Fertiliser.Types.UreaN, 10);
                2004-08-26  [Fertiliser].Apply(0, Fertiliser.Types.UreaN, 10);
              Manager PlantandHarvest
                PlantingDate = 2004-05-10
                CultivarName = Nadine
                RowSpace = 300
                RowWidth = 810
                PlantingDepth = 170
                StemNumberPerSeedTuber = 2.4
                SetFinalLeafNumber = 40
                HarvestDate = 2004-11-09
                script: same as in Validation.New Zealand.FUE.FUE_base.paddock.Manager folder.PlantandHarvest
            Report: EventNames=[Clock].DoReport
            SoluteManager
    Folder Australia
      Memo
        **Model development**

        A range of experimental data has been collected by SARDI at Parilla, Penola and Glenroy in South Australia.
      Experiment Parilla
        Memo
          This experiment was conducted within a commercial potato field in the South Australia Murrylands region.  The fresh potato variety 'Coliban' was planted on three different dates (23/11, 3/12, 17/12) in 2007 on a free draining sandy soil.  Treatments recieved 10 mm of irrigation daily and 260 kg/ha of N as fertigation throughout the experiment.  In addition three rates of side dressed N (0, 100 and 200 kg) were applied during the season.
        Factors
          Factor PlantingDate
            Factor 23Nov
              Specifications:
                [PlantandHarvest].Script.PlantingDate=2007-11-23
                [FertigationEvents]
                [FertiliserRule].Script.Day1=27
                [FertiliserRule].Script.Day2=52
                [FertiliserRule].Script.Day3=67
                [PlantandHarvest].Script.HarvestDate=2008-03-05
              Operations FertigationEvents
                2007-11-23  [Fertiliser].Apply(0, Fertiliser.Types.UreaN, 10);
                2008-01-10  [Fertiliser].Apply(48, Fertiliser.Types.UreaN, 10);
                2008-01-29  [Fertiliser].Apply(40, Fertiliser.Types.UreaN, 10);
                2008-02-12  [Fertiliser].Apply(40, Fertiliser.Types.UreaN, 10);
                2008-02-28  [Fertiliser].Apply(40, Fertiliser.Types.UreaN, 10);
                2008-02-29  [Fertiliser].Apply(20, Fertiliser.Types.UreaN, 10);
                2008-03-06  [Fertiliser].Apply(40, Fertiliser.Types.UreaN, 10);
                2008-03-16  [Fertiliser].Apply(40, Fertiliser.Types.UreaN, 10);
            Factor 3Dec
              Specifications:
                [PlantandHarvest].Script.PlantingDate=2007-12-03
                [FertigationEvents]
                [FertiliserRule].Script.Day1=42
                [FertiliserRule].Script.Day2=57
                [FertiliserRule].Script.Day3=72
                [PlantandHarvest].Script.HarvestDate=2008-04-14
              Operations FertigationEvents
                2008-01-27  [Fertiliser].Apply(44, Fertiliser.Types.UreaN, 10);
                2008-02-05  [Fertiliser].Apply(44, Fertiliser.Types.UreaN, 10);
                2008-02-13  [Fertiliser].Apply(40, Fertiliser.Types.UreaN, 10);
                2008-02-27  [Fertiliser].Apply(40, Fertiliser.Types.UreaN, 10);
                2008-03-06  [Fertiliser].Apply(40, Fertiliser.Types.UreaN, 10);
                2008-03-13  [Fertiliser].Apply(40, Fertiliser.Types.UreaN, 10);
                2008-03-21  [Fertiliser].Apply(40, Fertiliser.Types.UreaN, 10);
            Factor 17Dec
              Specifications:
                [PlantandHarvest].Script.PlantingDate=2007-12-17
                [FertigationEvents]
                [FertiliserRule].Script.Day1=28
                [FertiliserRule].Script.Day2=43
                [FertiliserRule].Script.Day3=58
                [PlantandHarvest].Script.HarvestDate=2008-04-14
              Operations FertigationEvents: same as Validation.Australia.Parilla.Factors.PlantingDate.3Dec.FertigationEvents
          Factor Nitrogen
            Factor LowN
              Specifications:
                [FertiliserRule].Script.Fert1=0
                [FertiliserRule].Script.Fert2=0
                [FertiliserRule].Script.Fert3=0
            Factor MedN
              Specifications:
                [FertiliserRule].Script.Fert1=37
                [FertiliserRule].Script.Fert2=38
                [FertiliserRule].Script.Fert3=25
            Factor HighN
              Specifications:
                [FertiliserRule].Script.Fert1=75
                [FertiliserRule].Script.Fert2=75
                [FertiliserRule].Script.Fert3=50
        Simulation Parilla_base
          Weather: FileName=Lameroo.met
          Clock: StartDate=2007-11-22; EndDate=2008-06-30
          Summary
          SoilArbitrator Soil Arbitrator
          Zone paddock: Area=1; Slope=0
            Soil: Latitude=0; Longitude=0
              Analysis: Thickness=[100, 200, 300, 300, 300, 300]; PH=[6.6, 6.2, 5.7, 5.5, 5.5, 5.5]; PHUnits=Water; BoronUnits=HotWater
              InitialWater Initial water: PercentMethod=EvenlyDistributed; FractionFull=1
              Water
                Thickness  BD   AirDry  LL15  DUL   SAT
                100        1.2  0.03    0.06  0.16  0.25
                200        1.2  0.05    0.06  0.16  0.25
                300        1.2  0.06    0.06  0.12  0.25
                300        1.2  0.06    0.06  0.12  0.25
                300        1.2  0.06    0.06  0.12  0.25
                300        1.2  0.06    0.06  0.12  0.25
                SoilCrop potatoSoil: LL=[0.06, 0.06, 0.12, 0.12, 0.12, 0.12]; KL=[0.1, 0.1, 0.07, 0.05, 0.05, 0.05]; XF=[1, 1, 1, 1, 1, 1]
              SoilWater: SummerDate=1-Nov; SummerU=9; SummerCona=4.4; WinterDate=1-Apr; WinterU=9; WinterCona=4.4; DiffusConst=88; DiffusSlope=35.4; Salb=0.18; CN2Bare=68; CNRed=20; CNCov=0.8; slope=0; discharge_width=0; catchment_area=0; max_pond=0; residueinterception=0
                Thickness  SWCON  KLAT
                100        0.9    0
                200        0.9    0
                300        0.9    0
                300        0.9    0
                300        0.9    0
                300        0.9    0
              SoilNitrogen: fom_type=[default, manure, mucuna, lablab, shemp, stable]; fract_carb=[0.2, 0.3, 0.54, 0.57, 0.45, 0]; fract_cell=[0.7, 0.3, 0.37, 0.37, 0.47, 0.1]; fract_lign=[0.1, 0.4, 0.09, 0.06, 0.08, 0.9]
              SoilOrganicMatter: RootCN=30; RootWt=3000; SoilCN=11.5; EnrACoeff=7.4; EnrBCoeff=0.2; OCUnits=Total
                Thickness  OC   FBiom  FInert
                100        0.7  0.025  0.3
                200        0.5  0.025  0.4
                300        0.3  0.015  0.75
                300        0.3  0.01   0.9
                300        0.3  0.01   0.96
                300        0.3  0.01   0.96
              Sample Initial nitrogen: NO3Units=ppm; NH4Units=ppm; SWUnits=Volumetric; OCUnits=Total; PHUnits=Water
                Thickness  NO3       NH4
                100        21.25     0.1
                200        19.125    0.1
                300        0.555556  0.1
                300        0.555556  0.1
                300        0.555556  0.1
                300        0.555556  0.1
              CERESSoilTemperature
            Fertiliser
            Irrigation
            SurfaceOrganicMatter surface organic matter: ReportAdditions=no; ReportRemovals=no; PoolName=wheat; type=wheat; mass=0; standing_fraction=0; cnr=60; CriticalResidueWeight=2000; OptimumDecompTemp=20; MaxCumulativeEOS=20; CNRatioDecompCoeff=0.277; CNRatioDecompThreshold=25; TotalLeachRain=25; MinRainToLeach=10; CriticalMinimumOrganicC=0.004; DefaultCPRatio=0; DefaultStandingFraction=0; StandingExtinctCoeff=0.5; FractionFaecesAdded=0.5
              Pools:
                {PoolName=wheat, ResidueType=wheat, Mass=0, CNRatio=60, StandingFraction=0}
              ResidueTypes: LoadFromResource=ResidueTypes
            MicroClimate: a_interception=0; b_interception=0; c_interception=0; d_interception=0; soil_albedo=0.23; sun_angle=15; soil_heat_flux_fraction=0.4; night_interception_fraction=0.5; refheight=2; albedo=0.15; emissivity=0.96; RadIntTotal=0
            Plant Potato: CropType=Potato
            Folder Manager folder
              Manager PlantandHarvest
                PlantingDate = 2007-11-23
                CultivarName = Coliban
                RowSpace = 280
                RowWidth = 770
                PlantingDepth = 170
                StemNumberPerSeedTuber = 2.4
                SetFinalLeafNumber = 28
                HarvestDate = 2008-03-05
                script: same as in Validation.New Zealand.FUE.FUE_base.paddock.Manager folder.PlantandHarvest
              Operations FertigationEvents
                2008-01-10  [Fertiliser].Apply(48, Fertiliser.Types.UreaN, 10);
                2008-01-29  [Fertiliser].Apply(40, Fertiliser.Types.UreaN, 10);
                2008-02-12  [Fertiliser].Apply(40, Fertiliser.Types.UreaN, 10);
                2008-02-28  [Fertiliser].Apply(40, Fertiliser.Types.UreaN, 10);
                2008-02-29  [Fertiliser].Apply(20, Fertiliser.Types.UreaN, 10);
                2008-03-06  [Fertiliser].Apply(40, Fertiliser.Types.UreaN, 10);
                2008-03-16  [Fertiliser].Apply(40, Fertiliser.Types.UreaN, 10);
              Operations IrrigationEvents
                2007-11-23  [Irrigation].Apply(9);
                2007-11-24  [Irrigation].Apply(9);
                2007-11-25  [Irrigation].Apply(9);
                2007-11-26  [Irrigation].Apply(9);
                2007-11-27  [Irrigation].Apply(9);
                2007-11-28  [Irrigation].Apply(9);
                2007-11-29  [Irrigation].Apply(9);
                2007-12-01  [Irrigation].Apply(9);
                2007-12-02  [Irrigation].Apply(9);
                2007-12-03  [Irrigation].Apply(9);
                2007-12-04  [Irrigation].Apply(9);
                2007-12-05  [Irrigation].Apply(9);
                2007-12-06  [Irrigation].Apply(9);
                2007-12-07  [Irrigation].Apply(9);
                2007-12-08  [Irrigation].Apply(9);
                2007-12-09  [Irrigation].Apply(9);
                2007-12-10  [Irrigation].Apply(9);
                2007-12-11  [Irrigation].Apply(9);
                2007-12-12  [Irrigation].Apply(9);
                2007-12-13  [Irrigation].Apply(9);
                2007-12-14  [Irrigation].Apply(9);
                2007-12-16  [Irrigation].Apply(9);
                2007-12-17  [Irrigation].Apply(9);
                2007-12-18  [Irrigation].Apply(9);
                2007-12-19  [Irrigation].Apply(9);
                2007-12-20  [Irrigation].Apply(9);
                2007-12-21  [Irrigation].Apply(9);
                2007-12-22  [Irrigation].Apply(9);
                2007-12-23  [Irrigation].Apply(9);
                2007-12-24  [Irrigation].Apply(9);
                2007-12-25  [Irrigation].Apply(9);
                2007-12-26  [Irrigation].Apply(9);
                2007-12-27  [Irrigation].Apply(9);
                2007-12-28  [Irrigation].Apply(9);
                2007-12-29  [Irrigation].Apply(9);
                2007-12-30  [Irrigation].Apply(9);
                2007-12-31  [Irrigation].Apply(9);
                2008-01-01  [Irrigation].Apply(9);
                2008-01-02  [Irrigation].Apply(9);
                2008-01-03  [Irrigation].Apply(9);
                2008-01-04  [Irrigation].Apply(9);
                2008-01-05  [Irrigation].Apply(9);
                2008-01-06  [Irrigation].Apply(9);
                2008-01-07  [Irrigation].Apply(9);
                2008-01-08  [Irrigation].Apply(9);
                2008-01-09  [Irrigation].Apply(9);
                2008-01-10  [Irrigation].Apply(9);
                2008-01-11  [Irrigation].Apply(9);
                2008-01-12  [Irrigation].Apply(9);
                2008-01-13  [Irrigation].Apply(9);
                2008-01-14  [Irrigation].Apply(9);
                2008-01-15  [Irrigation].Apply(9);
                2008-01-16  [Irrigation].Apply(9);
                2008-01-17  [Irrigation].Apply(9);
                2008-01-18  [Irrigation].Apply(9);
                2008-01-20  [Irrigation].Apply(9);
                2008-01-21  [Irrigation].Apply(9);
                2008-01-22  [Irrigation].Apply(9);
                2008-01-23  [Irrigation].Apply(9);
                2008-01-24  [Irrigation].Apply(9);
                2008-01-25  [Irrigation].Apply(9);
                2008-01-26  [Irrigation].Apply(9);
                2008-01-27  [Irrigation].Apply(9);
                2008-01-28  [Irrigation].Apply(9);
                2008-01-29  [Irrigation].Apply(9);
                2008-01-30  [Irrigation].Apply(9);
                2008-01-31  [Irrigation].Apply(9);
                2008-02-01  [Irrigation].Apply(9);
                2008-02-02  [Irrigation].Apply(9);
                2008-02-03  [Irrigation].Apply(9);
                2008-02-04  [Irrigation].Apply(9);
                2008-02-05  [Irrigation].Apply(9);
                2008-02-06  [Irrigation].Apply(9);
                2008-02-07  [Irrigation].Apply(9);
                2008-02-08  [Irrigation].Apply(9);
                2008-02-09  [Irrigation].Apply(9);
                2008-02-10  [Irrigation].Apply(9);
                2008-02-11  [Irrigation].Apply(9);
                2008-02-12  [Irrigation].Apply(9);
                2008-02-13  [Irrigation].Apply(9);
                2008-02-14  [Irrigation].Apply(9);
                2008-02-15  [Irrigation].Apply(9);
                2008-02-16  [Irrigation].Apply(9);
                2008-02-17  [Irrigation].Apply(9);
                2008-02-18  [Irrigation].Apply(9);
                2008-02-19  [Irrigation].Apply(9);
                2008-02-20  [Irrigation].Apply(9);
                2008-02-21  [Irrigation].Apply(9);
                2008-02-22  [Irrigation].Apply(9);
                2008-02-23  [Irrigation].Apply(9);
                2008-02-24  [Irrigation].Apply(9);
                2008-02-25  [Irrigation].Apply(9);
                2008-02-26  [Irrigation].Apply(9);
                2008-02-27  [Irrigation].Apply(9);
                2008-02-28  [Irrigation].Apply(9);
                2008-02-29  [Irrigation].Apply(9);
                2008-03-01  [Irrigation].Apply(9);
                2008-03-02  [Irrigation].Apply(9);
                2008-03-03  [Irrigation].Apply(9);
                2008-03-04  [Irrigation].Apply(9);
                2008-03-05  [Irrigation].Apply(9);
                2008-03-06  [Irrigation].Apply(9);
                2008-03-07  [Irrigation].Apply(9);
                2008-03-08  [Irrigation].Apply(9);
                2008-03-09  [Irrigation].Apply(9);
                2008-03-10  [Irrigation].Apply(9);
                2008-03-11  [Irrigation].Apply(9);
                2008-03-12  [Irrigation].Apply(9);
                2008-03-13  [Irrigation].Apply(9);
                2008-03-14  [Irrigation].Apply(9);
                2008-03-15  [Irrigation].Apply(9);
                2008-03-16  [Irrigation].Apply(9);
                2008-03-17  [Irrigation].Apply(9);
                2008-03-18  [Irrigation].Apply(9);
                2008-03-19  [Irrigation].Apply(9);
                2008-03-20  [Irrigation].Apply(9);
                2008-03-22  [Irrigation].Apply(9);
                2008-03-23  [Irrigation].Apply(9);
                2008-03-25  [Irrigation].Apply(9);
                2008-03-26  [Irrigation].Apply(9);
                2008-03-28  [Irrigation].Apply(9);
                2008-03-29  [Irrigation].Apply(9);
                2008-03-31  [Irrigation].Apply(9);
                2008-04-01  [Irrigation].Apply(9);
                2008-04-03  [Irrigation].Apply(9);
                2008-04-04  [Irrigation].Apply(9);
                2008-04-06  [Irrigation].Apply(9);
                2008-04-07  [Irrigation].Apply(9);
                2008-04-09  [Irrigation].Apply(9);
                2008-04-10  [Irrigation].Apply(9);
                2008-04-12  [Irrigation].Apply(9);
                2008-04-13  [Irrigation].Apply(9);
                2008-04-15  [Irrigation].Apply(9);
                2008-04-16  [Irrigation].Apply(9);
                2008-04-18  [Irrigation].Apply(9);
                2008-04-19  [Irrigation].Apply(9);
                2008-04-21  [Irrigation].Apply(9);
                2008-04-22  [Irrigation].Apply(9);
                2008-04-24  [Irrigation].Apply(9);
                2008-04-25  [Irrigation].Apply(9);
                2008-04-27  [Irrigation].Apply(9);
                2008-04-28  [Irrigation].Apply(9);
                2008-04-30  [Irrigation].Apply(9);
                2008-05-01  [Irrigation].Apply(9);
                2008-05-03  [Irrigation].Apply(9);
                2008-05-04  [Irrigation].Apply(9);
                2008-05-06  [Irrigation].Apply(9);
                2008-05-07  [Irrigation].Apply(9);
              Operations
                2000-05-02  [Fertiliser].Apply(300, Fertiliser.Types.UreaN, 10);
                2000-06-14  [Fertiliser].Apply(170, Fertiliser.Types.UreaN, 10);
            Report: EventNames=[Clock].DoReport
            Manager FertiliserRule
              Fert1 = 37.5
              Fert2 = 37.5
              Fert3 = 25
              Day1 = 27
              Day2 = 52
              Day3 = 67
```csharp
using System;
using Models.Core;
using Models.PMF;
using APSIM.Shared.Utilities;
        
namespace Models
{
    [Serializable] 
    [System.Xml.Serialization.XmlInclude(typeof(Model))]
    public class Script : Model
    {
        [Link] Clock Clock;
        [Link] Fertiliser Fertiliser;
        [Description("N applied (kg/ha) on first fertiliser event")]
        public double Fert1 { get; set; }
        [Description("N applied (kg/ha) on 2nd fertiliser event")]
        public double Fert2 { get; set; }
        [Description("N applied (kg/ha) on 3rd fertiliser event")]
        public double Fert3 { get; set; }
        [Description("Days after sowing for first N application")]
        public double Day1 { get; set; }
        [Description("Days after sowing for second N application")]
        public double Day2 { get; set; }
        [Description("Days after sowing for third N application")]
        public double Day3 { get; set; }
                
        private double DaysAfterSowing = 0;
               
        [EventSubscribe("Sowing")]
        private void OnSowing(object sender, EventArgs e)
        {
            DaysAfterSowing = 0;
        }
        [EventSubscribe("DoManagement")]
        private void OnDoManagement(object sender, EventArgs e)
        {
            DaysAfterSowing += 1;
            if (DaysAfterSowing == Day1)
                Fertiliser.Apply(Fert1, Fertiliser.Types.UreaN, 10);
            if (DaysAfterSowing == Day2)
                Fertiliser.Apply(Fert2, Fertiliser.Types.UreaN, 10);
            if (DaysAfterSowing == Day3)
                Fertiliser.Apply(Fert3, Fertiliser.Types.UreaN, 10);
        }
    }
}
```
            SoluteManager
      Experiment Penola_0607
        Memo
          This experiment was conducted within a commercial field of 'Russet Burbank' potatos grown at Penola west in South Australia.  The paddock contained a Parapanic, Humic-Humosesquic, Semiaquic, Podsol (sandy loam) soil and the crop was sown on the 10/10/2006.  Nitrogen treatments were applied at different rates (0, 250, 500 and 750 kg/ha) in 8 split applications.
        Factors
          Factor Nitrogen: Specifications=[FertiliserApplications]
            Operations 0
              2006-10-10  [Fertiliser].Apply(90, Fertiliser.Types.UreaN, 10);
            Operations 250
              2006-10-10  [Fertiliser].Apply(90, Fertiliser.Types.UreaN, 10);
              2006-11-19  [Fertiliser].Apply(25, Fertiliser.Types.UreaN, 10);
              2006-12-03  [Fertiliser].Apply(50, Fertiliser.Types.UreaN, 10);
              2006-12-17  [Fertiliser].Apply(50, Fertiliser.Types.UreaN, 10);
              2006-12-31  [Fertiliser].Apply(38, Fertiliser.Types.UreaN, 10);
              2007-01-14  [Fertiliser].Apply(38, Fertiliser.Types.UreaN, 10);
              2007-01-28  [Fertiliser].Apply(25, Fertiliser.Types.UreaN, 10);
              2007-02-11  [Fertiliser].Apply(25, Fertiliser.Types.UreaN, 10);
            Operations 500
              2006-10-10  [Fertiliser].Apply(90, Fertiliser.Types.UreaN, 10);
              2006-11-19  [Fertiliser].Apply(50, Fertiliser.Types.UreaN, 10);
              2006-12-03  [Fertiliser].Apply(100, Fertiliser.Types.UreaN, 10);
              2006-12-17  [Fertiliser].Apply(100, Fertiliser.Types.UreaN, 10);
              2006-12-31  [Fertiliser].Apply(75, Fertiliser.Types.UreaN, 10);
              2007-01-14  [Fertiliser].Apply(75, Fertiliser.Types.UreaN, 10);
              2007-01-28  [Fertiliser].Apply(50, Fertiliser.Types.UreaN, 10);
              2007-02-11  [Fertiliser].Apply(50, Fertiliser.Types.UreaN, 10);
            Operations 750
              2006-10-10  [Fertiliser].Apply(90, Fertiliser.Types.UreaN, 10);
              2006-11-19  [Fertiliser].Apply(75, Fertiliser.Types.UreaN, 10);
              2006-12-03  [Fertiliser].Apply(150, Fertiliser.Types.UreaN, 10);
              2006-12-17  [Fertiliser].Apply(150, Fertiliser.Types.UreaN, 10);
              2006-12-31  [Fertiliser].Apply(113, Fertiliser.Types.UreaN, 10);
              2007-01-14  [Fertiliser].Apply(113, Fertiliser.Types.UreaN, 10);
              2007-01-28  [Fertiliser].Apply(75, Fertiliser.Types.UreaN, 10);
              2007-02-11  [Fertiliser].Apply(75, Fertiliser.Types.UreaN, 10);
        Simulation Penola_0506Base
          Weather: FileName=Kalangadoo.met
          Clock: StartDate=2006-10-10; EndDate=2007-06-01
          Summary
          SoilArbitrator Soil Arbitrator
          Zone paddock: Area=1; Slope=0
            Soil: Latitude=0; Longitude=0
              Analysis: Thickness=[100, 200, 300, 300, 300, 300]; PH=[6.6, 6.2, 5.7, 5.5, 5.5, 5.5]; PHUnits=Water; BoronUnits=HotWater
              InitialWater Initial water: PercentMethod=EvenlyDistributed; FractionFull=1
              Water
                Thickness  BD   AirDry  LL15  DUL   SAT
                100        1.2  0.03    0.06  0.18  0.35
                200        1.2  0.03    0.03  0.18  0.35
                300        1.2  0.03    0.03  0.12  0.3
                300        1.2  0.03    0.03  0.07  0.25
                300        1.2  0.03    0.03  0.07  0.25
                300        1.2  0.03    0.03  0.07  0.25
                SoilCrop wheatSoil: LL=[0.13, 0.13, 0.1, 0.08, 0.11, 0.11]; KL=[0.06, 0.06, 0.06, 0.06, 0.06, 0.06]; XF=[1, 1, 1, 1, 1, 1]
                SoilCrop potato2Soil: LL=[0.06, 0.03, 0.03, 0.03, 0.03, 0.03]; KL=[0.1, 0.1, 0.07, 0.05, 0.05, 0.05]; XF=[1, 1, 1, 1, 0, 0]
                SoilCrop PotatoSoil: LL=[0.13, 0.13, 0.1, 0.15, 0.3, 0.3]; KL=[0.1, 0.1, 0.07, 0.05, 0.05, 0.05]; XF=[1, 1, 1, 1, 0, 0]
              SoilWater: SummerDate=1-Nov; SummerU=9; SummerCona=4.4; WinterDate=1-Apr; WinterU=9; WinterCona=4.4; DiffusConst=88; DiffusSlope=35.4; Salb=0.18; CN2Bare=68; CNRed=20; CNCov=0.8; slope=0; discharge_width=0; catchment_area=0; max_pond=0; residueinterception=0
                Thickness  SWCON  KLAT
                100        0.9    0
                200        0.9    0
                300        0.9    0
                300        0.01   0
                300        0.01   0
                300        0.01   0
              SoilNitrogen: fom_type=[default, manure, mucuna, lablab, shemp, stable]; fract_carb=[0.2, 0.3, 0.54, 0.57, 0.45, 0]; fract_cell=[0.7, 0.3, 0.37, 0.37, 0.47, 0.1]; fract_lign=[0.1, 0.4, 0.09, 0.06, 0.08, 0.9]
              SoilOrganicMatter: RootCN=20; RootWt=25000; SoilCN=11.5; EnrACoeff=7.4; EnrBCoeff=0.2; OCUnits=Total
                Thickness  OC    FBiom  FInert
                100        1.82  0.025  0.3
                200        1.47  0.025  0.4
                300        1.2   0.015  0.75
                300        1.03  0.01   0.9
                300        0.47  0.01   0.96
                300        0.47  0.01   0.96
              Sample Initial nitrogen: NO3Units=kgha; NH4Units=kgha; SWUnits=Volumetric; OCUnits=Total; PHUnits=Water
                Thickness  NO3   NH4
                100        15.6  0.12
                200        24    0.24
                300        30    0.36
                300        30    0.36
                300        5     0.36
                300        5     0.36
              CERESSoilTemperature
            Fertiliser
            Irrigation
            SurfaceOrganicMatter surface organic matter: PondActive=no; ReportAdditions=no; ReportRemovals=no; PoolName=wheat; type=wheat; mass=2000; standing_fraction=0; cnr=80; CriticalResidueWeight=2000; OptimumDecompTemp=20; MaxCumulativeEOS=20; CNRatioDecompCoeff=0.277; CNRatioDecompThreshold=25; TotalLeachRain=25; MinRainToLeach=10; CriticalMinimumOrganicC=0.004; DefaultCPRatio=0; DefaultStandingFraction=0; StandingExtinctCoeff=0.5; FractionFaecesAdded=0.5
              Pools:
                {PoolName=wheat, ResidueType=wheat, Mass=2000, CNRatio=80, StandingFraction=0}
              ResidueTypes: LoadFromResource=ResidueTypes
              TillageTypes TillageTypesList
            MicroClimate: a_interception=0; b_interception=1; c_interception=0; d_interception=0; soil_albedo=0.23; sun_angle=15; soil_heat_flux_fraction=0.4; night_interception_fraction=0.5; refheight=2; albedo=0.15; emissivity=0.96; RadIntTotal=0
            Plant Potato: CropType=Potato
            Folder Manager folder
              Operations FertiliserApplications: same as Validation.Australia.Penola_0607.Factors.Nitrogen.750
              Operations IrrigationApplications
                2006-10-05  [Irrigation].Apply(5.4)
                2006-10-17  [Irrigation].Apply(3.8)
                2006-11-04  [Irrigation].Apply(6.8)
                2006-11-08  [Irrigation].Apply(3.6)
                2006-11-10  [Irrigation].Apply(3.8)
                2006-11-14  [Irrigation].Apply(4.2)
                2006-11-17  [Irrigation].Apply(5.6)
                2006-11-18  [Irrigation].Apply(11)
                2006-11-19  [Irrigation].Apply(5.6)
                2006-11-20  [Irrigation].Apply(5.6)
                2006-11-21  [Irrigation].Apply(4.2)
                2006-11-22  [Irrigation].Apply(5.4)
                2006-11-23  [Irrigation].Apply(5)
                2006-11-24  [Irrigation].Apply(5.6)
                2006-11-25  [Irrigation].Apply(5.4)
                2006-11-26  [Irrigation].Apply(6.2)
                2006-11-27  [Irrigation].Apply(8.4)
                2006-11-28  [Irrigation].Apply(13.2)
                2006-11-29  [Irrigation].Apply(6.6)
                2006-11-30  [Irrigation].Apply(13.8)
                2006-12-01  [Irrigation].Apply(10.6)
                2006-12-02  [Irrigation].Apply(5.6)
                2006-12-03  [Irrigation].Apply(5.8)
                2006-12-04  [Irrigation].Apply(9.7)
                2006-12-05  [Irrigation].Apply(9.6)
                2006-12-06  [Irrigation].Apply(6)
                2006-12-07  [Irrigation].Apply(6)
                2006-12-08  [Irrigation].Apply(11.6)
                2006-12-09  [Irrigation].Apply(10)
                2006-12-10  [Irrigation].Apply(10.4)
                2006-12-12  [Irrigation].Apply(11.2)
                2006-12-13  [Irrigation].Apply(5.8)
                2006-12-14  [Irrigation].Apply(11.4)
                2006-12-15  [Irrigation].Apply(6.2)
                2006-12-16  [Irrigation].Apply(13)
                2006-12-18  [Irrigation].Apply(12.6)
                2006-12-19  [Irrigation].Apply(6)
                2006-12-20  [Irrigation].Apply(6.2)
                2006-12-21  [Irrigation].Apply(11.4)
                2006-12-25  [Irrigation].Apply(4.3)
                2006-12-26  [Irrigation].Apply(4.6)
                2006-12-27  [Irrigation].Apply(6.8)
                2006-12-28  [Irrigation].Apply(6.2)
                2006-12-29  [Irrigation].Apply(13.2)
                2006-12-31  [Irrigation].Apply(6.8)
                2007-01-01  [Irrigation].Apply(6.6)
                2007-01-02  [Irrigation].Apply(11.8)
                2007-01-03  [Irrigation].Apply(6)
                2007-01-04  [Irrigation].Apply(12.4)
                2007-01-05  [Irrigation].Apply(5)
                2007-01-08  [Irrigation].Apply(5.5)
                2007-01-09  [Irrigation].Apply(13.8)
                2007-01-10  [Irrigation].Apply(5.4)
                2007-01-11  [Irrigation].Apply(6.2)
                2007-01-12  [Irrigation].Apply(6.2)
                2007-01-13  [Irrigation].Apply(13.4)
                2007-01-14  [Irrigation].Apply(5.6)
                2007-01-15  [Irrigation].Apply(13.6)
                2007-01-16  [Irrigation].Apply(6.2)
                2007-01-17  [Irrigation].Apply(6.2)
                2007-01-19  [Irrigation].Apply(40.4)
                2007-01-23  [Irrigation].Apply(5.8)
                2007-01-24  [Irrigation].Apply(7)
                2007-01-26  [Irrigation].Apply(14.8)
                2007-01-28  [Irrigation].Apply(9.2)
                2007-01-29  [Irrigation].Apply(5.6)
                2007-01-31  [Irrigation].Apply(13.4)
                2007-02-01  [Irrigation].Apply(7)
                2007-02-03  [Irrigation].Apply(12.4)
                2007-02-05  [Irrigation].Apply(8.6)
                2007-02-07  [Irrigation].Apply(12)
                2007-02-08  [Irrigation].Apply(5.8)
                2007-02-09  [Irrigation].Apply(5.8)
                2007-02-11  [Irrigation].Apply(5.4)
                2007-02-13  [Irrigation].Apply(7.4)
                2007-02-14  [Irrigation].Apply(3.8)
                2007-02-15  [Irrigation].Apply(6.8)
                2007-02-16  [Irrigation].Apply(6.2)
                2007-02-17  [Irrigation].Apply(5.8)
                2007-02-18  [Irrigation].Apply(5.2)
                2007-02-19  [Irrigation].Apply(5.6)
                2007-02-20  [Irrigation].Apply(6.2)
                2007-02-21  [Irrigation].Apply(6.2)
                2007-02-23  [Irrigation].Apply(6.4)
                2007-02-24  [Irrigation].Apply(5.8)
                2007-02-26  [Irrigation].Apply(12)
                2007-02-28  [Irrigation].Apply(6)
                2007-03-01  [Irrigation].Apply(11)
                2007-03-02  [Irrigation].Apply(5.2)
                2007-03-03  [Irrigation].Apply(5.8)
              Manager PlantandHarvest
                PlantingDate = 2006-10-10
                CultivarName = RussetBurbank
                RowSpace = 370
                RowWidth = 860
                PlantingDepth = 170
                StemNumberPerSeedTuber = 4.12
                SetFinalLeafNumber = 0
                HarvestDate = 2007-03-31
                script: same as in Validation.New Zealand.FUE.FUE_base.paddock.Manager folder.PlantandHarvest
              Manager RemoveRainfall
                StartDate = 2006-10-05
                EndDate = 2007-03-03
```csharp
using System;
using Models.Core;
using APSIM.Shared.Utilities;



using System.Collections.Generic;
using System.Text;
using Models.PMF;
using Models;
using System.Xml.Serialization;

namespace Models
{
    [Serializable] 
    [System.Xml.Serialization.XmlInclude(typeof(Model))]
    public class Script : Model
    {
        [Link] Weather Met;
        [Link] Clock Clock;
    
        [Description("Start Date")]
        public DateTime StartDate { get; set; }
        
        [Description("End Date")]
        public DateTime EndDate { get; set; }
 
    
        [EventSubscribe("PreparingNewWeatherData")]
        private void OnPreparingNewWeatherData(object sender, EventArgs e)
        {
            if ((Clock.Today.Date >= StartDate) && (Clock.Today.Date <= EndDate))
                Met.Rain = 0;        
        }
    }
}
```
            Report: EventNames=[Clock].DoReport
            SoluteManager
      Experiment Glenroy_0607
        Memo
          This experiment was conducted within a commercial field of 'Russet Burbank' potatos grown at Glenroy in South Australia.  The paddock contained a Melanic, Petrocalcic, Black Dermosol which had 30 cm of black clay over a compacted calcitrate sub soil.  The crop was sown on the 18/10/2005.  Nitrogen treatments were applied at different rates (0, 125, 250 and 500 kg/ha) in 8 split applications.
        Factors
          Factor Nitrogen: Specifications=[FertiliserApplications]
            Operations 0
              2006-10-10  [Fertiliser].Apply(90, Fertiliser.Types.UreaN, 10);
              2006-11-14  [Fertiliser].Apply(5, Fertiliser.Types.UreaN, 10);
              2006-11-28  [Fertiliser].Apply(10, Fertiliser.Types.UreaN, 10);
              2006-12-08  [Fertiliser].Apply(10, Fertiliser.Types.UreaN, 10);
              2006-12-20  [Fertiliser].Apply(8, Fertiliser.Types.UreaN, 10);
              2007-01-05  [Fertiliser].Apply(8, Fertiliser.Types.UreaN, 10);
              2007-01-15  [Fertiliser].Apply(5, Fertiliser.Types.UreaN, 10);
              0001-01-01  [Fertiliser].Apply(5, Fertiliser.Types.UreaN, 10);
            Operations 125
              2006-10-10  [Fertiliser].Apply(90, Fertiliser.Types.UreaN, 10);
              2006-11-14  [Fertiliser].Apply(17.5, Fertiliser.Types.UreaN, 10);
              2006-11-28  [Fertiliser].Apply(35, Fertiliser.Types.UreaN, 10);
              2006-12-08  [Fertiliser].Apply(35, Fertiliser.Types.UreaN, 10);
              2006-12-20  [Fertiliser].Apply(26, Fertiliser.Types.UreaN, 10);
              2007-01-05  [Fertiliser].Apply(26, Fertiliser.Types.UreaN, 10);
              2007-01-15  [Fertiliser].Apply(18, Fertiliser.Types.UreaN, 10);
              0001-01-01  [Fertiliser].Apply(18, Fertiliser.Types.UreaN, 10);
            Operations 250
              2006-10-10  [Fertiliser].Apply(90, Fertiliser.Types.UreaN, 10);
              2006-11-14  [Fertiliser].Apply(30, Fertiliser.Types.UreaN, 10);
              2006-11-28  [Fertiliser].Apply(60, Fertiliser.Types.UreaN, 10);
              2006-12-08  [Fertiliser].Apply(60, Fertiliser.Types.UreaN, 10);
              2006-12-20  [Fertiliser].Apply(45, Fertiliser.Types.UreaN, 10);
              2007-01-05  [Fertiliser].Apply(45, Fertiliser.Types.UreaN, 10);
              2007-01-15  [Fertiliser].Apply(30, Fertiliser.Types.UreaN, 10);
              0001-01-01  [Fertiliser].Apply(30, Fertiliser.Types.UreaN, 10);
            Operations 500
              2006-10-10  [Fertiliser].Apply(90, Fertiliser.Types.UreaN, 10);
              2006-11-14  [Fertiliser].Apply(55, Fertiliser.Types.UreaN, 10);
              2006-11-28  [Fertiliser].Apply(110, Fertiliser.Types.UreaN, 10);
              2006-12-08  [Fertiliser].Apply(110, Fertiliser.Types.UreaN, 10);
              2006-12-20  [Fertiliser].Apply(83, Fertiliser.Types.UreaN, 10);
              2007-01-05  [Fertiliser].Apply(83, Fertiliser.Types.UreaN, 10);
              2007-01-15  [Fertiliser].Apply(55, Fertiliser.Types.UreaN, 10);
              0001-01-01  [Fertiliser].Apply(55, Fertiliser.Types.UreaN, 10);
        Simulation GlenRoy_0506Base
          Weather: FileName=Coonawarra.met
          Clock: StartDate=2006-10-10; EndDate=2007-06-01
          Summary
          SoilArbitrator Soil Arbitrator
          Zone paddock: Area=1; Slope=0
            Soil: Latitude=0; Longitude=0
              Analysis: Thickness=[100, 200, 300, 300, 300, 300]; PH=[6.6, 6.2, 5.7, 5.5, 5.5, 5.5]; PHUnits=Water; BoronUnits=HotWater
              InitialWater Initial water: PercentMethod=EvenlyDistributed; FractionFull=1
              Water
                Thickness  BD   AirDry  LL15  DUL   SAT
                100        1.2  0.15    0.32  0.4   0.52
                200        1.2  0.26    0.26  0.3   0.52
                300        1.2  0.1     0.1   0.2   0.3
                300        1.2  0.01    0.01  0.02  0.03
                300        1.2  0.01    0.01  0.02  0.03
                300        1.2  0.01    0.01  0.02  0.03
                SoilCrop PotatoSoil: LL=[0.15, 0.26, 0.1, 0.01, 0.01, 0.01]; KL=[0.1, 0.1, 0.07, 0.05, 0.05, 0.05]; XF=[1, 1, 1, 1, 0, 0]
              SoilWater: same as Validation.New Zealand.Baxters.BaxtersBase.Field.Soil.SoilWater
              SoilNitrogen: fom_type=[default, manure, mucuna, lablab, shemp, stable]; fract_carb=[0.2, 0.3, 0.54, 0.57, 0.45, 0]; fract_cell=[0.7, 0.3, 0.37, 0.37, 0.47, 0.1]; fract_lign=[0.1, 0.4, 0.09, 0.06, 0.08, 0.9]
              SoilOrganicMatter: same as Validation.Australia.Penola_0607.Penola_0506Base.paddock.Soil.SoilOrganicMatter
              Sample Initial nitrogen: NO3Units=kgha; NH4Units=kgha; SWUnits=Volumetric; OCUnits=Total; PHUnits=Water
                Thickness  NO3    NH4
                100        33.33  0.12
                200        22.5   0.1
                300        1.39   0.1
                300        1.39   0.1
                300        1.39   0.1
                300        1.39   0.1
              CERESSoilTemperature
            Fertiliser
            Irrigation
            SurfaceOrganicMatter surface organic matter: same as Validation.Australia.Penola_0607.Penola_0506Base.paddock.surface organic matter
            MicroClimate: a_interception=0; b_interception=1; c_interception=0; d_interception=0; soil_albedo=0.23; sun_angle=15; soil_heat_flux_fraction=0.4; night_interception_fraction=0.5; refheight=2; albedo=0.15; emissivity=0.96; RadIntTotal=0
            Plant Potato: CropType=Potato
            Folder Manager folder
              Operations FertiliserApplications: same as Validation.Australia.Glenroy_0607.Factors.Nitrogen.125
              Operations IrrigationApplications
                2006-10-18  [Irrigation].Apply(2.2)
                2006-10-19  [Irrigation].Apply(1.6)
                2006-10-20  [Irrigation].Apply(0.2)
                2006-10-22  [Irrigation].Apply(0.2)
                2006-10-25  [Irrigation].Apply(2.2)
                2006-10-26  [Irrigation].Apply(0.2)
                2006-10-27  [Irrigation].Apply(0.6)
                2006-10-28  [Irrigation].Apply(1.2)
                2006-10-29  [Irrigation].Apply(2.4)
                2006-11-01  [Irrigation].Apply(0.2)
                2006-11-02  [Irrigation].Apply(3.4)
                2006-11-04  [Irrigation].Apply(8.0)
                2006-11-06  [Irrigation].Apply(0.2)
                2006-11-07  [Irrigation].Apply(1.4)
                2006-11-08  [Irrigation].Apply(2.4)
                2006-11-09  [Irrigation].Apply(4.0)
                2006-11-10  [Irrigation].Apply(4.0)
                2006-11-11  [Irrigation].Apply(3.2)
                2006-11-12  [Irrigation].Apply(0.2)
                2006-11-13  [Irrigation].Apply(3.2)
                2006-11-14  [Irrigation].Apply(10.6)
                2006-11-15  [Irrigation].Apply(2.8)
                2006-11-16  [Irrigation].Apply(3.0)
                2006-11-17  [Irrigation].Apply(7.6)
                2006-11-19  [Irrigation].Apply(0.2)
                2006-11-20  [Irrigation].Apply(0.2)
                2006-11-21  [Irrigation].Apply(9.4)
                2006-11-22  [Irrigation].Apply(7.0)
                2006-11-23  [Irrigation].Apply(5.0)
                2006-11-24  [Irrigation].Apply(0.2)
                2006-11-25  [Irrigation].Apply(0.2)
                2006-11-26  [Irrigation].Apply(5.6)
                2006-11-28  [Irrigation].Apply(5.0)
                2006-11-29  [Irrigation].Apply(10.0)
                2006-11-30  [Irrigation].Apply(6.8)
                2006-12-01  [Irrigation].Apply(5.6)
                2006-12-02  [Irrigation].Apply(0.2)
                2006-12-03  [Irrigation].Apply(5.4)
                2006-12-04  [Irrigation].Apply(0.2)
                2006-12-05  [Irrigation].Apply(0.2)
                2006-12-06  [Irrigation].Apply(0.2)
                2006-12-07  [Irrigation].Apply(5.8)
                2006-12-08  [Irrigation].Apply(0.2)
                2006-12-09  [Irrigation].Apply(1.8)
                2006-12-10  [Irrigation].Apply(11.0)
                2006-12-11  [Irrigation].Apply(0.2)
                2006-12-12  [Irrigation].Apply(5.4)
                2006-12-14  [Irrigation].Apply(11.8)
                2006-12-15  [Irrigation].Apply(1.0)
                2006-12-16  [Irrigation].Apply(7.4)
                2006-12-17  [Irrigation].Apply(0.2)
                2006-12-18  [Irrigation].Apply(0.2)
                2006-12-19  [Irrigation].Apply(5.8)
                2006-12-20  [Irrigation].Apply(6.0)
                2006-12-21  [Irrigation].Apply(5.0)
                2006-12-22  [Irrigation].Apply(2.0)
                2006-12-23  [Irrigation].Apply(9.0)
                2006-12-24  [Irrigation].Apply(6.2)
                2006-12-25  [Irrigation].Apply(12.4)
                2006-12-27  [Irrigation].Apply(5.8)
                2006-12-29  [Irrigation].Apply(0.2)
                2006-12-31  [Irrigation].Apply(0.6)
                2007-01-01  [Irrigation].Apply(10.2)
                2007-01-02  [Irrigation].Apply(0.6)
                2007-01-03  [Irrigation].Apply(5.4)
                2007-01-04  [Irrigation].Apply(0.2)
                2007-01-05  [Irrigation].Apply(0.4)
                2007-01-06  [Irrigation].Apply(1.6)
                2007-01-07  [Irrigation].Apply(15.0)
                2007-01-09  [Irrigation].Apply(6.2)
                2007-01-10  [Irrigation].Apply(0.4)
                2007-01-11  [Irrigation].Apply(5.4)
                2007-01-12  [Irrigation].Apply(0.2)
                2007-01-13  [Irrigation].Apply(4.2)
                2007-01-14  [Irrigation].Apply(5.8)
                2007-01-15  [Irrigation].Apply(5.4)
                2007-01-16  [Irrigation].Apply(5.2)
                2007-01-17  [Irrigation].Apply(5.6)
                2007-01-19  [Irrigation].Apply(13.8)
                2007-01-20  [Irrigation].Apply(99.4)
                2007-01-21  [Irrigation].Apply(10.2)
                2007-01-22  [Irrigation].Apply(0.2)
                2007-01-25  [Irrigation].Apply(0.2)
                2007-01-26  [Irrigation].Apply(6.4)
                2007-01-27  [Irrigation].Apply(9.2)
                2007-01-28  [Irrigation].Apply(7.0)
                2007-01-29  [Irrigation].Apply(4.6)
                2007-01-30  [Irrigation].Apply(1.4)
                2007-01-31  [Irrigation].Apply(9.2)
                2007-02-01  [Irrigation].Apply(17.2)
                2007-02-02  [Irrigation].Apply(8.2)
                2007-02-03  [Irrigation].Apply(8.8)
                2007-02-04  [Irrigation].Apply(9.0)
                2007-02-05  [Irrigation].Apply(9.0)
                2007-02-07  [Irrigation].Apply(0.4)
                2007-02-08  [Irrigation].Apply(0.2)
                2007-02-11  [Irrigation].Apply(6.6)
                2007-02-12  [Irrigation].Apply(7.8)
                2007-02-14  [Irrigation].Apply(18.0)
                2007-02-15  [Irrigation].Apply(8.2)
                2007-02-16  [Irrigation].Apply(8.2)
                2007-02-18  [Irrigation].Apply(1.6)
                2007-02-19  [Irrigation].Apply(14.6)
                2007-02-20  [Irrigation].Apply(0.2)
                2007-02-21  [Irrigation].Apply(15.2)
                2007-02-24  [Irrigation].Apply(0.4)
                2007-02-25  [Irrigation].Apply(0.4)
                2007-02-28  [Irrigation].Apply(8.0)
                2007-03-01  [Irrigation].Apply(7.4)
                2007-03-02  [Irrigation].Apply(7.2)
                2007-03-03  [Irrigation].Apply(0.2)
                2007-03-06  [Irrigation].Apply(7.2)
                2007-03-16  [Irrigation].Apply(2.8)
                2007-03-17  [Irrigation].Apply(0.2)
              Manager PlantandHarvest
                PlantingDate = 2006-10-10
                CultivarName = RussetBurbank
                RowSpace = 370
                RowWidth = 860
                PlantingDepth = 120
                StemNumberPerSeedTuber = 2
                SetFinalLeafNumber = 0
                HarvestDate = 2007-03-22
                script: same as in Validation.New Zealand.FUE.FUE_base.paddock.Manager folder.PlantandHarvest
              Manager RemoveRainfall
                StartDate = 2006-10-18
                EndDate = 2007-03-17
                script: same as in Validation.Australia.Penola_0607.Penola_0506Base.paddock.Manager folder.RemoveRainfall
            Report: EventNames=[Clock].DoReport
            SoluteManager
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