Simulations: Version=14
  Memo TitlePage
    # The APSIM Soil Arbitrator Model

    _Huth, N.I., Fainges, J.L. and Holzworth, D.P._
  DataStore
  Folder Simple Test Using Split Populations
    Memo
      This test compares the water and nitrogen competition for simulations where a static crop canopy with LAI of 3, rooting depth of 1m and a daily N demand of 0.15 kgN/ha is a single crop, two half-populations or three one third-populations.  In each case the total canopy size and water demand of each of the single or split populations will be the same.  If the soil arbitrator is operating correctly the overall water and nitrogen balance of each simulation should be the same.  In the case of the split populations, the water and nitrogen supplies provided by the soil arbitrator to the sub-populations should sum to the same value calculated in the simulation for the full population.

      This test simulation also tests that the uptakes provided by the arbitrator are passed to the correct instances of each crop model within a multiple zone simulation.  In such a simulation there may be multiple instances of a wheat model for example.  The arbitrator must communicate such that the correct information is supplied to each instance of each particular crop model.

      The simulation includes 3 fields with up to three crops in each.

      Field 1

      Wheat: LAI = 3 (m<sup>2</sup>/m<sup>2</sup>), N demand = 0.15 (kg/ha)

      Field 2

      Wheat: LAI = 1.5 (m<sup>2</sup>/m<sup>2</sup>), N demand = 0.075 (kg/ha)

      Barley: LAI = 1.5 (m<sup>2</sup>/m<sup>2</sup>), N demand = 0.075 (kg/ha)

      Field 3

      Wheat: LAI = 1.0 (m<sup>2</sup>/m<sup>2</sup>), N demand = 0.05 (kg/ha)

      Barley: LAI = 1.0 (m<sup>2</sup>/m<sup>2</sup>), N demand = 0.05 (kg/ha)

      Oats:   LAI = 1.0 (m<sup>2</sup>/m<sup>2</sup>), N demand = 0.05 (kg/ha)

      The crops are simple instances of a static plant model and so the crop type is only of use in referencing the various instances of the models.
    Simulation SplitPopulations
      Clock: StartDate=1900-01-01; EndDate=1904-12-31
      Summary SummaryFile
      Weather: FileName=%root%\Examples\WeatherFiles\Dalby.met
      SoilArbitrator
      Zone Field1: Area=1; Slope=0
        Report Report1: EventNames=[Clock].EndOfDay
          VariableNames:
            [Clock].Today
            sum([Soil].SoilWater.SWmm) as SWTotal
            sum([Soil].SoilNitrogen.NO3) as NO3Total
            sum([Soil].SoilNitrogen.NH4) as NH4Total
            [Wheat].PotentialEP
            [Wheat].EP
        Fertiliser
        Soil: ASCOrder=Vertosol; ASCSubOrder=Black; SoilType=Clay; Site=Norwin; NearestTown=Norwin; Region=Darling Downs and Granite Belt; State=Queensland; Country=Australia; NaturalVegetation=Qld. Bluegrass, possible Qld. Blue gum; ApsoilNumber=900; Latitude=-27.581836; Longitude=151.320206; LocationAccuracy=+/- 20m
          DataSource=CSIRO Sustainable Ecosystems, Toowoomba; Characteriesd as part of the GRDC funded project"Doing it better, doing it smarter, managing soil water in Australian agriculture' 2011
          Comments=OC, CLL for all crops estimated-based on Bongeen Mywybilla Soil No1
          Water
            Thickness  BD       AirDry    LL15      DUL       SAT       KS
            150        1.01056  0.13025   0.2605    0.521     0.588655  20
            150        1.07146  0.198689  0.248362  0.496723  0.565677  20
            300        1.09394  0.28      0.28      0.488438  0.557193  20
            300        1.15861  0.28      0.28      0.480297  0.532787  20
            300        1.17301  0.28      0.28      0.471584  0.527354  20
            300        1.16287  0.28      0.28      0.457071  0.53118   20
            300        1.1875   0.28      0.28      0.452332  0.521888  20
            SoilCrop WheatSoil: LL=[0.261, 0.248, 0.28, 0.306, 0.36, 0.392, 0.446]; KL=[0.06, 0.06, 0.06, 0.03, 0.03, 0.03, 0.03]; XF=[1, 1, 1, 1, 1, 1, 1]
          SoilWater: SummerDate=1-Nov; SummerU=5; SummerCona=5; WinterDate=1-Apr; WinterU=5; WinterCona=5; DiffusConst=40; DiffusSlope=16; Salb=0.12; CN2Bare=73; CNRed=20; CNCov=0.8; max_pond=0; Thickness=[150, 150, 300, 300, 300, 300, 300]; SWCON=[0.3, 0.3, 0.3, 0.3, 0.3, 0.3, 0.3]; residueinterception=0
          SoilNitrogen: fom_type=[default, manure, mucuna, lablab, shemp, stable]; fract_carb=[0.2, 0.3, 0.54, 0.57, 0.45, 0]; fract_cell=[0.7, 0.3, 0.37, 0.37, 0.47, 0.1]; fract_lign=[0.1, 0.4, 0.09, 0.06, 0.08, 0.9]
          SoilOrganicMatter: RootCN=40; RootWt=1000; SoilCN=12; EnrACoeff=7.4; EnrBCoeff=0.2; OCUnits=Total
            Thickness  OC    FBiom  FInert
            150        1.2   0.04   0.4
            150        0.96  0.02   0.6
            300        0.6   0.02   0.8
            300        0.3   0.02   1
            300        0.18  0.01   1
            300        0.12  0.01   1
            300        0.12  0.01   1
          Analysis: Thickness=[150, 150, 300, 300, 300, 300, 300]; PH=[8, 8, 8, 8, 8, 8, 8]; PHUnits=Water; BoronUnits=HotWater
          InitialWater: PercentMethod=EvenlyDistributed; FractionFull=1
          Sample InitialN: NO3Units=ppm; NH4Units=ppm; SWUnits=Volumetric; OCUnits=Total; PHUnits=Water
            Thickness  NO3  NH4
            150        1    0.1
            150        1    0.1
            300        1    0.1
            300        1    0.1
            300        1    0.1
            300        1    0.1
            300        1    0.1
          CERESSoilTemperature
        SurfaceOrganicMatter: PoolName=wheat_stubble; type=wheat; mass=500; standing_fraction=0; cnr=100; CriticalResidueWeight=2000; OptimumDecompTemp=20; MaxCumulativeEOS=20; CNRatioDecompCoeff=0.277; CNRatioDecompThreshold=25; TotalLeachRain=25; MinRainToLeach=10; CriticalMinimumOrganicC=0.004; DefaultCPRatio=0; DefaultStandingFraction=0; StandingExtinctCoeff=0.5; FractionFaecesAdded=0.5
          Pools:
            {PoolName=wheat_stubble, ResidueType=wheat, Mass=500, CNRatio=100, StandingFraction=0}
          ResidueTypes: LoadFromResource=ResidueTypes
        MicroClimate: a_interception=0; b_interception=1; c_interception=0; d_interception=0; soil_albedo=0.3; sun_angle=15; soil_heat_flux_fraction=0.4; night_interception_fraction=0.5; refheight=2; albedo=0.15; emissivity=0.96; RadIntTotal=0
        SimpleTree wheat: CanopyType=wheat; LAI=3; Height=10000; RootDepth=1000; NDemand=0.15
        SoluteManager
      Zone Field2: Area=1; Slope=0
        Report Report2: EventNames=[Clock].EndOfDay
          VariableNames:
            [Clock].Today
            sum([Soil].SoilWater.SWmm) as SWTotal
            sum([Soil].SoilNitrogen.NO3) as NO3Total
            sum([Soil].SoilNitrogen.NH4) as NH4Total
            [Wheat].PotentialEP
            [Barley].PotentialEP
            ([Wheat].PotentialEP+[Barley].PotentialEP) as TotalPEP
            [Wheat].EP
            [Barley].EP
            ([Wheat].EP+[Barley].EP) as TotalEP
        Fertiliser
        Soil: ASCOrder=Vertosol; ASCSubOrder=Black; SoilType=Clay; Site=Norwin; NearestTown=Norwin; Region=Darling Downs and Granite Belt; State=Queensland; Country=Australia; NaturalVegetation=Qld. Bluegrass, possible Qld. Blue gum; ApsoilNumber=900; Latitude=-27.581836; Longitude=151.320206; LocationAccuracy=+/- 20m
          DataSource=CSIRO Sustainable Ecosystems, Toowoomba; Characteriesd as part of the GRDC funded project"Doing it better, doing it smarter, managing soil water in Australian agriculture' 2011
          Comments=OC, CLL for all crops estimated-based on Bongeen Mywybilla Soil No1
          Water
            Thickness  BD       AirDry    LL15      DUL       SAT       KS
            150        1.01056  0.13025   0.2605    0.521     0.588655  20
            150        1.07146  0.198689  0.248362  0.496723  0.565677  20
            300        1.09394  0.28      0.28      0.488438  0.557193  20
            300        1.15861  0.28      0.28      0.480297  0.532787  20
            300        1.17301  0.28      0.28      0.471584  0.527354  20
            300        1.16287  0.28      0.28      0.457071  0.53118   20
            300        1.1875   0.28      0.28      0.452332  0.521888  20
            SoilCrop WheatSoil: LL=[0.261, 0.248, 0.28, 0.306, 0.36, 0.392, 0.446]; KL=[0.03, 0.03, 0.03, 0.015, 0.015, 0.015, 0.015]; XF=[1, 1, 1, 1, 1, 1, 1]
            SoilCrop BarleySoil: LL=[0.261, 0.248, 0.28, 0.306, 0.36, 0.392, 0.446]; KL=[0.03, 0.03, 0.03, 0.015, 0.015, 0.015, 0.015]; XF=[1, 1, 1, 1, 1, 1, 1]
          SoilWater: same as Simple Test Using Split Populations.SplitPopulations.Field1.Soil.SoilWater
          SoilNitrogen: fom_type=[default, manure, mucuna, lablab, shemp, stable]; fract_carb=[0.2, 0.3, 0.54, 0.57, 0.45, 0]; fract_cell=[0.7, 0.3, 0.37, 0.37, 0.47, 0.1]; fract_lign=[0.1, 0.4, 0.09, 0.06, 0.08, 0.9]
          SoilOrganicMatter: same as Simple Test Using Split Populations.SplitPopulations.Field1.Soil.SoilOrganicMatter
          Analysis: Thickness=[150, 150, 300, 300, 300, 300, 300]; PH=[8, 8, 8, 8, 8, 8, 8]; PHUnits=Water; BoronUnits=HotWater
          InitialWater: PercentMethod=EvenlyDistributed; FractionFull=1
          Sample InitialN: same as Simple Test Using Split Populations.SplitPopulations.Field1.Soil.InitialN
          CERESSoilTemperature
        SurfaceOrganicMatter: same as Simple Test Using Split Populations.SplitPopulations.Field1.SurfaceOrganicMatter
        MicroClimate: a_interception=0; b_interception=1; c_interception=0; d_interception=0; soil_albedo=0.3; sun_angle=15; soil_heat_flux_fraction=0.4; night_interception_fraction=0.5; refheight=2; albedo=0.15; emissivity=0.96; RadIntTotal=0
        SimpleTree wheat: CanopyType=wheat; LAI=1.5; Height=10000; RootDepth=1000; NDemand=0.075
        SimpleTree barley: CanopyType=barley; LAI=1.5; Height=10000; RootDepth=1000; NDemand=0.075
        SoluteManager
      Zone Field3: Area=1; Slope=0
        Report Report3: EventNames=[Clock].EndOfDay
          VariableNames:
            [Clock].Today
            sum([Soil].SoilWater.SWmm) as SWTotal
            sum([Soil].SoilNitrogen.NO3) as NO3Total
            sum([Soil].SoilNitrogen.NH4) as NH4Total
            [Wheat].PotentialEP
            [Barley].PotentialEP
            [Oats].PotentialEP
            ([Wheat].PotentialEP+[Barley].PotentialEP+[Oats].PotentialEP) as TotalPEP
            [Wheat].EP
            [Barley].EP
            [Oats].EP
            ([Wheat].EP+[Barley].EP+[Oats].EP) as TotalEP
        Fertiliser
        Soil: ASCOrder=Vertosol; ASCSubOrder=Black; SoilType=Clay; Site=Norwin; NearestTown=Norwin; Region=Darling Downs and Granite Belt; State=Queensland; Country=Australia; NaturalVegetation=Qld. Bluegrass, possible Qld. Blue gum; ApsoilNumber=900; Latitude=-27.581836; Longitude=151.320206; LocationAccuracy=+/- 20m
          DataSource=CSIRO Sustainable Ecosystems, Toowoomba; Characteriesd as part of the GRDC funded project"Doing it better, doing it smarter, managing soil water in Australian agriculture' 2011
          Comments=OC, CLL for all crops estimated-based on Bongeen Mywybilla Soil No1
          Water
            Thickness  BD       AirDry    LL15      DUL       SAT       KS
            150        1.01056  0.13025   0.2605    0.521     0.588655  20
            150        1.07146  0.198689  0.248362  0.496723  0.565677  20
            300        1.09394  0.28      0.28      0.488438  0.557193  20
            300        1.15861  0.28      0.28      0.480297  0.532787  20
            300        1.17301  0.28      0.28      0.471584  0.527354  20
            300        1.16287  0.28      0.28      0.457071  0.53118   20
            300        1.1875   0.28      0.28      0.452332  0.521888  20
            SoilCrop WheatSoil: LL=[0.261, 0.248, 0.28, 0.306, 0.36, 0.392, 0.446]; KL=[0.02, 0.02, 0.02, 0.01, 0.01, 0.01, 0.01]; XF=[1, 1, 1, 1, 1, 1, 1]
            SoilCrop BarleySoil: LL=[0.261, 0.248, 0.28, 0.306, 0.36, 0.392, 0.446]; KL=[0.02, 0.02, 0.02, 0.01, 0.01, 0.01, 0.01]; XF=[1, 1, 1, 1, 1, 1, 1]
            SoilCrop OatsSoil: LL=[0.261, 0.248, 0.28, 0.306, 0.36, 0.392, 0.446]; KL=[0.02, 0.02, 0.02, 0.01, 0.01, 0.01, 0.01]; XF=[1, 1, 1, 1, 1, 1, 1]
          SoilWater: same as Simple Test Using Split Populations.SplitPopulations.Field1.Soil.SoilWater
          SoilNitrogen: fom_type=[default, manure, mucuna, lablab, shemp, stable]; fract_carb=[0.2, 0.3, 0.54, 0.57, 0.45, 0]; fract_cell=[0.7, 0.3, 0.37, 0.37, 0.47, 0.1]; fract_lign=[0.1, 0.4, 0.09, 0.06, 0.08, 0.9]
          SoilOrganicMatter: same as Simple Test Using Split Populations.SplitPopulations.Field1.Soil.SoilOrganicMatter
          Analysis: Thickness=[150, 150, 300, 300, 300, 300, 300]; PH=[8, 8, 8, 8, 8, 8, 8]; PHUnits=Water; BoronUnits=HotWater
          InitialWater: PercentMethod=EvenlyDistributed; FractionFull=1
          Sample InitialN: same as Simple Test Using Split Populations.SplitPopulations.Field1.Soil.InitialN
          CERESSoilTemperature
        SurfaceOrganicMatter: same as Simple Test Using Split Populations.SplitPopulations.Field1.SurfaceOrganicMatter
        MicroClimate: a_interception=0; b_interception=1; c_interception=0; d_interception=0; soil_albedo=0.3; sun_angle=15; soil_heat_flux_fraction=0.4; night_interception_fraction=0.5; refheight=2; albedo=0.15; emissivity=0.96; RadIntTotal=0
        SimpleTree wheat: CanopyType=wheat; LAI=1; Height=10000; RootDepth=1000; NDemand=0.05
        SimpleTree barley: CanopyType=barley; LAI=1; Height=10000; RootDepth=1000; NDemand=0.05
        SimpleTree oats: CanopyType=oats; LAI=1; Height=10000; RootDepth=1000; NDemand=0.05
        SoluteManager
  Simulation Intercrop test
    Memo
      This test compares the water demands and uptakes from two instances of Slurp, running in the same field (an intercrop). Both slurp instances are configured identically and so the water demands and uptakes for each are also identical.
    Clock: StartDate=1900-01-01; EndDate=1904-12-31
    Summary SummaryFile
    Weather: FileName=%root%\Examples\WeatherFiles\Dalby.met
    SoilArbitrator Soil Arbitrator
    Zone Field: Area=1; Slope=0
      Report Intercrop: EventNames=[Clock].EndOfDay
        VariableNames:
          [Clock].Today
          Slurp1.Root.Depth
          Slurp2.Root.Depth
          Slurp1.Leaf.LAI
          Slurp2.Leaf.LAI
          Slurp1.Root.WaterUptake
          Slurp2.Root.WaterUptake
          Slurp1.Leaf.WaterDemand
          Slurp2.Leaf.WaterDemand
          [ExtraVariables].Script.AccumEO
          [ExtraVariables].Script.AccumEP
          [ExtraVariables].Script.AccumES
          [ExtraVariables].Script.AccumDrainage
          [ExtraVariables].Script.AccumRunoff
          [ExtraVariables].Script.AccumRainfall
          [ExtraVariables].Script.AccumIrrigation
          [ExtraVariables].Script.AccumOutflowLat
          [ExtraVariables].Script.SoilWaterDeficit
      Fertiliser
      Manager Slurp2Sow
        CultivarName = StaticCrop
        InitialRootDepth = 600
        SowingDate = 1900-10-01
```csharp
using System;
using Models.Core;
using Models.PMF;
using APSIM.Shared.Utilities;
        
namespace Models
{
	[Serializable] 
	[System.Xml.Serialization.XmlInclude(typeof(Model))]
	public class Script : Model
	{
		[Link] Clock Clock;

		[Description("Cultivar")]
		public string CultivarName { get; set; }
		[Description("Initial Root Depth")]
		public double InitialRootDepth { get; set; }
		[Description("Sowing Date")]
		public DateTime SowingDate { get; set; }

               
		[EventSubscribe("DoManagement")]
		private void OnDoManagement(object sender, EventArgs e)
		{
			if (Clock.Today.Date == SowingDate)
			{
				foreach (Plant slurp in Apsim.FindAll(this, typeof(Plant)))
					slurp.Sow(cultivar: CultivarName, population: 1, depth: InitialRootDepth, rowSpacing: 150);
			}
		}
	}
}
```
      Soil: ASCOrder=Vertosol; ASCSubOrder=Black; SoilType=Clay; Site=Norwin; NearestTown=Norwin; Region=Darling Downs and Granite Belt; State=Queensland; Country=Australia; NaturalVegetation=Qld. Bluegrass, possible Qld. Blue gum; ApsoilNumber=900; Latitude=-27.581836; Longitude=151.320206; LocationAccuracy=+/- 20m
        DataSource=CSIRO Sustainable Ecosystems, Toowoomba; Characteriesd as part of the GRDC funded project"Doing it better, doing it smarter, managing soil water in Australian agriculture' 2011
        Comments=OC, CLL for all crops estimated-based on Bongeen Mywybilla Soil No1
        Water
          Thickness  BD       AirDry    LL15      DUL       SAT       KS
          150        1.01056  0.13025   0.2605    0.521     0.588655  20
          150        1.07146  0.198689  0.248362  0.496723  0.565677  20
          300        1.09394  0.28      0.28      0.488438  0.557193  20
          300        1.15861  0.28      0.28      0.480297  0.532787  20
          300        1.17301  0.28      0.28      0.471584  0.527354  20
          300        1.16287  0.28      0.28      0.457071  0.53118   20
          300        1.1875   0.28      0.28      0.452332  0.521888  20
          SoilCrop WheatSoil: LL=[0.261, 0.248, 0.28, 0.306, 0.36, 0.392, 0.446]; KL=[0.02, 0.02, 0.02, 0.01, 0.01, 0.01, 0.01]; XF=[1, 1, 1, 1, 1, 1, 1]
          SoilCrop BarleySoil: LL=[0.261, 0.248, 0.28, 0.306, 0.36, 0.392, 0.446]; KL=[0.02, 0.02, 0.02, 0.01, 0.01, 0.01, 0.01]; XF=[1, 1, 1, 1, 1, 1, 1]
          SoilCrop Slurp1Soil: LL=[0.261, 0.248, 0.28, 0.306, 0.36, 0.392, 0.446]; KL=[0.02, 0.02, 0.02, 0.01, 0.01, 0.01, 0.01]; XF=[1, 1, 1, 1, 1, 1, 1]
          SoilCrop Slurp2Soil: LL=[0.261, 0.248, 0.28, 0.306, 0.36, 0.392, 0.446]; KL=[0.02, 0.02, 0.02, 0.01, 0.01, 0.01, 0.01]; XF=[1, 1, 1, 1, 1, 1, 1]
        SoilWater: same as Simple Test Using Split Populations.SplitPopulations.Field1.Soil.SoilWater
        SoilNitrogen: fom_type=[default, manure, mucuna, lablab, shemp, stable]; fract_carb=[0.2, 0.3, 0.54, 0.57, 0.45, 0]; fract_cell=[0.7, 0.3, 0.37, 0.37, 0.47, 0.1]; fract_lign=[0.1, 0.4, 0.09, 0.06, 0.08, 0.9]
        SoilOrganicMatter: same as Simple Test Using Split Populations.SplitPopulations.Field1.Soil.SoilOrganicMatter
        Analysis: Thickness=[150, 150, 300, 300, 300, 300, 300]; PH=[8, 8, 8, 8, 8, 8, 8]; PHUnits=Water; BoronUnits=HotWater
        InitialWater: PercentMethod=EvenlyDistributed; FractionFull=1
        Sample InitialN: same as Simple Test Using Split Populations.SplitPopulations.Field1.Soil.InitialN
        CERESSoilTemperature
      SurfaceOrganicMatter: same as Simple Test Using Split Populations.SplitPopulations.Field1.SurfaceOrganicMatter
      MicroClimate: a_interception=0; b_interception=1; c_interception=0; d_interception=0; soil_albedo=0.3; sun_angle=15; soil_heat_flux_fraction=0.4; night_interception_fraction=0.5; refheight=2; albedo=0.15; emissivity=0.96; RadIntTotal=0
      Plant Slurp1: CropType=Slurp
        Memo TitlePage
          # SLURP: the Sound of a crop using water

          This model has been built using the Plant Modelling Framework (PMF) of [brown_plant_2014] to provide a simple representation of crops.  It is usefull for water and nitrogen balance studies where the focus is on soil processes and a very simple crop is adequate.  The model does not predict crop growth, development or yields.  It simply takes up water and nitrogen.   .

          SLURP has no phenology so the behaviour of the SLURP is the same throughout its ontology (with the exception of root depth being able to increase).  SLURP consists of 2 organs:
             1. Leaf which ls represented with a Simpleleaf class and provides a Water uptake demand to the soil arbitrator.
             2. Root which extracts water and nitrogen from the soil for plant growth

          ##Inclusion in APSIM simulations
          A Slurp crop is included in a simulation the same as any other APSIM crop
           * The Slurp object needs to be dragged or copied from the Crop folder in the tool box into the field of your simulation.
           * It is then planted with a sowing rule
          <pre><code class='language-cs'>
          Slurp.Sow(cultivar: StaticCrop, population: 1, depth: 10, rowSpacing: 150);
          </code></pre>
            * Note that SLURP has no notion of population or rowSpacing but these parameters are required by the Sow method so filler values are provided
            * depth in the Sow arguement is the depth that the crop is sown at.  While this has no effect on emergence in SLURP it also sets the depth that the root system is initialised at.  For static crops this depth should be set to the rooting depth that is expected as roots will not grow during the simulation

          ##Altering Slurp properties during runs
          In some cases users will wish to change properties of Slurp while the simulation is running.  This can be done using a the set method in a manager script.

          <pre><code class='language-cs'>
          object LAIResetValue = leaflai;<br>
          zone.Set("Slurp.Leaf.LAIFunction.FixedValue", LAIResetValue);<br>
          object HeightResetValue = CoverToday * MaximumHeight;<br>
          zone.Set("Slurp.Leaf.HeightFunction.FixedValue", HeightResetValue);<br>
          </code></pre>
        OrganArbitrator Arbitrator
          PrioritythenRelativeAllocation NArbitrator
          RelativeAllocation DMArbitrator
        Root: GrowthRespiration=0; MaintenanceRespiration=0
          Memo Description
            Stuff regarding Root
          CompositeBiomass Live: Propertys=[[Root].LayerLive]
          CompositeBiomass Dead: Propertys=[[Root].LayerDead]
          Constant RootFrontVelocity: FixedValue=0; Units=mm/d
          Constant SenescenceRate: FixedValue=0; Units=/d
          Constant MaxDailyNUptake: FixedValue=6
          Constant MaximumRootDepth: FixedValue=1000; Units=mm
          Constant NitrogenDemandSwitch: FixedValue=1; Units=mm
          LinearInterpolationFunction KLModifier: XProperty=[Root].LayerMidPointDepth
            XYPairs: X=[0, 200, 1500]; Y=[1, 1, 0]
            Memo Description
              This is important in SLURP as it is set for each species to represent their differences in rooting patterns between crop species
          BiomassRemoval BiomassRemovalDefaults
            OrganBiomassRemovalType Harvest: FractionLiveToRemove=0.5; FractionDeadToRemove=0; FractionLiveToResidue=0.1; FractionDeadToResidue=0
            OrganBiomassRemovalType Cut: FractionLiveToRemove=0.8; FractionDeadToRemove=0; FractionLiveToResidue=0; FractionDeadToResidue=0
            OrganBiomassRemovalType Prune: FractionLiveToRemove=0; FractionDeadToRemove=0; FractionLiveToResidue=0.6; FractionDeadToResidue=0
            OrganBiomassRemovalType Graze: FractionLiveToRemove=0.6; FractionDeadToRemove=0; FractionLiveToResidue=0.2; FractionDeadToResidue=0
          LinearInterpolationFunction KNO3: XProperty=[Root].LengthDensity
            XYPairs: X=[0, 0.003]; Y=[0.02, 0.02]
          LinearInterpolationFunction KNH4: XProperty=[Root].LengthDensity
            XYPairs: X=[0, 0.003]; Y=[0, 0]
          LinearInterpolationFunction NUptakeSWFactor: XProperty=[Root].RWC
            XYPairs: X=[0, 1]; Y=[0, 1]
          Constant InitialDM: FixedValue=50; Units=g/plant
          Constant SpecificRootLength: FixedValue=40; Units=m/g
          Constant MaximumNConc: FixedValue=0.01
          Constant MinimumNConc: FixedValue=0.01
          PartitionFractionDemandFunction DMDemandFunction
            Constant PartitionFraction: FixedValue=0; Units=0-1
          Constant DMConversionEfficiencyFunction: FixedValue=1; Units=0-1
        SimpleLeaf Leaf: CohortsInitialised=false; MicroClimatePresent=true
          zero: TipsAtEmergence, CohortsAtInitialisation, InitialisedCohortNo, AppearedCohortNo, PlantAppearedLeafNo, Albedo, Gsmax, R50, LAI, Height, FRGR, PotentialEP, KDead, LAIDead
          Biomass Live
          Biomass Dead
          Constant DetachmentRateFunction: FixedValue=0; Units=/d
          Constant NReallocationFactor: FixedValue=0
          Constant SenescenceRate: FixedValue=0
          MultiplyFunction InitialWtFunction
            Constant InitialPlantWt: FixedValue=0; Units=g/plant
            VariableReference Population: VariableName=[Plant].Population
          Constant LaiDeadFunction: FixedValue=0; Units=m^2/m^2
          Constant Photosynthesis: FixedValue=5; Units=g/m2/d
          AirTemperatureFunction FRGRFunction
            XYPairs: X=[0, 10, 25, 40]; Y=[0, 1, 1, 0]
          PartitionFractionDemandFunction DMDemandFunction
            Constant PartitionFraction: FixedValue=1
          Constant MaximumNConc: FixedValue=0.05
          Constant MinimumNConc: FixedValue=0.05
          Constant LAIFunction: FixedValue=5
          Constant ExtinctionCoefficientFunction: FixedValue=0.7
          Constant StructuralFraction: FixedValue=0.5
          Constant HeightFunction: FixedValue=400; Units=mm
          BiomassRemoval BiomassRemovalDefaults: same as Intercrop test.Field.Slurp1.Root.BiomassRemovalDefaults
          Constant MaintenanceRespirationFunction: FixedValue=0; Units=0-1
          Constant DMConversionEfficiencyFunction: FixedValue=1; Units=0-1
          Constant NRetranslocationFactor: FixedValue=0
          Constant NitrogenDemandSwitch: FixedValue=1
          Constant DMReallocationFactor: FixedValue=0
          Constant DMRetranslocationFactor: FixedValue=0
          VariableReference CriticalNConc: VariableName=[Leaf].MinimumNConc.Value()
        Cultivar StaticCrop
          Memo Description
            The static crop is the base crop and uses all the paramaters values specified above.
          Alias StaticCrop
        Cultivar StaticTree
          Command:
            [Root].MaximumRootDepth.FixedValue = 2600
            [Leaf].ExtinctionCoefficientFunction.FixedValue = 0.65
            [Leaf].HeightFunction.FixedValue = 5000
            [Root].KLModifier.XYPairs.X = 0, 200, 500, 1000, 1500, 2000
            [Root].KLModifier.XYPairs.Y = 1, 1, 0.9, 0.6, 0.3, 0.1
          Memo Description
            The static tree is similar to the static crop but is taller, has a deeper root system and a lower extinction coefficient
        Cultivar Pasture
          Command:
            [Root].MaximumRootDepth.FixedValue = 800
            [Root].RootFrontVelocity.FixedValue = 15
            [Leaf].ExtinctionCoefficientFunction.FixedValue = 0.65
            [Root].KLModifier.XYPairs.X = 0, 200, 500, 1000
            [Root].KLModifier.XYPairs.Y = 1, 1, 0.7, 0.0
          Memo Description
            The pasture differs from the base crop because its has a RootFrontVelocity of 15 (as opposed to zero) which means the roots grow downward from sowing untill the MaximumRootDepth is reached.  It ExtinctionCoefficient and MaximumRootDepth are different to the base StaticCrop and it has a different pattern of kl with depth.
        Cultivar Lucerne
          Command:
            [Root].MaximumRootDepth.FixedValue = 2500
            [Root].RootFrontVelocity.FixedValue = 15
            [Leaf].ExtinctionCoefficientFunction.FixedValue = 0.8
            [Root].KLModifier.XYPairs.X = 0, 200, 500, 1000, 1500, 2000
            [Root].KLModifier.XYPairs.Y = 1, 1, 0.9, 0.6, 0.3, 0.1
          Memo Description
            Lucerne also grows root depth like pasture but has a greater root depth, different kl pattern and different extinction coefficient
      Plant Slurp2: CropType=Slurp
        Memo TitlePage: same as Intercrop test.Field.Slurp1.TitlePage
        OrganArbitrator Arbitrator
          PrioritythenRelativeAllocation NArbitrator
          RelativeAllocation DMArbitrator
        Root: GrowthRespiration=0; MaintenanceRespiration=0
          Memo Description
            Stuff regarding Root
          CompositeBiomass Live: Propertys=[[Root].LayerLive]
          CompositeBiomass Dead: Propertys=[[Root].LayerDead]
          Constant RootFrontVelocity: FixedValue=0; Units=mm/d
          Constant SenescenceRate: FixedValue=0; Units=/d
          Constant MaxDailyNUptake: FixedValue=6
          Constant MaximumRootDepth: FixedValue=1000; Units=mm
          Constant NitrogenDemandSwitch: FixedValue=1; Units=mm
          LinearInterpolationFunction KLModifier: same as Intercrop test.Field.Slurp1.Root.KLModifier
          BiomassRemoval BiomassRemovalDefaults: same as Intercrop test.Field.Slurp1.Root.BiomassRemovalDefaults
          LinearInterpolationFunction KNO3: XProperty=[Root].LengthDensity
            XYPairs: X=[0, 0.003]; Y=[0.02, 0.02]
          LinearInterpolationFunction KNH4: XProperty=[Root].LengthDensity
            XYPairs: X=[0, 0.003]; Y=[0, 0]
          LinearInterpolationFunction NUptakeSWFactor: XProperty=[Root].RWC
            XYPairs: X=[0, 1]; Y=[0, 1]
          Constant InitialDM: FixedValue=50; Units=g/plant
          Constant SpecificRootLength: FixedValue=40; Units=m/g
          Constant MaximumNConc: FixedValue=0.01
          Constant MinimumNConc: FixedValue=0.01
          PartitionFractionDemandFunction DMDemandFunction
            Constant PartitionFraction: FixedValue=0; Units=0-1
          Constant DMConversionEfficiencyFunction: FixedValue=1
          Constant DMConversionEfficiencyFunction1: FixedValue=1; Units=0-1
        SimpleLeaf Leaf: CohortsInitialised=false; MicroClimatePresent=true
          zero: TipsAtEmergence, CohortsAtInitialisation, InitialisedCohortNo, AppearedCohortNo, PlantAppearedLeafNo, Albedo, Gsmax, R50, LAI, Height, FRGR, PotentialEP, KDead, LAIDead
          Biomass Live
          Biomass Dead
          Constant DetachmentRateFunction: FixedValue=0; Units=/d
          MultiplyFunction InitialWtFunction
            Constant InitialPlantWt: FixedValue=0; Units=g/plant
            VariableReference Population: VariableName=[Plant].Population
          Constant LaiDeadFunction: FixedValue=0; Units=m^2/m^2
          Constant Photosynthesis: FixedValue=5; Units=g/m2/d
          AirTemperatureFunction FRGRFunction: same as Intercrop test.Field.Slurp1.Leaf.FRGRFunction
          PartitionFractionDemandFunction DMDemandFunction
            Constant PartitionFraction: FixedValue=1
          Constant MaximumNConc: FixedValue=0.05
          Constant MinimumNConc: FixedValue=0.05
          Constant LAIFunction: FixedValue=5
          Constant ExtinctionCoefficientFunction: FixedValue=0.7
          Constant StructuralFraction: FixedValue=0.5
          Constant HeightFunction: FixedValue=400; Units=mm
          Constant SenescenceRate: FixedValue=0
          Constant NReallocationFactor: FixedValue=0
          BiomassRemoval BiomassRemovalDefaults: same as Intercrop test.Field.Slurp1.Root.BiomassRemovalDefaults
          Constant MaintenanceRespirationFunction: FixedValue=0; Units=0-1
          Constant DMConversionEfficiencyFunction: FixedValue=1; Units=0-1
          Constant NRetranslocationFactor: FixedValue=0
          Constant NitrogenDemandSwitch: FixedValue=1
          Constant DMReallocationFactor: FixedValue=0
          Constant DMRetranslocationFactor: FixedValue=0
          VariableReference CriticalNConc: VariableName=[Leaf].MinimumNConc.Value()
        Cultivar StaticCrop
          Memo Description
            The static crop is the base crop and uses all the paramaters values specified above.
          Alias StaticCrop
        Cultivar StaticTree: same as Intercrop test.Field.Slurp1.StaticTree
        Cultivar Pasture: same as Intercrop test.Field.Slurp1.Pasture
        Cultivar Lucerne: same as Intercrop test.Field.Slurp1.Lucerne
      Manager ExtraVariables
```csharp
using System;
using Models.Core;
using System.Collections.Generic;
using System.Text;
using Models.Soils;
using Models.PMF;
using Models;
using System.Xml.Serialization;
using APSIM.Shared.Utilities;

namespace Models
{
	[Serializable] 
	public class Script : Model
	{
		[Link] Clock Clock;
		[Link] Soils.Soil Soil;
		[Link] Models.SurfaceOM.SurfaceOrganicMatter SOM;
		[Link] Weather Met;
		[Link] Fertiliser Fert;
		[Link] Irrigation Irrig;
		[Link] Plant Slurp;
		[Link] Zone zone;
					
		[XmlIgnore] public bool InitialDay { get; set; }
		
		[XmlIgnore] public double AccumPlantN { get; set; }
		[XmlIgnore] public double AccumMineralisation { get; set; }
		[XmlIgnore] public double AccumDenit { get; set; }
		[XmlIgnore] public double AccumFert { get; set; }
		[XmlIgnore] public double AccumLeach { get; set; }
		[XmlIgnore] public double AccumDetach { get; set; }
		[XmlIgnore] public double DeltaSoilOMN { get; set; }
		[XmlIgnore] public double DeltaSurfaceOMN { get; set; }
		[XmlIgnore] public double DeltaSoilMineralN { get; set; }
		[XmlIgnore] public double SoilNitrogenContent { get; set; }
		
		[XmlIgnore] public double AccumEO { get; set; }
		[XmlIgnore] public double AccumEP { get; set; }
		[XmlIgnore] public double AccumES { get; set; }
		[XmlIgnore] public double AccumDrainage { get; set; }
		[XmlIgnore] public double AccumRunoff { get; set; }
		[XmlIgnore] public double AccumOutflowLat { get; set; }
		[XmlIgnore] public double AccumIrrigation { get; set; }
		[XmlIgnore] public double AccumRainfall { get; set; }
		[XmlIgnore] public double SoilWaterDeficit { get; set; }
	
		[XmlIgnore] public double  InitialSoilOMN { get; set; }
		[XmlIgnore] public double  InitialSurfaceOMN { get; set; }
		[XmlIgnore] public double  InitialMineralN { get; set; }
		
		[XmlIgnore] public double SWC { get; set; }
		[XmlIgnore] public double DUL { get; set; }
		[XmlIgnore] public double OutFlowLat { get; set; }

		[XmlIgnore] public double FomN { get; set; }
		[XmlIgnore] public double BiomN { get; set; }
		[XmlIgnore] public double HumN { get; set; }
		[XmlIgnore] public double OrganicN { get; set; }
		[XmlIgnore] public double NO3N { get; set; }
		[XmlIgnore] public double NH4N { get; set; }
		[XmlIgnore] public double UreaN { get; set; }
		[XmlIgnore] public double MineralN { get; set; }
		[XmlIgnore] public double DltNMinRes { get; set; }
		[XmlIgnore] public double DltNMinTot { get; set; }
		
		[EventSubscribe("Commencing")]
		private void OnSimulationCommencing(object sender, EventArgs e)
		{
			InitialDay = true;
		}
		
		[EventSubscribe("DoManagement")]
		private void OnDoManagement(object sender, EventArgs e)
		{
			//!!!!!! Nitrogen balance components !!!!!!
			//!!!!!!^^^^^^^^^^^^^^^^^^^^^^^^^^^^^!!!!!!
			FomN = MathUtilities.Sum(Soil.SoilNitrogen.FOMN);
			HumN = MathUtilities.Sum(Soil.SoilNitrogen.HumicN);
			BiomN = MathUtilities.Sum(Soil.SoilNitrogen.MicrobialN);
			OrganicN = FomN + HumN + BiomN;
			NO3N = MathUtilities.Sum(Soil.NO3N);
			NH4N = MathUtilities.Sum(Soil.NH4N);
			UreaN = MathUtilities.Sum(Soil.SoilNitrogen.urea);
			MineralN = NO3N + NH4N + UreaN; 
			DltNMinRes = MathUtilities.Sum(Soil.SoilNitrogen.dlt_n_min_res);
			DltNMinTot = MathUtilities.Sum(Soil.SoilNitrogen.MineralisedN);
			int layers = Soil.Thickness.Length;
			if (InitialDay == true)
			{
				InitialSurfaceOMN = SOM.N;
				InitialSoilOMN = OrganicN;
				InitialMineralN = MineralN;
				InitialDay = false;
			}
			AccumFert += Fert.NitrogenApplied;
			DeltaSurfaceOMN = SOM.N - InitialSurfaceOMN;
			AccumLeach = AccumLeach - Soil.SoilWater.LeachNH4 - Soil.SoilWater.LeachNO3 - Soil.SoilWater.LeachUrea; //Fails
			AccumMineralisation += MathUtilities.Sum(Soil.SoilNitrogen.MineralisedN);
			AccumDenit -= MathUtilities.Sum(Soil.SoilNitrogen.Denitrification);
			AccumPlantN -= (double)zone.Get("Slurp1.Root.NUptake");
			DeltaSoilOMN = OrganicN - InitialSoilOMN;
			DeltaSoilMineralN = MineralN - InitialMineralN;
			SoilNitrogenContent = MineralN;
			
			//!!!!!! Water balance components !!!!!!
			//!!!!!!^^^^^^^^^^^^^^^^^^^^^^^^^^!!!!!!

			AccumIrrigation += Irrig.IrrigationApplied;
			AccumRainfall += Met.Rain;
			//AccumEP -= (double)zone.Get("[Slurp].Leaf.Transpiration");
			AccumEP -= (double)zone.Get("Slurp1.Root.WaterUptake");
			SoilWaterDeficit = (SWC - DUL);
			double OutFlowLat = MathUtilities.Sum(Soil.SoilWater.outflow_lat);
			AccumOutflowLat -= OutFlowLat;
		}
		
		[EventSubscribe("DoManagementCalculations")]
		private void OnDoManagementCalculations(object sender, EventArgs e)
		{
			FomN = MathUtilities.Sum(Soil.SoilNitrogen.FOMN);
			HumN = MathUtilities.Sum(Soil.SoilNitrogen.HumicN);
			BiomN = MathUtilities.Sum(Soil.SoilNitrogen.MicrobialN);
			
			
			AccumEO -= Soil.SoilWater.Eo;
			AccumES -= Soil.SoilWater.Es; 
			AccumDrainage -= Soil.SoilWater.Drainage;
			AccumRunoff -= Soil.SoilWater.Runoff;
			SWC = MathUtilities.Sum(Soil.SoilWater.SWmm);
			DUL = MathUtilities.Sum(Soil.SoilWater.DULmm);
		}
	}
}
```
      Irrigation
      Fertiliser Fertiliser1
      SoluteManager
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