Simulations: Version=59
  Replacements
    Report
      VariableNames:
        [Clock].Today
        [SurfaceOrganicMatter].Cover
        [SurfaceOrganicMatter].Wt
        [Soil].SoilWater.SWmm
        [Soil].SoilWater.SW
        [Weather].Rain
        [Irrigation].IrrigationApplied
        [Soil].SoilWater.Es
        [Soil].SoilWater.Runoff
        [Soil].SoilWater.Infiltration
        [Soil].SoilWater.Drainage
        [Soil].LL15
        [Soil].DUL
        [Soil].LL15mm
        [Soil].DULmm
        [Slurp].Leaf.Transpiration
        [Slurp].Leaf.CoverGreen
        [Slurp].Leaf.CoverTotal
        [Slurp].Leaf.Height
        [Slurp].Leaf.LAI
        [Slurp].Root.Depth
        mean([Soil].InitialWaterVolumetric) * sum([Soil].Thickness) - sum([Soil].SoilWater.SWmm) as ProfileWaterChange
        sum([Soil].InitialWaterVolumetric)
        sum([Soil].Thickness)
        sum([Soil].SoilWater.SWmm)
      EventNames:
        [Clock].DoReport
  DataStore
    PredictedObserved: PredictedTableName=Report; ObservedTableName=Observed; FieldNameUsedForMatch=Clock.Today
    ExcelInput Observed: FileName=Observed.xlsx; SheetNames=[Observed]
    PredictedObserved ProfileWaterPO: PredictedTableName=ProfileWater; ObservedTableName=Observed; FieldNameUsedForMatch=Clock.Today
  Experiment ABlock_Residues
    Memo
      This experiment was conducted in Plant and Food Researches A Block field near Lincoln, New Zealand.  A uniformly managed, unirrigated barley crop was grown and harvested prior to the estastablishment of this experiment.  A randomised complete block was layed out with 5 x 15 m plots laid out to avoid harvester wheel tracks with 4 replicates of 4 treatments:

       - <b>StandingStubble</b> where the stubble that was left by the combine harvester remained standing and any residue that
       - <b>HarvesterWindrow</b> where the residue mown from the other two treatments was piled ontop of the standing stubble to simulate a harvester windrow with the residue from approximately 2 times the area applied
       - <b>MownStubble</b> where stubble was mown at 5cm height and removed from the plots
       - <b>BareSoil</b> where stubble was mown and removed and then plots were ploughed and cultivated to leave a bare soil.

      Following the establishment of treatments CS616 soil moisture sensors were installed in each plot at 0-20, 20-40 and 40-60 cm depth and logged at 1 hourly intervals from establishment in Autumn through until the following spring.
    Factors
      Factor Cover: Specification=[SurfaceOrganicMatter]
        SurfaceOrganicMatter StandingStubble: InitialResidueName=Barley; InitialResidueType=Barley; InitialResidueMass=2026; InitialStandingFraction=1; InitialCPR=0; InitialCNR=80; FractionFaecesAdded=0.5
        SurfaceOrganicMatter HarvesterWindrow: InitialResidueName=Barley; InitialResidueType=Barley; InitialResidueMass=8300; InitialStandingFraction=0; InitialCPR=0; InitialCNR=80; FractionFaecesAdded=0.5
        SurfaceOrganicMatter MownStubble: InitialResidueName=Barley; InitialResidueType=Barley; InitialResidueMass=400; InitialStandingFraction=1; InitialCPR=0; InitialCNR=80; FractionFaecesAdded=0.5
        SurfaceOrganicMatter BareSoil: InitialResidueName=Barley; InitialResidueType=Barley; InitialResidueMass=0; InitialStandingFraction=1; InitialCPR=0; InitialCNR=80; FractionFaecesAdded=0.5
    Simulation Base
      Weather: FileName=..\..\WeatherFiles\lincoln.met
      Clock: StartDate=2010-02-25; EndDate=2010-08-11
      Summary
      Zone Field: Area=1; Slope=0
        Soil: SoilType=Sedementary; LocalName=Lincoln; Latitude=0; Longitude=0
          Water
            Thickness  BD    AirDry  LL15   DUL   SAT    KS
            200        1.3   0.06    0.08   0.27  0.31   999
            200        1.3   0.124   0.124  0.25  0.358  300
            200        1.3   0.106   0.106  0.27  0.4    100
            200        1.52  0.07    0.07   0.2   0.314  90
            200        1.52  0.07    0.07   0.2   0.314  90
            200        1.52  0.165   0.165  0.3   0.358  90
            200        1.65  0.157   0.157  0.29  0.35   90
            200        1.65  0.125   0.125  0.25  0.318  90
            200        1.65  0.125   0.125  0.25  0.318  90
            200        1.65  0.125   0.125  0.25  0.318  90
            200        1.65  0.125   0.125  0.25  0.318  90
            200        1.65  0.125   0.125  0.25  0.318  90
            200        1.65  0.125   0.125  0.25  0.318  90
            200        1.65  0.125   0.125  0.25  0.318  90
            200        1.6   0.125   0.125  0.25  0.318  90
          SoilWater: SummerDate=1-Nov; SummerU=9; SummerCona=4.4; WinterDate=1-Apr; WinterU=9; WinterCona=4.4; DiffusConst=88; DiffusSlope=35; Salb=0.13; CN2Bare=73; CNRed=20; CNCov=0.8; slope=0; discharge_width=0; catchment_area=0; max_pond=0; ResidueInterception=0
            Thickness  SWCON  KLAT
            200        0.3    0
            200        0.6    0
            200        0.6    0
            200        0.6    0
            200        0.95   0
            200        0.95   0
            200        0.95   0
            200        0.95   0
            200        0.95   0
            200        0.95   0
            200        0.95   0
            200        0.95   0
            200        0.95   0
            200        0.95   0
            200        0.95   0
          SoilOrganicMatter: RootCN=40; EnrACoeff=7.4; EnrBCoeff=0.2; OCUnits=Total
            Thickness  OC    SoilCN  FBiom  FInert  RootWt
            200        2.63  11      0.03   0.4     190.767
            200        1.25  11      0.02   0.7     156.187
            200        0.32  11      0.01   0.8     127.875
            200        0.21  11      0.01   0.9     104.695
            200        0.2   11      0.01   1       85.7171
            200        0.2   11      0.01   1       70.1792
            200        0.2   11      0.01   1       57.4579
            200        0.2   11      0.01   1       47.0426
            200        0.2   11      0.01   1       38.5152
            200        0.2   11      0.01   1       31.5336
            200        0.2   11      0.01   1       25.8175
            200        0.2   11      0.01   1       21.1376
            200        0.2   11      0.01   1       17.306
            200        0.2   11      0.01   1       14.1689
            200        0.2   11      0.01   1       11.6006
          Analysis: PH=[6, 6, 6, 6, 6, 6, 6, 6, 6, 6, 6, 6, 6, 6, 6]; PHUnits=Water; BoronUnits=0
            Thickness=[200, 200, 200, 200, 200, 200, 200, 200, 200, 200, 200, 200, 200, 200, 200]
          Sample InitialN: NO3Units=kg/ha; NH4Units=kg/ha; SWUnits=Volumetric; OCUnits=Total; PHUnits=Water
            Thickness=[200, 200, 200, 200, 200, 200, 200, 200, 200, 200, 200, 200, 200, 200, 200]
            NO3N={Values=[115.556, 77.0371, 57.7778, 33.7778, 33.7778, 0, 0, 0, 0.33, 0.33, 0.33, 0.33, 0.33, 0.33, 0.32], StoredAsPPM=false}
            NH4N={Values=[0.26, 0.26, 0.26, 0.304, 0.304, 0.304, 0.33, 0.33, 0.33, 0.33, 0.33, 0.33, 0.33, 0.33, 0.32], StoredAsPPM=false}
            SW=[0.253, 0.175, 0.15, 0.1, 0.13, 0.25, 0.29, 0.25, 0.25, 0.25, 0.25, 0.25, 0.25, 0.25, 0.25]
          CERESSoilTemperature
          Nutrient
            DirectedGraphInfo={Nodes=[{Name=Inert, OutlineColour=Black}, {Name=SurfaceResidue, OutlineColour=Black}, {Name=FOMLignin, OutlineColour=Black}, {Name=FOMCellulose, OutlineColour=Black}, {Name=FOMCarbohydrate, OutlineColour=Black}, {Name=Microbial, OutlineColour=Black}, {Name=Humic, OutlineColour=Black}, {Name=Urea, OutlineColour=Black}, {Name=NO3, OutlineColour=Black}, {Name=NH4, OutlineColour=Black}, {Name=Atmosphere, OutlineColour=White}, {Name=PlantAvailableNO3, OutlineColour=Black}, {Name=PlantAvailableNH4, OutlineColour=Black}], Arcs=[{SourceName=SurfaceResidue, DestinationName=Microbial}, {SourceName=SurfaceResidue, DestinationName=Humic}, {SourceName=FOMLignin, DestinationName=Microbial}, {SourceName=FOMLignin, DestinationName=Humic}, {SourceName=FOMCellulose, DestinationName=Microbial}, {SourceName=FOMCellulose, DestinationName=Humic}, {SourceName=FOMCarbohydrate, DestinationName=Microbial}, {SourceName=FOMCarbohydrate, DestinationName=Humic}, {SourceName=Microbial, DestinationName=Microbial}, {SourceName=Microbial, DestinationName=Humic}, {SourceName=Humic, DestinationName=Microbial}, {SourceName=Urea, DestinationName=NH4}, {SourceName=NO3, DestinationName=Atmosphere}, {SourceName=NH4, DestinationName=NO3}]}
        Irrigation
        Fertiliser
        SurfaceOrganicMatter: InitialResidueName=Barley; InitialResidueType=Barley; InitialResidueMass=2026; InitialStandingFraction=1; InitialCPR=0; InitialCNR=80; FractionFaecesAdded=0.5
        MicroClimate: a_interception=0; b_interception=1; c_interception=0; d_interception=0; soil_albedo=0.3; SoilHeatFluxFraction=0.4; NightInterceptionFraction=0.5; ReferenceHeight=2
        Operations
          2010-03-05  [Irrigation].Apply(26.6);
          2010-03-08  [Irrigation].Apply(30.4);
          2010-03-09  [Irrigation].Apply(100);
          2010-03-12  [Irrigation].Apply(10);
        Manager ResiduePrecipitationInterception
```csharp
using System;
using Models.Core;
using System.Collections.Generic;
using System.Text;
using Models.Soils;
using Models;
using System.Xml.Serialization;
using APSIM.Shared.Utilities;

namespace Models
{
    [Serializable] 
    public class Script : Model
    {
        [Link] Clock Clock;
        [Link] Soils.Soil Soil;
        [Link] Models.Surface.SurfaceOrganicMatter SOM;
        [Link] Weather Met;
        [Link] Irrigation Irrig;
               
        [XmlIgnore] public bool InitialDay { get; set; }

        [XmlIgnore] public double Precip { get; set; }
        [XmlIgnore] public double Maximum_interception { get; set; }
        [XmlIgnore] public double Residue_water { get; set; }
        [XmlIgnore] public double Interception_today { get; set; }
        [XmlIgnore] public double Evaporated_interception { get; set; }
        [XmlIgnore] public double SWC60 { get; set; }

        [EventSubscribe("Initialised")]
        private void OnInitialised(object sender, EventArgs e)
        {
            Precip = 0;
            Maximum_interception = 0;
            Residue_water = 0;
            Interception_today = 0;
            Evaporated_interception = 0;
            SWC60 = 0;
        }

        [EventSubscribe("DoManagementCalculations")]
        private void OnDoManagementCalculations(object sender, EventArgs e)
        {
//calculate the amount of water that is going to evaporate from the residue water pool

            if (Residue_water > Soil.SoilWater.Eo)
                Evaporated_interception = Soil.SoilWater.Eo;
            else
                Evaporated_interception = Residue_water;

            SWC60 = Soil.SoilWater.SWmm[0] + Soil.SoilWater.SWmm[1] + Soil.SoilWater.SWmm[2];

// remove evaporation from residue water pool               

            Residue_water = Residue_water - Evaporated_interception;
        }

        [EventSubscribe("DoManagement")]
        private void OnDoManagement(object sender, EventArgs e)
        {
//Set interception variables
            Precip = Met.Rain + Irrig.IrrigationApplied; 
            Maximum_interception = 0.0002 * SOM.Wt;
          
//Determine the amount of water intercepted by residue today
            if ((Precip * SOM.Cover) >= (Maximum_interception - Residue_water))
                Interception_today = (Maximum_interception - Residue_water);
            else
                Interception_today = (Precip * SOM.Cover);

// Send message to soil module to take interception out of water balance
    
            Soil.SoilWater.ResidueInterception = Interception_today;
            
//Add intercepted water into residual water pool

            Residue_water = Residue_water + Interception_today;



            

        }
    }
}
```
        Report ProfileWater
          VariableNames:
            [Clock].Today
            sum([Soil].SoilWater.SWmm[1:3] as ProfileWater
          EventNames:
            [Clock].DoReport
        Report
  Experiment Lincoln2015
    Memo Experimental description
      ### Lincoln2015 (Rain-Shelter Trail)

      This dataset demonstrates the impact of three N (0, 50 and 250 kg/ha N) and two water regimes (dryland and fully irrigated) using a rain-shelter structure at Lincoln, New Zealand.  A crop of 'Discovery' wheat was sown in October and managed as a typical spring wheat crop.  Soil water content was measured with CS650 soil moisture probes positioned at 7 depths in each plot (192 probes in total) and logged at 15 min intervals for the duration of the experiment.  Total cover was measured using linear PAR sensors in each plot logged for the duration of the experiment and green cover was measured ever 3-4 days with NDVI and interpolated to daily values.
      Slurp is used to represent the crop in this test so it can focus on soil water and not be blured by the performance of the crop model.  To do this observed values for green and total cover, LAI, and Height were set in Slurp each day using a manager script.
    Factors
      Factor Nit
        CompositeFactor 0
          Specifications:
            [StateFactors].Script.Nit = 0
            [SetCropCanopy].Script.Nit = 0
            [Fert]
          Operations 0
            2015-10-09  [Irrigation].Apply(5);
            2015-11-01  [Irrigation].Apply(5);
            2015-11-01  [Fertiliser].Apply(35, Fertiliser.Types.UreaN, 20);
            2015-11-19  [Irrigation].Apply(30);
            Memo
              Uniques fertigation event
        CompositeFactor 50
          Specifications:
            [StateFactors].Script.Nit = 50
            [SetCropCanopy].Script.Nit = 50
            [Fert]
          Operations 50
            2015-10-09  [Fertiliser].Apply(0, Fertiliser.Types.UreaN, 20);
            2015-10-09  [Irrigation].Apply(5);
            2015-11-01  [Fertiliser].Apply(35, Fertiliser.Types.UreaN, 20);
            2015-11-01  [Irrigation].Apply(5);
            2015-11-19  [Fertiliser].Apply(25, Fertiliser.Types.UreaN, 20);
            2015-11-19  [Irrigation].Apply(30);
        CompositeFactor 250
          Specifications:
            [StateFactors].Script.Nit = 250
            [SetCropCanopy].Script.Nit = 250
            [Fert]
          Operations 250
            2015-10-09  [Fertiliser].Apply(50, Fertiliser.Types.UreaN, 20);
            2015-10-09  [Irrigation].Apply(5);
            2015-11-01  [Fertiliser].Apply(100, Fertiliser.Types.UreaN, 20);
            2015-11-01  [Irrigation].Apply(5);
            2015-11-19  [Fertiliser].Apply(100, Fertiliser.Types.UreaN, 20);
            2015-11-19  [Irrigation].Apply(30);
      Factor Irr
        CompositeFactor Full
          Specifications:
            [Irrig]
            [StateFactors].Script.Irr = Full
            [SetCropCanopy].Script.Irr = Full
          Operations Full
            2015-09-30  [Irrigation].Apply(10);
            2015-10-01  [Irrigation].Apply(5);
            2015-10-09  [Irrigation].Apply(10);
            2015-10-16  [Irrigation].Apply(15);
            2015-10-22  [Irrigation].Apply(15);
            2015-10-30  [Irrigation].Apply(30);
            2015-11-06  [Irrigation].Apply(12.2);
            2015-11-12  [Irrigation].Apply(13);
            2015-11-12  [Irrigation].Apply(13);
            2015-11-26  [Irrigation].Apply(39);
            2015-12-03  [Irrigation].Apply(40);
            2015-12-24  [Irrigation].Apply(35);
            2015-12-31  [Irrigation].Apply(30);
            2016-01-07  [Irrigation].Apply(30);
        CompositeFactor Nil
          Specifications:
            [Irrig]
            [StateFactors].Script.Irr = Nil
            [SetCropCanopy].Script.Irr = Nil
          Operations Nil
            2015-09-30  [Irrigation].Apply(10);
            2015-10-01  [Irrigation].Apply(5);
            2015-10-09  [Irrigation].Apply(10);
            2015-12-24  [Irrigation].Apply(25);
            2016-02-03  [Irrigation].Apply(30);
            2016-02-04  [Irrigation].Apply(40);
          Memo
            Have added an extra irrigation, on 3 Nov,

            Data indcates water applied but no notes of it RFZ
    Simulation Lincoln2015
      Weather: FileName=%root%\Tests\WeatherFiles\lincoln.met
      Clock: StartDate=2015-09-07; EndDate=2016-02-15
      Summary summaryfile
      SoilArbitrator Soil Arbitrator
      Zone RainShelter: Area=1; Slope=0
        Soil TempletonSiltLoam: SoilType=NZ_sedementary; Region=Plains; State=Canterbury; Country=New Zealand; Latitude=0; Longitude=0
          DataSource=Generic profile descriptions provided by Trevor Webb and data for functional horizions based on SWAMP project results
          Comments=Bulk density values were measured on the fine earth fraction so values entered into apsim soil are adjusted down to account for stone content (assuming stones are inert from all soil process so their mass and volume is removed from model paramaters).  SAT, DUL, LL15 and Air dry have been adjusted down to account for stone content.  OC has not been adjusted so the model will get the correct carbon and N amounts using the adjusted BD.
          Analysis: Thickness=[180, 150, 400, 270, 500, -3300]; PH=[6, 6, 6, 6, 6, 6]; PHUnits=Water; BoronUnits=0
          SoilWater: SummerDate=1-oct; SummerU=6; SummerCona=3; WinterDate=1-Apr; WinterU=2; WinterCona=3; DiffusConst=0; DiffusSlope=0; Salb=0.13; CN2Bare=77; CNRed=0; CNCov=0.8; max_pond=0; Thickness=[200, 200, 200, 200, 200, 200, 200, 200, 200]; SWCON=[0.5, 0.5, 0.5, 0.5, 0.5, 0.5, 0.5, 0.5, 0.5]; ResidueInterception=0
          SoilOrganicMatter: RootCN=20; EnrACoeff=7.4; EnrBCoeff=0.2; OCUnits=Total
            Thickness  OC        SoilCN  FBiom      FInert    RootWt
            180        3         11      0.03       0.5       731.975
            150        0.9       11      0.02       0.7       584.494
            400        0.316004  11      0.0116634  0.85      320.777
            270        0.207954  11      0.0102229  0.94496   213.951
            500        0.200366  11      0.0100221  0.982659  101.063
            500        0.2       11      0.01       0.93      47.7389
          Sample: Thickness=[150, 150, 300, 300, 300, 300, 300]; SW=[0.18, 0.18, 0.26, 0.26, 0.23, 0.28, 0.29]; NO3Units=ppm; NH4Units=ppm; SWUnits=Volumetric; OCUnits=Total; PHUnits=Water
            NO3N={Values=[10, 0.28, 2.6, 2.87, 2.43, 1.94, 1], StoredAsPPM=true}
            NH4N={Values=[0.12, 0.12, 0, 0.19, 3.29, 0.42, 0.75], StoredAsPPM=true}
            Memo
              Using the retest sample values.
          Water
            Thickness  BD   AirDry  LL15   DUL   SAT
            150        1    0.05    0.006  0.28  0.42
            150        1.1  0.1     0.1    0.28  0.42
            300        1.4  0.17    0.17   0.28  0.42
            300        1.3  0.17    0.17   0.28  0.42
            300        1.4  0.16    0.16   0.28  0.42
            300        1.4  0.16    0.16   0.28  0.42
            300        1.4  0.16    0.16   0.28  0.42
            SoilCrop SlurpSoil: LL=[0.12, 0.1, 0.17, 0.17, 0.23, 0.23, 0.23]; KL=[0.06, 0.06, 0.04, 0.04, 0.03, 0.005, 0]; XF=[1, 0.4, 1, 1, 1, 1, 1]
          CERESSoilTemperature
          Nutrient: same as ABlock_Residues.Base.Field.Soil.Nutrient
        MicroClimate: a_interception=0; b_interception=1; c_interception=0; d_interception=0; soil_albedo=0.23; SoilHeatFluxFraction=0.4; NightInterceptionFraction=0.5; ReferenceHeight=2
        Irrigation
        Fertiliser
        SurfaceOrganicMatter: InitialResidueName=wheat; InitialResidueType=wheat; InitialResidueMass=0; InitialStandingFraction=0; InitialCPR=0; InitialCNR=80; FractionFaecesAdded=0.5
        Plant Slurp: CropType=Slurp; IsEnding=false; DaysAfterEnding=0
        Operations Irrig
        Operations Fert
        Operations Sow
          2015-09-10  [Slurp].Sow(population:200, cultivar:"StaticCrop", depth:2, rowSpacing:130);
        Manager ClimateControl
          StartDate = 2015-10-01
          EndDate = 2016-02-28
```csharp
using System;
using Models.Core;
using APSIM.Shared.Utilities;



using System.Collections.Generic;
using System.Text;
using Models.PMF;
using Models;
using System.Xml.Serialization;

namespace Models
{
    [Serializable] 
    [System.Xml.Serialization.XmlInclude(typeof(Model))]
    public class Script : Model
    {
        [Link] Weather Met;
        [Link] Clock Clock;
    
        [Description("Start Date")]
        public DateTime StartDate { get; set; }
        
        [Description("End Date")]
        public DateTime EndDate { get; set; }
 
    
        [EventSubscribe("PreparingNewWeatherData")]
        private void OnPreparingNewWeatherData(object sender, EventArgs e)
        {
            if ((Clock.Today.Date >= StartDate) && (Clock.Today.Date <= EndDate))
                Met.Rain = 0;        
        }
    }
}
```
        Manager StateFactors
          Irr =
          Nit = 0
```csharp
using System;
using Models.Core;
using System.Collections.Generic;
using System.Text;
using Models.Soils;
using Models.Soils.Nutrients;
using Models.PMF;
using Models;
using System.Xml.Serialization;
using APSIM.Shared.Utilities;

namespace Models
{
    [Serializable] 
    public class Script : Model
    {
        [Link] Clock Clock;
        [Link] Irrigation Irrigation;
        [Link] Soil ThisSoil;
        [Link] Zone MyZone;
        public string Irr { get; set; }
        public double Nit { get; set; }
        
          
        private void SetSoilLayers()
        {
        
            int i = 0;
            if ((Irr == "Nil") && (Nit == 0))
            {
                if (ThisSoil.Thickness.Length != 7)
                {
                    throw new Exception("Soil layer exception");
                }
                ThisSoil.DUL[0] = 0.31;
                ThisSoil.DUL[1] = 0.34;
                ThisSoil.DUL[2] = 0.32;
                ThisSoil.DUL[3] = 0.23;
                ThisSoil.DUL[4] = 0.29;
                ThisSoil.DUL[5] = 0.29;
                ThisSoil.DUL[6] = 0.29;
                
                double[] nSW = { 0.18, 0.18, 0.26, 0.23, 0.29, 0.29, 0.27 };
                ThisSoil.SoilWater.Reset();
                ThisSoil.SoilWater.SW = nSW; 
            }   
            if ((Irr == "Nil") && (Nit == 50))
            {
                if (ThisSoil.Thickness.Length != 7)
                {
                    throw new Exception("Soil layer exception");
                }
                ThisSoil.DUL[0] = 0.30;
                ThisSoil.DUL[1] = 0.31;
                ThisSoil.DUL[2] = 0.29;
                ThisSoil.DUL[3] = 0.30;
                ThisSoil.DUL[4] = 0.31;
                ThisSoil.DUL[5] = 0.34;
                ThisSoil.DUL[6] = 0.30;
                
                double[] nSW = { 0.18, 0.18, 0.30, 0.25, 0.29, 0.34, 0.30 };
                ThisSoil.SoilWater.Reset();
                ThisSoil.SoilWater.SW = nSW; 
            }   
            if ((Irr == "Nil") && (Nit == 250))
            {
                if (ThisSoil.Thickness.Length != 7)
                {
                    throw new Exception("Soil layer exception");
                }
                ThisSoil.DUL[0] = 0.28;
                ThisSoil.DUL[1] = 0.24;
                ThisSoil.DUL[2] = 0.30;
                ThisSoil.DUL[3] = 0.27;
                ThisSoil.DUL[4] = 0.28;
                ThisSoil.DUL[5] = 0.36;
                ThisSoil.DUL[6] = 0.27;
                
                double[] nSW = { 0.18, 0.18, 0.3, 0.27, 0.28, 0.35, 0.27 };
                ThisSoil.SoilWater.Reset();
                ThisSoil.SoilWater.SW = nSW; 
            }   
            if ((Irr == "Full") && (Nit == 0))
            {
                if (ThisSoil.Thickness.Length != 7)
                {
                    throw new Exception("Soil layer exception");
                }
                ThisSoil.DUL[0] = 0.31;
                ThisSoil.DUL[1] = 0.34;
                ThisSoil.DUL[2] = 0.32;
                ThisSoil.DUL[3] = 0.23;
                ThisSoil.DUL[4] = 0.30;
                ThisSoil.DUL[5] = 0.33;
                ThisSoil.DUL[6] = 0.25;
                
                double[] nSW = { 0.18, 0.18, 0.26, 0.20, 0.30, 0.33, 0.25 };
                ThisSoil.SoilWater.Reset();
                ThisSoil.SoilWater.SW = nSW; 
            }   
            if ((Irr == "Full") && (Nit == 50))
            {
                if (ThisSoil.Thickness.Length != 7)
                {
                    throw new Exception("Soil layer exception");
                }
                ThisSoil.DUL[0] = 0.31;
                ThisSoil.DUL[1] = 0.28;
                ThisSoil.DUL[2] = 0.30;
                ThisSoil.DUL[3] = 0.29;
                ThisSoil.DUL[4] = 0.31;
                ThisSoil.DUL[5] = 0.33;
                ThisSoil.DUL[6] = 0.30;

                double[] nSW = { 0.18, 0.18, 0.28, 0.27, 0.28, 0.33, 0.30 };
                
                ThisSoil.SoilWater.Reset();
                
                ThisSoil.SoilWater.SW = nSW; 

            }
            if ((Irr == "Full") && (Nit == 250))
            {
                if (ThisSoil.Thickness.Length != 7)
                {
                    throw new Exception("Soil layer exception");
                }
                ThisSoil.DUL[0] = 0.26;
                ThisSoil.DUL[1] = 0.24;
                ThisSoil.DUL[2] = 0.26;
                ThisSoil.DUL[3] = 0.23;
                ThisSoil.DUL[4] = 0.27;
                ThisSoil.DUL[5] = 0.35;
                ThisSoil.DUL[6] = 0.22;
                
                double[] nSW = { 0.18, 0.18, 0.24, 0.23, 0.27, 0.35, 0.22 };
                ThisSoil.SoilWater.Reset();
                ThisSoil.SoilWater.SW = nSW; 
            }
        }

        [EventSubscribe("Commencing")]
        private void OnSimulationCommencing(object sender, EventArgs e)
        {
            SetSoilLayers();
        }
        
        [EventSubscribe("DoManagement")]
        private void OnDoManagement(object sender, EventArgs e)
        {
            //Specify irrigations that were only applied to some of the N treatments
            if (Irr == "Full")
            {
                if (Nit == 250)
                {
                    if ((DateUtilities.CompareDates("10-Dec", Clock.Today) == 0))
                        Irrigation.Apply(40);
                    if ((DateUtilities.CompareDates("17-Dec", Clock.Today) == 0))
                        Irrigation.Apply(39.7);
                    if ((DateUtilities.CompareDates("14-Jan", Clock.Today) == 0))
                        Irrigation.Apply(30);
                    if ((DateUtilities.CompareDates("21-Jan", Clock.Today) == 0))
                        Irrigation.Apply(20.1);
                }
                if (Nit == 50)
                {
                    if ((DateUtilities.CompareDates("10-Dec", Clock.Today) == 0))
                        Irrigation.Apply(40);
                    if ((DateUtilities.CompareDates("14-Jan", Clock.Today) == 0))
                        Irrigation.Apply(30);
                }
            }
            
        }
    }
}
```
        Manager SetCropCanopy
          CoverGreenFile = %root%\Tests\Validation\SoilWater\ObservedCovers\Lincoln2015_CoverGreen.csv
          CoverTotalFile = %root%\Tests\Validation\SoilWater\ObservedCovers\Lincoln2015_CoverTotal.csv
          Ext_coef = 0.8
          MaximumHeight = 600
          PotRootExtension = 30
          Nit =
          Irr =
          Treatment =
          leaflai = 0
          leaflaidead = 0
```csharp
using System;
using Models.Core;
using System.Collections.Generic;
using System.Text;
using Models.PMF;
using Models;
using System.Xml.Serialization;
using APSIM.Shared.Utilities;
using System.Data;

namespace Models
{
    [Serializable] 
    //[System.Xml.Serialization.XmlInclude(typeof(Model))]
    public class Script : Model
    {
        [Link] Clock Clock;
        [Link] Zone zone;
        [Link] Simulation Simulation;

        
        [Description("File of Observed Green Covers")]
        public string CoverGreenFile { get; set; }
        [Description("File of Observed Total Covers")]
        public string CoverTotalFile { get; set; }
        [Description("Extinction coefficient")]
        public  double Ext_coef { get; set; }
        [Description("Maximum height of the crop at full cover")]
        public double MaximumHeight { get; set; }
        [Description("Potential Root extension rate (mm)")]
        public double PotRootExtension {get; set;}
        
        [XmlIgnore] private DataTable CoverGreens { get; set; }
		[XmlIgnore] private DataTable CoverTotals { get; set; }

        public string Nit { get; set; }
        public string Irr { get; set; }
        public string Treatment { get; set; }
        
        private double CoverGreenRead { get; set; }
        private double CoverTotalRead { get; set; }
        public double leaflai { get; private set; }
        public double leaflaidead { get; private set; }
                
        [EventSubscribe("StartOfSimulation")]
        private void OnStartOfSimulation(object sender, EventArgs e)
        {
            
            Treatment = "Nit" + Nit + "Irr" + Irr;
            
            string fullFileNameGreen = PathUtilities.GetAbsolutePath(CoverGreenFile, Simulation.FileName);
            
            ApsimTextFile GreentextFile = new ApsimTextFile();
            GreentextFile.Open(fullFileNameGreen);
            CoverGreens = GreentextFile.ToTable();
            GreentextFile.Close();

            string fullFileNameTotal = PathUtilities.GetAbsolutePath(CoverTotalFile, Simulation.FileName);
            
            ApsimTextFile textFileTotal = new ApsimTextFile();
            textFileTotal.Open(fullFileNameTotal);
            CoverTotals = textFileTotal.ToTable();
            textFileTotal.Close();
        }

        [EventSubscribe("Sowing")]
        private void OnSowing(object sender, EventArgs e)
        {
    		object LAIResetValue = 0;
            zone.Set("Slurp.Leaf.LAIFunction.FixedValue", LAIResetValue);  
            object HeightResetValue = 0;
            zone.Set("Slurp.Leaf.HeightFunction.FixedValue", HeightResetValue);
            object PotRootExtSet = PotRootExtension;
            zone.Set("Slurp.Root.RootFrontVelocity.Potential.FixedValue", PotRootExtSet);
            object LAIDeadResetValue = 0;
            zone.Set("Slurp.Leaf.LaiDeadFunction.FixedValue", LAIDeadResetValue);
            object kDead = Ext_coef;
            zone.Set("Slurp.Leaf.KDead", kDead);
            object GSmax = 0.011;
            zone.Set("Slurp.Leaf.Gsmax350",GSmax);
            object r50 = 150;
            zone.Set("Slurp.Leaf.R50",r50);
            object albedo = 0.25;
            zone.Set("Slurp.Leaf.Albedo",albedo);
        }
        
        [EventSubscribe("StartOfDay")]
        private void OnStartOfDay(object sender, EventArgs e)
        {
            foreach (DataRow row in CoverGreens.Rows)
            {
                DateTime TodayDate = Convert.ToDateTime(row["Date"]);
                if (TodayDate.Date == Clock.Today.Date)
                {
                    CoverGreenRead = Convert.ToDouble(row[Treatment]);
                }
            }

            foreach (DataRow row in CoverTotals.Rows)
            {
                DateTime TodayDate = Convert.ToDateTime(row["Date"]);
                if (TodayDate.Date == Clock.Today.Date)
                {
                    CoverTotalRead = Convert.ToDouble(row[Treatment]);
                }
            }
        
            if ((bool)zone.Get("Slurp.IsAlive") == true)
            {
                //Only assign cover valuse if crop is emerged
                
                if (CoverGreenRead == 1)
                    leaflai = Math.Log(0.01) / -Ext_coef;
                else
                {
                    if (CoverGreenRead > 0)
                        leaflai = Math.Log(1 - CoverGreenRead) / -Ext_coef;
                    else
                        leaflai = 0;
                }

                double CoverDead = CoverTotalRead - CoverGreenRead;
                if (CoverDead == 1)
                    leaflaidead = Math.Log(0.01) / -Ext_coef;
                else
                {
                    if (CoverDead > 0)
                        leaflaidead = Math.Log(1 - CoverDead) / -Ext_coef;
                    else
                        leaflaidead = 0;
                }
                //Summary.WriteMessage(this, "LAI " + leaflai);
                object LAIResetValue = leaflai;
                zone.Set("Slurp.Leaf.LAIFunction.FixedValue", LAIResetValue);  
                object HeightResetValue = CoverTotalRead * MaximumHeight;
                zone.Set("Slurp.Leaf.HeightFunction.FixedValue", HeightResetValue);  
                object LAIDeadResetValue = leaflaidead;
                zone.Set("Slurp.Leaf.LaiDeadFunction.FixedValue",LAIDeadResetValue);
            }
        }
    }
}
```
        Manager HarvestOnly
```csharp
using System;
using Models.Core;
using System.Collections.Generic;
using System.Text;
using Models.Soils;
using Models.Soils.Nutrients;
using Models.PMF;
using Models;
using System.Xml.Serialization;
using APSIM.Shared.Utilities;

namespace Models
{
    [Serializable] 
    public class Script : Model
    {
        [Link] Plant Wheat;

        [XmlIgnore] private RemovalFractions Remove { get; set; }
        [XmlIgnore] private bool Harvested {get; set;}
                
        [EventSubscribe("Commencing")]
        private void OnSimulationCommencing(object sender, EventArgs e)
        {
        Remove = new RemovalFractions();
        Harvested = false;
        }

        [EventSubscribe("DoManagement")]
        private void OnDoManagement(object sender, EventArgs e)
        {
            if ((Wheat.Phenology.CurrentPhaseName == "Ripening") & (Harvested == false))
            {
                Remove.SetFractionToRemove("Leaf", 0.0,"Live");
                Remove.SetFractionToResidue("Leaf", 0.0,"Live");
                Remove.SetFractionToRemove("Leaf", 0.0,"Dead");
                Remove.SetFractionToResidue("Leaf", 0.0,"Dead");
                Remove.SetFractionToRemove("Grain", 0.0);
                Remove.SetFractionToResidue("Grain", 0.0);
                Remove.SetFractionToRemove("Stem", 0.0);
                Remove.SetFractionToResidue("Stem", 0.0);
                Remove.SetFractionToRemove("Spike", 0.0);
                Remove.SetFractionToResidue("Spike", 0.0);
                Remove.SetFractionToRemove("Root", 0.0);
                Remove.SetFractionToResidue("Root", 0.0);
                Wheat.Harvest(Remove);
                Harvested = true;
            }
        }
    }
}
```
        Report
        Report ProfileWater
          VariableNames:
            [Clock].Today
            sum([Soil].SoilWater.SWmm as ProfileWater
          EventNames:
            [Clock].DoReport
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