Simulations: Version=33
  Simulation W1
    Clock: StartDate=1994-08-05; EndDate=2000-01-23
    Summary summaryfile
    Weather: FileName=Hudson.met
    SoilArbitrator
    MicroClimate: a_interception=0; b_interception=1; c_interception=0; d_interception=0; soil_albedo=0.23; sun_angle=15; soil_heat_flux_fraction=0.4; night_interception_fraction=0.5; refheight=2; albedo=0.15; emissivity=0.96; RadIntTotal=0
    Zone paddock: Area=1; Slope=0
      Report: EventNames=[Clock].DoReport
        VariableNames:
          [Clock].Today
          [Soil].SoilWater.SW
          [Soil].SoilWater.Runoff
          [Soil].SoilWater.Drainage
          [Soil].SoilWater.Es
          [Soil].SoilWater.Eo
          [Wheat].Leaf.LAI
          [Wheat].AboveGround.Wt
          [Wheat].Grain.Wt
          [Weather].Rain
          sum([Soil].SoilNitrogen.NH4) as NH4
          sum([Soil].SoilNitrogen.NO3) as NO3
          sum([Soil].SoilNitrogen.Denitrification) as dnit
          [Wheat].AboveGround.N
          [Wheat].BelowGround.N
          sum([Soil].SoilWater.SWmm[5:9]) as SW110
          sum([Soil].SoilWater.SWmm[10:14]) as SW210
          sum([Soil].SoilWater.SWmm[15:19]) as SW310
          sum([Soil].Chloride.kgha[1:9]) as Cl110
          sum([Soil].Chloride.kgha[10:14]) as Cl210
          sum([Soil].Chloride.kgha[15:19]) as Cl310
      Soil: Latitude=0; Longitude=0
        Water
          Thickness  BD   AirDry  LL15  DUL   SAT   KS
          100        1    0.1     0.24  0.47  0.53  240
          200        1.1  0.1     0.28  0.49  0.54  240
          200        1.1  0.1     0.28  0.52  0.57  120
          200        1.1  0.1     0.29  0.52  0.55  120
          200        1.1  0.1     0.29  0.51  0.54  120
          200        1.2  0.1     0.29  0.5   0.53  120
          200        1.2  0.1     0.29  0.5   0.53  120
          200        1.2  0.1     0.33  0.48  0.51  120
          200        1.2  0.1     0.33  0.48  0.51  60
          200        1.2  0.1     0.35  0.48  0.51  60
          200        1.2  0.1     0.35  0.47  0.5   60
          200        1.2  0.1     0.35  0.45  0.48  60
          200        1.3  0.1     0.35  0.45  0.48  60
          200        1.3  0.1     0.35  0.45  0.48  60
          200        1.3  0.1     0.35  0.45  0.48  60
          200        1.3  0.1     0.35  0.45  0.48  60
          SoilCrop WheatSoil
            LL=[0.25, 0.3, 0.3, 0.33, 0.33, 0.35, 0.35, 0.4, 0.4, 0.4, 0.4, 0.4, 0.4, 0.4, 0.4, 0.4]
            KL=[0.06, 0.06, 0.06, 0.06, 0.06, 0.06, 0.06, 0.06, 0.06, 0.06, 0, 0, 0, 0, 0, 0]
            XF=[1, 1, 1, 1, 1, 1, 1, 1, 1, 1, 0, 0, 0, 0, 0, 0]
        SoilNitrogen: fom_type=[default, manure, mucuna, lablab, shemp, stable]; fract_carb=[0.2, 0.3, 0.54, 0.57, 0.45, 0]; fract_cell=[0.7, 0.3, 0.37, 0.37, 0.47, 0.1]; fract_lign=[0.1, 0.4, 0.09, 0.06, 0.08, 0.9]
        SoilOrganicMatter: RootCN=40; RootWt=10; SoilCN=14.5; EnrACoeff=7.4; EnrBCoeff=0.2; OCUnits=Total
          Thickness  OC    FBiom  FInert
          100        1.4   0.2    0.32
          200        1.4   0.03   0.5
          200        1.4   0.02   0.6
          200        1.35  0.015  0.7
          200        0.95  0.01   0.85
          200        1     0.01   0.9
          200        0.8   0.01   0.99
          200        0.45  0.01   0.99
          200        0.45  0.01   0.99
          200        0.45  0.01   0.99
          200        0.45  0.01   0.99
          200        0.45  0.01   0.99
          200        0.45  0.01   0.99
          200        0.45  0.01   0.99
          200        0.45  0.01   0.99
          200        0.45  0.01   0.99
        Analysis: PHUnits=Water; BoronUnits=HotWater
          Thickness  PH   CL
          100        6    18
          200        6.4  13
          200        6.8  11
          200        7.2  11
          200        7.6  16
          200        8    28
          200        8    66
          200        8    122
          200        8    181
          200        8    232
          200        8    270
          200        8    292
          200        8    293
          200        8    270
          200        8    292
          200        8    293
        Sample Initial nitrogen: NO3Units=ppm; NH4Units=ppm; SWUnits=Volumetric; OCUnits=Total; PHUnits=Water
          Thickness  NO3   NH4
          100        10.7  0.3
          200        9.99  0.3
          200        7.87  0.3
          200        6.2   0.3
          200        4.85  0.3
          200        3.56  0.3
          200        2.72  0.3
          200        2.34  0.3
          200        2.47  0.3
          200        3.24  0.3
          200        4.25  0.3
          200        4.94  0.3
          200        5.2   0.3
          200        4.95  0.3
          200        4.52  0.3
          200        4.24  0.3
        Sample Initial water: NO3Units=ppm; NH4Units=ppm; SWUnits=Volumetric; OCUnits=Total; PHUnits=Water
          Thickness=[100, 200, 200, 200, 200, 200, 200, 200, 200, 200, 200, 200, 200, 200, 200, 200]
          SW=[0.43, 0.43, 0.48, 0.47, 0.46, 0.46, 0.46, 0.485, 0.49, 0.474, 0.457, 0.453, 0.447, 0.465, 0.457, 0.43]
        CERESSoilTemperature
        Swim3: Salb=0.13; CN2Bare=75; CNRed=20; CNCov=0.8; KDul=0.1; PSIDul=-100; VC=true; DTMin=0; DTMax=1440; MaxWaterIncrement=10; SpaceWeightingFactor=0; SoluteSpaceWeightingFactor=1; Dis=0; Disp=1; A=2; DTHC=0.1; DTHP=2; Diagnostics=true
          SwimSoluteParameters NO3: WaterTableConcentration=0; D0=0.05
            Thickness  Exco  FIP
            100        0     1
            200        0     1
            200        0     1
            200        0     1
            200        0     1
            200        0     1
            200        0     1
            200        0     1
            200        0     1
            200        0     1
            200        0     1
            200        0     1
            200        0     1
            200        0     1
            200        0     1
            200        0     1
          SwimSoluteParameters NH4: WaterTableConcentration=0; D0=0.05
            Thickness  Exco  FIP
            100        1     1
            200        1     1
            200        1     1
            200        1     1
            200        1     1
            200        1     1
            200        1     1
            200        1     1
            200        1     1
            200        1     1
            200        1     1
            200        1     1
            200        1     1
            200        1     1
            200        1     1
            200        1     1
          SwimSoluteParameters Urea: same as W1.paddock.Soil.Swim3.NO3
          SwimSoluteParameters Chloride: same as W1.paddock.Soil.Swim3.NO3
        LayerStructure
          Thickness=[10, 20, 30, 40, 200, 200, 200, 200, 200, 200, 200, 200, 200, 200, 200, 200, 200, 200, 200]
        Chloride
      SurfaceOrganicMatter SurfaceOM: PoolName=unknown; type=wheat; mass=0; standing_fraction=1; cnr=100; CriticalResidueWeight=2000; OptimumDecompTemp=20; MaxCumulativeEOS=20; CNRatioDecompCoeff=0.277; CNRatioDecompThreshold=25; TotalLeachRain=25; MinRainToLeach=10; CriticalMinimumOrganicC=0.004; DefaultCPRatio=0; DefaultStandingFraction=0; StandingExtinctCoeff=0.5; FractionFaecesAdded=0.5
        Pools:
          {PoolName=unknown, ResidueType=wheat, Mass=0, CNRatio=100, StandingFraction=1}
        ResidueTypes ResidueTypesList: LoadFromResource=ResidueTypes
      MicroClimate: a_interception=0; b_interception=1; c_interception=0; d_interception=0; soil_albedo=0.23; sun_angle=15; soil_heat_flux_fraction=0.4; night_interception_fraction=0.5; refheight=2; albedo=0.15; emissivity=0.96; RadIntTotal=0
      Fertiliser
      Plant Wheat: CropType=Wheat
      SoluteManager
      Operations
        1994-08-05  [Wheat].Sow(population:26, cultivar:hartog, depth:40, rowSpacing:300);
        1994-08-05  [Fertiliser].Apply(70, Fertiliser.Types.NO3N, 50);
        1994-09-07  [Wheat].EndCrop();
        1994-10-27  [Wheat].Harvest();
        1995-06-01  [Wheat].Sow(cultivar:hartog, population:126, depth:40, rowSpacing:300);
        1995-06-01  [Fertiliser].Apply(80, Fertiliser.Types.NO3N, 50);
        1995-11-28  [Wheat].Harvest();
        1995-11-28  [Wheat].EndCrop();
        1996-07-02  [Wheat].Sow(cultivar:hartog, population:126, depth:40, rowSpacing:300);
        1996-07-02  [Fertiliser].Apply(101, Fertiliser.Types.NO3N, 50);
        1996-12-04  [Wheat].EndCrop();
        1997-06-02  [Wheat].Sow(cultivar:hartog, population:71, depth:40, rowSpacing:300);
        1997-06-02  [Fertiliser].Apply(100, Fertiliser.Types.NO3N, 50);
        1997-11-26  [Wheat].Harvest();
        1997-11-26  [Wheat].EndCrop();
        1998-06-18  [Wheat].Sow(cultivar:hartog, population:126, depth:40, rowSpacing:300);
        1998-06-18  [Fertiliser].Apply(102, Fertiliser.Types.NO3N, 50);
        1998-12-02  [Wheat].Harvest();
        1998-12-02  [Wheat].EndCrop();
        1999-06-23  [Wheat].Sow(cultivar:hartog, population:50, depth:40, rowSpacing:300);
        1999-06-23  [Fertiliser].Apply(102, Fertiliser.Types.NO3N, 50);
        1999-12-16  [Wheat].Harvest();
        1999-12-16  [Wheat].EndCrop();
  DataStore
    ExcelInput: FileName=observed.xlsx
      SheetNames=[ObservedCrop, ObservedPhenology, ObservedCl, ObservedResidue, ObservedRunoff, Stubble, ObservedSW, ObservedSWlayers]
      FileName source: Excel files (*.xlsx)|*.xlsx, All files (*.*)|*.*
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