Simulations: Version=14
  DataStore
    ExcelInput: FileName=observed.xlsx; SheetNames=[Grain, Soil]
      FileName source: Excel files (*.xlsx)|*.xlsx, All files (*.*)|*.*
  Simulation Fertiliser
    Clock: StartDate=1979-01-01; EndDate=1990-12-31
    Summary SummaryFile
    Weather: FileName=Wagga.met
    Zone Field: Area=1; Slope=0
      Operations SowOperations
        1979-05-29  [Wheat].Sow(cultivar:hartog, population:180, depth:30, rowSpacing:300);
        1980-05-13  [Wheat].Sow(cultivar:hartog, population:180, depth:30, rowSpacing:300);
        1981-06-01  [Wheat].Sow(cultivar:hartog, population:180, depth:30, rowSpacing:300);
        1982-06-03  [Wheat].Sow(cultivar:hartog, population:180, depth:30, rowSpacing:300);
        1983-04-28  [Wheat].Sow(cultivar:hartog, population:180, depth:30, rowSpacing:300);
        1984-05-09  [Wheat].Sow(cultivar:hartog, population:180, depth:30, rowSpacing:300);
        1985-05-09  [Wheat].Sow(cultivar:hartog, population:180, depth:30, rowSpacing:300);
        1986-05-13  [Wheat].Sow(cultivar:hartog, population:180, depth:30, rowSpacing:300);
        1987-05-14  [Wheat].Sow(cultivar:hartog, population:180, depth:30, rowSpacing:300);
        1988-06-24  [Wheat].Sow(cultivar:hartog, population:180, depth:30, rowSpacing:300);
        1989-06-15  [Wheat].Sow(cultivar:hartog, population:180, depth:30, rowSpacing:300);
        1990-06-04  [Wheat].Sow(cultivar:hartog, population:180, depth:30, rowSpacing:300);
      Manager Fertilise at sowing
        Crop = Wheat
        Amount = 90
```csharp
using System;
using Models.Core;
using Models.PMF;
namespace Models
{
	[Serializable]
	public class Script : Model
	{
		[Link] Clock Clock;
		[Link] Fertiliser Fertiliser;
		
		[Description("Crop to be fertilised")]
		public ICrop Crop { get; set; }
    
		[Description("Amount of fertiliser to be applied (kg/ha)")]
		public double Amount { get; set; }
		
		[EventSubscribe("Sowing")]
		private void OnSowing(object sender, EventArgs e)
		{
			Model crop = sender as Model;
			if (Crop != null && crop.Name.ToLower() == (Crop as IModel).Name.ToLower())
				Fertiliser.Apply(Amount: Amount, Type: Fertiliser.Types.NO3N);
		}
		
	}
}
```
      Report: EventNames=[Clock].DoReport
        VariableNames:
          [Clock].Today
          [Clock].Today.Year
          Wheat.Zadok.Stage
          Wheat.Phenology.CurrentStageName
          Wheat.AboveGround.Wt
          Wheat.AboveGround.N
          Wheat.Grain.Yield
          Wheat.Grain.Protein
          Wheat.Grain.Size
          Wheat.Grain.GrainNo
          Wheat.Grain.Wt
          Wheat.Grain.N
          Wheat.Total.Wt
          Wheat.Total.N
          [Soil].SoilNitrogen.NO3
          [Soil].SoilOrganicMatter.OC[1]
      Fertiliser
      SurfaceOrganicMatter: PoolName=wheat_stubble; type=wheat; mass=0; standing_fraction=0; cnr=100; CriticalResidueWeight=2000; OptimumDecompTemp=20; MaxCumulativeEOS=20; CNRatioDecompCoeff=0.277; CNRatioDecompThreshold=25; TotalLeachRain=25; MinRainToLeach=10; CriticalMinimumOrganicC=0.004; DefaultCPRatio=0; DefaultStandingFraction=0; StandingExtinctCoeff=0.5; FractionFaecesAdded=0.5
        Pools:
          {PoolName=wheat_stubble, ResidueType=wheat, Mass=0, CNRatio=100, StandingFraction=0}
        ResidueTypes: LoadFromResource=ResidueTypes
      Plant Wheat: CropType=Wheat
      MicroClimate: a_interception=0; b_interception=1; c_interception=0; d_interception=0; soil_albedo=0.3; sun_angle=15; soil_heat_flux_fraction=0.4; night_interception_fraction=0.5; refheight=2; albedo=0.15; emissivity=0.96; RadIntTotal=0
      Soil Red Sodosol (Wagga Wagga No550-YP): ASCOrder=Sodosol; ASCSubOrder=Red; SoilType=?; Site=Wagga Wagga; NearestTown=Wagga Wagga; Region=Riverina; State=New South Wales; Country=Australia; ApsoilNumber=550-YP; Latitude=-35.123; Longitude=147.354; LocationAccuracy=Regional Soil Type
        DataSource=PAWC estimated by A. Peake, CSIRO Sustainable Ecosystems (2005)
        Water
          Thickness  BD    AirDry  LL15  DUL   SAT
          100        1.55  0.06    0.12  0.24  0.38
          100        1.55  0.08    0.1   0.22  0.39
          200        1.5   0.12    0.12  0.24  0.4
          200        1.5   0.12    0.12  0.34  0.4
          300        1.55  0.12    0.12  0.34  0.4
          300        1.55  0.12    0.12  0.34  0.4
          300        1.55  0.12    0.12  0.34  0.4
          SoilCrop WheatSoil: LL=[0.12, 0.1, 0.12, 0.17, 0.18, 0.22, 0.29]; KL=[0.06, 0.06, 0.04, 0.04, 0.03, 0.02, 0.02]; XF=[1, 1, 1, 1, 1, 1, 1]
        SoilWater: SummerDate=1-Nov; SummerU=6; SummerCona=3.5; WinterDate=1-Apr; WinterU=2; WinterCona=2; DiffusConst=88; DiffusSlope=35; Salb=0.13; CN2Bare=78; CNRed=20; CNCov=0.8; max_pond=0; Thickness=[100, 100, 200, 200, 300, 300, 300]; SWCON=[0.6, 0.5, 0.5, 0.4, 0.3, 0.3, 0.3]; residueinterception=0
        SoilNitrogen: fom_type=[default, manure, mucuna, lablab, shemp, stable]; fract_carb=[0.2, 0.3, 0.54, 0.57, 0.45, 0]; fract_cell=[0.7, 0.3, 0.37, 0.37, 0.47, 0.1]; fract_lign=[0.1, 0.4, 0.09, 0.06, 0.08, 0.9]
        SoilOrganicMatter: RootCN=45; RootWt=1500; SoilCN=12.5; EnrACoeff=7.4; EnrBCoeff=0.2; OCUnits=Total
          Thickness  OC         FBiom  FInert
          100        1.23077    0.03   0.4
          100        0.615385   0.02   0.5
          200        0.307692   0.02   0.7
          200        0.153846   0.01   0.8
          300        0.0769231  0.01   0.9
          300        0.0769231  0.01   1
          300        0.0769231  0.01   1
        Analysis: Thickness=[100, 100, 200, 200, 300, 300, 300]; PH=[6.6, 5.3, 6, 6.6, 9, 9, 9]; PHUnits=Water; BoronUnits=HotWater
        InitialWater Initial water: PercentMethod=FilledFromTop; FractionFull=1
        Sample Initial conditions: Thickness=[1800]; NO3=[10]; NH4=[1]; NO3Units=kgha; NH4Units=kgha; SWUnits=Volumetric; OCUnits=Total; PHUnits=Water
        CERESSoilTemperature
      SoluteManager
      Manager Harvest
```csharp
using System;
using Models.Core;
using Models.PMF;
using Models.Soils;
using Models.Utilities;
using APSIM.Shared.Utilities;

namespace Models
{
	[Serializable]
	public class Script : Model
	{
		[Link] Plant Wheat;

		[EventSubscribe("DoManagement")]
		private void OnDoManagement(object sender, EventArgs e)
		{
			if (Wheat.IsReadyForHarvesting)
			{
			   Wheat.Harvest();
			   Wheat.EndCrop();	
			}
		
		}
		
	}
}
```
    SoilArbitrator
    MicroClimate: a_interception=0; b_interception=1; c_interception=0; d_interception=0; soil_albedo=0.23; sun_angle=15; soil_heat_flux_fraction=0.4; night_interception_fraction=0.5; refheight=2; albedo=0.15; emissivity=0.96; RadIntTotal=0
  Simulation NoFertiliser
    Clock: StartDate=1979-01-01; EndDate=1990-12-31
    Summary SummaryFile
    Weather: FileName=Wagga.met
    Zone Field: Area=1; Slope=0
      Operations SowOperations: same as Fertiliser.Field.SowOperations
      Report: same as Fertiliser.Field.Report
      Fertiliser
      SurfaceOrganicMatter: same as Fertiliser.Field.SurfaceOrganicMatter
      Plant Wheat: CropType=Wheat
      MicroClimate: a_interception=0; b_interception=1; c_interception=0; d_interception=0; soil_albedo=0.3; sun_angle=15; soil_heat_flux_fraction=0.4; night_interception_fraction=0.5; refheight=2; albedo=0.15; emissivity=0.96; RadIntTotal=0
      Soil Red Sodosol (Wagga Wagga No550-YP): same as Fertiliser.Field.Red Sodosol (Wagga Wagga No550-YP)
      SoluteManager
      Manager Harvest: same as Fertiliser.Field.Harvest
    SoilArbitrator
    MicroClimate: a_interception=0; b_interception=1; c_interception=0; d_interception=0; soil_albedo=0.23; sun_angle=15; soil_heat_flux_fraction=0.4; night_interception_fraction=0.5; refheight=2; albedo=0.15; emissivity=0.96; RadIntTotal=0
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