Simulations Standard toolbox
  Folder Structural
    Folder
    Zone: Area=0; Slope=0
  Folder Standard models
    Weather: FileName=Goondiwindi.met
    Clock: StartDate=1940-01-01; EndDate=1989-12-31
    Summary
    Arbitrator: NutrientUptakeMethod=0
    Supplement: SpoilageTime=0
      stores:
        {IsRoughage=true, DMContent=0.85, DMD=0, MEContent=0, CPConc=0, ProtDg=0, PConc=0, SConc=0, EEConc=0, ADIP2CP=0, AshAlk=0, MaxPassage=0, Name=fodder, Stored=0}
    Report: EventNames=[Clock].EndOfDay
      VariableNames:
        [Clock].Today
        [Weather].MaxT
        [Weather].MinT
        [Weather].Radn
        [Weather].Rain
    Fertiliser
    Irrigation
    Operations
    Soil: SoilType=Black Vertosol; LocalName=Waco; Site=Jimbour; NearestTown=Jimbour, Q 4352; Region=South East Queensland; NaturalVegetation=Grassland, mainly Qld bluegrass; Latitude=0; Longitude=0
      Water
        Thickness  BD    AirDry  LL15  DUL   SAT
        150        1.02  0.15    0.29  0.54  0.59
        150        1.03  0.26    0.29  0.53  0.58
        300        1.02  0.29    0.29  0.54  0.59
        300        1.02  0.29    0.29  0.54  0.58
        300        1.06  0.3     0.3   0.52  0.57
        300        1.11  0.31    0.31  0.5   0.55
        300        1.12  0.32    0.32  0.5   0.55
        300        1.15  0.33    0.33  0.48  0.53
        300        1.18  0.34    0.34  0.47  0.52
        300        1.2   0.35    0.35  0.46  0.51
        300        1.25  0.36    0.36  0.44  0.49
        SoilCrop WheatSoil
          LL=[0.29, 0.29, 0.32, 0.38, 0.39, 0.39, 0.41, 0.48, 0.47, 0.46, 0.44]
          KL=[0.1, 0.1, 0.08, 0.06, 0.04, 0.02, 0.01, 0, 0, 0, 0]
          XF=[1, 1, 1, 1, 1, 1, 1, 0, 0, 0, 0]
        SoilCropOilPalm OilPalm: XF=[1, 1, 1, 1, 1, 1, 1, 1, 1, 0, 0, 0]
          KL=[0.06, 0.04, 0.03, 0.02, 0.02, 0.02, 0.01, 0.01, 0.01, 0, 0, 0]
      SoilWater: residueinterception=0; SummerDate=1-Nov; SummerU=6; SummerCona=3.5; WinterDate=1-Apr; WinterU=6; WinterCona=3.5; DiffusConst=40; DiffusSlope=16; Salb=0.13; CN2Bare=73; CNRed=20; CNCov=0.8; max_pond=0; Thickness=[150, 150, 300, 300, 300, 300, 300, 300, 300, 300, 300]; SWCON=[0.3, 0.3, 0.3, 0.3, 0.3, 0.3, 0.3, 0.3, 0.3, 0.3, 0.3]
      SoilNitrogen: fom_type=[default, manure, mucuna, lablab, shemp, stable]; fract_carb=[0.2, 0.3, 0.54, 0.57, 0.45, 0]; fract_cell=[0.7, 0.3, 0.37, 0.37, 0.47, 0.1]; fract_lign=[0.1, 0.4, 0.09, 0.06, 0.08, 0.9]; wfpsN2N2O_x=[22, 88]; wfpsN2N2O_y=[0.1, 1]
      SoilOrganicMatter: RootCN=40; RootWt=200; SoilCN=12.5; EnrACoeff=7.4; EnrBCoeff=0.2; OCUnits=Total
        Thickness  OC    FBiom  FInert
        150        1.04  0.025  0.4
        150        0.89  0.02   0.6
        300        0.89  0.015  0.8
        300        0.89  0.01   0.9
        300        0.77  0.01   0.95
        300        0.45  0.01   0.95
        300        0.27  0.01   0.95
        300        0.22  0.01   0.95
        300        0.16  0.01   0.95
        300        0.13  0.01   0.95
        300        0.12  0.01   0.95
      Analysis: PHUnits=Water; BoronUnits=HotWater
        Thickness  EC    PH
        150        0.2   8.4
        150        0.25  8.8
        300        0.31  9
        300        0.4   9.2
        300        0.59  9.2
        300        0.84  9.1
        300        0.93  9
        300        1.01  9
        300        1.06  8.9
        300        1.05  8.9
        300        1.01  8.9
      InitialWater Initial water: PercentMethod=FilledFromTop; FractionFull=1
      Sample: NO3Units=ppm; NH4Units=ppm; SWUnits=Volumetric; OCUnits=Total; PHUnits=Water
        Thickness  NO3    NH4
        150        6.503  0.599004
        150        2.101  0.100001
        300        2.101  0.100001
        300        1.701  0.100001
        300        1.701  0.100001
        300        1.701  0.100001
        300        1.701  0.100001
        300        1.701  0.100001
        300        1.701  0.100001
        300        1.701  0.100001
        300        1.701  0.100001
    SurfaceOrganicMatter: PoolName=wheat; type=wheat; mass=1000; standing_fraction=0; cnr=80; CriticalResidueWeight=2000; OptimumDecompTemp=20; MaxCumulativeEOS=20; CNRatioDecompCoeff=0.277; CNRatioDecompThreshold=25; TotalLeachRain=25; MinRainToLeach=10; CriticalMinimumOrganicC=0.004; DefaultCPRatio=0; DefaultStandingFraction=0; StandingExtinctCoeff=0.5; FractionFaecesAdded=0.5
      Pools:
        {PoolName=wheat, ResidueType=wheat, Mass=1000, CNRatio=80, StandingFraction=0}
      ResidueTypes ResidueTypesList: LoadFromResource=ResidueTypes
        ResidueType wheat: fom_type=inert; fraction_C=0.08; po4ppm=10; nh4ppm=10; no3ppm=10; specific_area=0.0001; cf_contrib=1; pot_decomp_rate=0.1; fr_c=[0.3, 0.3, 0.4]; fr_n=[0.3, 0.3, 0.4]; fr_p=[0.3, 0.3, 0.4]
      TillageTypes TillageTypesList
    MicroClimate: air_pressure=1010; soil_emissivity=0.96; sun_angle=15; soil_heat_flux_fraction=0.4; night_interception_fraction=0.5; windspeed_default=3; refheight=2; albedo=0.15; emissivity=0.96; gsmax=0.01; r50=200; a_interception=0; b_interception=1; c_interception=0; d_interception=0; soil_albedo=0.23
    Log
  Folder Crops
    Plant15 Wheat: AutoHarvest=true; CropType=Wheat
    OilPalm
      zero: interception, UnderstoryCoverMax, UnderstoryLegumeFraction, InterceptionFraction, MaximumRootDepth, RootDepth, DltDM, ReproductiveGrowthFraction, UnderstoryCoverGreen
    Plant Potato: CropType=Potato
    Slurp: CropType=Slurp; localLAIGreen=5; localLAItot=5; localLightExtinction=0.6; localCanopyHeight=500; localCanopyDepth=500; localMaximumStomatalConductance=0.011; localFrgr=1; localDemandWater=10; localDemandNitrogen=5; localKNO3=0.1; localKNH4=0; localRootDepth=500; localSurfaceRootLengthDensity=0.05
    AgPasture: alt_N_uptake=no; SwardName=AgPasture; NumSpecies=1; WaterUptakeSource=calc; SpeciesName=[Ryegrass]; SpeciesNType=[grass]; SpeciesCType=[C3]; InitialDMShoot=[2000]; InitialDMRoot=[500]; InitialRootDepth=[750]; MinimumGreenWt=[300]; ExpoLinearDepthParam=0.1; ExpoLinearCurveParam=3
    Folder Wheat cultivars
      Folder Yield Prophet cultivars
        Cultivar Early
          Alias=[agtscythe, arrino, bonnie_rock, bowerbird, crusader, dart, drysdale, emurock, hunter, hybrid_mercury, hyperno, imposeclplus, kalka, kirchauff, kukri, livingston, mace, ouyen, perengori, ruby, tamaroi, wyalkatchem, young]
          Command:
            [Phenology].Vernalisation.VernSens = 2.3
            [Phenology].Vernalisation.PhotopSens = 3.2
        Cultivar EarlyMid
          Alias=[annuello, barunga, carnamah, catalina, clf_stiletto, cobra, corack, correll, diamondbird, estoc, frame, gladius, goroke, grenadeclplus, guardian, halbred, hartog, impala, justica, kord, merlin, mitre, pugsley, shield, spitfire, stiletto, sunguard, sunstate, ventura, yallaroi, yawa, yitpi]
          Command:
            [Phenology].Vernalisation.VernSens = 1.5
            [Phenology].Vernalisation.PhotopSens = 3.0
        Cultivar VeryEarly
          Alias=[h45, h46, saintly, silverstar, tamarinrock, waagan, westonia, wollaroi, zippy]
          Command:
            [Phenology].Vernalisation.VernSens = 1.5
            [Phenology].Vernalisation.PhotopSens = 1.5
        Cultivar Mid
          Alias=[arrivato, babbler, barham, baxter, buckley, camm, carinya, clf-jnz, derrimut, dollarbird, elmoreclplus, justicaclplus, saphire, wallup]
          Command:
            [Phenology].Vernalisation.VernSens = 1.5
            [Phenology].Vernalisation.PhotopSens = 3.5
        Cultivar MidPlus: Alias=[bellaroi, lang, caparoi, suntop]
          Command:
            [Phenology].Vernalisation.VernSens = 2.0
            [Phenology].Vernalisation.PhotopSens = 3.5
        Cultivar MidLate
          Alias=[braewood, calingiri, chara, endure, envoy, gauntlet, gazelle, giles, magenta, phantom, sentinel, sunlin, sunvale, wylie]
          Command:
            [Phenology].Vernalisation.VernSens = 2.8
            [Phenology].Vernalisation.PhotopSens = 3.0
        Cultivar Late: Alias=[beaufont, bolac, forrest, kelallac, preston, strzelecki]
          Command:
            [Phenology].Vernalisation.VernSens = 2.5
            [Phenology].Vernalisation.PhotopSens = 4.0
        Cultivar WinterWheat: Alias=[lorikeet, wylah, rosella, whistler, wedgetail]
          Command:
            [Phenology].Vernalisation.VernSens = 3.9
            [Phenology].Vernalisation.PhotopSens = 3.9
            [Phenology].FloralInitiationToFlowering.Target.Value = 380
        Cultivar Axe: Alias=axe
          Command:
            [Phenology].Vernalisation.VernSens = 2.0
            [Phenology].Vernalisation.PhotopSens = 3.0
        Cultivar Scout: Alias=[scout, l]
          Command:
            [Phenology].Vernalisation.VernSens = 1.8
            [Phenology].Vernalisation.PhotopSens = 3.5
            [Phenology].StartGrainFillToEndGrainFill.Target.Value = 550
        Cultivar Lincoln: Alias=lincoln
          Command:
            [Phenology].Vernalisation.VernSens = 1.8
            [Phenology].Vernalisation.PhotopSens = 3.5
        Cultivar GregoryLancer: Alias=[gregory, lancer]
          Command:
            [Phenology].Vernalisation.VernSens = 2.7
            [Phenology].Vernalisation.PhotopSens = 3.2
        Cultivar Eaglehawk: Alias=eaglehawk
          Command:
            [Phenology].Vernalisation.VernSens = 2.5
            [Phenology].Vernalisation.PhotopSens = 2.5
            [Phenology].EndOfJuvenileToFloralInitiation.Target.Value = 500
            [Phenology].FloralInitiationToFlowering.Target.Value = 655
            [Phenology].FloweringToStartGrainFill.Target.Value = 250
            [Phenology].StartGrainFillToEndGrainFill.Target.Value = 500
        Cultivar Marombi: Alias=[marombi, -]
          Command:
            [Phenology].Vernalisation.VernSens = 3.9
            [Phenology].Vernalisation.PhotopSens = 4.0
            [Phenology].FloralInitiationToFlowering.Target.Value = 455
    Folder OilPalm cultivars
      Cultivar Dami
        Command:
          [FrondMaxArea].XYPairs.X = 0,2,4.5,8.5,14
          [FrondMaxArea].XYPairs.Y = 0.1,1,7,12,14
      Cultivar SuperFamily
        Command:
          [FrondMaxArea].XYPairs.X = 0,2,4.5,8.5,14
          [FrondMaxArea].XYPairs.Y = 0.1,0.9,0.63,10.8,12.6
    Plant MCSP: CropType=MCSP
      OrganArbitrator Arbitrator: NArbitrationOption=RelativeAllocation; DMArbitrationOption=RelativeAllocation
      Phenology: Emerged=false
        AirTemperatureFunction ThermalTime
          XYPairs: X=[0, 30, 40]; Y=[0, 30, 0]
        GerminatingPhase Germinating: Start=Sowing; End=Germination
        EmergingPhase Emerging: Start=Germination; End=Emergence; ShootLag=0; ShootRate=0
          VariableReference ThermalTime: VariableName=[Phenology].ThermalTime.Value
        GenericPhase CanopyExpanding: Start=Emergence; End=StartReproductive
          Constant Target: Value=1000
          VariableReference ThermalTime: VariableName=[Phenology].ThermalTime.Value
        GenericPhase YieldIncreasing: Start=StartReproductive; End=StartSenescence
          Constant Target: Value=600
          VariableReference ThermalTime: VariableName=[Phenology].ThermalTime.Value
        GenericPhase Senescing: Start=StartSenescence; End=EndReproductive
          Constant Target: Value=600
          VariableReference ThermalTime: VariableName=[Phenology].ThermalTime.Value
        GenericPhase Maturing: Start=EndReproductive; End=Maturity
          Constant Target: Value=600
          VariableReference ThermalTime: VariableName=[Phenology].ThermalTime.Value
        EndPhase ReadyForHarvest: Start=Maturity; End=Unused
          VariableReference ThermalTime: VariableName=[Phenology].ThermalTime.Value
        AccumulateFunction AccumulatedThermalTime: StartStageName=Emergence; EndStageName=Maturity
          VariableReference ThermalTime: VariableName=[Phenology].ThermalTime.Value
        AccumulateFunction AccumulatedEmergingThermalTime: StartStageName=Germination; EndStageName=Emergence
          VariableReference ThermalTime: VariableName=[Phenology].ThermalTime.Value
      Root: InitialDM=0.2; SpecificRootLength=40000; KNO3_yProperty=[0.02, 0.02]; KNO3_xRootLength=[0, 0.003]; KNH4_yProperty=[0, 0]; KNH4_xRootLength=[0, 0.003]; NuptakeSupply=0
        CompositeBiomass Live: Propertys=[[Root].LayerLive]
        CompositeBiomass Dead: Propertys=[[Root].LayerDead]
        LinearInterpolationFunction KLModifier: XProperty=[Leaf].LAI
          XYPairs: X=[0, 200, 1500]; Y=[1, 1, 0]
        Constant SoilWaterEffect: Value=1
        Constant MaxDailyNUptake: Value=12
        Constant SenescenceRate: Value=0
        PhaseLookup PartitionFraction
          PhaseLookupValue Growing: Start=Germination; End=EndReproductive
            VariableReference PartitionFraction: VariableName=[RootProportion].Value
          PhaseLookupValue Dead: Start=EndReproductive; End=Maturity
            Constant Zero: Value=0
        Constant MaximumNConc: Value=0.009
        Constant MinimumNConc: Value=0.009
        PhaseBasedSwitch NitrogenDemandSwitch: Start=Germination; End=Maturity
        Constant TemperatureEffect: Value=1
        Constant MaximumRootDepth: Value=1500
        MultiplyFunction RootFrontVelocity
          LessThanFunction RootFrontVelocity
            VariableReference: VariableName=[Phenology].AccumulatedThermalTime.Value
            Constant Criteria: Value=2010
            Constant IfTrue: Value=10
            Constant IfFalse: Value=0
          VariableReference ThermalTime: VariableName=[Phenology].ThermalTime.Value
      SimpleLeaf Leaf
        zero: BiomassYesterday, LAI, Height, FRGR, PotentialEP, K, KDead, DeltaBiomass, LAIDead, WaterAllocation
        Biomass Live
        Biomass Dead
        Constant NConc: Value=0.008
        PhaseLookup NitrogenDemandSwitch
          PhaseLookupValue PreErmergence: Start=Sowing; End=Emergence
            Constant Function: Value=0
          PhaseLookupValue Expanding: Start=Emergence; End=StartSenescence
            Constant Function: Value=1
          PhaseLookupValue Senescence: Start=StartSenescence; End=EndReproductive
            Constant: Value=0
          PhaseLookupValue Mature: Start=EndReproductive; End=Maturity
            Constant: Value=0
        DeltaFunction PotentialBiomass
          SigmoidFunction2 Integral: Xo=1080; b=216
            VariableReference Ymax: VariableName=[Ymax].Value
            VariableReference XValue: VariableName=[Phenology].AccumulatedThermalTime.Value
        PartitionFractionDemandFunction DMDemandFunction
          PhaseLookup PartitionFraction
            PhaseLookupValue PreErmergence: Start=Sowing; End=Emergence
              Constant Function: Value=0
            PhaseLookupValue Expanding: Start=Emergence; End=StartReproductive
              SubtractFunction DMPartitionCoefficient
                Constant: Value=1
                VariableReference RootFraction: VariableName=[RootProportion].Value
            PhaseLookupValue YieldIncreasing: Start=StartReproductive; End=StartSenescence
              DivideFunction
                SubtractFunction Stover
                  MultiplyFunction StoverAtMaturity
                    VariableReference TotalBiomassAtMaturity: VariableName=[Ymax].Value
                    SubtractFunction AboveGroundProportion
                      Constant: Value=1
                      VariableReference RootFraction: VariableName=[RootProportion].Value
                    SubtractFunction StoverProportion
                      Constant: Value=1
                      VariableReference HI: VariableName=[HarvestIndex].Value
                  MultiplyFunction StoverAtStartReproductive
                    VariableReference BiomassAtStartReproductive: VariableName=[TotalBiomassAtStartReproductive].Value
                    SubtractFunction AboveGroundProportion
                      Constant: Value=1
                      VariableReference RootFraction: VariableName=[RootProportion].Value
                SubtractFunction TotalBiomass
                  VariableReference BiomassAtStartSenescence: VariableName=[TotalBiomassAtStartSenescence].Value
                  VariableReference BiomassAtStartReproductive: VariableName=[TotalBiomassAtStartReproductive].Value
            PhaseLookupValue Maturing: Start=StartSenescence; End=Maturity
              Constant Function: Value=0
        PhaseLookup CoverFunction
          PhaseLookupValue PreErmergence: Start=Sowing; End=Emergence
            Constant Function: Value=0
          PhaseLookupValue Expanding: Start=Emergence; End=StartSenescence
            SigmoidFunction2 SigCoverFunction: Xo=540; b=120
              Constant Ymax: Value=0.97
              VariableReference XValue: VariableName=[Phenology].AccumulatedThermalTime.Value
          PhaseLookupValue Senescence: Start=StartSenescence; End=Maturity
            MultiplyFunction TotalCoverLoss
              OnEventFunction MaxCoverFunction: SetEvent=StartSenescence; ReSetEvent=never
                VariableReference PostEventValue: VariableName=[Leaf].CoverFunction.Expanding.SigCoverFunction.Ymax.Value
                VariableReference PostEventValue1: VariableName=[Leaf].CoverFunction.Expanding.SigCoverFunction.Ymax.Value
              SubtractFunction CoverLossFactor
                Constant: Value=0.999
                MultiplyFunction PercentComplete
                  DivideFunction SenescenceRate
                    Constant Inverse: Value=1
                    VariableReference Duration: VariableName=[Phenology].Senescing.Target.Value
                  SubtractFunction TTSenesce
                    VariableReference XValue: VariableName=[Phenology].AccumulatedThermalTime.Value
                    OnEventFunction TTToSenescence: SetEvent=StartSenescence; ReSetEvent=Maturity
                      Constant PreEventValue: Value=3000
                      VariableReference PostEventValue: VariableName=[Phenology].AccumulatedThermalTime.Value
          PhaseLookupValue Mature: Start=Maturity; End=Unused
            Constant: Value=0
        Constant FRGRFunction: Value=1
        Constant HeightFunction: Value=150
        Constant ExtinctionCoefficientFunction: Value=0.5
      GenericAboveGroundOrgan Product
        Biomass Live
        Biomass Dead
        Constant MaximumNConc: Value=0.012
        Constant MinimumNConc: Value=0.008
        PartitionFractionDemandFunction DMDemandFunction
          PhaseLookup PartitionFraction
            PhaseLookupValue PreErmergence: Start=Sowing; End=Emergence
              Constant Function: Value=0
            PhaseLookupValue Expanding: Start=Emergence; End=StartReproductive
              Constant Function: Value=0
            PhaseLookupValue YieldIncreasing: Start=StartReproductive; End=StartSenescence
              SubtractFunction ProductProportion
                Constant: Value=1
                VariableReference RootFraction: VariableName=[RootProportion].Value
                VariableReference StoverFraction
                  VariableName=[Leaf].DMDemandFunction.PartitionFraction.YieldIncreasing.Value
            PhaseLookupValue Maturing: Start=StartSenescence; End=EndReproductive
              SubtractFunction DMPartitionCoefficient
                Constant: Value=1
                VariableReference RootFraction: VariableName=[RootProportion].Value
        SubtractFunction WaterContent
          Constant One: Value=1
          VariableReference DMcontent: VariableName=[ProductDMProportion].Value
      Nodule: RespiredWt=0; PropFixationDemand=0; _NFixed=0
        Biomass Live
        Biomass Dead
        Constant FixationSwitch: Value=0
        Constant MaximumNConc: Value=0
        Constant MinimumNConc: Value=0
        Constant DMDemandFunction: Value=0
        Constant FT: Value=1
        Constant FW: Value=1
        Constant FWlog: Value=0.01
        Constant FixationMetabolicCost: Value=0
        Constant SpecificNitrogenaseActivity: Value=0
      Summariser
        CompositeBiomass Total
          Propertys=[[Leaf].Live, [Leaf].Dead, [Product].Live, [Product].Dead, [Root].Live, [Root].Dead]
      Constant ExpectedYield: Value=800
      LinearInterpolationFunction HarvestIndex: XProperty=[ExpectedYield].Value
        XYPairs: X=[0, 696, 1392]; Y=[0.14, 0.46, 0.78]
      Constant RootProportion: Value=0.1
      Constant ProductDMProportion: Value=0.87
      MultiplyFunction DryYield
        VariableReference FreshYld: VariableName=[ExpectedYield].Value
        VariableReference DMPercent: VariableName=[ProductDMProportion].Value
      SigmoidFunction2 TotalBiomassAtStartReproductive: Xo=1080; b=216
        VariableReference Ymax1: VariableName=[Ymax].Value
        VariableReference XValue: VariableName=[Phenology].CanopyExpanding.Target.Value
      SigmoidFunction2 TotalBiomassAtStartSenescence: Xo=1080; b=216
        AddFunction XValue
          VariableReference CanopyExpandingTT: VariableName=[Phenology].CanopyExpanding.Target.Value
          VariableReference YieldIncreasingTT: VariableName=[Phenology].YieldIncreasing.Target.Value
        VariableReference Ymax1: VariableName=[Ymax].Value
      DivideFunction Ymax
        VariableReference DryYield: VariableName=[DryYield].Value
        VariableReference HarvestIndex: VariableName=[HarvestIndex].Value
        SubtractFunction AboveGroundDM
          Constant Unity: Value=1
          VariableReference RootFraction: VariableName=[RootProportion].Value
      Cultivar Dash
      Cultivar Barley_Spring: Alias=Barley_Spring
        Command:
          [Root].MaximumRootDepth.Value = 1000
          [Root].RootFrontVelocity.RootFrontVelocity.Criteria.Value = 2010
          [Root].RootFrontVelocity.RootFrontVelocity.IfTrue.Value = 0.5
          [Leaf].CoverFunction.Expanding.SigCoverFunction.Xo = 540
          [Leaf].CoverFunction.Expanding.SigCoverFunction.b = 120
          [Leaf].CoverFunction.Expanding.SigCoverFunction.Ymax.Value = 0.97
          [Leaf].PotentialBiomass.Integral.Xo = 1080
          [Leaf].PotentialBiomass.Integral.b = 216
          [TotalBiomassAtStartReproductive].Xo = 1080
          [TotalBiomassAtStartReproductive].b = 216
          [TotalBiomassAtStartSenescence].Xo = 1080
          [TotalBiomassAtStartSenescence].b = 216
          [ExpectedYield].Value = 800
          [RootProportion].Value = 0.1
          [HarvestIndex].XYPairs.X = 0,1150
          [HarvestIndex].XYPairs.Y = 0.14,0.6
          [ProductDMProportion].Value = 0.87
          [Phenology].CanopyExpanding.Target.Value = 1021
          [Phenology].YieldIncreasing.Target.Value= 479
          [Phenology].Senescing.Target.Value = 300
          [Phenology].Maturing.Target.Value = 300
          [leaf].NConc.Value = 0.005
          [Product].MinimumNConc.Value = 0.005
          [Product].MaximumNConc.Value = 0.012
          [Root].MinimumNConc.Value = 0.009
          [Root].MaximumNConc.Value = 0.009
  Folder Data store and analysis models
    DataStore
    Input
    PredictedObserved
    TimeSeriesStats: TableName=PredictedObserved
    Probability: Exceedence=true
  Tests
    Test:
      SimulationName  TableName  Type            ColumnNames  Parameters
      simulation      Report     EqualTo         column       value
      simulation      Report     LessThan        column       value
      simulation      Report     GreaterThan     column       value
      simulation      Report     AllPos          column       -
      simulation      Report     Between         column       value1,value2
      simulation      Report     Mean            column       5,value
      simulation      Report     Tolerance       column       1,5
      simulation      Report     CompareToInput  column       1,5
  Experiment
    Factors
      Factor
    Simulation Base: Area=0; Slope=0
      Clock: StartDate=1940-01-01; EndDate=1989-12-31
      Summary
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